// SBML level 2 version 4

function Constant_flux_irreversible(v)
  v;
end
Constant_flux_irreversible is "Constant flux (irreversible)";

function _1_reactant_3_activators_KVW(Vf, r1, A1, n1, A2, n2, A3, n3)
  Vf*r1*(n1*A1 + n2*A2 + n3*A3);
end
_1_reactant_3_activators_KVW is "1 reactant, 3 activators, KVW";

function _1sub_1_activator_1_parameter(substrate, a1, k1)
  substrate*a1*k1;
end

function _1sub_2_activators_2_parameters(substrate, k1, a1, k2, a2)
  substrate*(k1*a1 + k2*a2);
end

function Constant_Flux_3_activators(c, k, A, n, kA, B, kB, C, kC)
  c + k*(A^n/(A^n + kA^n) + B^n/(B^n + kB^n) + C^n/(C^n + kC^n));
end
Constant_Flux_3_activators is "Constant Flux, 3 activators";

function Constant_Flux_1_activator(k, A, n, kA, c)
  c + k*(A^n/(A^n + kA^n));
end
Constant_Flux_1_activator is "Constant Flux, 1 activator";

function _1_sub_5_activators(k, substrate, A, n, kA, B, kB, C, kC, D, kD, E, kE)
  k*substrate*(A^n/(A^n + kA^n) + B^n/(B^n + kB^n) + C^n/(C^n + kC^n) + D^n/(D^n + kD^n) + E^n/(E^n + kE^n));
end

function _1_sub_3_activators(k, substrate, A, n, kA, B, kB, C, kC)
  k*substrate*(A^n/(A^n + kA^n) + B^n/(B^n + kB^n) + C^n/(C^n + kC^n));
end

function _1_sub_2_activators(k, substrate, A, n, kA, B, kB)
  k*substrate*(A^n/(A^n + kA^n) + B^n/(B^n + kB^n));
end

function bact_repo(k, sub, c)
  k*sub/(c + sub);
end

function iDC_Ep_replenishment(V, s, k, P)
  V*(s - k*P);
end

function _1_sub_2_act_2_params_1_const(substrate, k, k1, a1, k2, a2)
  substrate*k*(k1*a1 + k2*a2);
end

function _1_sub_3_activators_3_parameters(substrate, k1, a1, k2, a2, k3, a3)
  substrate*(k1*a1 + k2*a2 + k3*a3);
end

model MODEL1307130000()
  // Carbo2013 - Mucosal Immune Response during H.pylori Infection
  // biomodels.db:MODEL1307130000
  // biomodels.db:BIOMD0000000480
  // isDescribedBy doi:10.1371%2Fjournal.pone.0073365
  // isVersionOf GO:0002456 GO:0050829
  // hasTaxon taxonomy:10090
  // hasProperty mamo:MAMO_0000046

  // Compartments:
  compartment Lumen = 1;  // isVersionOf FMA:62950
  compartment Lamina_Propia = 1;  // isVersionOf BTO:0002330
  compartment Epithelium = 1;  // isVersionOf BTO:0000416
  compartment Gastric_Lymph_Node = 1;  // FMA:12796

  // Species:
  species HP_Lumen in Lumen = HP_Dose_Response*HP_Dose;  // taxonomy:210
  species $HP_Dose in Lumen = 0.0534;  // isVersionOf efo:0000428
  species LB in Lumen = LB_Dose;  // isVersionOf CHEBI:73623 taxonomy:2
  species LB_Dose in Lumen = 1;  // isVersionOf efo:0000428
  species nTh1 in Lumen = 1;  // isVersionOf CL:0000545
  species nTh1_LP in Lumen = 150000;  // isVersionOf CL:0000545; occursIn BTO:0002330
  species nTh17 in Lumen = 1;  // isVersionOf CL:0000899
  species nTh17_LP in Lumen = 150000;  // occursIn BTO:0002330; isVersionOf CL:0000899
  species nTreg in Lumen = 1;  // isVersionOf CL:0000792
  species nTreg_LP in Lumen = 150000;  // isVersionOf CL:0000792; occursIn BTO:0002330
  species eDC_Lamina_Propia in Lamina_Propia = 1;  // isVersionOf CL:0000451
  species Th1_Lamina_Propia in Lamina_Propia = 0;  // isVersionOf CL:0000545
  species iTreg_Lamina_Propia in Lamina_Propia = 0;  // isVersionOf CL:0000792; hasProperty PATO:0002355
  species Th17_Lamina_Propia in Lamina_Propia = 0;  // isVersionOf CL:0000899
  species M1 in Lamina_Propia = 0;  // isVersionOf CL:0000863
  species M2 in Lamina_Propia = 0;  // isVersionOf CL:0000890
  species M0 in Lamina_Propia = 1000000;  // isVersionOf CL:0000235 PATO:0002100
  species tDC_Lamina_Propia in Lamina_Propia = 0;  // isVersionOf CL:0000451
  species emT in Lamina_Propia = 1198199;  // isVersionOf FMA:85358
  species HP_Lamina_Propia in Lamina_Propia = 0;  // taxonomy:210
  species iDC_Lamina_Propia in Lamina_Propia = 1000000;  // isVersionOf CL:0000451; hasProperty PATO:0002355
  species $TotalDC_Lamina_Propia in Lamina_Propia;  // isVersionOf CL:0000451
  species $TotalM in Lamina_Propia;  // isVersionOf CL:0000235
  species $TotalT_Lamina_Propia in Lamina_Propia;  // isVersionOf FMA:85358
  species eDCLB_Lamina_Propia in Lamina_Propia = 1;  // isVersionOf CHEBI:73623 taxonomy:2 CL:0000451
  species pEC in Lamina_Propia = 1;  // isVersionOf taxonomy:562
  species E in Epithelium = 10000;  // isVersionOf CL:0000066
  species Ep in Epithelium = 0;  // isVersionOf CL:0000066
  species Edead in Epithelium = 0;  // isVersionOf CL:0000066; hasProperty PATO:0001167
  species iDC_Epithelium in Epithelium = 4501140;  // isVersionOf CL:0000451; hasProperty PATO:0002355
  species eDC_Gastric_Lymph_Node in Gastric_Lymph_Node = 0;  // isVersionOf CL:0000451
  species tDC_Gastric_Lymph_Node in Gastric_Lymph_Node = 0;  // isVersionOf CL:0000451
  species nT in Gastric_Lymph_Node = 10000000;  // isVersionOf FMA:85358
  species cmT in Gastric_Lymph_Node = 4.17752e7;  // isVersionOf FMA:85358
  species Th17_Gastric_Lymph_Node in Gastric_Lymph_Node = 0;  // isVersionOf CL:0000899
  species Th1_Gastric_Lymph_Node in Gastric_Lymph_Node = 0;  // isVersionOf CL:0000545
  species iTreg_Gastric_Lymph_Node in Gastric_Lymph_Node = 0;  // hasProperty PATO:0002355
  species $TotalDC_Gastric_Lymph_Node in Gastric_Lymph_Node;  // isVersionOf CL:0000451
  species $TotalT_Gastric_Lymph_Node in Gastric_Lymph_Node;  // isVersionOf FMA:85358
  // Multiplied by 0.01 to account for the fact that the data is in percent.
  species $TotalT_s in Gastric_Lymph_Node; TotalT_s is "TotalT-s";  // isVersionOf FMA:85358
  species eDCLB_Gastric_Lymph_Node in Gastric_Lymph_Node = 1;  // hasPart CHEBI:73623 taxonomy:2 CL:0000451

  // Parameters:
  // probalility that HP induces effector responce in M0 and iDC
  vHP = 0.5;
  var vHP2;
  // probability that TEM or TCM will be stimulated to iTreg when contacted by tDC
  aTreg = 1;
  // probability that TEM or TCM will be stimulated to Th17 when contacted by eDC
  aTh17 = 0.3;
  // probability that TEM or TCM will be stimulated to Th1 when contacted by eDC
  var aTh1;
  // contact rate between bacteria and Epithelium (invasion of mucous layer)
  kEB = 1e-6;
  // rate of T-cell flow from GLN to LP
  eIE = 0.5; eIE is "@eIE";
  // rate of cell flow in lymph from LP to GLN
  eEI = 1; eEI is "@eEI";
  // probability that nT will be stimulated to iTreg when contacted by tDC
  atreg = 1e-6;
  // probability that nT will be stimulated to Th1 when contacted by eDC
  var ath1;
  // probability that nT will be stimulated to Th17 when contacted by eDC
  ath17 = 3e-7;
  // Rate at which activated T-cells become de-activated in the LP
  uT = 0.143; uT is "@uT";
  // percent of de-activated T-cells that become memory T-cells
  vT = 0.1; vT is "@vT";
  var toemT;
  var tcmT;
  var pt;
  var pT;
  // death rate of HP
  uHP = 1;
  // birth rate of HP
  lHP = 2;
  // turnover rate of E cells
  uE = 1; uE is "@uE";
  var Stim_emT_Th17;
  var Stim_emT_Th1;
  var Stim_emT_iTreg;
  var Stim_cmT_Th1;
  var Stim_cmT_Th17;
  var Stim_cmT_iTreg;
  var Stim_t_Th1;
  var Stim_t_Th17;
  var Stim_t_iTreg;
  // extent to which Ep secretes M1 and Th17-inducing cytokines
  Bc = 1000;
  // rate at which EC and Ep are killed by cytotoxic factors secreted by Th17 and Th1
  uCE = 0.0001;
  // Number of nT recruited by each eDC in GLN
  et = 100; et is "@et";
  // out-flow rate of nT from GLN
  ut = 1; ut is "@ut";
  // in-flow rate of nT in to GLN
  lt = 100000000; lt is "@lt";
  // extent to which Ep becomes more permissive to bacterial passage
  Bp = 1;
  var cyto_change;
  // rate at which E and Ep are killed by cytotoxic factors secreted by M1
  uM1 = 0.0001;
  // extent to which Ep secretes microbicides (defensin)
  Bd = 1;
  // extent to which Ep secretes chemoattractants
  Br = 1000;
  // number of resting immune cells recruited by M1, eDC to LP
  er = 1000;
  // contact rate between iTreg and eDC
  kTD = 1e-6;
  // out-flow rate of iDC
  udi_LP = 1;
  // out-flow rate of M0
  um = 1;
  // contact rate in lumen
  k_lumen = 1e-6;
  // contact rate in LP
  k_LP = 1e-6;
  // number of nascent T-cells from one stimulated TEM- uninhibited
  pt_0 = 512; pt_0 is "@pt_0";
  // number of nascent T-cells from one stimulated TCM or nT- uninhibited
  pT_0 = 128; pT_0 is "@pT_0";
  // extent to which iTreg inhibits T-cell proliferation
  m_reg = 0.01;
  // extent to which HP inhibits T-cell proliferation
  m_HP = 0.01;
  // contact rate in GLN
  kGLN = 1e-6;
  var HP_Ep_Lumen;
  var iDCtoeDC_Lumen;
  var iDCtotDC_Lumen;
  var iDCtoeDC_LP;
  var iDCtotDC_LP;
  var M0toM1_LP;
  var M0toM2_LP;
  // Rate at which M0 becomes M1 or M2 when in contact with cytokine-secreting immune cells
  vm = 1;
  // rate of M1 and M2 removal
  uMA = 0.02187762;
  n = 2;
  var T_deactivation;
  // fraction of iDC in LP that are in contact with epithilial barrier and have contact with lumen environment
  iDC_percentage = 0.01;
  // in-flow rate of M0
  lm = 100000;
  // in-flow rate if iDC
  ld = 1000000;
  // The selection factor for viable H. pylori following inoculation
  HP_Dose_Response = 1e-6;
  var iTreg_NS_rel; iTreg_NS_rel is "iTreg NS (rel)";
  var Th1_NS_rel; Th1_NS_rel is "Th1 NS (rel)";
  var Th17_NS_rel; Th17_NS_rel is "Th17 NS (rel)";
  Stimulation = 10;
  var iTreg_S_rel; iTreg_S_rel is "iTreg S (rel)";
  var Th1_S_rel; Th1_S_rel is "Th1 S (rel)";
  var Th17_S_rel; Th17_S_rel is "Th17 S (rel)";
  ud = 0.5; ud is "@ud";
  vLB = 0.5;
  var vLB2;
  k_LB = 1;
  var iDCtotDC_LB;
  var iDCtoeDC_LB;
  var new_iTreg_GLN;
  var new_Th1_GLN;
  var new_Th17_GLN;
  var new_emT_iTreg;
  var new_emT_Th1;
  var new_emT_Th17;
  er_i = 10000;
  et_i = 10000;
  K_r17 = 1;
  K_17r = 2.5;
  v21 = 2;
  v12 = 1;
  ri_I = 100000;
  ir_I = 100000;
  phi_HP = 0.001;
  uLB = 0.0714;
  ath17LB = 3e-7;
  var ath1LB;
  aTh17LB = 0.3;
  var aTh1LB;
  var Stim_emT_Th17LB;
  var Stim_emT_Th1LB;
  var Stim_cmT_Th1LB;
  var Stim_cmT_Th17LB;
  var Stim_t_Th1LB;
  var Stim_t_Th17LB;
  vEC = 0;
  Bc2 = 1;
  k_LP1 = 0.62677;
  Initial_for_aTh17 = aTh17;
  Initial_for_ath17 = ath17;

  // Assignment rules:
  vHP2 := 1 - vHP;
  aTh1 := 1 - Initial_for_aTh17;
  ath1 := 1e-6 - Initial_for_ath17;
  tcmT := uT*vT*0.6;
  toemT := uT*0.4*vT;
  TotalDC_Lamina_Propia := eDC_Lamina_Propia + iDC_Lamina_Propia + tDC_Lamina_Propia + iDC_Epithelium;
  TotalM := M0 + M1 + M2;
  TotalT_Lamina_Propia := Th1_Lamina_Propia + Th17_Lamina_Propia + iTreg_Lamina_Propia + emT;
  TotalDC_Gastric_Lymph_Node := eDC_Gastric_Lymph_Node + tDC_Gastric_Lymph_Node;
  TotalT_Gastric_Lymph_Node := Th1_Gastric_Lymph_Node + Th17_Gastric_Lymph_Node + iTreg_Gastric_Lymph_Node + cmT + nT;
  TotalT_s := 0.01*(Th1_Gastric_Lymph_Node + Th17_Gastric_Lymph_Node + iTreg_Gastric_Lymph_Node + (nT + cmT)/Stimulation);
  pt := pt_0*(1/(1 + m_reg*iTreg_Gastric_Lymph_Node));
  pT := pT_0*(1/(1 + m_reg*iTreg_Lamina_Propia + m_HP*HP_Lamina_Propia));
  Stim_emT_Th17 := aTh17*k_LP;
  Stim_emT_Th1 := k_LP*aTh1;
  Stim_emT_iTreg := aTreg*k_LP;
  Stim_cmT_Th1 := aTh1*kGLN;
  Stim_cmT_Th17 := aTh17*kGLN;
  Stim_cmT_iTreg := aTreg*kGLN;
  Stim_t_Th1 := ath1*kGLN;
  Stim_t_Th17 := ath17*kGLN;
  Stim_t_iTreg := atreg*kGLN;
  cyto_change := kEB*Bp;
  HP_Ep_Lumen := kEB*Bd;
  iDCtoeDC_Lumen := vHP*k_LP1;
  iDCtotDC_Lumen := vHP2*k_lumen;
  iDCtoeDC_LP := vHP*k_LP1;
  iDCtotDC_LP := vHP2*k_LP;
  M0toM1_LP := vHP*k_LP;
  M0toM2_LP := vHP2*k_LP;
  new_iTreg_GLN := pt*(Stim_cmT_iTreg*cmT + Stim_t_iTreg*nT)*tDC_Gastric_Lymph_Node;
  T_deactivation := (1 - vT)*uT;
  iTreg_NS_rel := iTreg_Gastric_Lymph_Node/TotalT_Gastric_Lymph_Node;
  Th1_NS_rel := Th1_Gastric_Lymph_Node/TotalT_Gastric_Lymph_Node;
  Th17_NS_rel := Th17_Gastric_Lymph_Node/TotalT_Gastric_Lymph_Node;
  iTreg_S_rel := iTreg_Gastric_Lymph_Node/TotalT_s;
  Th1_S_rel := Th1_Gastric_Lymph_Node/TotalT_s;
  Th17_S_rel := Th17_Gastric_Lymph_Node/TotalT_s;
  vLB2 := 1 - vLB;
  iDCtotDC_LB := vLB2*k_LB;
  iDCtoeDC_LB := vLB*k_LP1;
  new_emT_iTreg := pT*Stim_emT_iTreg*(tDC_Lamina_Propia + M2)*emT;
  ath1LB := 1e-6 - ath17LB;
  aTh1LB := 1 - aTh17LB;
  Stim_emT_Th1LB := k_LP*aTh1LB;
  new_emT_Th1 := pT*(Stim_emT_Th1*(M1 + eDC_Lamina_Propia)*emT + emT*eDCLB_Lamina_Propia*Stim_emT_Th1LB);
  Stim_emT_Th17LB := k_LP*aTh17LB;
  new_emT_Th17 := pT*(Stim_emT_Th17*(M1 + eDC_Lamina_Propia)*emT + emT*eDCLB_Lamina_Propia*Stim_emT_Th17LB);
  Stim_cmT_Th1LB := kGLN*aTh1LB;
  Stim_cmT_Th17LB := kGLN*aTh17LB;
  Stim_t_Th1LB := kGLN*ath1LB;
  new_Th1_GLN := pt*((Stim_cmT_Th1*cmT + Stim_t_Th1*nT)*eDC_Gastric_Lymph_Node + (cmT*Stim_cmT_Th1LB + nT*Stim_t_Th1LB)*eDCLB_Gastric_Lymph_Node);
  Stim_t_Th17LB := ath17LB*kGLN;
  new_Th17_GLN := pt*((Stim_cmT_Th17*cmT + Stim_t_Th17*nT)*eDC_Gastric_Lymph_Node + eDCLB_Gastric_Lymph_Node*(cmT*Stim_cmT_Th17LB + nT*Stim_t_Th17LB));

  // Reactions:
  re055: E => Ep; Epithelium*_1sub_1_activator_1_parameter(E, HP_Lumen, kEB);  // modifiers: HP_Lumen
  re066: HP_Lumen => HP_Lamina_Propia; _1sub_1_activator_1_parameter(HP_Lumen, Edead, kEB);  // modifiers: Edead
  re059: Ep => Edead; Epithelium*_1_reactant_3_activators_KVW(k_LP, Ep, Th1_Lamina_Propia, uCE, Th17_Lamina_Propia, uCE, M1, uM1);  // modifiers: Th1_Lamina_Propia, Th17_Lamina_Propia, M1
  re105: iDC_Lamina_Propia + HP_Lamina_Propia => eDC_Lamina_Propia; Lamina_Propia*iDCtoeDC_LP*iDC_Lamina_Propia*HP_Lamina_Propia;
  re074: emT => iTreg_Lamina_Propia; Lamina_Propia*_1sub_2_activators_2_parameters(emT, Stim_emT_iTreg, M2, Stim_emT_iTreg, tDC_Lamina_Propia);  // modifiers: M2, tDC_Lamina_Propia
  re063: iDC_Epithelium + HP_Lumen => eDC_Lamina_Propia; iDCtoeDC_Lumen*iDC_Epithelium*HP_Lumen;
  re058: E => Edead; Epithelium*_1_reactant_3_activators_KVW(k_LP, E, Th1_Lamina_Propia, uCE, Th17_Lamina_Propia, uCE, M1, uM1);  // modifiers: Th1_Lamina_Propia, Th17_Lamina_Propia, M1
  re070: M0 => M1; Lamina_Propia*_1_sub_5_activators(vm, M0, M1, n, ri_I, eDC_Lamina_Propia, ri_I, Th1_Lamina_Propia, ri_I, Th17_Lamina_Propia, ri_I, Ep, Bc2);  // modifiers: eDC_Lamina_Propia, Th1_Lamina_Propia, Th17_Lamina_Propia, Ep
  re073: M0 => M2; Lamina_Propia*_1_sub_3_activators(vm, M0, M2, n, ir_I, iTreg_Lamina_Propia, ir_I, tDC_Lamina_Propia, ir_I);  // modifiers: iTreg_Lamina_Propia, tDC_Lamina_Propia
  re072: M2 => M1; Lamina_Propia*_1_sub_5_activators(v21, M2, Th1_Lamina_Propia, n, ri_I, M1, ri_I, eDC_Lamina_Propia, ri_I, Th17_Lamina_Propia, ri_I, Ep, Bc);  // modifiers: Th1_Lamina_Propia, eDC_Lamina_Propia, Th17_Lamina_Propia, Ep
  re077: iDC_Lamina_Propia + HP_Lamina_Propia => tDC_Lamina_Propia; Lamina_Propia*iDCtotDC_LP*iDC_Lamina_Propia*HP_Lamina_Propia;
  re078: eDC_Lamina_Propia => eDC_Gastric_Lymph_Node; eEI*eDC_Lamina_Propia;
  re079: tDC_Lamina_Propia => tDC_Gastric_Lymph_Node; eEI*tDC_Lamina_Propia;
  re080: nT => Th17_Gastric_Lymph_Node; Gastric_Lymph_Node*_1sub_2_activators_2_parameters(nT, Stim_t_Th17, eDC_Gastric_Lymph_Node, Stim_t_Th17LB, eDCLB_Gastric_Lymph_Node);  // modifiers: eDC_Gastric_Lymph_Node, eDCLB_Gastric_Lymph_Node
  re081: nT => Th1_Gastric_Lymph_Node; Gastric_Lymph_Node*_1sub_2_activators_2_parameters(nT, Stim_t_Th1, eDC_Gastric_Lymph_Node, Stim_t_Th1LB, eDC_Gastric_Lymph_Node);  // modifiers: eDC_Gastric_Lymph_Node
  re082: nT => iTreg_Gastric_Lymph_Node; Gastric_Lymph_Node*_1sub_1_activator_1_parameter(nT, tDC_Gastric_Lymph_Node, Stim_t_iTreg);  // modifiers: tDC_Gastric_Lymph_Node
  re083: cmT => Th17_Gastric_Lymph_Node; Gastric_Lymph_Node*_1sub_2_activators_2_parameters(cmT, Stim_cmT_Th17, eDC_Gastric_Lymph_Node, Stim_cmT_Th17LB, eDCLB_Gastric_Lymph_Node);  // modifiers: eDC_Gastric_Lymph_Node, eDCLB_Gastric_Lymph_Node
  re084: cmT => Th1_Gastric_Lymph_Node; Gastric_Lymph_Node*_1sub_2_activators_2_parameters(cmT, Stim_cmT_Th1, eDC_Gastric_Lymph_Node, Stim_cmT_Th1LB, eDCLB_Gastric_Lymph_Node);  // modifiers: eDC_Gastric_Lymph_Node, eDCLB_Gastric_Lymph_Node
  re085: cmT => iTreg_Gastric_Lymph_Node; Gastric_Lymph_Node*_1sub_1_activator_1_parameter(cmT, tDC_Gastric_Lymph_Node, Stim_cmT_iTreg);  // modifiers: tDC_Gastric_Lymph_Node
  re087: Th17_Gastric_Lymph_Node => Th17_Lamina_Propia; eIE*Th17_Gastric_Lymph_Node;
  re088: Th1_Gastric_Lymph_Node => Th1_Lamina_Propia; eIE*Th1_Gastric_Lymph_Node;
  re089: iTreg_Gastric_Lymph_Node => iTreg_Lamina_Propia; eIE*iTreg_Gastric_Lymph_Node;
  re091: iTreg_Gastric_Lymph_Node => Th17_Gastric_Lymph_Node; Gastric_Lymph_Node*_1_sub_3_activators(K_r17, iTreg_Gastric_Lymph_Node, Th1_Gastric_Lymph_Node, n, ri_I, eDC_Gastric_Lymph_Node, ri_I, Th17_Gastric_Lymph_Node, ri_I);  // modifiers: Th1_Gastric_Lymph_Node, eDC_Gastric_Lymph_Node
  re093: iTreg_Lamina_Propia => Th17_Lamina_Propia; Lamina_Propia*_1_sub_5_activators(K_r17, iTreg_Lamina_Propia, Th17_Lamina_Propia, n, ri_I, eDC_Lamina_Propia, ri_I, M1, ri_I, Th1_Lamina_Propia, ri_I, Ep, Bc);  // modifiers: eDC_Lamina_Propia, M1, Th1_Lamina_Propia, Ep
  re095: Th17_Lamina_Propia => emT; Lamina_Propia*toemT*Th17_Lamina_Propia;
  re096: Th1_Lamina_Propia => emT; Lamina_Propia*toemT*Th1_Lamina_Propia;
  re097: iTreg_Lamina_Propia => emT; Lamina_Propia*toemT*iTreg_Lamina_Propia;
  re098: Th17_Lamina_Propia => cmT; tcmT*Th17_Lamina_Propia;
  re099: Th1_Lamina_Propia => cmT; tcmT*Th1_Lamina_Propia;
  re100: iTreg_Lamina_Propia => cmT; tcmT*iTreg_Lamina_Propia;
  re060: Ep => E; Epithelium*uE*Ep;
  re057: Edead => E; Epithelium*uE*Edead;
  re102: HP_Lamina_Propia => 2 HP_Lamina_Propia; Lamina_Propia*bact_repo(lHP, HP_Lamina_Propia, phi_HP);
  re101: HP_Lamina_Propia => ; Lamina_Propia*uHP*HP_Lamina_Propia;
  re052: HP_Lumen => 2 HP_Lumen; Lumen*bact_repo(lHP, HP_Lumen, phi_HP);
  re065: HP_Lumen => ; Lumen*uHP*HP_Lumen;
  re103: emT => Th1_Lamina_Propia; Lamina_Propia*_1_sub_3_activators_3_parameters(emT, Stim_emT_Th1, M1, Stim_emT_Th1, eDC_Lamina_Propia, Stim_emT_Th1LB, eDCLB_Lamina_Propia);  // modifiers: M1, eDC_Lamina_Propia, eDCLB_Lamina_Propia
  re104: emT => Th17_Lamina_Propia; Lamina_Propia*_1_sub_3_activators_3_parameters(emT, Stim_emT_Th17, M1, Stim_emT_Th17, eDC_Lamina_Propia, Stim_emT_Th17LB, eDCLB_Lamina_Propia);  // modifiers: M1, eDC_Lamina_Propia, eDCLB_Lamina_Propia
  re119: Th17_Lamina_Propia => ; Lamina_Propia*T_deactivation*Th17_Lamina_Propia;
  re106: => nT; Gastric_Lymph_Node*Constant_Flux_1_activator(et, eDC_Gastric_Lymph_Node, n, et_i, lt);  // modifiers: eDC_Gastric_Lymph_Node
  re107: nT => ; Gastric_Lymph_Node*ut*nT;
  re061: HP_Lumen => HP_Lamina_Propia; _1sub_1_activator_1_parameter(HP_Lumen, Ep, cyto_change);  // modifiers: Ep
  re062: iDC_Epithelium + HP_Lumen => tDC_Lamina_Propia; iDCtotDC_Lumen*iDC_Epithelium*HP_Lumen;
  re067: HP_Lamina_Propia => ; Lamina_Propia*_1_sub_2_act_2_params_1_const(HP_Lamina_Propia, k_LP, Bd, Ep, uM1, M1);  // modifiers: Ep, M1
  re053: HP_Lumen => ; Lumen*_1sub_1_activator_1_parameter(HP_Lumen, Ep, HP_Ep_Lumen);  // modifiers: Ep
  re068: => iDC_Lamina_Propia; Lamina_Propia*Constant_Flux_3_activators(ld, er, Ep, n, Br, M1, er_i, eDC_Lamina_Propia, er_i);  // modifiers: Ep, M1, eDC_Lamina_Propia
  re069: => M0; Lamina_Propia*Constant_Flux_3_activators(lm, er, M1, n, er_i, Ep, Br, eDC_Lamina_Propia, er_i);  // modifiers: M1, Ep, eDC_Lamina_Propia
  re111: iDC_Lamina_Propia => ; Lamina_Propia*udi_LP*iDC_Lamina_Propia;
  re112: M0 => ; Lamina_Propia*um*M0;
  re117: M1 => ; Lamina_Propia*uMA*M1;
  re118: M2 => ; Lamina_Propia*uMA*M2;
  re120: Th1_Lamina_Propia => ; Lamina_Propia*T_deactivation*Th1_Lamina_Propia;
  re121: iTreg_Lamina_Propia => ; Lamina_Propia*T_deactivation*iTreg_Lamina_Propia;
  re071: M1 => M2; Lamina_Propia*_1_sub_3_activators(v12, M1, iTreg_Lamina_Propia, n, ir_I, M2, ir_I, tDC_Lamina_Propia, ir_I);  // modifiers: iTreg_Lamina_Propia, tDC_Lamina_Propia
  re094: Th17_Lamina_Propia => iTreg_Lamina_Propia; Lamina_Propia*_1_sub_3_activators(K_17r, Th17_Lamina_Propia, iTreg_Lamina_Propia, n, ir_I, tDC_Lamina_Propia, ir_I, M2, ir_I);  // modifiers: tDC_Lamina_Propia, M2
  re092: Th17_Gastric_Lymph_Node => iTreg_Gastric_Lymph_Node; Gastric_Lymph_Node*_1_sub_2_activators(K_17r, Th17_Gastric_Lymph_Node, iTreg_Gastric_Lymph_Node, n, ir_I, tDC_Gastric_Lymph_Node, ir_I);  // modifiers: tDC_Gastric_Lymph_Node
  re122: M0 + HP_Lamina_Propia => M1; Lamina_Propia*M0toM1_LP*M0*HP_Lamina_Propia;
  re123: M0 + HP_Lamina_Propia => M2; Lamina_Propia*M0toM2_LP*M0*HP_Lamina_Propia;
  re116: eDC_Gastric_Lymph_Node => ; Gastric_Lymph_Node*ud*eDC_Gastric_Lymph_Node;
  re124: tDC_Gastric_Lymph_Node => ; Gastric_Lymph_Node*ud*tDC_Gastric_Lymph_Node;
  re127: iDC_Lamina_Propia -> iDC_Epithelium; iDC_Ep_replenishment(V, iDC_Lamina_Propia, k, iDC_Epithelium);
    V = 94.3761; k = 1.35871;
  re128: iDC_Epithelium => tDC_Lamina_Propia; _1sub_1_activator_1_parameter(iDC_Epithelium, LB, iDCtotDC_LB);  // modifiers: LB
  re129: iDC_Epithelium => eDC_Lamina_Propia; _1sub_1_activator_1_parameter(iDC_Epithelium, LB, iDCtoeDC_LB);  // modifiers: LB
  re130: LB => ; Lumen*uLB*LB;
  re131: => iTreg_Lamina_Propia; Lamina_Propia*Constant_flux_irreversible(new_emT_iTreg);
  re132: => Th1_Lamina_Propia; Lamina_Propia*Constant_flux_irreversible(new_emT_Th1);
  re133: => Th17_Lamina_Propia; Lamina_Propia*Constant_flux_irreversible(new_emT_Th17);
  re134: => iTreg_Gastric_Lymph_Node; Gastric_Lymph_Node*Constant_flux_irreversible(new_iTreg_GLN);
  re135: => Th1_Gastric_Lymph_Node; Gastric_Lymph_Node*Constant_flux_irreversible(new_Th1_GLN);
  re136: => Th17_Gastric_Lymph_Node; Gastric_Lymph_Node*Constant_flux_irreversible(new_Th17_GLN);
  re137: eDCLB_Lamina_Propia => eDCLB_Gastric_Lymph_Node; eEI*eDCLB_Lamina_Propia;
  re138: eDCLB_Gastric_Lymph_Node => ; Gastric_Lymph_Node*ud*eDCLB_Gastric_Lymph_Node;
  re139: E => Ep; Epithelium*_1_sub_5_activators(vEC, E, Th1_Lamina_Propia, n, ri_I, Th17_Lamina_Propia, ri_I, eDC_Lamina_Propia, ri_I, M1, ri_I, Ep, Bc2);  // modifiers: Th1_Lamina_Propia, Th17_Lamina_Propia, eDC_Lamina_Propia, M1
  re140: eDCLB_Gastric_Lymph_Node => ; Gastric_Lymph_Node*ud*eDCLB_Gastric_Lymph_Node;
  nTh1_creation: nT => nTh1; nTh1_creation_k1*nT;
    nTh1_creation_k1 = 0.00260615;
  nTh1_trans: nTh1 => nTh1_LP; Lumen*nTh1_trans_k1*nTh1;
    nTh1_trans_k1 = 0.105682;
  nTh1_LP_deg: nTh1_LP => ; Lumen*nTh1_LP_deg_k1*nTh1_LP;
    nTh1_LP_deg_k1 = 0.158489;
  nTh1_LP_expansion: nTh1_LP => 2 nTh1_LP; Lumen*nTh1_LP_expansion_k1*nTh1_LP;
    nTh1_LP_expansion_k1 = 0.1;
  nTh1_deg: nTh1 => ; Lumen*nTh1_deg_k1*nTh1;
    nTh1_deg_k1 = 0.107647;
  nTh17_creation: nT => nTh17; nTh17_creation_k1*nT;
    nTh17_creation_k1 = 0.00214783;
  nTh17_trans: nTh17 => nTh17_LP; Lumen*nTh17_trans_k1*nTh17;
    nTh17_trans_k1 = 0.11695;
  nTh17_LP_deg: nTh17_LP => ; Lumen*nTh17_LP_deg_k1*nTh17_LP;
    nTh17_LP_deg_k1 = 0.1;
  nTh17_deg: nTh17 => ; Lumen*nTh17_deg_k1*nTh17;
    nTh17_deg_k1 = 0.1;
  nTreg_creation: nT => nTreg; nTreg_creation_k1*nT;
    nTreg_creation_k1 = 0.00346737;
  nTreg_trans: nTreg => nTreg_LP; Lumen*nTreg_trans_k1*nTreg;
    nTreg_trans_k1 = 0.1;
  nTreg_LP_deg: nTreg_LP => ; Lumen*nTreg_LP_deg_k1*nTreg_LP;
    nTreg_LP_deg_k1 = 0.1;
  nTreg_deg: nTreg => ; Lumen*nTreg_deg_k1*nTreg;
    nTreg_deg_k1 = 0.119124;
  Th17_to_Treg: nTh17_LP => nTreg_LP; Lumen*Th17_to_Treg_k1*nTh17_LP;
    Th17_to_Treg_k1 = 0.167494;

  // Events:
  _2nd_Dose: at (time >= 2): HP_Lumen = HP_Lumen + HP_Dose*HP_Dose_Response, LB = LB + LB_Dose;
  _3rd_Dose: at (time >= 4): HP_Lumen = HP_Lumen + HP_Dose*HP_Dose_Response, LB = LB + LB_Dose;

  // Unit definitions:
  unit volume = 1e-3 litre;
  unit time = 86400 second;
  unit substance = item;
end
