// SBML level 2 version 1

model model_0000001()
  // Markevich2004_MAPK_phosphoRandomMM
  // The model corresponds to the schema 3 of Markevich et al 2004, as described in the figure 2 and the supplementary table S3, and modelled using Michaelis-Menten like kinetics. Phosphorylations follow distributive random kinetics, while dephosphorylations follow an ordered mechanism.
  // This model originates from BioModels Database: A Database of Annotated Published Models. It is copyright (c) 2005-2007 The BioModels Team.
  // For more information see the terms of use .
  // biomodels.db:MODEL6618620128
  // biomodels.db:BIOMD0000000029
  // isDescribedBy pubmed:14744999
  // isVersionOf GO:0000165
  // hasTaxon taxonomy:8355

  // Compartments:
  compartment cell = 1;  // GO:0005623

  // Species:
  species M in cell = 800; M is "ERK";  // isVersionOf uniprot:P26696
  species MpY in cell = 0; MpY is "ERK-PY";  // isVersionOf uniprot:P26696
  species MpT in cell = 0; MpT is "ERK-PT";  // isVersionOf uniprot:P26696
  species Mpp in cell = 0; Mpp is "ERK-PP";  // isVersionOf uniprot:P26696
  species $MEK in cell = 180;  // uniprot:Q05116
  species $MKP3 in cell = 100;  // uniprot:Q90W58

  // Parameters:
  Km1 = 410;
  kcat1 = 1.08;
  Km2 = 40;
  kcat2 = 0.007;
  Km3 = 20;
  kcat3 = 0.008;
  Km4 = 300;
  kcat4 = 0.45;
  Km5 = 22;
  kcat5 = 0.084;
  Km6 = 18;
  kcat6 = 0.06;
  Km7 = 34;
  kcat7 = 0.108;
  Km8 = 40;

  // Reactions:
  phosphorylation_of_ERK_on_Tyr: M => MpY; cell*(kcat1*MEK*M/Km1/(1 + M*((Km1 + Km3)/(Km1*Km3)) + MpY/Km2 + MpT/Km4));  // modifiers: MEK, MpT; isVersionOf ec-code:2.7.12.2 GO:0018108 GO:0004708; isHomologTo reactome:REACT_2247 reactome:REACT_136
  phosphorylation_of_ERK_PY_on_Thr: MpY => Mpp; cell*(kcat2*MEK*MpY/Km2/(1 + M*((Km1 + Km3)/(Km1*Km3)) + MpY/Km2 + MpT/Km4)); phosphorylation_of_ERK_PY_on_Thr is "phosphorylation of ERK-PY on Thr";  // modifiers: MEK, M, MpT; isHomologTo reactome:REACT_2247 reactome:REACT_136; isVersionOf ec-code:2.7.12.2 GO:0018107 GO:0000187 GO:0004708
  phosphorylation_of_ERK_on_Thr: M => MpT; cell*(kcat3*MEK*M/Km3/(1 + M*((Km1 + Km3)/(Km1*Km3)) + MpY/Km2 + MpT/Km4));  // modifiers: MEK, MpY; isVersionOf ec-code:2.7.12.2 GO:0018107 GO:0004708; isHomologTo reactome:REACT_2247 reactome:REACT_136
  phosphorylation_of_ERK_PT_on_Tyr: MpT => Mpp; cell*(kcat4*MEK*MpT/Km4/(1 + M*((Km1 + Km3)/(Km1*Km3)) + MpY/Km2 + MpT/Km4)); phosphorylation_of_ERK_PT_on_Tyr is "phosphorylation of ERK-PT on Tyr";  // modifiers: MEK, M, MpY; isHomologTo reactome:REACT_2247 reactome:REACT_136; isVersionOf ec-code:2.7.12.2 GO:0004708 GO:0000187 GO:0018108
  v5: Mpp => MpT; cell*(kcat5*MKP3*Mpp/Km5/(1 + Mpp/Km5 + MpT/Km6 + MpY/Km7 + M/Km8)); v5 is "dephosphorylation of ERK-PP on Tyr";  // modifiers: MKP3, MpY, M; isVersionOf ec-code:3.1.3.16 GO:0000188 GO:0006470
  dephosphorylation_of_ERK_PT: MpT => M; cell*(kcat6*MKP3*MpT/Km6/(1 + Mpp/Km5 + MpT/Km6 + MpY/Km7 + M/Km8)); dephosphorylation_of_ERK_PT is "dephosphorylation of ERK-PT";  // modifiers: MKP3, Mpp, MpY; isVersionOf ec-code:3.1.3.16 GO:0006470
  dephosphorylation_of_ERK_PY: MpY => M; cell*(kcat7*MKP3*MpY/Km7/(1 + Mpp/Km5 + MpT/Km6 + MpY/Km7 + M/Km8)); dephosphorylation_of_ERK_PY is "dephosphorylation of ERK-PY";  // modifiers: MKP3, Mpp, MpT; isVersionOf ec-code:3.1.3.16 GO:0006470

  // Unit definitions:
  unit substance = 1e-9 mole; substance is "nanomole (default)";
end
