// SBML level 2 version 1

model Zeilinger_MSB_PRR7PRR9lightY()
  // PRR7-PRR9light-Y

  // Compartments:
  compartment cell_0 = 1;

  // Species:
  species cLc in cell_0 = 0.0731/cell_0;
  species cLm in cell_0 = 0.1114/cell_0;
  species cLn in cell_0 = 0.2366/cell_0;
  species cP7c in cell_0 = 0.0266/cell_0;
  species cP7m in cell_0 = 0.0204/cell_0;
  species cP7n in cell_0 = 1.5103/cell_0;
  species cP9c in cell_0 = 0.734/cell_0;
  species cP9m in cell_0 = 0.002/cell_0;
  species cP9n in cell_0 = 1.1162/cell_0;
  species cPn in cell_0 = 0;
  species cTc in cell_0 = 5.2235/cell_0;
  species cTm in cell_0 = 3.6732/cell_0;
  species cTn in cell_0 = 4.5333/cell_0;
  species cXc in cell_0 = 2.4188/cell_0;
  species cXm in cell_0 = 0.652/cell_0;
  species cXn in cell_0 = 14.7289/cell_0;
  species cYc in cell_0 = 49.2611/cell_0;
  species cYm in cell_0 = 0.2992/cell_0;
  species cYn in cell_0 = 17.4355/cell_0;
  species $lmax in cell_0 = 1/cell_0;

  // Parameters:
  q1 = 7.9798;
  n1 = 2.3023;
  g1 = 16.3389;
  m1 = 8.0568;
  k1 = 22.3951;
  p1 = 1.2294;
  r1 = 31.5166;
  r2 = 9.1138;
  m2 = 10.4609;
  k2 = 32.7881;
  m3 = 12.7853;
  k3 = 29.0823;
  n2 = 7.5433;
  g2 = 16.7487;
  g3 = 11.5922;
  m4 = 8.5185;
  k4 = 4.0551;
  p2 = 1.0494;
  p3 = 8.583;
  r5 = 27.818;
  r6 = 4.2863;
  m10 = 9.2511;
  k8 = 13.4324;
  m11 = 7.9066;
  k9 = 14.605;
  q2 = 2.5505;
  n4 = 1.5293;
  n5 = 2.6296;
  g5 = 0.5061;
  g6 = 7.8469;
  m12 = 8.4753;
  k10 = 16.1162;
  r3 = 29.4222;
  r4 = 33.6178;
  m5 = 9.3024;
  m6 = 10.899;
  k5 = 16.9133;
  m7 = 0.7527;
  m8 = 13.7459;
  k6 = 43.7049;
  n3 = 0.6703;
  g4 = 11.3625;
  m9 = 2.6345;
  k7 = 8.6873;
  p4 = 14.6828;
  r7 = 9.1917;
  r8 = 25.8963;
  m13 = 6.8544;
  k11 = 48.5862;
  m14 = 3.2581;
  k12 = 23.2876;
  p5 = 0.5;
  k13 = 1.2;
  q3 = 1;
  m15 = 1.2;
  g7 = 0.4444;
  g8 = 11.0459;
  n6 = 11.3117;
  g9 = 14.5219;
  m16 = 9.531;
  k14 = 50.9418;
  p6 = 6.7738;
  r9 = 31.0318;
  r10 = 0.4557;
  m17 = 5.4062;
  k15 = 49.4094;
  m18 = 8.671;
  k16 = 42.4837;
  n7 = 0.0833;
  g10 = 5.6855;
  m19 = 6.1155;
  k17 = 18.6089;
  p7 = 10.4532;
  r11 = 34.6266;
  r12 = 22.838;
  m20 = 3.4152;
  k18 = 16.2407;
  m21 = 0.028;
  k19 = 26.5795;
  q4 = 7.4548;
  n8 = 2.0738;
  ld = 1;
  a = 2.2802;
  b = 3.1075;
  c = 1.6808;
  d = 1.0164;
  e = 1.4943;
  f = 1.9491;
  h = 2.2116;
  i = 1.1065;
  j = 2.5579;
  k = 3.3953;

  // Reactions:
  R1: => cLm; ld*q1*cPn;  // modifiers: cPn
  R2: => cLm; n1*cXn^a/(g1^a + cXn^a)*(g7^h/(g7^h + cP7n^h))*(g8^i/(g8^i + cP9n^i));  // modifiers: cXn, cP7n, cP9n
  R3: cLm => ; m1*cLm/(k1 + cLm);
  R4: => cLc; p1*cLm;  // modifiers: cLm
  R5: cLc => cLn; r1*cLc;
  R6: cLn => cLc; r2*cLn;
  R7: cLc => ; m2*cLc/(k2 + cLc);
  R8: cLn => ; m3*cLn/(k3 + cLn);
  R9: => cTm; n2*cYn^b/(g2^b + cYn^b)*(g3^c/(g3^c + cLn^c));  // modifiers: cYn, cLn
  R10: cTm => ; m4*cTm/(k4 + cTm);
  R11: => cTc; p2*cTm;  // modifiers: cTm
  R12: cTc => cTn; r3*cTc;
  R13: cTn => cTc; r4*cTn;
  R14: cTc => ; ((lmax - ld)*m5 + m6)*(cTc/(k5 + cTc));
  R15: cTn => ; ((lmax - ld)*m7 + m8)*(cTn/(k6 + cTn));
  R16: => cXm; n3*cTn^d/(g4^d + cTn^d);  // modifiers: cTn
  R17: cXm => ; m9*cXm/(k7 + cXm);
  R18: => cXc; p3*cXm;  // modifiers: cXm
  R19: cXc => cXn; r5*cXc;
  R20: cXn => cXc; r6*cXn;
  R21: cXc => ; m10*cXc/(k8 + cXc);
  R22: cXn => ; m11*cXn/(k9 + cXn);
  R23: => cYm; (ld*q2*cPn + (ld*n4 + n5)*g5^e/(g5^e + cTn^e))*(g6^f/(g6^f + cLn^f));  // modifiers: cTn, cLn, cPn
  R24: cYm => ; m12*cYm/(k10 + cYm);
  R25: => cYc; p4*cYm;  // modifiers: cYm
  R26: cYc => cYn; r7*cYc;
  R27: cYn => cYc; r8*cYn;
  R28: cYc => ; m13*cYc/(k11 + cYc);
  R29: cYn => ; m14*cYn/(k12 + cYn);
  R30: => cPn; (lmax - ld)*p5;
  R31a: cPn => ; m15*cPn/(k13 + cPn);
  R31b: cPn => ; q3*ld*cPn;
  R32: => cP7m; n6*cLn^j/(g9^j + cLn^j);  // modifiers: cLn
  R33: cP7m => ; m16*cP7m/(k14 + cP7m);
  R34: => cP7c; p6*cP7m;  // modifiers: cP7m
  R35: cP7c => cP7n; r9*cP7c;
  R36: cP7n => cP7c; r10*cP7n;
  R37: cP7c => ; m17*cP7c/(k15 + cP7c);
  R38: cP7n => ; m18*cP7n/(k16 + cP7n);
  R39: => cP9m; (ld*q4*cPn + n7*ld + n8)*cLn^k/(g10^k + cLn^k);  // modifiers: cPn, cLn
  R40: cP9m => ; m19*cP9m/(k17 + cP9m);
  R41: => cP9c; p7*cP9m;  // modifiers: cP9m
  R42: cP9c => cP9n; r11*cP9c;
  R43: cP9n => cP9c; r12*cP9n;
  R44: cP9c => ; m20*cP9c/(k18 + cP9c);
  R45: cP9n => ; m21*cP9n/(k19 + cP9n);
end
