// SBML level 2 version 1

model model_0000001()
  // Legewie et al. Model 1

  // Compartments:
  compartment cytosol; cytosol is "Cytosol";

  // Species:
  species dummy in cytosol = 0; dummy is "dummy source and sink";
  species A in cytosol = 20; A is "APAF-1";
  species Caspase_9 in cytosol = 20;
  species C9X in cytosol = 0; C9X is "Caspase 9-XIAP complex";
  species X in cytosol = 40; X is "XIAP";
  species AC9X in cytosol = 0; AC9X is "APAF-1-Caspase 9-XIAP complex";
  species AC9 in cytosol = 0; AC9 is "APAF-1-Caspase 9 complex";
  species Caspase_3 in cytosol = 200;
  species C3_star in cytosol = 0; C3_star is "Caspase 3 cleaved";
  species C3_starX in cytosol = 0; C3_starX is "Caspase 3 cleaved - XIAP complex";
  species C9_starX in cytosol = 0; C9_starX is "Caspase 9 cleaved-XIAP complex";
  species C9_star in cytosol = 0; C9_star is "Caspase 9 cleaved";
  species AC9_star in cytosol = 0; AC9_star is "APAF-1-Caspase 9 cleaved complex";
  species AC9_starX in cytosol = 0; AC9_starX is "Apaf-1-Caspase 9 cleaved -XIAP complex";

  // Parameters:
  k1 = 0.002;
  kb1 = 0.1;
  k2 = 0.000005;
  k3 = 0.00035;
  k4 = 0.0002;
  k5 = 0.0002;
  k6 = 0.00005;
  k7 = 0.0035;
  k8 = 0.002;
  k8b = 0.1;
  k9 = 0.001;
  k9b = 0.001;
  k10 = 0.001;
  k10b = 0.001;
  k11 = 0.001;
  k11b = 0.001;
  k12 = 0.001;
  k12b = 0.001;
  k13 = 0.002;
  k13b = 0.1;
  k14 = 0.002;
  k14b = 0.1;
  k15 = 0.003;
  k15b = 0.001;
  k16 = 0.001;
  k16prod = 0.02;
  k17 = 0.001;
  k17prod = 0.02;
  k18 = 0.001;
  k18prod = 0.04;
  k19 = 0.001;
  k20 = 0.001;
  k21 = 0.001;
  k22 = 0.001;
  k22prod = 0.2;
  k23 = 0.001;
  k24 = 0.001;
  k25 = 0.001;
  k26 = 0.001;
  k27 = 0.001;
  k28 = 0.001;

  // Reactions:
  Caspase_9_Apaf_1_binding: A + Caspase_9 -> AC9; k1*A*Caspase_9 - kb1*AC9; Caspase_9_Apaf_1_binding is "Caspase 9 / Apaf-1 binding";
  Caspase_3_cleavage_by_Caspase_9: Caspase_3 + Caspase_9 => C3_star + Caspase_9; k2*Caspase_3*Caspase_9;
  v3: Caspase_3 + AC9 => C3_star + AC9; k3*Caspase_3*AC9; v3 is "Caspase 3 cleavage by Caspase 9-Apaf-1";
  Caspase_9_Xiap_binding: Caspase_9 + X -> C9X; k9*Caspase_9*X - k9b*C9X;
  Caspase_9_Apaf_1_Xiap_binding: AC9 + X -> AC9X; k10*AC9*X - k10b*AC9X; Caspase_9_Apaf_1_Xiap_binding is "Caspase 9-Apaf-1 Xiap binding";
  Caspase_9_Xiap_Apaf_1_binding: C9X + A -> AC9X; k13*C9X*A - k13b*AC9X; Caspase_9_Xiap_Apaf_1_binding is "Caspase 9-Xiap Apaf-1 binding";
  cleaved_Caspase_3_Xiap_binding: C3_star + X -> C3_starX; k15*C3_star*X - k15b*C3_starX; cleaved_Caspase_3_Xiap_binding is "cleaved Caspase 3-Xiap binding";
  v4: Caspase_9 + C3_star => C9_star + C3_star; k4*Caspase_9*C3_star; v4 is "Caspase 9 cleavage by cleaved caspase 3";
  v5: AC9 + C3_star => AC9_star + C3_star; k5*AC9*C3_star; v5 is "Caspase 9 cleavage by cleaved caspase 3 when Apaf-1 is bound";
  cleaved_Caspase_9_Apaf_1_binding: C9_star + A -> AC9_star; k8*C9_star*A - k8b*AC9_star; cleaved_Caspase_9_Apaf_1_binding is "cleaved Caspase 9 Apaf-1 binding";
  cleaved_Caspase_9_XIAP_binding: C9_star + X -> C9_starX; k11*C9_star*X - k11b*C9_starX;
  v12: AC9_star + X -> AC9_starX; k12*AC9_star*X - k12b*AC9_starX; v12 is "cleaved Caspase 9-Apaf-1 XIAP binding";
  v14: C9_starX + A -> AC9_starX; k14*C9_starX*A - k14b*AC9_starX; v14 is "cleaved Caspase 9-Xiap Apaf-1 binding";
  v6: Caspase_3 + C9_star => C3_star + C9_star; k6*Caspase_3*C9_star; v6 is "Caspase 3 cleavage by cleaved Caspase 9";
  v7: Caspase_3 + AC9_star => C3_star + AC9_star; k7*Caspase_3*AC9_star; v7 is "Caspase 3 cleavage by cleaved Caspase 9 - Apaf-1";
  Apaf_1_turnover: dummy -> A; k16prod - k16*A; Apaf_1_turnover is "Apaf-1 turnover";
  Caspase_9_turnover: dummy -> Caspase_9; k17prod - k17*Caspase_9;
  Xiap_turnover: dummy -> X; k18prod - k18*X;
  Caspase_9_Xiap_degradation: C9X => dummy; k19*C9X; Caspase_9_Xiap_degradation is "Caspase 9-Xiap degradation";
  v20: AC9X => dummy; k20*AC9X; v20 is "Apaf-1-Caspase 9-Xiap degradation";
  Apaf_1_Caspase_9_degradation: AC9 => dummy; k21*AC9; Apaf_1_Caspase_9_degradation is "Apaf-1-Caspase 9 degradation";
  Caspase_3_turnover: dummy -> Caspase_3; k22prod - k22*Caspase_3;
  Caspase_3_cleaved_degradation: C3_star => dummy; k23*C3_star;
  v24: C3_starX => dummy; k24*C3_starX; v24 is "Caspase 3 cleaved-Xiap degradation";
  v25: C9_starX => dummy; k25*C9_starX; v25 is "Caspase 9 cleaved-Xiap degradation";
  Caspase_9_cleaved_degradation: C9_star => dummy; k26*C9_star;
  v27: AC9_star => dummy; k27*AC9_star; v27 is "Apaf-1 Caspase 9 cleaved degradation";
  v28: AC9_starX => dummy; k28*AC9_starX; v28 is "Apaf-1 Caspase 9 cleaved-Xiap degradation";
end
