// SBML level 2 version 1

model AAnetwork()

  // Compartments:
  compartment default = 1;

  // Species:
  species AA in default = 0.001;  // substance in unitDefinition_0000002
  species _5_HPETE in default = 0.001; _5_HPETE is "5-HPETE";  // substance in unitDefinition_0000002
  species _5_HETE in default = 0.001; _5_HETE is "5-HETE";  // substance in unitDefinition_0000002
  species LTA4 in default = 0.001;  // substance in unitDefinition_0000002
  species LTB4 in default = 0.001;  // substance in unitDefinition_0000002
  species w_LTB4 in default = 0.001; w_LTB4 is "w-LTB4";  // substance in unitDefinition_0000002
  species PLA2 in default = 1.5;  // substance in unitDefinition_0000002
  species _15_LOX in default = 1.5; _15_LOX is "15-LOX";  // substance in unitDefinition_0000002
  species _12_LOX in default = 0.5; _12_LOX is "12-LOX";  // substance in unitDefinition_0000002
  species COX_2 in default = 0.2; COX_2 is "COX-2";  // substance in unitDefinition_0000002
  species PGES in default = 0.5;  // substance in unitDefinition_0000002
  species _15_HPETE in default = 0.001; _15_HPETE is "15-HPETE";  // substance in unitDefinition_0000002
  species TXAS in default = 0.5;  // substance in unitDefinition_0000002
  species _5_LOX in default = 5; _5_LOX is "5-LOX";  // substance in unitDefinition_0000002
  species LTA4H in default = 0.76;  // substance in unitDefinition_0000002
  species CYP4F3 in default = 0.07;  // substance in unitDefinition_0000002
  species PHGPx in default = 0.8;  // substance in unitDefinition_0000002
  species exo_AA in default = 0; exo_AA is "exo-AA";  // substance in unitDefinition_0000002
  species _15_HETE in default = 0.001; _15_HETE is "15-HETE";  // substance in unitDefinition_0000002
  species _12_HPETE in default = 0.001; _12_HPETE is "12-HPETE";  // substance in unitDefinition_0000002
  species _12_HETE in default = 0.001; _12_HETE is "12-HETE";  // substance in unitDefinition_0000002
  species PGH2 in default = 0.001;  // substance in unitDefinition_0000002
  species PGE2 in default = 0.001;  // substance in unitDefinition_0000002
  species TXA2 in default = 0.001;  // substance in unitDefinition_0000002
  species TXB2 in default = 0.001;  // substance in unitDefinition_0000002

  // Parameters:
  lin = 12 unitDefinition_0000002;
  K15 = 3600 unitDefinition_0000003; K15 is "Kcat(PLA2)";
  k15 = 2600 unitDefinition_0000002; k15 is "Km(PLA2)";
  K16 = 1000 unitDefinition_0000003; K16 is "Kcat(15-LOX)";
  k16 = 70 unitDefinition_0000002; k16 is "Km(15-LOX)";
  K17 = 1000 unitDefinition_0000003; K17 is "Kcat(12-LOX)";
  k17 = 50 unitDefinition_0000002; k17 is "Km(12-LOX)";
  K18 = 1000 unitDefinition_0000003; K18 is "Kcat(COX-2)";
  k18 = 50 unitDefinition_0000002; k18 is "Km(COX-2)";
  K19 = 3000 unitDefinition_0000003; K19 is "Kcat(PGES)";
  k19 = 160 unitDefinition_0000002; k19 is "Km(PGES)";
  K20 = 1599 unitDefinition_0000003; K20 is "Kcat(TXAS)";
  k20 = 4 unitDefinition_0000002; k20 is "Km(TXAS)";
  K21 = 5000 unitDefinition_0000003; K21 is "Kcat(5-LOX)";
  k21 = 5 unitDefinition_0000002; k21 is "Km(5-LOX)";
  K22 = 125 unitDefinition_0000003; K22 is "Kcat(LTA4H)";
  k22 = 20 unitDefinition_0000002; k22 is "Km(LTA4H)";
  K23 = 150 unitDefinition_0000003; K23 is "Kcat(CYP4F3)";
  k23 = 3.9 unitDefinition_0000002; k23 is "Km(CYP4F3)";
  K24 = 500 unitDefinition_0000003; K24 is "Kcat(PHGPx)";
  k24 = 70 unitDefinition_0000002; k24 is "Km(PHGPx)";
  kd2 = 0.05; kd2 is "decay constant for 15-HPETE";
  kd3 = 0.01; kd3 is "decay constant for 15-HETE";
  kd8 = 0.1; kd8 is "decay constant for TXA2";
  kd9 = 0.001; kd9 is "decay constant for TXB2";
  kd11 = 0.001; kd11 is "decay constant for 5-HETE";
  kd12 = 0.07; kd12 is "decay constant for LTA4";
  kd13 = 0.01; kd13 is "decay constant for LTB4";
  kd16 = 0.01; kd16 is "decay constant for 15-LOX";
  ki1 = 0.3 unitDefinition_0000002; ki1 is "Inhibition of PEGS by AA";
  ki2 = 30 unitDefinition_0000002; ki2 is "inhibition of PGES by 15-HETE";
  ki3 = 30 unitDefinition_0000002; ki3 is "inhibition of COX-2 by PEG2";
  ki4 = 0.6 unitDefinition_0000002; ki4 is "inhibition of TXAS by 15-HPETE";
  ki5 = 0.1 unitDefinition_0000002; ki5 is "inhibition of TXAS by PGH2";
  ki6 = 0.01 unitDefinition_0000002; ki6 is "inhibition of 5-LOX by 15-HPETE";
  ki7 = 30 unitDefinition_0000002; ki7 is "inhibition of 5-LOX by 12-HETE";
  ki8 = 4 unitDefinition_0000002; ki8 is "inhibition of 5-LOX by 15-HETE";
  ki9 = 0.175 unitDefinition_0000002; ki9 is "inhibition of 5-LOX by LTA4";
  ki10 = 0.01 unitDefinition_0000002; ki10 is "inhibition of 5-LOX by 5-HPETE";
  ki11 = 15 unitDefinition_0000002; ki11 is "inhibition of 5-LOX by PGE2";
  ki12 = 6.3 unitDefinition_0000002; ki12 is "inhibition of 5-LOX by 5-HETE";
  ki14 = 0.2 unitDefinition_0000002; ki14 is "inhibition of CYP4F3 by 12-HETE";
  ki15 = 0.86 unitDefinition_0000002; ki15 is "inhibition of CYP4F3 by 5-HETE";
  ki16 = 10 unitDefinition_0000002; ki16 is "inhibition of 12-LOX by 15-HETE";
  ki17 = 10 unitDefinition_0000002; ki17 is "inhibition of 12-LOX by 15-HPETE";
  ki18 = 10 unitDefinition_0000002; ki18 is "inhibition of 12-LOX by 12-HPETE";
  KI19 = 500 unitDefinition_0000002; KI19 is "up-regulation of PLA2 by 12-HPETE";
  KI20 = 200 unitDefinition_0000002; KI20 is "up-regulation of PLA2 by 15-HPETE";
  KI21 = 500 unitDefinition_0000002; KI21 is "up-regulation of PLA2 by LTB4";
  KI22 = 500 unitDefinition_0000002; KI22 is "up-regulation of PLA2 by 5-HETE";
  KI23 = 0.053 unitDefinition_0000002; KI23 is "up-regulation of 5-LOX by LTB4";
  KI24 = 2.3e-5 unitDefinition_0000002; KI24 is "up-regulation of 15-LOX by PGE2";
  a24 = 0.15 unitDefinition_0000002; a24 is "up-regulation of 15-LOX by PGE2";
  ks = 500 unitDefinition_0000002; ks is "feedback inhibition by products";

  // Reactions:
  d_AA_dt: => AA; K15*PLA2*lin*(1 + _12_HPETE/KI19 + _15_HPETE/KI20 + LTB4/KI21 + _5_HETE/KI22)/(lin + k15*(1 + AA/ks)) - K16*_15_LOX*AA*(1 + 0)/(AA + k16*(1 + _15_HPETE/ks)) - K17*_12_LOX*AA*(1 + 0)/(AA + k17*(1 + _12_HPETE/ki18 + _15_HETE/ki16 + _12_HPETE/ks)) - K18*COX_2*AA*(1 + 0)/(AA + k18*(1 + PGE2/ki3 + PGH2/ks)) - K21*_5_LOX*AA*(1 + 0)/(AA + k21*(1 + _12_HETE/ki7 + _15_HETE/ki8 + PGE2/ki11 + _5_HETE/ki12 + _5_HPETE/ks)) + 0.5*exo_AA - 0.1*AA; d_AA_dt is "d(AA)/dt";  // modifiers: _5_HPETE, _5_HETE, LTB4, PLA2, _15_LOX, _12_LOX, COX_2, _15_HPETE, _5_LOX, exo_AA, _15_HETE, _12_HPETE, _12_HETE, PGH2, PGE2
  d_15_HPETE_dt: => _15_HPETE; K16*_15_LOX*AA*(1 + 0)/(AA + k16*(1 + _15_HPETE/ks)) - K24*PHGPx*_15_HPETE*(1 + 0)/(_15_HPETE + k24*(1 + _15_HETE/ks)) - kd2*_15_HPETE; d_15_HPETE_dt is "d(15-HPETE)/dt";  // modifiers: AA, _15_LOX, PHGPx, _15_HETE
  d_15_HETE_dt: => _15_HETE; K24*PHGPx*_15_HPETE*(1 + 0)/(_15_HPETE + k24*(1 + _15_HETE/ks)) - kd3*_15_HETE; d_15_HETE_dt is "d(15-HETE)/dt";  // modifiers: _15_HPETE, PHGPx
  R4: => _12_HPETE; K17*_12_LOX*AA*(1 + 0)/(AA + k17*(1 + _12_HPETE/ki18 + _15_HETE/ki16 + _12_HPETE/ks)) - K24*PHGPx*_12_HPETE*(1 + 0)/(_12_HPETE + k24*(1 + _12_HETE/ks)); R4 is "d(12-LOX)/dt";  // modifiers: AA, _12_LOX, PHGPx, _15_HETE, _12_HETE
  d_12_HETE_dt: => _12_HETE; K24*PHGPx*_12_HPETE*(1 + 0)/(_12_HPETE + k24*(1 + _12_HETE/ks)); d_12_HETE_dt is "d(12-HETE)/dt";  // modifiers: PHGPx, _12_HPETE
  d_PGH2_dt: => PGH2; K18*COX_2*AA*(1 + 0)/(AA + k18*(1 + PGE2/ki3 + PGH2/ks)) - K19*PGES*PGH2*(1 + 0)/(PGH2 + k19*(1 + AA/ki1 + _15_HETE/ki2 + PGE2/ks)) - K20*TXAS*PGH2*(1 + 0)/(PGH2 + k20*(1 + TXA2/ks)); d_PGH2_dt is "d(PGH2)/dt";  // modifiers: AA, COX_2, PGES, TXAS, _15_HETE, PGE2, TXA2
  d_PGE2_dt: => PGE2; K19*PGES*PGH2*(1 + 0)/(PGH2 + k19*(1 + AA/ki1 + _15_HETE/ki2 + PGE2/ks)); d_PGE2_dt is "d(PGE2)/dt";  // modifiers: AA, PGES, _15_HETE, PGH2
  d_TXA2_dt: => TXA2; K20*TXAS*PGH2*(1 + 0)/(PGH2 + k20*(1 + TXA2/ks)) - kd8*TXA2; d_TXA2_dt is "d(TXA2)/dt";  // modifiers: TXAS, PGH2
  d_TXB2_dt: => TXB2; kd8*TXA2 - kd9*TXB2; d_TXB2_dt is "d(TXB2)/dt";  // modifiers: TXA2
  d_5_HPETE_dt: => _5_HPETE; K21*_5_LOX*AA*(1 + 0)/(AA + k21*(1 + _12_HETE/ki7 + _15_HETE/ki8 + PGE2/ki11 + _5_HETE/ki12 + _5_HPETE/ks)) - K21*_5_LOX*_5_HPETE*(1 + 0)/(_5_HPETE + k21*(1 + _12_HETE/ki7 + _15_HETE/ki8 + PGE2/ki11 + _5_HETE/ki12 + LTA4/ks)) - K24*PHGPx*_5_HPETE*(1 + 0)/(_5_HPETE + k24*(1 + _5_HETE/ks)); d_5_HPETE_dt is "d(5-HPETE)/dt";  // modifiers: AA, _5_HETE, LTA4, _5_LOX, PHGPx, _15_HETE, _12_HETE, PGE2
  d_5_HETE_dt: => _5_HETE; K24*PHGPx*_5_HPETE*(1 + 0)/(_5_HPETE + k24*(1 + _5_HETE/ks)) - kd11*_5_HETE; d_5_HETE_dt is "d(5-HETE)/dt";  // modifiers: _5_HPETE, PHGPx
  d_LTA4_dt: => LTA4; K21*_5_LOX*_5_HPETE*(1 + 0)/(_5_HPETE + k21*(1 + _12_HETE/ki7 + _15_HETE/ki8 + PGE2/ki11 + _5_HETE/ki12 + LTA4/ks)) - K22*LTA4H*LTA4*(1 + 0)/(LTA4 + k22*(1 + LTB4/ks)) - kd12*LTA4; d_LTA4_dt is "d(LTA4)/dt";  // modifiers: _5_HPETE, _5_HETE, LTB4, _5_LOX, LTA4H, _15_HETE, _12_HETE, PGE2
  d_LTB4_dt: => LTB4; K22*LTA4H*LTA4*(1 + 0)/(LTA4 + k22*(1 + LTB4/ks)) - K23*CYP4F3*LTB4*(1 + 0)/(LTB4 + k23*(1 + _12_HETE/ki14 + _5_HETE/ki15 + w_LTB4/ks)) - kd13*LTB4; d_LTB4_dt is "d(LTB4)/dt";  // modifiers: _5_HETE, LTA4, w_LTB4, LTA4H, CYP4F3, _12_HETE
  d_w_LTB4_dt: => w_LTB4; K23*CYP4F3*LTB4*(1 + 0)/(LTB4 + k23*(1 + _12_HETE/ki14 + _5_HETE/ki15 + w_LTB4/ks)); d_w_LTB4_dt is "d(w-LTB4)/dt";  // modifiers: _5_HETE, LTB4, CYP4F3, _12_HETE
  d_PLA2_dt: => PLA2; 0; d_PLA2_dt is "d(PLA2)/dt";
  d_15_LOX_dt: => _15_LOX; a24*PGE2*PGE2/(PGE2*PGE2 + KI24*KI24) - kd16*_15_LOX; d_15_LOX_dt is "d(15-LOX)/dt";  // modifiers: PGE2
  R17: => _12_LOX; -ki17*_15_HPETE*_12_LOX; R17 is "d(12-LOX)/dt";  // modifiers: _15_HPETE
  d_COX_2_dt: => COX_2; 0; d_COX_2_dt is "d(COX-2)/dt";
  d_PGES_dt: => PGES; 0; d_PGES_dt is "d(PGES)/dt";
  d_TXAS_dt: => TXAS; -(ki4*_15_HPETE + ki5*PGH2)*TXAS; d_TXAS_dt is "d(TXAS)/dt";  // modifiers: _15_HPETE, PGH2
  d_5_LOX_dt: => _5_LOX; (KI23*LTB4 - ki9*LTA4 - ki10*_5_HPETE - ki6*_15_HPETE)*_5_LOX; d_5_LOX_dt is "d(5-LOX)/dt";  // modifiers: _5_HPETE, LTA4, LTB4, _15_HPETE
  d_LTA4H_dt: => LTA4H; -(K22*LTA4H*LTA4*(1 + 0))/(LTA4 + k22*(1 + 0))/129; d_LTA4H_dt is "d(LTA4H)/dt";  // modifiers: LTA4
  d_CYP4F3_dt: => CYP4F3; 0; d_CYP4F3_dt is "d(CYP4F3)/dt";
  d_PHGPx_dt: => PHGPx; 0; d_PHGPx_dt is "d(PHGPx)/dt";
  d_exo_AA_dt: => exo_AA; 0; d_exo_AA_dt is "d(exo-AA)/dt";

  // Unit definitions:
  unit unitDefinition_0000002 = 1e-6 mole; unitDefinition_0000002 is "micromole";
  unit unitDefinition_0000003 = 1 / (60 second); unitDefinition_0000003 is "perminute";
  unit unitDefinition_0000005 = 60 second; unitDefinition_0000005 is "minute";
end
