// SBML level 2 version 4

model SmithAE2002_RanTransport()
  // The model reproduces the compartmental model for Ran transport as depicted in Fig 3 of the paper. Model reproduced using MathSBML.
  // To the extent possible under law, all copyright and related or neighbouring rights to this encoded model have been dedicated to the public domain worldwide. Please refer to CC0 Public Domain Dedicationfor more information.
  // In summary, you are entitled to use this encoded model in absolutely any manner you deem suitable, verbatim, or with modification, alone or embedded it in a larger context, redistribute it, commercially or not, in a restricted way or not.
  // To cite BioModels Database, please use: Li C, Donizelli M, Rodriguez N, Dharuri H, Endler L, Chelliah V, Li L, He E, Henry A, Stefan MI, Snoep JL, Hucka M, Le Novère N, Laibe C (2010) BioModels Database: An enhanced, curated and annotated resource for published quantitative kinetic models. BMC Syst Biol., 4:92.
  // biomodels.db:MODEL1886921294
  // biomodels.db:BIOMD0000000164
  // isDescribedBy pubmed:11799242
  // hasTaxon taxonomy:40674
  // hasProperty mamo:MAMO_0000046
  // isVersionOf GO:0031291 GO:0006913

  // Compartments:
  compartment Cytosol in PM = 1 um3;
  compartment EC = 1.408451 um3;
  compartment Nucleus in Nuc_membrane = 0.4084507 um3;
  compartment Nuc_membrane in Cytosol = 0.2450704 um2;  // 2-D
  compartment PM in EC = 1.408451 um2;  // 2-D

  // Species:
  species Carrier_Cytosol in Cytosol = 11.89527;
  species Carrier_RanGTP_Cytosol in Cytosol = 0.001829674;  // hasPart CHEBI:15996 uniprot:P62826; hasPart uniprot:P62826 kegg.compound:C00044 CHEBI:15996
  species RanGAP_Cytosol in Cytosol = 0.5;
  species RanBP1_Cytosol in Cytosol = 2.915773;
  species RanBP1_Carrier_RanGTP_Cytosol in Cytosol = 0.08422659;  // hasPart CHEBI:15996 uniprot:P62826 kegg.compound:C00044
  species NTF2_Nucleus in Nucleus = 0.5608886;  // isVersionOf uniprot:P61970
  species RanGDP_Nucleus in Nucleus = 0.04668497;  // hasPart uniprot:P62826 kegg.compound:C00035 CHEBI:17552
  species RCC1_Nucleus in Nucleus = 0.4;
  species RanGTP_Nucleus in Nucleus = 0.01180324;  // hasPart CHEBI:15996 uniprot:P62826; hasPart uniprot:P62826 kegg.compound:C00044 CHEBI:15996
  species NTF2_RanGDP_Nucleus in Nucleus = 0.9391114;  // hasPart uniprot:P62826 uniprot:P61970 kegg.compound:C00035 CHEBI:17552
  species Carrier_Nucleus in Nucleus = 10.82113;
  species RanGDP_Cytosol in Cytosol = 1.755461;  // hasPart uniprot:P62826 kegg.compound:C00035 CHEBI:17552
  species Carrier_RanGTP_Nucleus in Nucleus = 11.56942;  // hasPart CHEBI:15996 uniprot:P62826; hasPart uniprot:P62826 kegg.compound:C00044 CHEBI:15996
  species NTF2_RanGDP_Cytosol in Cytosol = 1.476178;  // hasPart uniprot:P61970 uniprot:P62826 kegg.compound:C00035 CHEBI:17552
  species FRanGTP_Cytosol in Cytosol = 0;  // hasPart CHEBI:15996 uniprot:P62826; hasPart uniprot:P62826 kegg.compound:C00044 CHEBI:15996
  species FCarrier_RanGTP_Cytosol in Cytosol = 0;  // hasPart CHEBI:15996 uniprot:P62826; hasPart uniprot:P62826 kegg.compound:C00044 CHEBI:15996
  species FRanGDP_Cytosol in Cytosol = 1;  // hasPart uniprot:P62826 kegg.compound:C00035 CHEBI:17552
  species FNTF2_RanGDP_Cytosol in Cytosol = 0;  // hasPart uniprot:P61970 uniprot:P62826 kegg.compound:C00035 CHEBI:17552
  species FRanBP1_Carrier_RanGTP_Cytosol in Cytosol = 0;  // hasPart CHEBI:15996 uniprot:P62826; hasPart uniprot:P62826 kegg.compound:C00044 CHEBI:15996
  species FCarrier_RanGTP_Nucleus in Nucleus = 0;  // hasPart CHEBI:15996 uniprot:P62826; hasPart uniprot:P62826 kegg.compound:C00044 CHEBI:15996
  species FRanGDP_Nucleus in Nucleus = 0;  // hasPart uniprot:P62826 kegg.compound:C00035 CHEBI:17552
  species FNTF2_RanGDP_Nucleus in Nucleus = 0;  // hasPart uniprot:P61970 uniprot:P62826 kegg.compound:C00035 CHEBI:17552
  species FRanGTP_Nucleus in Nucleus = 0;  // hasPart CHEBI:15996 uniprot:P62826; hasPart uniprot:P62826 kegg.compound:C00044 CHEBI:15996
  species NTF2_Cytosol in Cytosol = 0.0238218;  // isVersionOf uniprot:P61970
  species Pipet_Cytosol in Cytosol = 0;
  species RanGTP_Cytosol in Cytosol = 0;  // hasPart CHEBI:15996 uniprot:P62826; hasPart uniprot:P62826 kegg.compound:C00044 CHEBI:15996

  // Parameters:
  RanGAP_Kcat_FRanGTP_dephosphorylation = 6 s_1;
  Vmax_RanGTP_dephosphorylation_FRanGTP_dephosphorylation has uM_s_1;
  RanGAP_Kcat_dephosphorylationF = 6 s_1;
  Vmax_dephosphorylation_dephosphorylationF has uM_s_1;
  RanGAP_Kcat_RanGTP_dephosphorylation = 6 s_1;
  Vmax_RanGTP_dephosphorylation_RanGTP_dephosphorylation has uM_s_1;
  RanGAP_Kcat_dephosphorylation = 6 s_1;
  Vmax_dephosphorylation_dephosphorylation has uM_s_1;
  kinj = 25 s_1;
  start = 1 s;
  tau = 0.4 s;

  // Assignment rules:
  Vmax_RanGTP_dephosphorylation_FRanGTP_dephosphorylation := RanGAP_Kcat_FRanGTP_dephosphorylation*RanGAP_Cytosol;
  Vmax_dephosphorylation_dephosphorylationF := RanGAP_Cytosol*RanGAP_Kcat_dephosphorylationF;
  Vmax_RanGTP_dephosphorylation_RanGTP_dephosphorylation := RanGAP_Kcat_RanGTP_dephosphorylation*RanGAP_Cytosol;
  Vmax_dephosphorylation_dephosphorylation := RanGAP_Cytosol*RanGAP_Kcat_dephosphorylation;
  ar_for_Microinj := piecewise(kinj*0.00166113*Pipet_Cytosol, (time > start) && (time < start + tau), 0);

  // Reactions:
  Carrier_FRanGTP_binding: Carrier_Cytosol + FRanGTP_Cytosol -> FCarrier_RanGTP_Cytosol; (Carrier_FRanGTP_binding_Kon_Carrier_RanGTP_binding*Carrier_Cytosol*FRanGTP_Cytosol + (-(Carrier_FRanGTP_binding_Koff_Carrier_RanGTP_binding*FCarrier_RanGTP_Cytosol)))*Cytosol;
    Carrier_FRanGTP_binding_Kon_Carrier_RanGTP_binding = 0 uM_1_s_1; Carrier_FRanGTP_binding_Koff_Carrier_RanGTP_binding = 0 s_1;
  FRanGTP_dephosphorylation: FRanGTP_Cytosol -> FRanGDP_Cytosol; Vmax_RanGTP_dephosphorylation_FRanGTP_dephosphorylation*FRanGTP_Cytosol*(1/(FRanGTP_dephosphorylation_Km_RanGTP_dephosphorylation + FRanGTP_Cytosol))*Cytosol;  // modifiers: RanGAP_Cytosol; isVersionOf GO:0016311
    FRanGTP_dephosphorylation_Km_RanGTP_dephosphorylation = 0.43 uM;
  dephosphorylationF: FRanBP1_Carrier_RanGTP_Cytosol -> FRanGDP_Cytosol + RanBP1_Cytosol + Carrier_Cytosol; Vmax_dephosphorylation_dephosphorylationF*FRanBP1_Carrier_RanGTP_Cytosol*(1/(dephosphorylationF_Km_dephosphorylation + FRanBP1_Carrier_RanGTP_Cytosol))*Cytosol;  // modifiers: RanGAP_Cytosol; isVersionOf GO:0016311
    dephosphorylationF_Km_dephosphorylation = 0.43 uM;
  FRanGTP_Carrier_binding: Carrier_Nucleus + FRanGTP_Nucleus -> FCarrier_RanGTP_Nucleus; (FRanGTP_Carrier_binding_Kon_RanGTP_Carrier_binding*Carrier_Nucleus*FRanGTP_Nucleus + (-(FRanGTP_Carrier_binding_Koff_RanGTP_Carrier_binding*FCarrier_RanGTP_Nucleus)))*Nucleus;
    FRanGTP_Carrier_binding_Kon_RanGTP_Carrier_binding = 100 uM_1_s_1; FRanGTP_Carrier_binding_Koff_RanGTP_Carrier_binding = 1 s_1;
  NTF2_FRanGDP_Unbinding: NTF2_Cytosol + FRanGDP_Cytosol -> FNTF2_RanGDP_Cytosol; (NTF2_FRanGDP_Unbinding_Kon_NTF2_RanGDP_binding*NTF2_Cytosol*FRanGDP_Cytosol + (-(NTF2_FRanGDP_Unbinding_Koff_NTF2_RanGDP_binding*FNTF2_RanGDP_Cytosol)))*Cytosol;
    NTF2_FRanGDP_Unbinding_Kon_NTF2_RanGDP_binding = 100 uM_1_s_1; NTF2_FRanGDP_Unbinding_Koff_NTF2_RanGDP_binding = 2.5 s_1;
  RanBP1_bindingF: FCarrier_RanGTP_Cytosol + RanBP1_Cytosol -> FRanBP1_Carrier_RanGTP_Cytosol; (RanBP1_bindingF_Kon_RanBP1_binding*FCarrier_RanGTP_Cytosol*RanBP1_Cytosol + (-(RanBP1_bindingF_Koff_RanBP1_binding*FRanBP1_Carrier_RanGTP_Cytosol)))*Cytosol;
    RanBP1_bindingF_Kon_RanBP1_binding = 100 uM_1_s_1; RanBP1_bindingF_Koff_RanBP1_binding = 0.5 s_1;
  NTF2_FRanGDP_unbinding: FNTF2_RanGDP_Nucleus -> NTF2_Nucleus + FRanGDP_Nucleus; (NTF2_FRanGDP_unbinding_Koff_NTF2_RanGDP_unbinding*FNTF2_RanGDP_Nucleus + (-(NTF2_FRanGDP_unbinding_Kon_NTF2_RanGDP_unbinding*NTF2_Nucleus*FRanGDP_Nucleus)))*Nucleus;
    NTF2_FRanGDP_unbinding_Koff_NTF2_RanGDP_unbinding = 2.5 s_1; NTF2_FRanGDP_unbinding_Kon_NTF2_RanGDP_unbinding = 100 uM_1_s_1;
  Microinj: -> FRanGDP_Cytosol; ar_for_Microinj*Cytosol*1;  // modifiers: Pipet_Cytosol
  FRanGDP_to_FRanGTP: FRanGDP_Nucleus -> FRanGTP_Nucleus; 0.75*FRanGDP_to_FRanGTP_RCC1Kcat*RCC1_Nucleus*FRanGDP_Nucleus*(1/(FRanGDP_to_FRanGTP_RCC1Km + FRanGDP_Nucleus + NTF2_RanGDP_Nucleus))*Nucleus;  // modifiers: RCC1_Nucleus, NTF2_RanGDP_Nucleus, RanGDP_Nucleus; isVersionOf GO:0042325
    FRanGDP_to_FRanGTP_RCC1Kcat = 8.5 s_1; FRanGDP_to_FRanGTP_RCC1Km = 1.1 uM;
  RanGTP_dephosphorylation: RanGTP_Cytosol -> RanGDP_Cytosol; Vmax_RanGTP_dephosphorylation_RanGTP_dephosphorylation*RanGTP_Cytosol*(1/(RanGTP_dephosphorylation_Km_RanGTP_dephosphorylation + RanGTP_Cytosol))*Cytosol;  // modifiers: RanGAP_Cytosol; isVersionOf GO:0016311
    RanGTP_dephosphorylation_Km_RanGTP_dephosphorylation = 0.43 uM;
  RanGTP_Carrier_binding: RanGTP_Nucleus + Carrier_Nucleus -> Carrier_RanGTP_Nucleus; (RanGTP_Carrier_binding_Kon_RanGTP_Carrier_binding*RanGTP_Nucleus*Carrier_Nucleus + (-(RanGTP_Carrier_binding_Koff_RanGTP_Carrier_binding*Carrier_RanGTP_Nucleus)))*Nucleus;
    RanGTP_Carrier_binding_Kon_RanGTP_Carrier_binding = 100 uM_1_s_1; RanGTP_Carrier_binding_Koff_RanGTP_Carrier_binding = 1 s_1;
  NTF2_RanGDP_Unbinding: RanGDP_Cytosol + NTF2_Cytosol -> NTF2_RanGDP_Cytosol; (NTF2_RanGDP_Unbinding_Kon_NTF2_RanGDP_binding*RanGDP_Cytosol*NTF2_Cytosol + (-(NTF2_RanGDP_Unbinding_Koff_NTF2_RanGDP_binding*NTF2_RanGDP_Cytosol)))*Cytosol;
    NTF2_RanGDP_Unbinding_Kon_NTF2_RanGDP_binding = 100 uM_1_s_1; NTF2_RanGDP_Unbinding_Koff_NTF2_RanGDP_binding = 2.5 s_1;
  dephosphorylation: RanBP1_Carrier_RanGTP_Cytosol -> RanGDP_Cytosol + Carrier_Cytosol + RanBP1_Cytosol; Vmax_dephosphorylation_dephosphorylation*RanBP1_Carrier_RanGTP_Cytosol*(1/(dephosphorylation_Km_dephosphorylation + RanBP1_Carrier_RanGTP_Cytosol))*Cytosol;  // modifiers: RanGAP_Cytosol; isVersionOf GO:0016311
    dephosphorylation_Km_dephosphorylation = 0.43 uM;
  RanGDP_to_RanGTP: RanGDP_Nucleus -> RanGTP_Nucleus; 0.75*RanGDP_to_RanGTP_RCC1Kcat*RCC1_Nucleus*RanGDP_Nucleus*(1/(RanGDP_to_RanGTP_RCC1Km + RanGDP_Nucleus + NTF2_RanGDP_Nucleus))*Nucleus;  // modifiers: RCC1_Nucleus, NTF2_RanGDP_Nucleus; isVersionOf GO:0042325
    RanGDP_to_RanGTP_RCC1Kcat = 8.5 s_1; RanGDP_to_RanGTP_RCC1Km = 1.1 uM;
  NTF2_RAN_Nuc_Exchange: 4 NTF2_RanGDP_Nucleus -> 4 NTF2_Nucleus + RanGDP_Nucleus + 3 RanGTP_Nucleus; 0.25*NTF2_RAN_Nuc_Exchange_RCC1Kcat*RCC1_Nucleus*NTF2_RanGDP_Nucleus*(1/(NTF2_RAN_Nuc_Exchange_RCC1Km + RanGDP_Nucleus + NTF2_RanGDP_Nucleus))*Nucleus;  // modifiers: RCC1_Nucleus
    NTF2_RAN_Nuc_Exchange_RCC1Kcat = 8.5 s_1; NTF2_RAN_Nuc_Exchange_RCC1Km = 1.1 uM;
  NTF2_RanGDP_unbinding: NTF2_RanGDP_Nucleus -> RanGDP_Nucleus + NTF2_Nucleus; (NTF2_RanGDP_unbinding_Koff_NTF2_RanGDP_unbinding*NTF2_RanGDP_Nucleus + (-(NTF2_RanGDP_unbinding_Kon_NTF2_RanGDP_unbinding*RanGDP_Nucleus*NTF2_Nucleus)))*Nucleus;
    NTF2_RanGDP_unbinding_Koff_NTF2_RanGDP_unbinding = 2.5 s_1; NTF2_RanGDP_unbinding_Kon_NTF2_RanGDP_unbinding = 100 uM_1_s_1;
  Carrier_RanGTP_binding: RanGTP_Cytosol + Carrier_Cytosol -> Carrier_RanGTP_Cytosol; (Carrier_RanGTP_binding_Kon_Carrier_RanGTP_binding*RanGTP_Cytosol*Carrier_Cytosol + (-(Carrier_RanGTP_binding_Koff_Carrier_RanGTP_binding*Carrier_RanGTP_Cytosol)))*Cytosol;  // isVersionOf GO:0008536
    Carrier_RanGTP_binding_Kon_Carrier_RanGTP_binding = 0 uM_1_s_1; Carrier_RanGTP_binding_Koff_Carrier_RanGTP_binding = 0 s_1;
  NTF2_FRAN_Nuc_Exchange: 4 FNTF2_RanGDP_Nucleus -> 4 NTF2_Nucleus + 3 FRanGTP_Nucleus + FRanGDP_Nucleus; 0.25*NTF2_FRAN_Nuc_Exchange_RCC1Kcat*RCC1_Nucleus*FNTF2_RanGDP_Nucleus*(1/(NTF2_FRAN_Nuc_Exchange_RCC1Km + RanGDP_Nucleus + FNTF2_RanGDP_Nucleus))*Nucleus;  // modifiers: RCC1_Nucleus, NTF2_RanGDP_Nucleus, RanGDP_Nucleus
    NTF2_FRAN_Nuc_Exchange_RCC1Kcat = 8.5 s_1; NTF2_FRAN_Nuc_Exchange_RCC1Km = 1.1 uM;
  RanBP1_binding: RanBP1_Cytosol + Carrier_RanGTP_Cytosol -> RanBP1_Carrier_RanGTP_Cytosol; (RanBP1_binding_Kon_RanBP1_binding*RanBP1_Cytosol*Carrier_RanGTP_Cytosol + (-(RanBP1_binding_Koff_RanBP1_binding*RanBP1_Carrier_RanGTP_Cytosol)))*Cytosol;  // isVersionOf GO:0008536
    RanBP1_binding_Kon_RanBP1_binding = 100 uM_1_s_1; RanBP1_binding_Koff_RanBP1_binding = 0.5 s_1;
  Carrier_RanGTP_flux: Carrier_RanGTP_Cytosol -> Carrier_RanGTP_Nucleus; Carrier_RanGTP_flux_Carrier_RanGTP_Kperm*(Carrier_RanGTP_Cytosol + (-Carrier_RanGTP_Nucleus))*Nuc_membrane;  // isVersionOf GO:0005487
    Carrier_RanGTP_flux_I = 0 pA_um_2; Carrier_RanGTP_flux_Carrier_RanGTP_Kperm = 0.173333 um_s_1;
  NTF2_flux: NTF2_Cytosol -> NTF2_Nucleus; NTF2_Kperm*(NTF2_Cytosol + (-NTF2_Nucleus))*Nuc_membrane;  // isVersionOf GO:0005487
    NTF2_flux_I = 0 pA_um_2; NTF2_Kperm = 3.73333 um_s_1;
  NTF2_RanGDP_flux: NTF2_RanGDP_Cytosol -> NTF2_RanGDP_Nucleus; NTF2_RanGDP_flux_NTF2_RanGDP_Kperm*(NTF2_RanGDP_Cytosol + (-NTF2_RanGDP_Nucleus))*Nuc_membrane;  // isVersionOf GO:0005487
    NTF2_RanGDP_flux_I = 0 pA_um_2; NTF2_RanGDP_flux_NTF2_RanGDP_Kperm = 3.73333 um_s_1;
  Carrier_flux: Carrier_Cytosol -> Carrier_Nucleus; Carrier_Kperm*(Carrier_Cytosol + (-Carrier_Nucleus))*Nuc_membrane;  // isVersionOf GO:0005487
    Carrier_flux_I = 0 pA_um_2; Carrier_Kperm = 1.86667 um_s_1;
  FRanGDP_flux: FRanGDP_Cytosol -> FRanGDP_Nucleus; FRanGDP_flux_RanGDP_Kperm*(FRanGDP_Cytosol + (-FRanGDP_Nucleus))*Nuc_membrane;  // isVersionOf GO:0005487
    FRanGDP_flux_I = 0 pA_um_2; FRanGDP_flux_RanGDP_Kperm = 0 um_s_1;
  Carrier_FRanGTP_flux: FCarrier_RanGTP_Cytosol -> FCarrier_RanGTP_Nucleus; Carrier_FRanGTP_flux_Carrier_RanGTP_Kperm*(FCarrier_RanGTP_Cytosol + (-FCarrier_RanGTP_Nucleus))*Nuc_membrane;  // isVersionOf GO:0005487
    Carrier_FRanGTP_flux_I = 0 pA_um_2; Carrier_FRanGTP_flux_Carrier_RanGTP_Kperm = 0.173333 um_s_1;
  FNTF2_RanGDP_flux: FNTF2_RanGDP_Cytosol -> FNTF2_RanGDP_Nucleus; FNTF2_RanGDP_flux_NTF2_RanGDP_Kperm*(FNTF2_RanGDP_Cytosol + (-FNTF2_RanGDP_Nucleus))*Nuc_membrane;  // isVersionOf GO:0005487
    FNTF2_RanGDP_flux_I = 0 pA_um_2; FNTF2_RanGDP_flux_NTF2_RanGDP_Kperm = 3.73333 um_s_1;
  FRanGTP_flux: FRanGTP_Cytosol -> FRanGTP_Nucleus; FRanGTP_flux_RanGTP_Kperm*(FRanGTP_Cytosol + (-FRanGTP_Nucleus))*Nuc_membrane;  // isVersionOf GO:0005487
    FRanGTP_flux_I = 0 pA_um_2; FRanGTP_flux_RanGTP_Kperm = 0 um_s_1;
  RanGDP_flux: RanGDP_Cytosol -> RanGDP_Nucleus; RanGDP_flux_RanGDP_Kperm*(RanGDP_Cytosol + (-RanGDP_Nucleus))*Nuc_membrane;  // isVersionOf GO:0005487
    RanGDP_flux_I = 0 pA_um_2; RanGDP_flux_RanGDP_Kperm = 0 um_s_1;
  RanGTP_flux: RanGTP_Cytosol -> RanGTP_Nucleus; RanGTP_flux_RanGTP_Kperm*(RanGTP_Cytosol + (-RanGTP_Nucleus))*Nuc_membrane;  // isVersionOf GO:0005487
    RanGTP_flux_I = 0 pA_um_2; RanGTP_flux_RanGTP_Kperm = 0 um_s_1;

  // Unit definitions:
  unit substance = 1e-6 mole;
  unit area = (1e-6 metre)^2;
  unit molecules = item;
  unit umol_litre_um_3 = 1e-21 mole;
  unit um2 = (1e-6 metre)^2;
  unit uM_s_1 = 1e-3 dimensionless * mole / (metre^3 * second);
  unit uM_1_s_1 = 1000 dimensionless * metre^3 / (mole * second);
  unit s_1 = 1 / second;
  unit uM = 1e-3 dimensionless * mole / metre^3;
  unit s = second;
  unit uM_um_s_1 = 1e-9 dimensionless * mole / (metre^2 * second);
  unit pA_um_2 = dimensionless * ampere / metre^2;
  unit um_s_1 = 1e-6 dimensionless * metre / second;
  unit um3 = (1e-6 metre)^3;
end
