// SBML level 2 version 1

function _3_hydrolysis(kh, R)
  kh*R;
end

function _2_Sigmoid_Activation(ke, r, kg, R, kf)
  ke*r/(1 + exp((kg - R)*kf));
end

function _2_Hills_activation(r, ke, R, h, kg)
  r*ke*R^h/(kg + R^h);
end

function _4_extraction(kminus1, r)
  kminus1*r;
end

function _2_Sigmoid_Activation_3_t(r, ke, t, kg, R, kf)
  r*(ke*t/(100 + t))/(1 + exp((kg - R)*kf));
end
_2_Sigmoid_Activation_3_t is "2 Sigmoid Activation 3 (t)";

function _1_recruitment(K1)
  K1;
end

model Model_1()
  // Rab5-Rab7 anti-phase Cut-Out switch

  // Compartments:
  compartment compartment_0 = 1;

  // Species:
  species r5 in compartment_0 = 1;
  species R5 in compartment_0 = 0.001;
  species r7 in compartment_0 = 1;
  species R7 in compartment_0 = 0.001;

  // Reactions:
  _51_recruitment_of_Rab5: => r5; compartment_0*_1_recruitment(_51_recruitment_of_Rab5_K1);
    _51_recruitment_of_Rab5_K1 = 1;
  _525_activation_of_Rab5_time: r5 => R5; compartment_0*_2_Sigmoid_Activation_3_t(r5, _525_activation_of_Rab5_time_ke, time, _525_activation_of_Rab5_time_kg, R5, _525_activation_of_Rab5_time_kf); _525_activation_of_Rab5_time is "525 activation of Rab5 (time)";
    _525_activation_of_Rab5_time_ke = 0.3; _525_activation_of_Rab5_time_kg = 0.1; _525_activation_of_Rab5_time_kf = 2.5;
  _54_extraction_of_Rab5: r5 => ; compartment_0*_4_extraction(_54_extraction_of_Rab5_kminus1, r5);
    _54_extraction_of_Rab5_kminus1 = 1;
  _71_recruitment_of_Rab7: => r7; compartment_0*_1_recruitment(_71_recruitment_of_Rab7_K1);
    _71_recruitment_of_Rab7_K1 = 0.483;
  _727_activation_of_Rab7_by_GEF7: r7 => R7; compartment_0*_2_Hills_activation(r7, _727_activation_of_Rab7_by_GEF7_ke, R7, h, _727_activation_of_Rab7_by_GEF7_kg);
    _727_activation_of_Rab7_by_GEF7_ke = 0.21; h = 3; _727_activation_of_Rab7_by_GEF7_kg = 0.1;
  _725_activation_of_Rab7_by_GEF5: r7 => R7; compartment_0*_2_Sigmoid_Activation(_725_activation_of_Rab7_by_GEF5_ke, r7, _725_activation_of_Rab7_by_GEF5_kg, R5, _725_activation_of_Rab7_by_GEF5_kf);  // modifiers: R5
    _725_activation_of_Rab7_by_GEF5_ke = 0.021; _725_activation_of_Rab7_by_GEF5_kg = 1; _725_activation_of_Rab7_by_GEF5_kf = 3;
  _537_hydrolysis_of_Rab5_by_Rab7: R5 => r5; compartment_0*_2_Sigmoid_Activation(_537_hydrolysis_of_Rab5_by_Rab7_ke, R5, _537_hydrolysis_of_Rab5_by_Rab7_kg, R7, _537_hydrolysis_of_Rab5_by_Rab7_kf);  // modifiers: R7
    _537_hydrolysis_of_Rab5_by_Rab7_ke = 0.31; _537_hydrolysis_of_Rab5_by_Rab7_kg = 0.3; _537_hydrolysis_of_Rab5_by_Rab7_kf = 3;
  _74_extraction_of_rab7: r7 => ; compartment_0*_4_extraction(_74_extraction_of_rab7_kminus1, r7);
    _74_extraction_of_rab7_kminus1 = 0.483;
  _53_hydrolysis_of_Rab5_intr: R5 => r5; compartment_0*_3_hydrolysis(_53_hydrolysis_of_Rab5_intr_kh, R5); _53_hydrolysis_of_Rab5_intr is "53 hydrolysis of Rab5 (intr.)";
    _53_hydrolysis_of_Rab5_intr_kh = 0.06;
  _73_hydrolysis_of_Rab7_intr: R7 => r7; compartment_0*_3_hydrolysis(_73_hydrolysis_of_Rab7_intr_kh, R7); _73_hydrolysis_of_Rab7_intr is "73 hydrolysis of Rab7 (intr.)";
    _73_hydrolysis_of_Rab7_intr_kh = 0.15;

  // Unit definitions:
  unit volume = 1e-3 litre;
  unit time = 60 second;
  unit substance = 1e-3 mole;
end
