// SBML level 2 version 1

model p53_Mdm2_ARF_System()

  // Compartments:
  compartment cell = 1;

  // Species:
  substanceOnly species Mdm2 in cell = 5;
  substanceOnly species p53 in cell = 5;
  substanceOnly species Mdm2_p53 in cell = 95;
  substanceOnly species Mdm2_mRNA in cell = 0;
  substanceOnly species ARF in cell = 0;
  substanceOnly species ARF_Mdm2 in cell = 0;
  substanceOnly species IR in cell = 0;
  substanceOnly species damDNA in cell = 0;
  substanceOnly species $Sink in cell = 1;
  substanceOnly species $Source in cell = 1;
  substanceOnly species p53deg in cell = 0;
  substanceOnly species p53syn in cell = 0;
  substanceOnly species mdm2deg in cell = 0;
  substanceOnly species mdm2syn in cell = 0;
  substanceOnly species Mdm2mRNAdeg in cell = 0;
  substanceOnly species Mdm2mRNAsyn in cell = 0;
  substanceOnly species totdamDNA in cell = 0;
  substanceOnly species totp53 in cell;
  substanceOnly species totMdm2 in cell;

  // Parameters:
  ksynMdm2 = 0.000495;
  kdegMdm2 = 0.000433;
  ksynp53 = 0.078;
  kdegp53 = 0.000825;
  kbinMdm2p53 = 0.001155;
  krelMdm2p53 = 1.155e-5;
  ksynMdm2mRNA = 0.0001;
  kdegMdm2mRNA = 0.0001;
  kbinARFMdm2 = 0.01;
  kdegARFMdm2 = 0.001;
  kdegARF = 0.0001;
  kactARF = 3.3e-5;
  kdam = 0.08;
  krepair = 2e-5;
  kproteff = 1;

  // Assignment rules:
  totp53 := p53 + Mdm2_p53;
  totMdm2 := Mdm2 + Mdm2_p53 + ARF_Mdm2;

  // Reactions:
  Mdm2Synthesis: Mdm2_mRNA => Mdm2_mRNA + Mdm2 + mdm2syn; ksynMdm2*Mdm2_mRNA;
  Mdm2mRNASynthesis: p53 => p53 + Mdm2_mRNA + Mdm2mRNAsyn; ksynMdm2mRNA*p53;
  Mdm2mRNADegradation: Mdm2_mRNA => $Sink + Mdm2mRNAdeg; kdegMdm2mRNA*Mdm2_mRNA;
  Mdm2Degradation: Mdm2 => $Sink + mdm2deg; kdegMdm2*Mdm2*kproteff;
  p53Synthesis: $Source => p53 + p53syn; ksynp53*Source;
  p53Degradation: Mdm2_p53 => Mdm2 + p53deg; kdegp53*Mdm2_p53*kproteff;
  P53_Mdm2Binding: p53 + Mdm2 => Mdm2_p53; kbinMdm2p53*p53*Mdm2;
  P53_Mdm2Release: Mdm2_p53 => p53 + Mdm2; krelMdm2p53*Mdm2_p53;
  DNAdamage: IR => IR + damDNA + totdamDNA; kdam*IR;
  DNArepair: damDNA => $Sink; krepair*damDNA;
  ARFactivation: damDNA => damDNA + ARF; kactARF*damDNA;
  ARF_Mdm2Binding: ARF + Mdm2 => ARF_Mdm2; kbinARFMdm2*ARF*Mdm2;
  ARF_Mdm2Degradation: ARF_Mdm2 => ARF + mdm2deg; kdegARFMdm2*ARF_Mdm2*kproteff;
  ARFDegradation: ARF => $Sink; kdegARF*ARF*kproteff;

  // Events:
  stressCell: at (time >= 3600): IR = 25;
  stopStress: at (time >= 3660): IR = 0;

  // Unit definitions:
  unit substance = item;
end
