// SBML level 2 version 1

model p53_Mdm2_ATM_System()

  // Compartments:
  compartment cell = 1;

  // Species:
  substanceOnly species Mdm2 in cell = 5;
  substanceOnly species p53 in cell = 5;
  substanceOnly species Mdm2_p53 in cell = 95;
  substanceOnly species Mdm2_mRNA in cell = 10;
  substanceOnly species p53_mRNA in cell = 10;
  substanceOnly species ATMA in cell = 0;
  substanceOnly species ATMI in cell = 200;
  substanceOnly species p53_P in cell = 0;
  substanceOnly species Mdm2_P in cell = 0;
  substanceOnly species IR in cell = 0;
  substanceOnly species damDNA in cell = 0;
  substanceOnly species $Sink in cell = 1;
  substanceOnly species $Source in cell = 1;
  substanceOnly species p53deg in cell = 0;
  substanceOnly species p53syn in cell = 0;
  substanceOnly species mdm2deg in cell = 0;
  substanceOnly species mdm2syn in cell = 0;
  substanceOnly species Mdm2mRNAdeg in cell = 0;
  substanceOnly species Mdm2mRNAsyn in cell = 0;
  substanceOnly species totp53 in cell;
  substanceOnly species totMdm2 in cell;

  // Parameters:
  ksynMdm2 = 0.000495;
  kdegMdm2 = 0.000433;
  ksynp53 = 0.006;
  kdegp53 = 0.000825;
  kbinMdm2p53 = 0.001155;
  krelMdm2p53 = 1.155e-5;
  ksynMdm2mRNA = 0.0001;
  kdegMdm2mRNA = 0.0001;
  kactATM = 0.0001;
  kdegATMMdm2 = 0.0004;
  kinactATM = 0.0005;
  kphosp53 = 0.0005;
  kdephosp53 = 0.5;
  kphosMdm2 = 2;
  kdephosMdm2 = 0.5;
  kdam = 0.08;
  krepair = 2e-5;
  kproteff = 1;
  ksynp53mRNA = 0.001;
  kdegp53mRNA = 0.0001;

  // Assignment rules:
  totp53 := p53 + Mdm2_p53 + p53_P;
  totMdm2 := Mdm2 + Mdm2_p53 + Mdm2_P;

  // Reactions:
  p53mRNASynthesis: $Source => p53_mRNA; ksynp53mRNA*Source;
  p53mRNADegradation: p53_mRNA => $Sink; kdegp53mRNA*p53_mRNA;
  Mdm2Synthesis: Mdm2_mRNA => Mdm2_mRNA + Mdm2 + mdm2syn; ksynMdm2*Mdm2_mRNA;
  Mdm2mRNASynthesis1: p53 => p53 + Mdm2_mRNA + Mdm2mRNAsyn; ksynMdm2mRNA*p53;
  Mdm2mRNASynthesis2: p53_P => p53_P + Mdm2_mRNA + Mdm2mRNAsyn; ksynMdm2mRNA*p53_P;
  Mdm2mRNADegradation: Mdm2_mRNA => $Sink + Mdm2mRNAdeg; kdegMdm2mRNA*Mdm2_mRNA;
  Mdm2Degradation: Mdm2 => $Sink + mdm2deg; kdegMdm2*Mdm2*kproteff;
  p53Synthesis: p53_mRNA => p53 + p53_mRNA + p53syn; ksynp53*p53_mRNA;
  p53Degradation: Mdm2_p53 => Mdm2 + p53deg; kdegp53*Mdm2_p53*kproteff;
  P53_Mdm2Binding: p53 + Mdm2 => Mdm2_p53; kbinMdm2p53*p53*Mdm2;
  P53_Mdm2Release: Mdm2_p53 => p53 + Mdm2; krelMdm2p53*Mdm2_p53;
  DNAdamage: IR => IR + damDNA; kdam*IR;
  DNArepair: damDNA => $Sink; krepair*damDNA;
  ATMactivation: damDNA + ATMI => damDNA + ATMA; kactATM*damDNA*ATMI;
  p53phoshorylation: p53 + ATMA => p53_P + ATMA; kphosp53*p53*ATMA;
  p53dephosorylation: p53_P => p53; kdephosp53*p53_P;
  Mdm2phoshorylation: Mdm2 + ATMA => Mdm2_P + ATMA; kphosMdm2*Mdm2*ATMA;
  Mdm2dephosorylation: Mdm2_P => Mdm2; kdephosMdm2*Mdm2_P;
  Mdm2Pdegradation: Mdm2_P => $Sink + mdm2deg; kdegATMMdm2*Mdm2_P;
  ATMInactivation: ATMA => ATMI; kinactATM*ATMA;

  // Events:
  stressCell: at (time >= 3600): IR = 25;
  stopStress: at (time >= 3660): IR = 0;

  // Unit definitions:
  unit substance = item;
end
