// SBML level 2 version 4

model Bray1995_chemotaxis_receptorlinkedcomplex()
  // This model originates from BioModels Database: A Database of Annotated Published Models. It is copyright (c) 2005-2009 The BioModels Team.
  // For more information see the terms of use.
  // To cite BioModels Database, please use Le Novère N., Bornstein B., Broicher A., Courtot M., Donizelli M., Dharuri H., Li L., Sauro H., Schilstra M., Shapiro B., Snoep J.L., Hucka M. (2006) BioModels Database: A Free, Centralized Database of Curated, Published, Quantitative Kinetic Models of Biochemical and Cellular Systems Nucleic Acids Res., 34: D689-D691.
  // biomodels.db:MODEL6409760567
  // biomodels.db:BIOMD0000000200
  // isDescribedBy pubmed:8573792
  // isDerivedFrom biomodels.db:BIOMD0000000404
  // hasTaxon taxonomy:562
  // isDescribedBy kegg.pathway:eco02030

  // Compartments:
  compartment cell = 1.41;  // isVersionOf GO:0005623

  // Species:
  species AA in cell = 2.5e-6;  // hasPart uniprot:P07363
  species AAp in cell = 0;  // hasPart uniprot:P07363
  species W in cell = 5e-6;  // isVersionOf uniprot:P0A964
  species WAA in cell = 0;  // hasPart uniprot:P07363 uniprot:P0A964
  species WAAp in cell = 0;  // hasPart uniprot:P07363 uniprot:P0A964
  species WWAA in cell = 0;  // hasPart uniprot:P0A964 uniprot:P07363
  species WWAAp in cell = 0;  // hasPart uniprot:P0A964 uniprot:P07363
  species TT in cell = 2.5e-6;  // hasPart uniprot:P07017
  species TTW in cell = 0;  // hasPart uniprot:P0A964 uniprot:P07017
  species TTWW in cell = 0;  // hasPart uniprot:P0A964 uniprot:P07017
  species TTWAA in cell = 0;  // hasPart uniprot:P0A964 uniprot:P07363 uniprot:P07017
  species TTWAAp in cell = 0;  // hasPart uniprot:P0A964 uniprot:P07363 uniprot:P07017
  species TTAA in cell = 0;  // hasPart uniprot:P07363 uniprot:P07017
  species TTAAp in cell = 0;  // hasPart uniprot:P07363 uniprot:P07017
  species TTWWAA in cell = 0;  // hasPart uniprot:P0A964 uniprot:P07363 uniprot:P07017
  species TTWWAAp in cell = 0;  // hasPart uniprot:P0A964 uniprot:P07363 uniprot:P07017
  species Y in cell = 1e-5;  // isVersionOf uniprot:P0AE67
  species Yp in cell = 0;  // isVersionOf uniprot:P0AE67
  species Z in cell = 2e-5;  // isVersionOf uniprot:P0A9H9
  species B in cell = 2e-6;  // isVersionOf uniprot:P07330
  species Bp in cell = 0;  // isVersionOf uniprot:P07330
  species SetYp in cell = 1.63e-6; SetYp is "setYp";  // isVersionOf uniprot:P0AE67

  // Parameters:
  Hill = 4;
  Bias has dimensionless;

  // Assignment rules:
  Bias := 1 - Yp^Hill/(2.333*SetYp^Hill + Yp^Hill);

  // Reactions:
  complex_r1: TTW -> TT + W; cell*(complex_r1_k1*TTW - complex_r1_k2*TT*W);  // isVersionOf GO:0006461 GO:0043241
    complex_r1_k1 = 0.00365 persec; complex_r1_k2 = 1000000 perMpersec;
  complex_r2: WAA -> W + AA; cell*(complex_r2_k1*WAA - complex_r2_k2*W*AA);  // isVersionOf GO:0043241 GO:0006461
    complex_r2_k1 = 0.00894 persec; complex_r2_k2 = 1000000 perMpersec;
  complex_r3: TTWAA -> TT + WAA; cell*(complex_r3_k1*TTWAA - complex_r3_k2*TT*WAA);  // isVersionOf GO:0043241 GO:0006461
    complex_r3_k1 = 297 persec; complex_r3_k2 = 1000000 perMpersec;
  complex_r4: TTWWAA -> TTW + WAA; cell*(complex_r4_k1*TTWWAA - complex_r4_k2*TTW*WAA);  // isVersionOf GO:0043241 GO:0006461
    complex_r4_k1 = 0.64 persec; complex_r4_k2 = 1000000 perMpersec;
  complex_r5: TTWWAA -> TTWW + AA; cell*(complex_r5_k1*TTWWAA - complex_r5_k2*TTWW*AA);  // isVersionOf GO:0043241 GO:0006461
    complex_r5_k1 = 0.112 persec; complex_r5_k2 = 1000000 perMpersec;
  complex_r6: TTWWAA -> TT + WWAA; cell*(complex_r6_k1*TTWWAA - complex_r6_k2*TT*WWAA);  // isVersionOf GO:0043241 GO:0006461
    complex_r6_k1 = 0.0229 persec; complex_r6_k2 = 1000000 perMpersec;
  complex_r7: TTAA -> TT + AA; cell*(complex_r7_k1*TTAA - complex_r7_k2*TT*AA);  // isVersionOf GO:0043241 GO:0006461
    complex_r7_k1 = 39.3 persec; complex_r7_k2 = 1000000 perMpersec;
  complex_r8: TTWAA -> TTW + AA; cell*(complex_r8_k1*TTWAA - complex_r8_k2*TTW*AA);  // isVersionOf GO:0043241 GO:0006461
    complex_r8_k1 = 727 persec; complex_r8_k2 = 1000000 perMpersec;
  complex_r9: TTWWAA -> TTWAA + W; cell*(complex_r9_k1*TTWWAA - complex_r9_k2*TTWAA*W);  // isVersionOf GO:0043241 GO:0006461
    complex_r9_k1 = 7.87e-6 persec; complex_r9_k2 = 1000000 perMpersec;
  complex_r10: TTWW -> TTW + W; cell*(complex_r10_k1*TTWW - complex_r10_k2*TTW*W);  // isVersionOf GO:0043241 GO:0006461
    complex_r10_k1 = 0.0511 persec; complex_r10_k2 = 1000000 perMpersec;
  complex_r11: WWAA -> W + WAA; cell*(complex_r11_k1*WWAA - complex_r11_k2*W*WAA);  // isVersionOf GO:0043241 GO:0006461
    complex_r11_k1 = 0.102 persec; complex_r11_k2 = 1000000 perMpersec;
  complex_r12: TTWAA -> TTAA + W; cell*(complex_r12_k1*TTWAA - complex_r12_k2*TTAA*W);  // isVersionOf GO:0043241 GO:0006461
    complex_r12_k1 = 0.0676 persec; complex_r12_k2 = 1000000 perMpersec;
  phosphorylation_r1: TTWWAA => TTWWAAp; cell*phosphorylation_r1_k1*TTWWAA;  // isVersionOf GO:0016310
    phosphorylation_r1_k1 = 15.5 persec;
  phosphorylation_r2: AA => AAp; cell*phosphorylation_r2_k1*AA;  // isVersionOf GO:0016310
    phosphorylation_r2_k1 = 0.0227 persec;
  phosphorylation_r3: WAA => WAAp; cell*phosphorylation_r3_k1*WAA;  // isVersionOf GO:0016310
    phosphorylation_r3_k1 = 0.0227 persec;
  phosphorylation_r4: WWAA => WWAAp; cell*phosphorylation_r4_k1*WWAA;  // isVersionOf GO:0016310
    phosphorylation_r4_k1 = 0.0227 persec;
  phosphorylation_r5: TTAA => TTAAp; cell*phosphorylation_r5_k1*TTAA;  // isVersionOf GO:0016310
    phosphorylation_r5_k1 = 0.0227 persec;
  phosphorylation_r6: TTWAA => TTWAAp; cell*phosphorylation_r6_k1*TTWAA;  // isVersionOf GO:0016310
    phosphorylation_r6_k1 = 0.0227 persec;
  phosphorylation_r7: Y => Yp; cell*phosphorylation_r7_k1*Y;  // isVersionOf GO:0016310
    phosphorylation_r7_k1 = 0.00124 persec;
  phosphorylation_r8: Yp => Y; cell*phosphorylation_r8_k1*Yp;  // isVersionOf GO:0016311
    phosphorylation_r8_k1 = 0.037 persec;
  phosphorylation_r9: Yp + Z => Y + Z; cell*phosphorylation_r9_k1*Yp*Z;  // isVersionOf GO:0016311
    phosphorylation_r9_k1 = 500000 perMpersec;
  phosphorylation_r10: Bp => B; cell*phosphorylation_r10_k1*Bp;  // isVersionOf GO:0016311
    phosphorylation_r10_k1 = 0.35 persec;
  phosphotransfer_r1: B + AAp => Bp + AA; cell*phosphotransfer_r1_k1*B*AAp;  // isVersionOf GO:0016780
    phosphotransfer_r1_k1 = 6000000 perMpersec;
  phosphotransfer_r2: B + WAAp => Bp + WAA; cell*phosphotransfer_r2_k1*B*WAAp;  // isVersionOf GO:0016780
    phosphotransfer_r2_k1 = 6000000 perMpersec;
  phosphotransfer_r3: B + WWAAp => Bp + WWAA; cell*phosphotransfer_r3_k1*B*WWAAp;  // hasVersion GO:0016780
    phosphotransfer_r3_k1 = 6000000 perMpersec;
  phosphotransfer_r4: B + TTAAp => Bp + TTAA; cell*phosphotransfer_r4_k1*B*TTAAp;  // isVersionOf GO:0016780
    phosphotransfer_r4_k1 = 6000000 perMpersec;
  phosphotransfer_r5: B + TTWAAp => Bp + TTWAA; cell*phosphotransfer_r5_k1*B*TTWAAp;  // isVersionOf GO:0016780
    phosphotransfer_r5_k1 = 6000000 perMpersec;
  phosphotransfer_r6: B + TTWWAAp => Bp + TTWWAA; cell*phosphotransfer_r6_k1*B*TTWWAAp;  // isVersionOf GO:0016780
    phosphotransfer_r6_k1 = 6000000 perMpersec;
  phosphotransfer_r7: Y + AAp => Yp + AA; cell*phosphotransfer_r7_k1*Y*AAp;  // isVersionOf GO:0016780
    phosphotransfer_r7_k1 = 30000000 perMpersec;
  phosphotransfer_r8: Y + WAAp => Yp + WAA; cell*phosphotransfer_r8_k1*Y*WAAp;  // isVersionOf GO:0016780
    phosphotransfer_r8_k1 = 30000000 perMpersec;
  phosphotransfer_r9: Y + WWAAp => Yp + WWAA; cell*phosphotransfer_r9_k1*Y*WWAAp;  // isVersionOf GO:0016780
    phosphotransfer_r9_k1 = 30000000 perMpersec;
  phosphotransfer_r10: Y + TTAAp => Yp + TTAA; cell*phosphotransfer_r10_k1*Y*TTAAp;  // isVersionOf GO:0016780
    phosphotransfer_r10_k1 = 30000000 perMpersec;
  phosphotransfer_r11: Y + TTWAAp => Yp + TTWAA; cell*phosphotransfer_r11_k1*Y*TTWAAp;  // isVersionOf GO:0016780
    phosphotransfer_r11_k1 = 30000000 perMpersec;
  phosphotransfer_r12: Y + TTWWAAp => Yp + TTWWAA; cell*phosphotransfer_r12_k1*Y*TTWWAAp;  // isVersionOf GO:0016780
    phosphotransfer_r12_k1 = 30000000 perMpersec;

  // Unit definitions:
  unit perMpersec = litre / (mole * second);
  unit persec = 1 / second;
  unit volume = 1e-15 litre; volume is "femtolitre";
  unit M = mole / litre;
  unit Mpersec = mole / (litre * second);
end
