// SBML level 2 version 4

model Curien2009_Aspartate_Metabolism()
  // This a model described in the article:
  // Understanding the regulation of aspartate metabolism using a model based on measured kinetic parameters.
  // Curien G, Bastien O, Robert-Genthon M, Cornish-Bowden A, Cárdenas ML, Dumas R. Mol Syst Biol. 2009;5:271. Epub 2009 May 19. PMID: 19455135 , doi: 10.1038/msb.2009.29
  // Abstract:
  // The aspartate-derived amino-acid pathway from plants is well suited for analysing the function of the allosteric network of interactions in branched pathways. For this purpose, a detailed kinetic model of the system in the plant model Arabidopsis was constructed on the basis of in vitro kinetic measurements. The data, assembled into a mathematical model, reproduce in vivo measurements and also provide non-intuitive predictions. A crucial result is the identification of allosteric interactions whose function is not to couple demand and supply but to maintain a high independence between fluxes in competing pathways. In addition, the model shows that enzyme isoforms are not functionally redundant, because they contribute unequally to the flux and its regulation. Another result is the identification of the threonine concentration as the most sensitive variable in the system, suggesting a regulatory role for threonine at a higher level of integration.
  // The limiting rates for the tRNA synthetase reactions, V_Lys_RS, V_Thr_RS and V_Ile_RS, are all assigned a joined value, Vmax_AA_RS, to facilitate reproduction of the results in the publication. To alter these rates seperately these assignments have to be changed or removed.
  // This model originates from BioModels Database: A Database of Annotated Published Models. It is copyright (c) 2005-2009 The BioModels Team.
  // For more information see the terms of use .
  // To cite BioModels Database, please use Le Novère N., Bornstein B., Broicher A., Courtot M., Donizelli M., Dharuri H., Li L., Sauro H., Schilstra M., Shapiro B., Snoep J.L., Hucka M. (2006) BioModels Database: A Free, Centralized Database of Curated, Published, Quantitative Kinetic Models of Biochemical and Cellular Systems Nucleic Acids Res., 34: D689-D691.
  // biomodels.db:MODEL3336584391
  // biomodels.db:BIOMD0000000212
  // isDescribedBy pubmed:19455135
  // hasTaxon taxonomy:3702
  // isVersionOf GO:0006531
  // isPartOf kegg.pathway:ath00260

  // Compartments:
  compartment chl = 1;  // GO:0009570

  // Species:
  species $Asp in chl = 1500; Asp is "Aspartate";  // CHEBI:17053 kegg.compound:C00049 pubchem.substance:47205730
  species $AK1 in chl = 0.25;  // uniprot:Q9LYU8
  species Lys in chl = 0; Lys is "Lysine";  // CHEBI:18019 kegg.compound:C00047 pubchem.substance:47205736
  species $AdoMet in chl = 20; AdoMet is "S-adenosyl-methionine";  // CHEBI:15414 kegg.compound:C00019
  species AspP in chl = 0; AspP is "Aspartyl_P";  // CHEBI:15836 kegg.compound:C03082
  species $AK2 in chl = 0.25;  // uniprot:O23653
  species $AKHSDHI in chl = 0.63; AKHSDHI is "AKI-HSDHI";  // uniprot:Q9SA18
  species $AKHSDHII in chl = 0.63; AKHSDHII is "AKII-HSDHII";  // uniprot:O81852
  species Thr in chl = 0; Thr is "Threonine";  // CHEBI:16857 kegg.compound:C00188
  species $ASADH in chl = 11.6;  // uniprot:Q9FVC4
  species ASA in chl = 0; ASA is "Aspartate semialdehyde";  // CHEBI:13086 kegg.compound:C00441
  species $DHDPS1 in chl = 1.6;  // uniprot:Q9LZX6
  species $DHDPS2 in chl = 1.6;  // uniprot:Q9FVC8
  species Hser in chl = 0; Hser is "Homoserine";  // CHEBI:15699 kegg.compound:C00263
  species PHser in chl = 0; PHser is "Phosphohomoserine";  // CHEBI:15961 kegg.compound:C01102
  species $HSK in chl = 4;  // uniprot:Q9XEE0
  species TS1 in chl = 7.4;  // uniprot:Q9S7B5
  species $Phosphate in chl = 10000;  // CHEBI:18367 kegg.compound:C00009
  species $Cys in chl = 15; Cys is "Cysteine";  // CHEBI:17561 kegg.compound:C00097
  species $CGS in chl = 0.7;  // uniprot:P55217
  species $Cysta in chl = 0; Cysta is "Cystathione";  // CHEBI:17755 kegg.compound:C00542
  species $TD in chl = 0.36;  // uniprot:Q9ZSS6
  species Ile in chl = 0; Ile is "Isoleucine";  // CHEBI:17191 kegg.compound:C00407
  species $Val in chl = 100; Val is "Valine";  // CHEBI:16414 kegg.compound:C00183
  species $LysTRNA in chl = 0; LysTRNA is "Lys-tRNA";  // CHEBI:16047 kegg.compound:C01931
  species $ThrTRNA in chl = 0; ThrTRNA is "Thr-tRNA";  // CHEBI:29163 kegg.compound:C02992
  species $IleTRNA in chl = 0; IleTRNA is "Ile-tRNA";  // CHEBI:29160 kegg.compound:C03127
  species $LKR in chl = 0;  // uniprot:Q9SMZ4
  species $Sacc in chl = 0; Sacc is "Saccharopine";  // CHEBI:16927 kegg.compound:C00449
  species $THA in chl = 0;  // isVersionOf uniprot:Q9FPH3 uniprot:Q8RXU4
  species $Gly in chl = 0; Gly is "Glycine";  // CHEBI:15428 kegg.compound:C00037

  // Parameters:
  V_Lys_RS has umole_per_litre_per_time;
  V_Thr_RS has umole_per_litre_per_time;
  V_Ile_RS has umole_per_litre_per_time;
  V_AA_RS = 0.43 umole_per_litre_per_time; V_AA_RS is "Vmax_AA_RS";

  // Assignment rules:
  V_Lys_RS := V_AA_RS;
  V_Thr_RS := V_AA_RS;
  V_Ile_RS := V_AA_RS;

  // Reactions:
  Vak1: $Asp -> AspP; chl*AK1*((AK1_kforward_app_exp - AK1_kreverse_app_exp*AspP)/(1 + (Lys/(AK1_Lys_Ki_app_exp/(1 + AdoMet/AK1_AdoMet_Ka_app_exp)))^AK1_nH_exp)); Vak1 is "Aspartate kinase 1 react.";  // modifiers: AK1, Lys, AdoMet; isVersionOf GO:0004072; ec-code:2.7.2.4 kegg.reaction:R00480
    AK1_kforward_app_exp = 5.65 per_time; AK1_kreverse_app_exp = 1.6 litre_per_umole_per_time; AK1_Lys_Ki_app_exp = 550 umole_per_litre; AK1_AdoMet_Ka_app_exp = 3.5 umole_per_litre; AK1_nH_exp = 2 dimensionless;
  Vak2: $Asp -> AspP; chl*AK2*((AK2_kforward_app_exp - AK2_kreverse_app_exp*AspP)/(1 + (Lys/AK2_Lys_Ki_app_exp)^AK2_nH_exp)); Vak2 is "Aspartate kinase 2 react.";  // modifiers: AK2, Lys; isVersionOf GO:0004072; ec-code:2.7.2.4 kegg.reaction:R00480
    AK2_kforward_app_exp = 3.15 per_time; AK2_kreverse_app_exp = 0.86 litre_per_umole_per_time; AK2_Lys_Ki_app_exp = 22 umole_per_litre; AK2_nH_exp = 1.1 dimensionless;
  VakI: $Asp -> AspP; chl*AKHSDHI*((AKI_kforward_app_exp - AKI_kreverse_app_exp*AspP)/(1 + (Thr/AKI_Thr_Ki_app_exp)^AKI_nH_exp)); VakI is "aspartate kinase react. (AKI-HSDHI)";  // modifiers: AKHSDHI, Thr; isVersionOf GO:0004072; ec-code:2.7.2.4 kegg.reaction:R00480
    AKI_kforward_app_exp = 0.36 per_time; AKI_kreverse_app_exp = 0.15 litre_per_umole_per_time; AKI_Thr_Ki_app_exp = 124 umole_per_litre; AKI_nH_exp = 2 dimensionless;
  VakII: $Asp -> AspP; chl*AKHSDHII*((AKII_kforward_app_exp - AKII_kreverse_app_exp*AspP)/(1 + (Thr/AKII_Thr_Ki_app_exp)^AKII_nH_exp)); VakII is "aspartate kinase react. (AKII-HSDHII)";  // modifiers: AKHSDHII, Thr; isVersionOf GO:0004072; ec-code:2.7.2.4 kegg.reaction:R00480
    AKII_kforward_app_exp = 1.35 per_time; AKII_kreverse_app_exp = 0.22 litre_per_umole_per_time; AKII_Thr_Ki_app_exp = 109 umole_per_litre; AKII_nH_exp = 2 dimensionless;
  Vasadh: AspP -> ASA; chl*ASADH*(ASADH_kforward_app_exp*AspP - ASADH_kreverse_app_exp*ASA); Vasadh is "Aspartate semialdehyde dehydrogenase react.";  // modifiers: ASADH; isVersionOf GO:0004073; ec-code:1.2.1.11 kegg.reaction:R02291
    ASADH_kforward_app_exp = 0.9 litre_per_umole_per_time; ASADH_kreverse_app_exp = 0.23 litre_per_umole_per_time;
  Vdhdps1: ASA => Lys; chl*DHDPS1_k_app_exp*DHDPS1*ASA*(1/(1 + (Lys/DHDPS1_Lys_Ki_app_exp)^DHDPS1_nH_exp)); Vdhdps1 is "DHDPS1 react.";  // modifiers: DHDPS1; hasVersion ec-code:4.2.1.52 ec-code:1.3.1.26 ec-code:2.6.1.83 ec-code:5.1.1.7; isVersionOf GO:0009089
    DHDPS1_k_app_exp = 1 umole_per_litre; DHDPS1_Lys_Ki_app_exp = 10 umole_per_litre; DHDPS1_nH_exp = 2 dimensionless;
  Vdhdps2: ASA => Lys; chl*DHDPS2_k_app_exp*DHDPS2*ASA*(1/(1 + (Lys/DHDPS2_Lys_Ki_app_exp)^DHDPS2_nH_exp)); Vdhdps2 is "DHDPS2 react.";  // modifiers: DHDPS2; hasVersion ec-code:4.2.1.52 ec-code:1.3.1.26 ec-code:2.6.1.83 ec-code:5.1.1.7; isVersionOf GO:0009089
    DHDPS2_k_app_exp = 1 umole_per_litre; DHDPS2_Lys_Ki_app_exp = 33 umole_per_litre; DHDPS2_nH_exp = 2 dimensionless;
  Vhsdh1: ASA -> Hser; chl*HSDHI_kforward_app_exp*AKHSDHI*ASA*(HSDHI_Thr_relative_residual_activity_app_exp + HSDHI_Thr_relative_inhibition_app_exp/(1 + Thr/HSDHI_Thr_Ki_app_exp)); Vhsdh1 is "homoserine dehydrogenase react. (AKI-HSDHI)";  // modifiers: AKHSDHI, Thr; isVersionOf GO:0004412; ec-code:1.1.1.3 kegg.reaction:R01775
    HSDHI_kforward_app_exp = 0.84 litre_per_umole_per_time; HSDHI_Thr_relative_residual_activity_app_exp = 0.14 dimensionless; HSDHI_Thr_relative_inhibition_app_exp = 0.86 dimensionless; HSDHI_Thr_Ki_app_exp = 400 umole_per_litre;
  Vhsdh2: ASA -> Hser; chl*HSDHII_kforward_app_exp*AKHSDHII*ASA*(HSDHII_Thr_relative_residual_activity_app_exp + HSDHII_Thr_relative_inhibition_app_exp/(1 + Thr/HSDHII_Thr_Ki_app_exp)); Vhsdh2 is "homoserine dehydrogenase react. (AKII-HSDHII)";  // modifiers: AKHSDHII, Thr; isVersionOf GO:0004412; ec-code:1.1.1.3 kegg.reaction:R01775
    HSDHII_kforward_app_exp = 0.64 litre_per_umole_per_time; HSDHII_Thr_relative_residual_activity_app_exp = 0.25 dimensionless; HSDHII_Thr_relative_inhibition_app_exp = 0.75 dimensionless; HSDHII_Thr_Ki_app_exp = 8500 umole_per_litre;
  Vhsk: Hser => PHser; chl*HSK_kcat_app_exp*HSK*Hser/(HSK_Hser_app_exp + Hser); Vhsk is "homoserine kinase react.";  // modifiers: HSK; isVersionOf GO:0004413; ec-code:2.7.1.39 kegg.reaction:R01771
    HSK_kcat_app_exp = 2.8 per_time; HSK_Hser_app_exp = 14 umole_per_litre;
  Vts1: PHser => Thr; chl*TS1*PHser*((TS1_kcatmin_exp + TS1_AdoMet_kcatmax_exp*(AdoMet^TS1_nH_exp/TS1_AdoMet_Ka1_exp))/(1 + AdoMet^TS1_nH_exp/TS1_AdoMet_Ka1_exp)/(TS1_AdoMEt_Km_no_AdoMet_exp*((1 + AdoMet/TS1_AdoMet_Ka2_exp)/(1 + AdoMet/TS1_AdoMet_Ka3_exp)/(1 + AdoMet^TS1_nH_exp/TS1_AdoMet_Ka4_exp))*(1 + Phosphate/TS1_Phosphate_Ki_exp) + PHser)); Vts1 is "Threonine synthase react. (TS1)";  // modifiers: TS1, Phosphate, AdoMet; isVersionOf GO:0004795; ec-code:4.2.3.1 kegg.reaction:R01466
    TS1_kcatmin_exp = 0.42 dimensionless; TS1_AdoMet_kcatmax_exp = 3.5 dimensionless; TS1_AdoMet_Ka1_exp = 73 umole2_per_litre2; TS1_nH_exp = 2 dimensionless; TS1_Phosphate_Ki_exp = 1000 umole_per_litre; TS1_AdoMEt_Km_no_AdoMet_exp = 250 dimensionless; TS1_AdoMet_Ka2_exp = 0.5 dimensionless; TS1_AdoMet_Ka3_exp = 1.09 dimensionless; TS1_AdoMet_Ka4_exp = 140 umole2_per_litre2;
  Vcgs: PHser => $Cysta; chl*CGS*PHser*(CGS_kcat_exp/(1 + CGS_Cys_Km_exp/Cys)/(CGS_Phser_Km_exp/(1 + CGS_Cys_Km_exp/Cys)*(1 + Phosphate/CGS_Phosphate_Ki_exp) + PHser)); Vcgs is "Cystathionine gamma synthase react.";  // modifiers: CGS, Cys, Phosphate; isVersionOf ec-code:2.5.1.48 kegg.reaction:R03260
    CGS_kcat_exp = 30 dimensionless; CGS_Cys_Km_exp = 460 dimensionless; CGS_Phser_Km_exp = 2500 dimensionless; CGS_Phosphate_Ki_exp = 2000 dimensionless;
  Vtd: Thr => Ile; chl*TD*Thr*(TD_k_app_exp/(1 + (Ile/(TD_Ile_Ki_no_Val_app_exp + TD_Val_Ka1_app_exp*Val/(TD_Val_Ka2_app_exp + Val)))^TD_nH_app_exp)); Vtd is "Threonine deaminase react.";  // modifiers: TD, Val; hasVersion ec-code:2.6.1.42 ec-code:4.2.1.9 ec-code:4.3.1.19 ec-code:1.1.1.86; isVersionOf GO:0009097
    TD_k_app_exp = 0.0124 dimensionless; TD_Ile_Ki_no_Val_app_exp = 30 dimensionless; TD_Val_Ka1_app_exp = 73 dimensionless; TD_Val_Ka2_app_exp = 615 umole_per_litre; TD_nH_app_exp = 3 dimensionless;
  VlysTRNA: Lys => $LysTRNA; chl*V_Lys_RS*Lys/(Lys_tRNAS_Lys_Km + Lys); VlysTRNA is "Lys aminoacyl tRNA synthetase react.";  // isVersionOf GO:0004824 GO:0006430; ec-code:6.1.1.6 kegg.reaction:R03658
    Lys_tRNAS_Lys_Km = 25 umole_per_litre;
  VthrTRNA: Thr => $ThrTRNA; chl*V_Thr_RS*Thr/(Thr_tRNAS_Thr_Km + Thr); VthrTRNA is "Thr aminoacyl tRNA synthetase react.";  // ec-code:6.1.1.3 kegg.reaction:R03663; isVersionOf GO:0006435 GO:0004812
    Thr_tRNAS_Thr_Km = 100 umole_per_litre;
  VileTRNA: Ile => $IleTRNA; chl*V_Ile_RS*Ile/(Ile_tRNAS_Ile_Km + Ile); VileTRNA is "Ile aminoacyl tRNA synthetase react.";  // ec-code:6.1.1.5 kegg.reaction:R03656; isVersionOf GO:0006428
    Ile_tRNAS_Ile_Km = 20 umole_per_litre;
  VlysKR: Lys => $Sacc; chl*LKR_kcat_exp*LKR*Lys/(LKR_Lys_Km_exp + Lys); VlysKR is "Lys ketoglutarate reductase react.";  // modifiers: LKR; ec-code:1.5.1.8 kegg.reaction:R00716; isVersionOf GO:0047130
    LKR_kcat_exp = 3.1 per_time; LKR_Lys_Km_exp = 13000 umole_per_litre;
  Vtha: Thr => $Gly; chl*THA_kcat_exp*THA*Thr/(THA_Thr_Km_exp + Thr); Vtha is "Thr aldolase react.";  // modifiers: THA; ec-code:4.1.2.5 kegg.reaction:R00751; isVersionOf GO:0004793
    THA_kcat_exp = 1.7 per_time; THA_Thr_Km_exp = 7100 umole_per_litre;

  // Unit definitions:
  unit substance = 1e-6 mole; substance is "micromole";
  unit per_time = 1 / second;
  unit per_litre = 1 / litre;
  unit umole_per_litre = 1e-6 mole / litre;
  unit umole_per_litre_per_time = 1e-6 mole / (litre * second);
  unit umole2_per_litre2 = (1e-6 mole)^2 / litre^2;
  unit litre_per_umole_per_time = litre / (1e-6 mole * second);
  unit umole_per_time = 1e-6 mole / second;
end
