// SBML level 2 version 1

model AkmanNeurospora2loop()

  // Compartments:
  compartment default = 1;

  // Species:
  species E1F in default = 0.450112;
  species E1Fp in default = 0.4893326;
  species E1W in default = 5.896498;
  species E2F in default = 0.1199761;
  species E2Fp in default = 0.1282976;
  species E2W in default = 5.589415;
  species MF in default = 0.6111315;
  species MW in default = 1.26489;
  species PF in default = 0.07458772;
  species PFp in default = 0.08852214;
  species PW in default = 26.25076;
  species PWL in default = 0;

  // Parameters:
  a1 = 24.9736;
  a2 = 3.597972;
  a3 = 0.2899874;
  a4 = 0.4622744;
  a5 = 0.02916938;
  a6 = 0.2069549;
  a7 = 3.028558;
  b1 = 0.002087246;
  b2 = 2.134762;
  b3 = 0.08038655;
  b4 = 0.4585909;
  b5 = 0.1305599;
  b6 = 2.967388;
  b7 = 0.1116677;
  b8 = 81.10381;
  b9 = 93.03664;
  d1 = 1.435487;
  d2 = 0.2125093;
  d3 = 0.5030852;
  d4 = 3.366412;
  d5 = 0.4108468;
  f1 = 0.1003239;
  f2 = 0.1497898;
  gam1 = 0.3834045;
  gam2 = 0.0002754088;
  r1 = 2.715744;
  r2 = 35.40005;
  n = 1.02419;
  m = 1.34979;
  k = 2.182344;
  a3p = 0.3052607;
  d2p = 0.1819051;
  f1p = 0.09587702;
  gam1p = 0.3758989;
  amp = 0;
  dawn = 6;
  dusk = 18;
  d/dt(time) = 1;
  time_ = 0;

  // Reactions:
  MFtrn: => MF; a1*PWL^n/((1 + (PF + PFp)/b1)*(PWL^n + b2^n)) + a2*PW^m/((1 + (PF + PFp)/b3)*(PW^m + b4^m));  // modifiers: PF, PFp, PW, PWL
  MFdeg: MF => ; d1*MF/(MF + b5);
  E1Ftrl: => E1F; a3*MF;  // modifiers: MF
  E1Fdeg: E1F => ; (f1 + gam1)*E1F;
  E2Ftrl: => E2F; f1*E1F;  // modifiers: E1F
  E2Fdeg: E2F => ; (f1 + gam1)*E2F;
  PFtrl: => PF; f1*E2F;  // modifiers: E2F
  PFdeg: PF => ; d2*PF;
  MWtrn: => MW; a4 + a5*PWL^k/(PWL^k + b6^k);  // modifiers: PWL
  MWdeg: MW => ; d3*MW/(MW + b7);
  E1Wtrl: => E1W; (a6 + a7*(PF + PFp))*MW;  // modifiers: MW, PF, PFp
  E1Wdeg: E1W => ; (f2 + gam2)*E1W;
  E2Wtrl: => E2W; f2*E1W;  // modifiers: E1W
  E2Wdeg: E2W => ; (f2 + gam2)*E2W;
  PWtrl: => PW; f2*E2W;  // modifiers: E2W
  PWdeg: PW => ; d4*PW/(PW + b8);
  PWtrs: PW -> PWL; r1*amp*PW*(1 + tanh(2*(time_ - 24*floor(time_/24) - dawn)))*(1 - tanh(2*(time_ - 24*floor(time_/24) - dusk)))/4 - r2*PWL;
  PWLdeg: PWL => ; d5*PWL/(PWL + b9);
  E1Fptrl: => E1Fp; a3p*MF;  // modifiers: MF
  E1Fpdeg: E1Fp => ; (f1p + gam1p)*E1Fp;
  E2Fptrl: => E2Fp; f1p*E1Fp;  // modifiers: E1Fp
  E2Fpdeg: E2Fp => ; (f1p + gam1p)*E2Fp;
  PFptrl: => PFp; f1p*E2Fp;  // modifiers: E2Fp
  PFpdeg: PFp => ; d2p*PFp;
end
