// SBML level 2 version 1

model InsEGFDBSolve()
  // SBML model exported from PottersWheel on 2009-02-15 20:04:07.

  // Compartments:
  compartment cell = 1;

  // Species:
  species RE in cell = 0;
  species Rd in cell = 0;
  species Rp in cell = 0;
  species GS in cell = 200;
  species Rp_GS in cell = 0;
  species Shc in cell = 270;
  species Rp_Shc in cell = 0;
  species Rp_pShc in cell = 0;
  species pShc in cell = 0;
  species Rp_pShc_GS in cell = 0;
  species PI3K in cell = 200;
  species Rp_PI3K in cell = 0;
  species RasGAP in cell = 50;
  species Rp_RasGAP in cell = 0;
  species I in cell = 3400;
  species IRL in cell = 0;
  species IRp in cell = 0;
  species IRp_PI3K in cell = 0;
  species IRp_RasGAP in cell = 0;
  species IRS in cell = 300;
  species IRp_IRS in cell = 0;
  species IRp_IRSp in cell = 0;
  species IRSp in cell = 0;
  species iSrc in cell = 518;
  species mIRS in cell = 0;
  species mIRSp in cell = 0;
  species mIRSp_GS in cell = 0;
  species mIRSp_PI3K in cell = 0;
  species SHP2 in cell = 300;
  species mIRSp_SHP2 in cell = 0;
  species GAB in cell = 225;
  species mGAB in cell = 0;
  species mGABp in cell = 0;
  species mGABp_GS in cell = 0;
  species mGABp_PI3K in cell = 0;
  species mGABp_SHP2 in cell = 0;
  species mGABp_pSHP2 in cell = 0;
  species PIP3 in cell = 0;
  species dRas in cell = 150;
  species Raf in cell = 100;
  species aRaf in cell = 0;
  species Mek in cell = 200;
  species Erk in cell = 400;
  species pErk in cell = 0;
  species PDK1 in cell = 100;
  species Akt in cell = 100;
  species pAkt in cell = 0;
  species mTOR in cell = 100;
  species Null in cell = 0;
  species aaRaf in cell = 0;
  species PKA in cell = 100;
  species pShc_GS in cell = 0;
  species ppMek in cell = 0;
  species mGABp_pSHP2_GS in cell = 0;
  species R in cell = 100;
  species ppErk in cell = 0;
  species IR in cell = 150;
  species mPDK1 in cell = 0;
  species tRas in cell = 0;
  species tRas_PI3K in cell = 0;
  species ppAkt in cell = 0;
  species mGABp_RasGAP in cell = 0;
  species amTOR in cell = 0;
  species iGS in cell = 0;
  species imGAB in cell = 0;
  species imIRS in cell = 0;
  species CONST in cell = 1;
  species aSrc in cell = 0;
  species Ri in cell = 0;
  species IRi in cell = 0;
  species iPX in cell = 200;
  species aPX in cell = 0;
  species aPX_GS in cell = 0;
  species IRSp_PI3K in cell = 0;
  species IRSp_GS in cell = 0;
  species IRSp_SHP2 in cell = 0;
  species GABp in cell = 0;
  species GABp_PI3K in cell = 0;
  species GABp_GS in cell = 0;
  species GABp_RasGAP in cell = 0;
  species GABp_SHP2 in cell = 0;
  species GABp_pSHP2 in cell = 0;
  species GABp_pSHP2_GS in cell = 0;
  species imGABp in cell = 0;

  // Parameters:
  Kd4 = 10;
  Kd5 = 10;
  Kd7 = 400;
  Kd9 = 10;
  Kd13 = 200;
  V31 = 333.333;
  Km31 = 143.3;
  kcat43 = 33.3333;
  Km43 = 150;
  alpha43 = 0.05;
  Kd45 = 100000;
  Kd46 = 1;
  Kd49 = 1;
  Kd52 = 1;
  Kd53 = 2.5;
  Kd54 = 66666;
  kcat63 = 20000;
  Km63 = 50;
  bRasGAP = 1e-5;
  Kd74 = 100;
  kcat75 = 4.66667;
  Km75 = 500;
  V76 = 16.6667;
  Km76 = 1;
  kcat77 = 0.666667;
  alpha77 = 0.5;
  Km77 = 100;
  k_77 = 0.666667;
  kcat78 = 0.666667;
  Km78 = 100;
  k_78 = 0.666667;
  kcat79 = 0.0466667;
  Km79 = 5000;
  k_79 = 6.66667e-5;
  kcat80 = 0.04;
  Km80 = 700;
  k_80 = 6.66667e-5;
  kcat81 = 0.166667;
  Km81 = 300;
  k_81 = 6.66667e-5;
  Kd87 = 1;
  kcat65 = 0.1;
  Km65 = 400;
  kcat66 = 3.33333;
  Km66 = 10;
  kcat67 = 0.666667;
  Km67 = 10000;
  k1 = 0.002;
  k_1 = 0.04;
  k2 = 0.0333333;
  k_2 = 0.5;
  k3 = 0.4;
  V_3 = 133.333;
  Km3 = 50;
  k83 = 0.0166667;
  k4 = 0.000666667;
  k5 = 0.0133333;
  k6 = 0.333333;
  k7 = 0.000666667;
  V8 = 200;
  Km8 = 100;
  k9 = 0.00666667;
  k10 = 0.0004;
  k12 = 0.00933333;
  k_12 = 0.1162;
  k13 = 6.66667e-6;
  kdeg2 = 0.000185333;
  k24 = 0.000666667;
  k_24 = 0.000666667;
  k25 = 1.33333;
  V_25 = 333.333;
  Km25 = 266;
  k26 = 0.00933333;
  k_26 = 1.162;
  k27 = 6.66667e-8;
  k_27 = 0.133333;
  k28 = 0.106667;
  k_28 = 0.4;
  k29 = 0.666667;
  k_30 = 0.0666667;
  k30 = 0.00666667;
  kcat40 = 6.66667;
  Km40 = 110;
  alpha40 = 0.00025;
  V41 = 6.66667;
  Km41 = 50;
  k42 = 0.00666667;
  k_42 = 0.0666667;
  k45 = 0.000666667;
  k46 = 0.00666667;
  k47 = 0.000666667;
  k_47 = 0.666667;
  k48 = 0.666667;
  k49 = 0.000666667;
  kcat50 = 3333.33;
  alpha50 = 0.0001;
  Km50 = 150;
  V51 = 333.333;
  Km51 = 130;
  k52 = 0.002;
  k53 = 0.0133333;
  k54 = 1e-5;
  k55 = 0.000666667;
  k_55 = 0.0666667;
  k56 = 0.666667;
  kcat57 = 0.133333;
  Km57 = 150;
  V58 = 2;
  Km58 = 130;
  k59 = 0.01;
  k_59 = 0.2;
  kP2P3 = 4.66667;
  kP3P2 = 3.33333;
  kcat62 = 5.33333;
  Km62 = 50;
  k64 = 0;
  k_64 = 1.66667;
  alpha67 = 1e-6;
  beta67 = 2;
  kcat68 = 0.133333;
  Km68 = 50;
  V69 = 16.6667;
  Km69 = 675.299;
  kcat70 = 0.333333;
  Km70 = 500;
  kcat71 = 0.666667;
  Km71 = 500;
  V72 = 33.3333;
  Km72 = 500;
  V73 = 23.3333;
  Km73 = 500;
  k74 = 0.00666667;
  k86 = 0;
  k_86 = 0.0133333;
  k87 = 0.0333333;
  k111 = 0.000266667;
  beta111 = 3;
  kSHP2 = 0.0133333;
  k118 = 0.001;
  EGF_tot = 3.4;

  // Assignment rules:
  EGF := EGF_tot - RE - 2*(Rd + Rp + Ri + Rp_GS + Rp_Shc + Rp_pShc + Rp_pShc_GS + Rp_PI3K + Rp_RasGAP);
  k_4 := Kd4*k4;
  k_5 := Kd5*k5;
  k_7 := Kd7*k7;
  k_9 := Kd9*k9;
  k_10 := Kd7*k10;
  k_11 := k_9;
  k11 := k9;
  k_13 := Kd13*k13;
  k85 := 2.5*1e-2;
  k_45 := k45*Kd45;
  k_46 := Kd46*k46;
  k_49 := Kd49*k49;
  k_52 := k52*Kd52;
  k_53 := Kd53*k53;
  k_54 := Kd54*k54;
  k_74 := k74*Kd74;
  k_87 := Kd87*k87;

  // Reactions:
  reaction_1: R -> RE; (k1*R*EGF - k_1*RE)*cell;
  reaction_2: -> Rd; (k2*RE*RE - k_2*Rd)*cell;  // modifiers: RE
  reaction_3: Rd => Rp; k3*Rd*cell;
  reaction_4: Rp + GS -> Rp_GS; (k4*Rp*GS - k_4*Rp_GS)*cell;
  reaction_5: Rp + Shc -> Rp_Shc; (k5*Rp*Shc - k_5*Rp_Shc)*cell;
  reaction_6: Rp_Shc => Rp_pShc; k6*Rp_Shc*cell;
  reaction_7: Rp_pShc -> Rp + pShc; (k_7*Rp_pShc - k7*Rp*pShc)*cell;
  reaction_8: pShc => Shc; V8*pShc/(Km8 + pShc)*cell;
  reaction_9: GS + Rp_pShc -> Rp_pShc_GS; (k9*Rp_pShc*GS - k_9*Rp_pShc_GS)*cell;
  reaction_10: Rp_pShc_GS -> Rp + pShc_GS; (k_10*Rp_pShc_GS - k10*Rp*pShc_GS)*cell;
  reaction_11: pShc_GS -> GS + pShc; (k_11*pShc_GS - k11*pShc*GS)*cell;
  reaction_12: Rp + PI3K -> Rp_PI3K; (k12*Rp*PI3K - k_12*Rp_PI3K)*cell;
  reaction_13: Rp + RasGAP -> Rp_RasGAP; (k13*Rp*RasGAP - k_13*Rp_RasGAP)*cell;
  reaction_14: Rp => Null; kdeg2*Rp*cell;
  reaction_15: Rp_GS => GS; kdeg2*Rp_GS*cell;
  reaction_16: Rp_Shc => Shc; kdeg2*Rp_Shc*cell;
  reaction_17: Rp_pShc => pShc; kdeg2*Rp_pShc*cell;
  reaction_18: Rp_pShc_GS => pShc_GS; kdeg2*Rp_pShc_GS*cell;
  reaction_19: Rp_PI3K => PI3K; kdeg2*Rp_PI3K*cell;
  reaction_20: Rp_RasGAP => RasGAP; kdeg2*Rp_RasGAP*cell;
  reaction_21: I + IR -> IRL; (k24*IR*I - k_24*IRL)*cell;
  reaction_22: IRL => IRp; k25*IRL*cell;
  reaction_23: PI3K + IRp -> IRp_PI3K; (k26*IRp*PI3K - k_26*IRp_PI3K)*cell;
  reaction_24: RasGAP + IRp -> IRp_RasGAP; (k27*IRp*RasGAP - k_27*IRp_RasGAP)*cell;
  reaction_25: IRp + IRS -> IRp_IRS; (k28*IRp*IRS - k_28*IRp_IRS)*cell;
  reaction_26: IRp_IRS => IRp_IRSp; k29*IRp_IRS*cell;
  reaction_27: IRp_IRSp -> IRp + IRSp; (k_30*IRp_IRSp - k30*IRp*IRSp)*cell;
  reaction_28: IRSp => IRS; V31*IRSp/(Km31 + IRSp)*cell;
  reaction_29: IRp => Null; kdeg2*IRp*cell;
  reaction_30: IRp_PI3K => PI3K; kdeg2*IRp_PI3K*cell;
  reaction_31: IRp_RasGAP => RasGAP; kdeg2*IRp_RasGAP*cell;
  reaction_32: IRp_IRS => IRS; kdeg2*IRp_IRS*cell;
  reaction_33: IRp_IRSp => IRSp; kdeg2*IRp_IRSp*cell;
  reaction_34: iSrc => aSrc; kcat40*iSrc*(Rp + alpha40*IRp)/(Km40 + iSrc)*cell;  // modifiers: Rp, IRp
  reaction_35: aSrc => iSrc; V41*aSrc/(Km41 + aSrc)*cell;
  reaction_36: IRS + PIP3 -> mIRS; (k42*IRS*PIP3 - k_42*mIRS)*cell;
  reaction_37: mIRS => mIRSp; kcat43*mIRS*(IRp + alpha43*Rp)/(Km43 + mIRS)*cell;  // modifiers: Rp, IRp
  reaction_38: mIRSp => mIRS; V31*mIRSp/(Km31 + mIRSp)*cell;
  reaction_39: GS + mIRSp -> mIRSp_GS; (k45*mIRSp*GS - k_45*mIRSp_GS)*cell;
  reaction_40: PI3K + mIRSp -> mIRSp_PI3K; (k46*mIRSp*PI3K - k_46*mIRSp_PI3K)*cell;
  reaction_41: mIRSp + SHP2 -> mIRSp_SHP2; (k47*mIRSp*SHP2 - k_47*mIRSp_SHP2)*cell;
  reaction_42: mIRSp_SHP2 => mIRS + SHP2; k48*mIRSp_SHP2*cell;
  reaction_43: GAB + PIP3 -> mGAB; (k49*GAB*PIP3 - k_49*mGAB)*cell;
  reaction_44: mGAB => mGABp; kcat50*mGAB*(Rp + alpha50*aSrc)/(Km50 + mGAB)*cell;  // modifiers: Rp, aSrc
  reaction_45: mGABp => mGAB; V51*mGABp/(Km51 + mGABp)*cell;
  reaction_46: GS + mGABp -> mGABp_GS; (k52*mGABp*GS - k_52*mGABp_GS)*cell;
  reaction_47: PI3K + mGABp -> mGABp_PI3K; (k53*mGABp*PI3K - k_53*mGABp_PI3K)*cell;
  reaction_48: RasGAP + mGABp -> mGABp_RasGAP; (k54*mGABp*RasGAP - k_54*mGABp_RasGAP)*cell;
  reaction_49: SHP2 + mGABp -> mGABp_SHP2; (k55*mGABp*SHP2 - k_55*mGABp_SHP2)*cell;
  reaction_50: mGABp_SHP2 => SHP2 + mGAB; k56*mGABp_SHP2*cell;
  reaction_51: mGABp_SHP2 => mGABp_pSHP2; kcat57*mGABp_SHP2*(Rp + aSrc)/(Km57 + mGABp_SHP2)*cell;  // modifiers: Rp, aSrc
  reaction_52: mGABp_pSHP2 => mGABp_SHP2; V58*mGABp_pSHP2/(Km58 + mGABp_pSHP2)*cell;
  reaction_53: GS + mGABp_pSHP2 -> mGABp_pSHP2_GS; (k59*mGABp_pSHP2*GS - k_59*mGABp_pSHP2_GS)*cell;
  reaction_54: => PIP3; kP2P3*(Rp_PI3K + IRp_PI3K + mIRSp_PI3K + mGABp_PI3K + tRas_PI3K)*cell;  // modifiers: Rp_PI3K, IRp_PI3K, mIRSp_PI3K, mGABp_PI3K, tRas_PI3K
  reaction_55: PIP3 => Null; kP3P2*PIP3*cell;
  reaction_56: dRas => tRas; kcat62*dRas*(Rp_GS + Rp_pShc_GS + mIRSp_GS + mGABp_GS + mGABp_pSHP2_GS)/(Km62 + dRas)*cell;  // modifiers: Rp_GS, Rp_pShc_GS, mIRSp_GS, mGABp_GS, mGABp_pSHP2_GS
  reaction_57: tRas => dRas; kcat63*tRas*(bRasGAP + mGABp_RasGAP + Rp_RasGAP + IRp_RasGAP)/(Km63 + tRas)*cell;  // modifiers: Rp_RasGAP, IRp_RasGAP, mGABp_RasGAP
  reaction_58: PI3K + tRas -> tRas_PI3K; (k64*tRas*PI3K - k_64*tRas_PI3K)*cell;
  reaction_59: Raf => aRaf; kcat65*tRas*Raf/(Km65 + Raf)*cell;  // modifiers: tRas
  reaction_60: aRaf => aaRaf; kcat66*aSrc*aRaf/(Km66 + aRaf)*cell;  // modifiers: aSrc
  reaction_61: aaRaf => Raf; (kcat67*aaRaf*PKA/(Km67 + aaRaf) + alpha67*aaRaf*(pAkt + beta67*ppAkt))*cell;  // modifiers: pAkt, PKA, ppAkt
  reaction_62: Mek => ppMek; kcat68*aaRaf*Mek/(Km68 + Mek)*cell;  // modifiers: aaRaf
  reaction_63: ppMek => Mek; V69*ppMek/(Km69 + ppMek)*cell;
  reaction_64: Erk => pErk; kcat70*Erk*ppMek/(Km70 + Erk + pErk*Km70/Km71)*cell;  // modifiers: ppMek
  reaction_65: pErk => ppErk; kcat71*pErk*ppMek/(Km71 + pErk + Erk*Km71/Km70)*cell;  // modifiers: Erk, ppMek
  reaction_66: ppErk => pErk; V72*ppErk/(Km72 + ppErk + pErk*Km72/Km73)*cell;
  reaction_67: pErk => Erk; V73*pErk/(Km73 + pErk + ppErk*Km73/Km72)*cell;  // modifiers: ppErk
  reaction_68: PIP3 + PDK1 -> mPDK1; (k74*PDK1*PIP3 - k_74*mPDK1)*cell;
  reaction_69: Akt => pAkt; kcat75*mPDK1*Akt/(Km75 + Akt)*cell;  // modifiers: mPDK1
  reaction_70: pAkt => Akt; V76*pAkt/(Km76 + pAkt)*cell;
  reaction_71: mTOR -> amTOR; (kcat77*mTOR*(alpha77*pAkt + ppAkt)/(Km77 + mTOR) - k_77*amTOR)*cell;  // modifiers: pAkt, ppAkt
  reaction_72: pAkt -> ppAkt; (kcat78*amTOR*pAkt/(Km78 + pAkt) - k_78*ppAkt)*cell;  // modifiers: amTOR
  reaction_73: GS -> iGS; (kcat79*ppErk*GS/(Km79 + GS) - k_79*iGS)*cell;  // modifiers: ppErk
  reaction_74: mGAB -> imGAB; (kcat80*mGAB*ppErk/(Km80 + mGAB) - k_80*imGAB)*cell;  // modifiers: ppErk
  reaction_75: mIRS -> imIRS; (kcat81*mIRS*amTOR/(Km81 + mIRS) - k_81*imIRS)*cell;  // modifiers: amTOR
  reaction_76: Rp => Ri; V_3*Rp/(Km3 + Rp)*cell;
  reaction_77: Ri => Rd; k83*Ri*cell;
  reaction_78: IRp => IRi; V_25*IRp/(Km25 + IRp)*cell;
  reaction_79: IRi => IRL; k85*IRi*cell;
  reaction_80: iPX => aPX; 0*cell;
  reaction_81: GS + aPX => aPX_GS; 0*cell;
  reaction_82: mIRSp -> IRSp + PIP3; (k_42*mIRSp - k42*PIP3*IRSp)*cell;
  reaction_83: mIRSp_PI3K -> PIP3 + IRSp_PI3K; (k_42*mIRSp_PI3K - k42*PIP3*IRSp_PI3K)*cell;
  reaction_84: mIRSp_GS -> PIP3 + IRSp_GS; (k_42*mIRSp_GS - k42*PIP3*IRSp_GS)*cell;
  reaction_85: mIRSp_SHP2 -> PIP3 + IRSp_SHP2; (k_42*mIRSp_SHP2 - k42*PIP3*IRSp_SHP2)*cell;
  reaction_86: mGABp -> PIP3 + GABp; (k_42*mGABp - k42*PIP3*GABp)*cell;
  reaction_87: mGABp_PI3K -> PIP3 + GABp_PI3K; (k_42*mGABp_PI3K - k42*PIP3*GABp_PI3K)*cell;
  reaction_88: mGABp_GS -> PIP3 + GABp_GS; (k_42*mGABp_GS - k42*PIP3*GABp_GS)*cell;
  reaction_89: mGABp_RasGAP -> PIP3 + GABp_RasGAP; (k_42*mGABp_RasGAP - k49*PIP3*GABp_RasGAP)*cell;
  reaction_90: mGABp_SHP2 -> PIP3 + GABp_SHP2; (k_42*mGABp_SHP2 - k42*PIP3*GABp_SHP2)*cell;
  reaction_91: mGABp_pSHP2 -> PIP3 + GABp_pSHP2; (k_42*mGABp_pSHP2 - k42*PIP3*GABp_pSHP2)*cell;
  reaction_92: mGABp_pSHP2_GS -> PIP3 + GABp_pSHP2_GS; (k_42*mGABp_pSHP2_GS - k42*PIP3*GABp_pSHP2_GS)*cell;
  reaction_93: IRSp_PI3K => PI3K + IRS; V31*IRSp_PI3K/(Km31 + IRSp_PI3K)*cell;
  reaction_94: IRSp_GS => GS + IRS; V31*IRSp_GS/(Km31 + IRSp_GS)*cell;
  reaction_95: IRSp_SHP2 => IRS + SHP2; k48*IRSp_SHP2*cell;
  reaction_96: mGABp_pSHP2 => SHP2 + mGAB; k56*mGABp_pSHP2*cell;
  reaction_97: mGABp_pSHP2_GS => GS + SHP2 + mGAB; k56*mGABp_pSHP2_GS*cell;
  reaction_98: GABp => GAB; V51*GABp/(Km51 + GABp)*cell;
  reaction_99: GABp_PI3K => PI3K + GAB; V51*GABp_PI3K/(Km51 + GABp_PI3K)*cell;
  reaction_100: GABp_GS => GS + GAB; V51*GABp_GS/(Km51 + GABp_GS)*cell;
  reaction_101: GABp_RasGAP => RasGAP + GAB; V51*GABp_RasGAP/(Km51 + GABp_RasGAP)*cell;
  reaction_102: GABp_SHP2 => SHP2 + GAB; k56*GABp_SHP2*cell;
  reaction_103: GABp_pSHP2 => SHP2 + GAB; k56*GABp_pSHP2*cell;
  reaction_104: GABp_pSHP2_GS => GS + SHP2 + GAB; k56*GABp_pSHP2_GS*cell;
  reaction_105: mGABp_RasGAP => RasGAP + mGAB; kSHP2*(mGABp_SHP2 + mGABp_pSHP2 + mGABp_pSHP2_GS + mIRSp_SHP2)*mGABp_RasGAP*cell;  // modifiers: mIRSp_SHP2, mGABp_SHP2, mGABp_pSHP2, mGABp_pSHP2_GS
  reaction_106: Rp_RasGAP => Rp + RasGAP; kSHP2*(mGABp_SHP2 + mGABp_pSHP2 + mGABp_pSHP2_GS)*Rp_RasGAP*cell;  // modifiers: mGABp_SHP2, mGABp_pSHP2, mGABp_pSHP2_GS
  reaction_107: IRp_RasGAP => RasGAP + IRp; kSHP2*(mGABp_SHP2 + mGABp_pSHP2 + mGABp_pSHP2_GS)*IRp_RasGAP*cell;  // modifiers: mGABp_SHP2, mGABp_pSHP2, mGABp_pSHP2_GS
  reaction_108: Rp_RasGAP => Rp + RasGAP; kSHP2*mIRSp_SHP2*Rp_RasGAP*cell;  // modifiers: mIRSp_SHP2
  reaction_109: IRp_RasGAP => RasGAP + IRp; kSHP2*mIRSp_SHP2*IRp_RasGAP*cell;  // modifiers: mIRSp_SHP2
  reaction_110: mGABp -> imGABp; (2*kcat80*mGABp*ppErk/(Km80 + mGABp) - k_80*imGABp)*cell;  // modifiers: ppErk
  reaction_111: imGABp => imGAB; k118*imGABp*cell;
end
