// SBML level 2 version 4
// dcterms:bibliographicCitation: http://identifiers.org/pubmed/18594002

model Tham2008___PDmodel__Tumour_shrinkage_by_gemcitabine_and_carboplatin()
  // Tham2008 - PDmodel, Tumour shrinkage by gemcitabine and carboplatin
  // PURPOSE: This tumor response pharmacodynamic model aims to describe primary lesion shrinkage in non-small cell lung cancer over time and determine if concentration-based exposure metrics for gemcitabine or that of its metabolites,n2',2'-difluorodeoxyuridine or gemcitabine triphosphate, are better than gemcitabine dose for prediction of individual response. EXPERIMENTAL DESIGN: Gemcitabine was given thrice weekly on days 1 and 8 in combination with carboplatin, which was given only on day 1 of every cycle. Gemcitabine amount in the body and area under the concentration-time curves of plasma gemcitabine, 2',2'-difluorodeoxyuridine, and intracellular gemcitabine triphosphate in white cells were compared to determine which best describes tumor shrinkage over time. Tumor growth kinetics were described using a Gompertz-like model. RESULTS: The apparent half-life for the effect of gemcitabine was 7.67 weeks. The tumor turnover time constant was 21.8 week.cm. Baseline tumor size and gemcitabine amount in the body to attain 50% of tumor shrinkage were estimated to be 6.66 cm and 10,600 mg. There was no evidence of relapse during treatment.
  // biomodels.db:MODEL0911120001
  // biomodels.db:BIOMD0000000234
  // isDescribedBy pubmed:18594002
  // isVersionOf GO:0002357
  // hasTaxon taxonomy:9606
  // hasProperty DOID:1324 mamo:MAMO_0000046

  // Compartments:
  // Unique compartment where the reactions are happening
  compartment COMpartment = 1;

  // Parameters:
  // Gemcitabine dose at 50% of tumor shrinkage
  AE50 = 10600 unit_0;
  // Gemcitabine apparent amount
  Ce = 0 unit_0;
  // Duration of one treatment cycle
  Cycle_Int = 3 unit_1;
  // Amount of gemcitabine administered
  Dose = 5203.84 unit_0;
  // Time in a cycle at which the first dose of gemcitabine is administered. The model works modulo N_Cycle but copasi has issue when Time-N_Cycle is negative. Hence, we suggest to have a negative value for Dose_Int1 which correspond to the desired value, modulo N_Cycle.
  Dose_Int1 = 0 unit_1;
  // Time in a cycle at which the second dose of gemcitabine is administered. The model works modulo N_Cycle but copasi has issue when Time-N_Cycle is negative. Hence, we suggest to have a negative value for Dose_Int2 which correspond to the desired value, modulo N_Cycle.
  Dose_Int2 = -2 unit_1;
  // Inhibitory effect of gemcitabine
  Effect has unit_2;
  // Apparent degradation rate of gemcitabine effect
  Keq has unit_3;
  // Turnover rate of the tumor
  Kover has unit_4;
  // Number of gemcitabine treatment cycles
  N_Cycle = 6 unit_2;
  // Basal growth rate of the tumor
  RateIn has unit_3;
  // Tumor cells turnover
  T_Turnover = 21.8 unit_5;
  // Half-life of gemcitabine effect
  Teq = 7.67 unit_1;
  // Tumor Size
  TumorSize = TumorSize_0; TumorSize has unit_6;
  // Initial tumor size
  TumorSize_0 = 6.66 unit_6;

  // Assignment rules:
  Keq := 0.6931472/Teq;
  Kover := 1/T_Turnover;
  RateIn := TumorSize_0*Kover;
  Effect := 1 - Ce/(AE50 + Ce);

  // Rate rules:
  Ce' = -Ce*Keq;
  TumorSize' = (RateIn*Effect - Kover*TumorSize)*TumorSize;

  // Events:
  Dose1: at ((piecewise(time - Dose_Int1 - Cycle_Int*ceil((time - Dose_Int1)/Cycle_Int), xor(time - Dose_Int1 < 0, Cycle_Int < 0), time - Dose_Int1 - Cycle_Int*floor((time - Dose_Int1)/Cycle_Int)) == 0) && (time < N_Cycle*Cycle_Int)): Ce = Ce + Dose;
  Dose2: at ((piecewise(time - Dose_Int2 - Cycle_Int*ceil((time - Dose_Int2)/Cycle_Int), xor(time - Dose_Int2 < 0, Cycle_Int < 0), time - Dose_Int2 - Cycle_Int*floor((time - Dose_Int2)/Cycle_Int)) == 0) && (time < N_Cycle*Cycle_Int)): Ce = Ce + Dose;

  // Unit definitions:
  unit length = metre;
  unit area = metre^2;
  unit volume = litre;
  unit time = 604800 second;
  unit substance = mole;
  unit unit_0 = 1e-3 gram; unit_0 is "mg";
  unit unit_1 = 604800 second; unit_1 is "604.8*ks";
  unit unit_2 = dimensionless^0; unit_2 is "1";
  unit unit_3 = 1 / (604800 second); unit_3 is "1/(604.8*ks)";
  unit unit_4 = 1 / (6048 second * metre); unit_4 is "1/(6.048*ks*m)";
  unit unit_5 = 6048 second * metre; unit_5 is "6.048*ks*m";
  unit unit_6 = 0.01 metre; unit_6 is "0.01*m";
end
