// SBML level 2 version 4

model Veening2008_DegU_Regulation()
  // This a model from the article:
  // Transient heterogeneity in extracellular protease production by Bacillus subtilis.
  // Veening JW, Igoshin OA, Eijlander RT, Nijland R, Hamoen LW, Kuipers OP Mol. Syst. Biol. 2008 ; Volume: 4 : 184 18414485,
  // Abstract:
  // The most sophisticated survival strategy Bacillus subtilis employs is the differentiation of a subpopulation of cells into highly resistant endospores. To examine the expression patterns of non-sporulating cells within heterogeneous populations, we used buoyant density centrifugation to separate vegetative cells from endospore-containing cells and compared the transcriptome profiles of both subpopulations. This demonstrated the differential expression of various regulons. Subsequent single-cell analyses using promoter-gfp fusions confirmed our microarray results. Surprisingly, only part of the vegetative subpopulation highly and transiently expresses genes encoding the extracellular proteases Bpr (bacillopeptidase) and AprE (subtilisin), both of which are under the control of the DegU transcriptional regulator. As these proteases and their degradation products freely diffuse within the liquid growth medium, all cells within the clonal population are expected to benefit from their activities, suggesting that B. subtilis employs cooperative or even altruistic behavior. To unravel the mechanisms by which protease production heterogeneity within the non-sporulating subpopulation is established, we performed a series of genetic experiments combined with mathematical modeling. Simulations with our model yield valuable insights into how population heterogeneity may arise by the relatively long and variable response times within the DegU autoactivating pathway.
  // This model originates from BioModels Database: A Database of Annotated Published Models. It is copyright (c) 2005-2009 The BioModels Team.
  // For more information see the terms of use.
  // To cite BioModels Database, please use Le Novère N., Bornstein B., Broicher A., Courtot M., Donizelli M., Dharuri H., Li L., Sauro H., Schilstra M., Shapiro B., Snoep J.L., Hucka M. (2006) BioModels Database: A Free, Centralized Database of Curated, Published, Quantitative Kinetic Models of Biochemical and Cellular Systems Nucleic Acids Res., 34: D689-D691.
  // biomodels.db:MODEL8237240421
  // biomodels.db:BIOMD0000000240
  // isDescribedBy pubmed:18414485
  // hasVersion taxonomy:1423
  // hasTaxon taxonomy:10160
  // isVersionOf GO:0035635 GO:0034301

  // Compartments:
  compartment univ = 1;  // isVersionOf GO:0005623

  // Species:
  species AprE in univ = 0;  // isVersionOf uniprot:P04189
  species DegU in univ = 10/univ;  // isVersionOf uniprot:P13800
  species DegUP in univ = 0;  // isVersionOf uniprot:P13800
  species Dim in univ = 0;  // isVersionOf GO:0042803
  species mAprE in univ = 0;  // encodes uniprot:P04189
  species mDegU in univ = 0;  // encodes uniprot:P13800

  // Parameters:
  Imax = 0.048;
  Io = 0.004;
  Irmax = 0.4;
  Iro = 0.02;
  K = 7;
  Kdim = 12;
  Kr = 7;
  Kr1 = 7;
  R = 7;
  V = 1;
  ka = 0.025;
  kd = 0.1;
  kdeg = 0.0004;
  kdegA = 0.0001;
  kdegm = 0.01;
  ksyn = 0.04;
  ksyn1 = 0.04;
  p = 0.15;
  q = 0.004;
  ratio = 0.026666667; ratio is "kphosratiokdephos";

  // Assignment rules:
  kphos := ratio*p;
  kdephos := q/ratio;
  DegU_Total := DegU + DegUP + 2*Dim;

  // Reactions:
  AprEdeg: AprE => ; kdeg*AprE;  // isVersionOf GO:0030163
  AprEsyn: => AprE; ksyn*mAprE*univ;  // modifiers: mAprE; isVersionOf GO:0006412
  DimerAss: 2 DegUP => Dim; ka*DegUP^2;  // isVersionOf GO:0042803
  DimerDis: Dim => 2 DegUP; kd*Dim;  // isVersionOf GO:0043241
  degradation1: DegU => ; kdeg*DegU*univ;  // isVersionOf GO:0030163
  degradation2: DegUP => ; kdeg*DegUP*univ;  // isVersionOf GO:0030163
  degradation3: Dim => ; kdeg*Dim*univ;  // isVersionOf GO:0030163
  degradationmRNA: mDegU => ; kdegm*mDegU;  // isVersionOf GO:0006402
  dephosphorylation: DegUP => DegU; kdephos*DegUP;  // isVersionOf GO:0006470
  mRNAAprEdeg: mAprE => ; kdegm*mAprE;  // isVersionOf GO:0006402
  mRNAAprEsyn: => mAprE; Kr1/(R + Kr1)*(Iro*(Dim*univ/Kdim + 1)/(1 + Dim*univ/Kdim + (Dim*univ)^2/Kdim^2 + R/Kr) + Irmax*(Dim*univ)^2/(Kdim^2*(1 + Dim*univ/Kdim + (Dim*univ)^2/Kdim^2 + R/Kr)));  // modifiers: Dim; isVersionOf GO:0009299
  phosphorylation: DegU => DegUP; kphos*DegU;  // isVersionOf GO:0006468
  synthesisDegU: => DegU; ksyn1*mDegU*univ;  // modifiers: mDegU; isVersionOf GO:0006412
  synthesismRNA: => mDegU; Io*K/(Dim*univ + K) + Imax*Dim*univ/(Dim*univ + K);  // modifiers: Dim; isVersionOf GO:0006412

  // Unit definitions:
  unit volume = 1e-15 litre; volume is "femtolitre";
  unit substance = item; substance is "molecules";
end
