// SBML level 1 version 2

model DegUmodel()

  // Compartments:
  compartment univ = 1;

  // Species:
  species AprE in univ = 0;
  species DegU in univ = 10/univ;
  species DegUP in univ = 0;
  species Dim in univ = 0;
  species mAprE in univ = 0;
  species mDegU in univ = 0;

  // Parameters:
  Imax = 0.048;
  Io = 0.004;
  Irmax = 0.4;
  Iro = 0.02;
  K = 7;
  Kdim = 12;
  Kr = 7;
  Kr1 = 7;
  R = 7;
  V = 1;
  ka = 0.025;
  kd = 0.1;
  kdeg = 4e-4;
  kdegA = 1e-4;
  kdegm = 0.01;
  kdephos = 0.15;
  kphos = 0.004;
  ksyn = 0.04;
  ksyn1 = 0.04;
  p = 1;
  q = 4;

  // Reactions:
  AprEdeg: AprE => ; kdeg*AprE;
  AprEsyn: => AprE; ksyn*(mAprE * univ);
  DimerAss: 2 DegUP => Dim; ka*DegUP^2;
  DimerDis: Dim => 2 DegUP; kd*Dim;
  degradation1: DegU => ; kdeg*(DegU * univ);
  degradation2: DegUP => ; kdeg*(DegUP * univ);
  degradation3: Dim => ; kdeg*(Dim * univ);
  degradationmRNA: mDegU => ; kdegm*mDegU;
  dephosphorylation: DegUP => DegU; kdephos*DegUP;
  mRNAAprEdeg: mAprE => ; kdegm*mAprE;
  mRNAAprEsyn: => mAprE; (Kr1/(R+Kr1))*(((Iro*(((Dim * univ)/Kdim)+1.0))/(((1.0+((Dim * univ)/Kdim))+(((Dim * univ)^2.0)/(Kdim^2.0)))+(R/Kr)))+((Irmax*((Dim * univ)^2.0))/((Kdim^2.0)*(((1.0+((Dim * univ)/Kdim))+(((Dim * univ)^2.0)/(Kdim^2.0)))+(R/Kr)))));
  phosphorylation: DegU => DegUP; kphos*DegU;
  synthesisDegU: => DegU; ksyn1*(mDegU * univ);
  synthesismRNA: => mDegU; ((Io*K)/((Dim * univ)+K))+((Imax*(Dim * univ))/((Dim * univ)+K));

  // Unit definitions:
  unit volume = 1e-15 litre;
  unit substance = item;
end
