// SBML level 2 version 1

model model_8()
  // Model of CD95-Induced Caspase and NF-kB Activation (model_8)
  // Leo Neumann, Carina Pforr, Joel Beaudouin, Alexander Golks, Peter H. Krammer, Inna N. Lavrik, Roland Eils.
  // German Cancer Research Center (DKFZ)
  // http://www.dkfz.de

  // Compartments:
  compartment default = 1;

  // Species:
  species L in default = 1.1322e2;
  species L:RF in default = 0;
  species L:RF:C8 in default = 0;
  species L:RF:FL in default = 0;
  species L:RF:FS in default = 0;
  species p43/p41 in default = 0;
  species C3 in default = 1.443404;
  species C8 in default = 6.447652e1;
  species C8* in default = 0;
  species C3* in default = 0;
  species p43-FLIP in default = 0;
  species NF-kB:IkB in default = 4.739546;
  species NF-kB:IkB:P in default = 0;
  species p43-FLIP:IKK* in default = 0;
  species NF-kB* in default = 0;
  species RF in default = 9.126592e1;
  species FL in default = 7.398562;
  species FS in default = 5.083923;
  species IKK in default = 5.772825;
  species L:RF:C8:FS in default = 0;
  species L:RF:FL:FL in default = 0;
  species L:RF:FL:FS in default = 0;
  species L:RF:FS:FS in default = 0;

  // Parameters:
  k1 = 1;
  k2 = 1.277248e-4;
  k3 = 6.693316e-1;
  k4 = 1e-5;
  k5 = 5.946569e-4;
  k6 = 9.999999e-1;
  k7 = 8.875063e-1;
  k8 = 8.044378e-4;
  k9 = 2.249759e-3;
  k10 = 1.205258e-1;
  k11 = 2.891451e-2;
  k12 = 1.502914e-1;
  k13 = 7.204261e-4;
  k14 = 3.588224e-1;
  k15 = 3.684162;
  k16 = 2.229912e-2;
  k17 = 6.4182e-3;

  // Reactions:
  reaction_1: L + RF => L:RF; default*k1*L*RF;
  reaction_2: L:RF + C8 => L:RF:C8; default*k2*L:RF*C8;
  reaction_3: L:RF + FL => L:RF:FL; default*k3*L:RF*FL;
  reaction_4: L:RF + FS => L:RF:FS; default*k4*L:RF*FS;
  reaction_5: L:RF:C8 + C8 => p43/p41 + p43/p41; default*k5*L:RF:C8*C8;
  reaction_6: L:RF:C8 + FL => p43-FLIP; default*k6*L:RF:C8*FL;
  reaction_7: L:RF:C8 + FS => L:RF:C8:FS; default*k7*L:RF:C8*FS;
  reaction_8: L:RF:FL + C8 => p43-FLIP; default*k5*L:RF:FL*C8;
  reaction_9: L:RF:FL + FL => L:RF:FL:FL; default*k6*L:RF:FL*FL;
  reaction_10: L:RF:FL + FS => L:RF:FL:FS; default*k7*L:RF:FL*FS;
  reaction_11: L:RF:FS + C8 => L:RF:C8:FS; default*k5*L:RF:FS*C8;
  reaction_12: L:RF:FS + FL => L:RF:FL:FS; default*k6*L:RF:FS*FL;
  reaction_13: L:RF:FS + FS => L:RF:FS:FS; default*k7*L:RF:FS*FS;
  reaction_14: p43/p41 + p43/p41 => C8*; default*k8*p43/p41*p43/p41;
  reaction_15: C3 + C8* => C3* + C8*; default*k9*C3*C8*;
  reaction_16: C8 + C3* => p43/p41 + C3*; default*k10*C8*C3*;
  reaction_17: C8* => ; default*k11*C8*;
  reaction_18: C3* => ; default*k12*C3*;
  reaction_19: p43-FLIP + IKK => p43-FLIP:IKK*; default*k13*p43-FLIP*IKK;
  reaction_20: NF-kB:IkB + p43-FLIP:IKK* => NF-kB:IkB:P + p43-FLIP:IKK*; default*k14*NF-kB:IkB*p43-FLIP:IKK*;
  reaction_21: NF-kB:IkB:P => NF-kB*; default*k15*NF-kB:IkB:P;
  reaction_22: p43-FLIP:IKK* => ; default*k16*p43-FLIP:IKK*;
  reaction_23: NF-kB* => ; default*k17*NF-kB*;

  // Unit definitions:
  unit time = 60 second;
  unit substance = 1e-9 mole;
end
