// SBML level 2 version 3

model Model_1()
  // p53

  // Compartments:
  compartment cell = 1;

  // Species:
  species $p in cell = 1;
  species $mm in cell = 1;
  species $m in cell = 1;
  species $pm in cell = 1;

  // Parameters:
  S = 1000;
  alpha = 0.1;
  k_t = 0.03;
  k_tl = 1.4;
  k_b = 7200;
  k_f = 5000;
  beta = 0.6;
  gamma = 0.2;
  delta = 11;

  // Rate rules:
  p' = S - k_f*p*m - alpha + (k_b + gamma)*pm;
  mm' = k_t*p^2 - beta*mm;
  m' = k_tl*mm - k_f*p*m + (k_b + delta)*pm - gamma*m;
  pm' = k_f*p*m - (k_b + delta)*pm - gamma*pm;

  // Unit definitions:
  unit volume = dimensionless;
  unit time = 3600 second;
  unit substance = dimensionless;
end
