// SBML level 2 version 3

function function_13(Auxin, CK, k12, k12a)
  k12 + k12a*Auxin*CK;
end
function_13 is "Rate law for v12: Ethylene biosynthesis";

function function_10(k10, PLSp, k10a, Re)
  (k10 + k10a*PLSp)*Re;
end
function_10 is "Rate law for v10: Conversion of the inactivated form of ethylene receptor to its activated form by PLSp";

function function_9(k9, PLSp)
  k9*PLSp;
end
function_9 is "Rate law for v9: Decay of protein of POLARIS gene";

function function_8(k8, PLSm)
  k8*PLSm;
end
function_8 is "Rate law for v8: Translation of POLARIS gene";

function function_15(ET, k13)
  k13*ET;
end
function_15 is "Rate law for v13: Removal of ethylene";

function function_7(k7, PLSm)
  k7*PLSm;
end
function_7 is "Rate law for v7: Decay of mRNA of POLARIS gene";

function function_16(Re_star, k14, CTR1)
  k14*Re_star*CTR1;
end
function_16 is "Rate law for v14: Conversion of the inactivated form of CTR1 protein to its activated form by Re*";

function function_1(k3, k3a, X, Auxin)
  (k3 + k3a*X)*Auxin;
end
function_1 is "Rate law for v3: Auxin removal from the cell";

function function_4(k4, Auxin, Ra)
  k4*Auxin*Ra;
end
function_4 is "Rate law for v4: Conversion of auxin receptor from the inactivated form to the activated form";

function function_17(CTR1_star, k15)
  k15*CTR1_star;
end
function_17 is "Rate law for v15: Conversion of the activated form of CTR1 protein to its inactivated form";

function function_12(Re_star, ET, k11)
  k11*Re_star*ET;
end
function_12 is "Rate law for v11: Conversion of the activated form of ethylene receptor to its inactivated form";

function function_20(Auxin, k18a, k18)
  k18a/(1 + Auxin/k18);
end
function_20 is "Rate law for v18: Biosynthesis of cytokinin";

function function_19(X, k17)
  k17*X;
end
function_19 is "Rate law for v17: Removal of the unknown molecule X";

function function_3(k2, k2a, ET, CK, k2b, PLSp, k2c)
  k2 + k2a*(ET/(1 + CK/k2b))*(PLSp/(k2c + PLSp));
end
function_3 is "Rate law for v2: Auxin biosynthesis in the cell";

function function_6(k6, Ra_star, ET, k6a)
  k6*Ra_star/(1 + ET/k6a);
end
function_6 is "Rate law for v6: Transcription of POLARIS gene";

function function_21(CK, k19)
  k19*CK;
end
function_21 is "Rate law for v19: removal of cytokinin";

function function_2(k1a, X, k1)
  k1a/(1 + X/k1);
end
function_2 is "Rate law for v1: Auxin Transport to the cell";

function function_18(CTR1_star, k16, k16a)
  k16 - k16a*CTR1_star;
end
function_18 is "Rate law for v16: Activation of the downstream of ethylene signalling response is inhibited by CTR1*";

model Model_1()
  // hormonal crosstalk analysis

  // Compartments:
  compartment compartment_1 = 1; compartment_1 is "single cell model for analysis of hormonal crosstalk in Arabidopsis";

  // Species:
  species Auxin in compartment_1 = 0.1;
  species X in compartment_1 = 0.1;
  species PLSp in compartment_1 = 0.1;
  species species_3 in compartment_1 = 0; species_3 is "Ra";
  species species_4 in compartment_1 = 1; species_4 is "Ra*";
  species CK in compartment_1 = 0.1;
  species ET in compartment_1 = 0.1;
  species PLSm in compartment_1 = 0.1;
  species species_10 in compartment_1 = 0; species_10 is "Re";
  species species_12 in compartment_1 = 0.3; species_12 is "Re*";
  species species_13 in compartment_1 = 0; species_13 is "CTR1";
  species species_14 in compartment_1 = 0.3; species_14 is "CTR1*";

  // Reactions:
  v1_Auxin_Transport_to_the_cell: => Auxin; compartment_1*function_2(k1a, X, v1_Auxin_Transport_to_the_cell_k1); v1_Auxin_Transport_to_the_cell is "v1: Auxin Transport to the cell";  // modifiers: X
    k1a = 1; v1_Auxin_Transport_to_the_cell_k1 = 1;
  reaction_1: => Auxin; compartment_1*function_3(k2, k2a, ET, CK, k2b, PLSp, k2c); reaction_1 is "v2: Auxin biosynthesis in the cell";  // modifiers: ET, CK, PLSp
    k2 = 0.2; k2a = 2.8; k2b = 1; k2c = 0.01;
  v3_Auxin_removal_from_the_cell: Auxin => ; compartment_1*function_1(k3, k3a, X, Auxin); v3_Auxin_removal_from_the_cell is "v3: Auxin removal from the cell";  // modifiers: X
    k3 = 2; k3a = 0.45;
  reaction_4: species_3 => species_4; compartment_1*function_4(k4, Auxin, species_3); reaction_4 is "v4: Conversion of auxin receptor from the inactivated form to the activated form";  // modifiers: Auxin
    k4 = 1;
  reaction_5: species_4 => species_3; compartment_1*reaction_5_k1*species_4; reaction_5 is "v5: Conversion of auxin receptor from the activated form to the inactivated form";
    reaction_5_k1 = 1;
  v6_Transcription_of_POLARIS_gene: => PLSm; compartment_1*function_6(k6, species_4, ET, k6a); v6_Transcription_of_POLARIS_gene is "v6: Transcription of POLARIS gene";  // modifiers: species_4, ET
    k6 = 0.3; k6a = 0.2;
  v7_Decay_of_mRNA_of_POLARIS_gene: PLSm => ; compartment_1*function_7(k7, PLSm); v7_Decay_of_mRNA_of_POLARIS_gene is "v7: Decay of mRNA of POLARIS gene";
    k7 = 1;
  v8_Translation_of_POLARIS_gene: => PLSp; compartment_1*function_8(k8, PLSm); v8_Translation_of_POLARIS_gene is "v8: Translation of POLARIS gene";  // modifiers: PLSm
    k8 = 1;
  reaction_9: PLSp => ; compartment_1*function_9(k9, PLSp); reaction_9 is "v9: Decay of protein of POLARIS gene";
    k9 = 1;
  reaction_10: species_10 => species_12; compartment_1*function_10(k10, PLSp, k10a, species_10); reaction_10 is "v10: Conversion of the inactivated form of ethylene receptor to its activated form by PLSp";  // modifiers: PLSp
    k10 = 0.0003; k10a = 0.5;
  reaction_12: species_12 => species_10; compartment_1*function_12(species_12, ET, k11); reaction_12 is "v11: Conversion of the activated form of ethylene receptor to its inactivated form";  // modifiers: ET
    k11 = 5;
  v12_Ethylene_biosynthesis: => ET; compartment_1*function_13(Auxin, CK, k12, k12a); v12_Ethylene_biosynthesis is "v12: Ethylene biosynthesis";  // modifiers: Auxin, CK
    k12 = 0.1; k12a = 0.1;
  v13_Removal_of_ethylene: ET => ; compartment_1*function_15(ET, k13); v13_Removal_of_ethylene is "v13: Removal of ethylene";
    k13 = 1;
  reaction_16: species_13 => species_14; compartment_1*function_16(species_12, k14, species_13); reaction_16 is "v14: Conversion of the inactivated form of CTR1 protein to its activated form by Re*";  // modifiers: species_12
    k14 = 3;
  reaction_17: species_14 => species_13; compartment_1*function_17(species_14, k15); reaction_17 is "v15: Conversion of the activated form of CTR1 protein to its inactivated form";
    k15 = 0.085;
  reaction_18: => X; compartment_1*function_18(species_14, k16, k16a); reaction_18 is "v16: Activation of the downstream of ethylene signalling response is inhibited by CTR1*";  // modifiers: species_14
    k16 = 0.3; k16a = 1;
  reaction_19: X => ; compartment_1*function_19(X, k17); reaction_19 is "v17: Removal of the unknown molecule X";
    k17 = 0.1;
  v18_Biosynthesis_of_cytokinin: => CK; compartment_1*function_20(Auxin, k18a, k18); v18_Biosynthesis_of_cytokinin is "v18: Biosynthesis of cytokinin";  // modifiers: Auxin
    k18a = 1; k18 = 0.1;
  v19_removal_of_cytokinin: CK => ; compartment_1*function_21(CK, k19); v19_removal_of_cytokinin is "v19: removal of cytokinin";
    k19 = 1;

  // Unit definitions:
  unit substance = 1e-6 mole;
end
