// SBML level 2 version 1

model CFUE_MAPK_distributive_fittedmodel()
  // SBML model exported from PottersWheel on 2009-04-20 18:57:44.
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
  // Compartments:
  compartment cell = 1;

  // Species:
  species JAK2 in cell = 2;
  species EpoR in cell = 1;
  species SHP1 in cell = 10.7991;
  species SOS in cell = 2.5101;
  species Raf in cell = 3.7719;
  species MEK2 in cell = 11;
  species MEK1 in cell = 24;
  species ERK1 in cell = 7;
  species ERK2 in cell = 21;
  species pJAK2 in cell = 0;
  species pEpoR in cell = 0;
  species mSHP1 in cell = 0;
  species actSHP1 in cell = 0;
  species mSOS in cell = 0;
  species pRaf in cell = 0;
  species ppMEK2 in cell = 0;
  species ppMEK1 in cell = 0;
  species ppERK1 in cell = 0;
  species ppERK2 in cell = 0;
  species pSOS in cell = 0;
  species pMEK2 in cell = 0;
  species pMEK1 in cell = 0;
  species pERK1 in cell = 0;
  species pERK2 in cell = 0;
  species Delay01_mSHP1 in cell = 0;
  species Delay02_mSHP1 in cell = 0;
  species Delay03_mSHP1 in cell = 0;
  species Delay04_mSHP1 in cell = 0;
  species Delay05_mSHP1 in cell = 0;
  species Delay06_mSHP1 in cell = 0;
  species Delay07_mSHP1 in cell = 0;
  species Delay08_mSHP1 in cell = 0;
  // PottersWheelDrivingInput uType=steps uTimes=[-60 0 ] uValues=[0 50 ] u2Values=[0 0 ]
  species Epo in cell = 50;

  // Parameters:
  JAK2_phosphorylation_by_Epo = 0.0122149;
  EpoR_phosphorylation_by_pJAK2 = 3.15714;
  SHP1_activation_by_pEpoR = 0.408408;
  SHP1_delay = 0.408408;
  actSHP1_deactivation = 0.0248773;
  pEpoR_dephosphorylation_by_actSHP1 = 1.19995;
  pJAK2_dephosphorylation_by_actSHP1 = 0.368384;
  SOS_recruitment_by_pEpoR = 0.10271;
  mSOS_release_from_membrane = 15.5956;
  mSOS_induced_Raf_phosphorylation = 0.144515;
  pRaf_dephosphorylation = 0.374228;
  First_MEK2_phosphorylation_by_pRaf = 3.11919;
  Second_MEK2_phosphorylation_by_pRaf = 215.158;
  First_MEK1_phosphorylation_by_pRaf = 0.687193;
  Second_MEK1_phosphorylation_by_pRaf = 667.957;
  First_MEK_dephosphorylation = 0.130937;
  Second_MEK_dephosphorylation = 0.0732724;
  First_ERK1_phosphorylation_by_ppMEK = 2.4927;
  Second_ERK1_phosphorylation_by_ppMEK = 59.5251;
  First_ERK2_phosphorylation_by_ppMEK = 2.44361;
  Second_ERK2_phosphorylation_by_ppMEK = 53.0816;
  First_ERK_dephosphorylation = 39.0886;
  Second_ERK_dephosphorylation = 3.00453;
  ppERK_neg_feedback_on_mSOS = 5122.68;
  pSOS_dephosphorylation = 0.124944;

  // Reactions:
  reaction_1: JAK2 => pJAK2; JAK2_phosphorylation_by_Epo*JAK2*Epo*cell;  // modifiers: Epo
  reaction_2: EpoR => pEpoR; EpoR_phosphorylation_by_pJAK2*EpoR*pJAK2*cell;  // modifiers: pJAK2
  reaction_3: SHP1 => mSHP1; SHP1_activation_by_pEpoR*SHP1*pEpoR*cell;  // modifiers: pEpoR
  reaction_4: mSHP1 => Delay01_mSHP1; SHP1_delay*mSHP1*cell;
  reaction_5: Delay01_mSHP1 => Delay02_mSHP1; SHP1_delay*Delay01_mSHP1*cell;
  reaction_6: Delay02_mSHP1 => Delay03_mSHP1; SHP1_delay*Delay02_mSHP1*cell;
  reaction_7: Delay03_mSHP1 => Delay04_mSHP1; SHP1_delay*Delay03_mSHP1*cell;
  reaction_8: Delay04_mSHP1 => Delay05_mSHP1; SHP1_delay*Delay04_mSHP1*cell;
  reaction_9: Delay05_mSHP1 => Delay06_mSHP1; SHP1_delay*Delay05_mSHP1*cell;
  reaction_10: Delay06_mSHP1 => Delay07_mSHP1; SHP1_delay*Delay06_mSHP1*cell;
  reaction_11: Delay07_mSHP1 => Delay08_mSHP1; SHP1_delay*Delay07_mSHP1*cell;
  reaction_12: Delay08_mSHP1 => actSHP1; SHP1_delay*Delay08_mSHP1*cell;
  reaction_13: actSHP1 => SHP1; actSHP1_deactivation*actSHP1*cell;
  reaction_14: pEpoR => EpoR; pEpoR_dephosphorylation_by_actSHP1*pEpoR*actSHP1*cell;  // modifiers: actSHP1
  reaction_15: pJAK2 => JAK2; pJAK2_dephosphorylation_by_actSHP1*pJAK2*actSHP1*cell;  // modifiers: actSHP1
  reaction_16: SOS => mSOS; SOS_recruitment_by_pEpoR*SOS*pEpoR*cell;  // modifiers: pEpoR
  reaction_17: mSOS => SOS; mSOS_release_from_membrane*mSOS*cell;
  reaction_18: Raf => pRaf; mSOS_induced_Raf_phosphorylation*Raf*mSOS*cell;  // modifiers: mSOS
  reaction_19: pRaf => Raf; pRaf_dephosphorylation*pRaf*cell;
  reaction_20: MEK2 => pMEK2; First_MEK2_phosphorylation_by_pRaf*MEK2*pRaf*cell;  // modifiers: pRaf
  reaction_21: MEK1 => pMEK1; First_MEK1_phosphorylation_by_pRaf*MEK1*pRaf*cell;  // modifiers: pRaf
  reaction_22: pMEK2 => ppMEK2; Second_MEK2_phosphorylation_by_pRaf*pMEK2*pRaf*cell;  // modifiers: pRaf
  reaction_23: pMEK1 => ppMEK1; Second_MEK1_phosphorylation_by_pRaf*pMEK1*pRaf*cell;  // modifiers: pRaf
  reaction_24: ppMEK2 => pMEK2; First_MEK_dephosphorylation*ppMEK2*cell;
  reaction_25: ppMEK1 => pMEK1; First_MEK_dephosphorylation*ppMEK1*cell;
  reaction_26: pMEK2 => MEK2; Second_MEK_dephosphorylation*pMEK2*cell;
  reaction_27: pMEK1 => MEK1; Second_MEK_dephosphorylation*pMEK1*cell;
  reaction_28: ERK1 => pERK1; First_ERK1_phosphorylation_by_ppMEK*ERK1*ppMEK2*cell;  // modifiers: ppMEK2
  reaction_29: ERK2 => pERK2; First_ERK2_phosphorylation_by_ppMEK*ERK2*ppMEK2*cell;  // modifiers: ppMEK2
  reaction_30: ERK1 => pERK1; First_ERK1_phosphorylation_by_ppMEK*ERK1*ppMEK1*cell;  // modifiers: ppMEK1
  reaction_31: ERK2 => pERK2; First_ERK2_phosphorylation_by_ppMEK*ERK2*ppMEK1*cell;  // modifiers: ppMEK1
  reaction_32: pERK1 => ppERK1; Second_ERK1_phosphorylation_by_ppMEK*pERK1*ppMEK2*cell;  // modifiers: ppMEK2
  reaction_33: pERK2 => ppERK2; Second_ERK2_phosphorylation_by_ppMEK*pERK2*ppMEK2*cell;  // modifiers: ppMEK2
  reaction_34: pERK1 => ppERK1; Second_ERK1_phosphorylation_by_ppMEK*pERK1*ppMEK1*cell;  // modifiers: ppMEK1
  reaction_35: pERK2 => ppERK2; Second_ERK2_phosphorylation_by_ppMEK*pERK2*ppMEK1*cell;  // modifiers: ppMEK1
  reaction_36: ppERK1 => pERK1; First_ERK_dephosphorylation*ppERK1*cell;
  reaction_37: ppERK2 => pERK2; First_ERK_dephosphorylation*ppERK2*cell;
  reaction_38: pERK1 => ERK1; Second_ERK_dephosphorylation*pERK1*cell;
  reaction_39: pERK2 => ERK2; Second_ERK_dephosphorylation*pERK2*cell;
  reaction_40: mSOS => pSOS; ppERK_neg_feedback_on_mSOS*mSOS*ppERK1*cell;  // modifiers: ppERK1
  reaction_41: mSOS => pSOS; ppERK_neg_feedback_on_mSOS*mSOS*ppERK2*cell;  // modifiers: ppERK2
  reaction_42: pSOS => SOS; pSOS_dephosphorylation*pSOS*cell;
end
