// SBML level 2 version 4

model Lemaire2004_BoneRemodeling_addRANKLandOPG()
  // This a model from the article:
  // Modeling the interactions between osteoblast and osteoclast activities in bone remodeling.
  // Lemaire V, Tobin FL, Greller LD, Cho CR, Suva LJ. J Theor Biol.2004 Aug 7;229(3):293-309. 15234198,
  // Abstract:
  // We propose a mathematical model explaining the interactions between osteoblasts and osteoclasts, two cell types specialized in the maintenance of the bone integrity. Bone is a dynamic, living tissue whose structure and shape continuously evolves during life. It has the ability to change architecture by removal of old bone and replacement with newly formed bone in a localized process called remodeling. The model described here is based on the idea that the relative proportions of immature and mature osteoblasts control the degree of osteoclastic activity. In addition, osteoclasts control osteoblasts differentially depending on their stage of differentiation. Despite the tremendous complexity of the bone regulatory system and its fragmentary understanding, we obtain surprisingly good correlations between the model simulations and the experimental observations extracted from the literature. The model results corroborate all behaviors of the bone remodeling system that we have simulated, including the tight coupling between osteoblasts and osteoclasts, the catabolic effect induced by continuous administration of PTH, the catabolic action of RANKL, as well as its reversal by soluble antagonist OPG. The model is also able to simulate metabolic bone diseases such as estrogen deficiency, vitamin D deficiency, senescence and glucocorticoid excess. Conversely, possible routes for therapeutic interventions are tested and evaluated. Our model confirms that anti-resorptive therapies are unable to partially restore bone loss, whereas bone formation therapies yield better results. The model enables us to determine and evaluate potential therapies based on their efficacy. In particular, the model predicts that combinations of anti-resorptive and anabolic therapies provide significant benefits compared with monotherapy, especially for certain type of skeletal disease. Finally, the model clearly indicates that increasing the size of the pool of preosteoblasts is an essential ingredient for the therapeutic manipulation of bone formation. This model was conceived as the first step in a bone turnover modeling platform. These initial modeling results are extremely encouraging and lead us to proceed with additional explorations into bone turnover and skeletal remodeling.
  // This model is an extension of the core model in which, RANKLs (I_L) are being added constantly from day 20 at 10000pM/day and Osteoprotegerin-OPGs (I_O) being added constantly 60 days later (i.e at day 80) at 90000pM/day. The model reproduces (Figure 9 of the curation figure), the last plot of Figure 2C of the reference publication.

  // Compartments:
  compartment Compartment = 1;

  // Species:
  species R in Compartment = 0.0007734; R is "Responding_Osteoblasts";
  species B in Compartment = 0.0007282; B is "Active_Osteoblasts";
  species C in Compartment = 0.0009127; C is "Active_Osteoclasts";

  // Parameters:
  C_s = 0.005;
  D_A = 0.7;
  d_B = 0.7;
  D_C = 0.0021;
  D_R = 0.0007;
  f0 = 0.05;
  I_P = 0;
  K = 10;
  k1 = 0.01;
  k2 = 10;
  k3 = 0.00058;
  k4 = 0.017;
  k5 = 0.02;
  k6 = 3;
  k_B = 0.189;
  K_L_P = 3000000;
  kO = 0.35;
  K_O_P = 200000;
  k_P = 86;
  r_L = 1000;
  S_P = 250;

  // Assignment rules:
  I_O := piecewise(90000, time >= 80, 0);
  I_L := piecewise(10000, time >= 20, 0);
  D_B := f0*d_B;
  Phi_C := (C + f0*C_s)/(C + C_s);
  Phi_L := k3/k4*K_L_P*Phi_P*B/(1 + k3*K/k4 + k1/(k2*kO)*(I_O + K_O_P*R/Phi_P))*(1 + I_L/r_L);
  Phi_P := (Pbar + P_O)/(Pbar + P_S);
  Pbar := I_P/k_P;
  P_O := S_P/k_P;
  P_S := k6/k5;

  // Rate rules:
  R' = D_R*Phi_C - D_B*R/Phi_C;
  B' = D_B*R/Phi_C - k_B*B;
  C' = D_C*Phi_L - D_A*Phi_C*C;
end
