// SBML level 2 version 3

model GSK3_p53_ATM_System()

  // Compartments:
  compartment cell = 1;

  // Species:
  substanceOnly species Mdm2 in cell = 5;
  substanceOnly species p53 in cell = 5;
  substanceOnly species Mdm2_p53 in cell = 95;
  substanceOnly species Mdm2_mRNA in cell = 10;
  substanceOnly species p53_mRNA in cell = 10;
  substanceOnly species ATMA in cell = 0;
  substanceOnly species ATMI in cell = 200;
  substanceOnly species p53_P in cell = 0;
  substanceOnly species Mdm2_P in cell = 0;
  substanceOnly species IR in cell = 0;
  substanceOnly species ROS in cell = 0;
  substanceOnly species basalROS in cell = 10;
  substanceOnly species damDNA in cell = 0;
  substanceOnly species E1 in cell = 100;
  substanceOnly species E2 in cell = 100;
  substanceOnly species E1_Ub in cell = 0;
  substanceOnly species E2_Ub in cell = 0;
  substanceOnly species Proteasome in cell = 500;
  substanceOnly species Ub in cell = 4000;
  substanceOnly species p53DUB in cell = 200;
  substanceOnly species Mdm2DUB in cell = 200;
  substanceOnly species DUB in cell = 200;
  substanceOnly species Mdm2_p53_Ub in cell = 0;
  substanceOnly species Mdm2_p53_Ub2 in cell = 0;
  substanceOnly species Mdm2_p53_Ub3 in cell = 0;
  substanceOnly species Mdm2_p53_Ub4 in cell = 0;
  substanceOnly species Mdm2_P1_p53_Ub4 in cell = 0;
  substanceOnly species Mdm2_Ub in cell = 0;
  substanceOnly species Mdm2_Ub2 in cell = 0;
  substanceOnly species Mdm2_Ub3 in cell = 0;
  substanceOnly species Mdm2_Ub4 in cell = 0;
  substanceOnly species Mdm2_P_Ub in cell = 0;
  substanceOnly species Mdm2_P_Ub2 in cell = 0;
  substanceOnly species Mdm2_P_Ub3 in cell = 0;
  substanceOnly species Mdm2_P_Ub4 in cell = 0;
  substanceOnly species p53_Ub4_Proteasome in cell = 0;
  substanceOnly species Mdm2_Ub4_Proteasome in cell = 0;
  substanceOnly species Mdm2_P_Ub4_Proteasome in cell = 0;
  substanceOnly species GSK3b in cell = 500;
  substanceOnly species GSK3b_p53 in cell = 0;
  substanceOnly species GSK3b_p53_P in cell = 0;
  substanceOnly species Abeta in cell = 0;
  substanceOnly species AggAbeta_Proteasome in cell = 0;
  substanceOnly species AggAbeta in cell = 0;
  substanceOnly species AbetaPlaque in cell = 0;
  substanceOnly species Tau in cell = 0;
  substanceOnly species Tau_P1 in cell = 0;
  substanceOnly species Tau_P2 in cell = 0;
  substanceOnly species MT_Tau in cell = 100;
  substanceOnly species AggTau in cell = 0;
  substanceOnly species AggTau_Proteasome in cell = 0;
  substanceOnly species Proteasome_Tau in cell = 0;
  substanceOnly species PP1 in cell = 50;
  substanceOnly species NFT in cell = 0;
  substanceOnly species $ATP in cell = 10000;
  substanceOnly species $ADP in cell = 1000;
  substanceOnly species $AMP in cell = 1000;
  substanceOnly species $Source in cell = 1;
  substanceOnly species $Sink in cell = 0;

  // Parameters:
  ksynp53mRNA = 0.001;
  kdegp53mRNA = 0.0001;
  ksynMdm2mRNA = 0.0005;
  kdegMdm2mRNA = 0.0005;
  ksynMdm2mRNAGSK3bp53 = 0.0007;
  ksynp53 = 0.007;
  kdegp53 = 0.005;
  kbinMdm2p53 = 0.001155;
  krelMdm2p53 = 1.155e-5;
  kbinGSK3bp53 = 2e-6;
  krelGSK3bp53 = 0.002;
  ksynMdm2 = 0.000495;
  kdegMdm2 = 0.01;
  kbinE1Ub = 0.0002;
  kbinE2Ub = 0.001;
  kp53Ub = 5e-5;
  kp53PolyUb = 0.01;
  kbinProt = 2e-6;
  kactDUBp53 = 1e-7;
  kactDUBProtp53 = 0.0001;
  kactDUBMdm2 = 1e-7;
  kMdm2Ub = 4.56e-6;
  kMdm2PUb = 6.84e-6;
  kMdm2PolyUb = 0.00456;
  kdam = 0.08;
  krepair = 2e-5;
  kactATM = 0.0001;
  kinactATM = 0.0005;
  kphosp53 = 0.0002;
  kdephosp53 = 0.5;
  kphosMdm2 = 2;
  kdephosMdm2 = 0.5;
  kphosMdm2GSK3b = 0.005;
  kphosMdm2GSK3bp53 = 0.5;
  kphospTauGSK3bp53 = 0.1;
  kphospTauGSK3b = 0.0002;
  kdephospTau = 0.01;
  kbinMTTau = 0.1;
  krelMTTau = 0.0001;
  ksynTau = 8e-5;
  kbinTauProt = 1.925e-7;
  kdegTau20SProt = 0.01;
  kaggTau = 1e-8;
  kaggTauP1 = 1e-8;
  kaggTauP2 = 1e-7;
  ktangfor = 0.001;
  kprodAbeta = 5e-5;
  kinhibprot = 1e-5;
  kdegAbeta = 0.0001;
  kaggAbeta = 1e-8;
  kpf = 0.001;
  ksynp53mRNAAbeta = 1e-5;
  kdamROS = 1e-5;
  kdamBasalROS = 1e-9;
  kgenROSAbeta = 1e-5;
  kproteff = 1;

  // Reactions:
  p53mRNASynthesis: $Source => p53_mRNA; ksynp53mRNA*Source;
  p53mRNADegradation: p53_mRNA => $Sink; kdegp53mRNA*p53_mRNA;
  Mdm2Synthesis: Mdm2_mRNA => Mdm2_mRNA + Mdm2; ksynMdm2*Mdm2_mRNA;
  Mdm2mRNASynthesis1: p53 => p53 + Mdm2_mRNA; ksynMdm2mRNA*p53;
  Mdm2mRNASynthesis2: p53_P => p53_P + Mdm2_mRNA; ksynMdm2mRNA*p53_P;
  Mdm2mRNASynthesis3: GSK3b_p53 => GSK3b_p53 + Mdm2_mRNA; ksynMdm2mRNAGSK3bp53*GSK3b_p53;
  Mdm2mRNASynthesis4: GSK3b_p53_P => GSK3b_p53_P + Mdm2_mRNA; ksynMdm2mRNAGSK3bp53*GSK3b_p53_P;
  Mdm2mRNADegradation: Mdm2_mRNA => $Sink; kdegMdm2mRNA*Mdm2_mRNA;
  P53Mdm2Binding: p53 + Mdm2 => Mdm2_p53; kbinMdm2p53*p53*Mdm2;
  P53Mdm2Release: Mdm2_p53 => p53 + Mdm2; krelMdm2p53*Mdm2_p53;
  GSK3p53Binding: GSK3b + p53 => GSK3b_p53; kbinGSK3bp53*GSK3b*p53;
  GSK3p53Release: GSK3b_p53 => GSK3b + p53; krelGSK3bp53*GSK3b_p53;
  GSK3p53PBinding: GSK3b + p53_P => GSK3b_p53_P; kbinGSK3bp53*GSK3b*p53_P;
  GSK3_p53PRelease: GSK3b_p53_P => GSK3b + p53_P; krelGSK3bp53*GSK3b_p53_P;
  E1UbBinding: E1 + Ub + $ATP => E1_Ub + $AMP; kbinE1Ub*E1*Ub*ATP/(5000 + ATP);
  E2UbBinding: E2 + E1_Ub => E2_Ub + E1; kbinE2Ub*E2*E1_Ub;
  Mdm2Ubiquitination: Mdm2 + E2_Ub => Mdm2_Ub + E2; kMdm2Ub*Mdm2*E2_Ub;
  Mdm2polyUbiquitination1: Mdm2_Ub + E2_Ub => Mdm2_Ub2 + E2; kMdm2PolyUb*Mdm2_Ub*E2_Ub;
  Mdm2polyUbiquitination2: Mdm2_Ub2 + E2_Ub => Mdm2_Ub3 + E2; kMdm2PolyUb*Mdm2_Ub2*E2_Ub;
  Mdm2polyUbiquitination3: Mdm2_Ub3 + E2_Ub => Mdm2_Ub4 + E2; kMdm2PolyUb*Mdm2_Ub3*E2_Ub;
  Mdm2Deubiquitination4: Mdm2_Ub4 + Mdm2DUB => Mdm2_Ub3 + Mdm2DUB + Ub; kactDUBMdm2*Mdm2_Ub4*Mdm2DUB;
  Mdm2Deubiquitination3: Mdm2_Ub3 + Mdm2DUB => Mdm2_Ub2 + Mdm2DUB + Ub; kactDUBMdm2*Mdm2_Ub3*Mdm2DUB;
  Mdm2Deubiquitination2: Mdm2_Ub2 + Mdm2DUB => Mdm2_Ub + Mdm2DUB + Ub; kactDUBMdm2*Mdm2_Ub2*Mdm2DUB;
  Mdm2Deubiquitination1: Mdm2_Ub + Mdm2DUB => Mdm2 + Mdm2DUB + Ub; kactDUBMdm2*Mdm2_Ub*Mdm2DUB;
  Mdm2ProteasomeBinding1: Mdm2_Ub4 + Proteasome => Mdm2_Ub4_Proteasome; kbinProt*Mdm2_Ub4*Proteasome;
  Mdm2Degradation: Mdm2_Ub4_Proteasome => Proteasome + 4 Ub; kdegMdm2*Mdm2_Ub4_Proteasome*kproteff;
  p53Synthesis: p53_mRNA => p53 + p53_mRNA; ksynp53*p53_mRNA;
  p53Monoubiquitination: E2_Ub + Mdm2_p53 => Mdm2_p53_Ub + E2; kp53Ub*E2_Ub*Mdm2_p53;
  p53Polyubiquitination1: Mdm2_p53_Ub + E2_Ub => Mdm2_p53_Ub2 + E2; kp53PolyUb*Mdm2_p53_Ub*E2_Ub;
  p53Polyubiquitination2: Mdm2_p53_Ub2 + E2_Ub => Mdm2_p53_Ub3 + E2; kp53PolyUb*Mdm2_p53_Ub2*E2_Ub;
  p53Polyubiquitination3: Mdm2_p53_Ub3 + E2_Ub => Mdm2_p53_Ub4 + E2; kp53PolyUb*Mdm2_p53_Ub3*E2_Ub;
  p53Deubiqutination4: Mdm2_p53_Ub4 + p53DUB => Mdm2_p53_Ub3 + p53DUB + Ub; kactDUBp53*Mdm2_p53_Ub4*p53DUB;
  p53Deubiquitination3: Mdm2_p53_Ub3 + p53DUB => Mdm2_p53_Ub2 + p53DUB + Ub; kactDUBp53*Mdm2_p53_Ub3*p53DUB;
  p53Deubiquitination2: Mdm2_p53_Ub2 + p53DUB => Mdm2_p53_Ub + p53DUB + Ub; kactDUBp53*Mdm2_p53_Ub2*p53DUB;
  p53Deubiquitination1: Mdm2_p53_Ub + p53DUB => Mdm2_p53 + p53DUB + Ub; kactDUBp53*Mdm2_p53_Ub*p53DUB;
  Mdm2GSK3phosphorylation1: Mdm2_p53_Ub4 + GSK3b => Mdm2_P1_p53_Ub4 + GSK3b; kphosMdm2GSK3b*Mdm2_p53_Ub4*GSK3b;
  Mdm2GSK3phosphorylation2: Mdm2_p53_Ub4 + GSK3b_p53 => Mdm2_P1_p53_Ub4 + GSK3b_p53; kphosMdm2GSK3bp53*Mdm2_p53_Ub4*GSK3b_p53;
  Mdm2GSK3phosphorylation3: Mdm2_p53_Ub4 + GSK3b_p53_P => Mdm2_P1_p53_Ub4 + GSK3b_p53_P; kphosMdm2GSK3bp53*Mdm2_p53_Ub4*GSK3b_p53_P;
  p53ProteasomeBinding1: Mdm2_P1_p53_Ub4 + Proteasome => p53_Ub4_Proteasome + Mdm2; kbinProt*Mdm2_P1_p53_Ub4*Proteasome;
  Degradationp53_Ub4: p53_Ub4_Proteasome + $ATP => 4 Ub + Proteasome + $ADP; kdegp53*kproteff*p53_Ub4_Proteasome*ATP/(5000 + ATP);
  TauMTbinding: Tau => MT_Tau; kbinMTTau*Tau;
  TauMTrelease: MT_Tau => Tau; krelMTTau*MT_Tau;
  Tauphosphorylation1: GSK3b_p53 + Tau => GSK3b_p53 + Tau_P1; kphospTauGSK3bp53*GSK3b_p53*Tau;
  Tauphosphorylation2: GSK3b_p53 + Tau_P1 => GSK3b_p53 + Tau_P2; kphospTauGSK3bp53*GSK3b_p53*Tau_P1;
  Tauphosphorylation3: GSK3b_p53_P + Tau => GSK3b_p53_P + Tau_P1; kphospTauGSK3bp53*GSK3b_p53_P*Tau;
  Tauphosphorylation4: GSK3b_p53_P + Tau_P1 => GSK3b_p53_P + Tau_P2; kphospTauGSK3bp53*GSK3b_p53_P*Tau_P1;
  Tauphosphorylation5: GSK3b + Tau => GSK3b + Tau_P1; kphospTauGSK3b*GSK3b*Tau;
  Tauphosphorylation6: GSK3b + Tau_P1 => GSK3b + Tau_P2; kphospTauGSK3b*GSK3b*Tau_P1;
  Taudephosphorylation1: Tau_P2 + PP1 => Tau_P1 + PP1; kdephospTau*Tau_P2*PP1;
  Taudephosphorylation2: Tau_P1 + PP1 => Tau + PP1; kdephospTau*Tau_P1*PP1;
  TauP1Aggregation1: 2 Tau_P1 => 2 AggTau; kaggTauP1*Tau_P1*(Tau_P1 - 1)*0.5;
  TauP1Aggregation2: Tau_P1 + AggTau => 2 AggTau; kaggTauP1*Tau_P1*AggTau;
  TauP2Aggregation1: 2 Tau_P2 => 2 AggTau; kaggTauP2*Tau_P2*(Tau_P2 - 1)*0.5;
  TauP2Aggregation2: Tau_P2 + AggTau => 2 AggTau; kaggTauP2*Tau_P2*AggTau;
  TauAggregation1: 2 Tau => 2 AggTau; kaggTau*Tau*(Tau - 1)*0.5;
  TauAggregation2: Tau + AggTau => 2 AggTau; kaggTau*Tau*AggTau;
  TangleFormation1: 2 AggTau => 2 NFT; ktangfor*AggTau*(AggTau - 1)*0.5;
  TangleFormation2: AggTau + NFT => 2 NFT; ktangfor*AggTau*NFT;
  ProteasomeInhibitionAggTau: AggTau + Proteasome => AggTau_Proteasome; kinhibprot*AggTau*Proteasome;
  Abetaproduction1: GSK3b_p53 => Abeta + GSK3b_p53; kprodAbeta*GSK3b_p53;
  Abetaproduction2: GSK3b_p53_P => Abeta + GSK3b_p53_P; kprodAbeta*GSK3b_p53_P;
  ProteasomeInhibitionAbeta: AggAbeta + Proteasome => AggAbeta_Proteasome; kinhibprot*AggAbeta*Proteasome;
  AbetaDegradation: Abeta => $Sink; kdegAbeta*Abeta;
  AbetaAggregation1: 2 Abeta => AggAbeta; kaggAbeta*Abeta*(Abeta - 1)*0.5;
  AbetaAggregation2: Abeta + AggAbeta => 2 AggAbeta; kaggAbeta*Abeta*AggAbeta;
  AbetaPlaqueFormation1: 2 AggAbeta => 2 AbetaPlaque; kpf*AggAbeta*(AggAbeta - 1)*0.5;
  AbetaPlaqueFormation2: AggAbeta + AbetaPlaque => 2 AbetaPlaque; kpf*AggAbeta*AbetaPlaque;
  p53transcriptionViaAbeta: Abeta => p53_mRNA + Abeta; ksynp53mRNAAbeta*Abeta;
  DNAdamage: IR => IR + damDNA; kdam*IR;
  DNArepair: damDNA => $Sink; krepair*damDNA;
  ATMactivation: damDNA + ATMI => damDNA + ATMA; kactATM*damDNA*ATMI;
  p53phosphorylation: p53 + ATMA => p53_P + ATMA; kphosp53*p53*ATMA;
  p53dephosphorylation: p53_P => p53; kdephosp53*p53_P;
  Mdm2phosphorylation: Mdm2 + ATMA => Mdm2_P + ATMA; kphosMdm2*Mdm2*ATMA;
  Mdm2dephosphorylation: Mdm2_P => Mdm2; kdephosMdm2*Mdm2_P;
  Mdm2PUbiquitination: Mdm2_P + E2_Ub => Mdm2_P_Ub + E2; kMdm2PUb*Mdm2_P*E2_Ub;
  Mdm2PpolyUbiquitination1: Mdm2_P_Ub + E2_Ub => Mdm2_P_Ub2 + E2; kMdm2PolyUb*Mdm2_P_Ub*E2_Ub;
  Mdm2PpolyUbiquitination2: Mdm2_P_Ub2 + E2_Ub => Mdm2_P_Ub3 + E2; kMdm2PolyUb*Mdm2_P_Ub2*E2_Ub;
  Mdm2PpolyUbiquitination3: Mdm2_P_Ub3 + E2_Ub => Mdm2_P_Ub4 + E2; kMdm2PolyUb*Mdm2_P_Ub3*E2_Ub;
  Mdm2PDeubiquitination4: Mdm2_P_Ub4 + Mdm2DUB => Mdm2_P_Ub3 + Mdm2DUB + Ub; kactDUBMdm2*Mdm2_P_Ub4*Mdm2DUB;
  Mdm2PDeubiquitination3: Mdm2_P_Ub3 + Mdm2DUB => Mdm2_P_Ub2 + Mdm2DUB + Ub; kactDUBMdm2*Mdm2_P_Ub3*Mdm2DUB;
  Mdm2PDeubiquitination2: Mdm2_P_Ub2 + Mdm2DUB => Mdm2_P_Ub + Mdm2DUB + Ub; kactDUBMdm2*Mdm2_P_Ub2*Mdm2DUB;
  Mdm2PDeubiquitination1: Mdm2_P_Ub + Mdm2DUB => Mdm2_P + Mdm2DUB + Ub; kactDUBMdm2*Mdm2_P_Ub*Mdm2DUB;
  Mdm2PProteasomeBinding1: Mdm2_P_Ub4 + Proteasome => Mdm2_P_Ub4_Proteasome; kbinProt*Mdm2_P_Ub4*Proteasome;
  Mdm2PDegradation: Mdm2_P_Ub4_Proteasome => Proteasome + 4 Ub; kdegMdm2*Mdm2_P_Ub4_Proteasome*kproteff;
  ATMInactivation: ATMA => ATMI; kinactATM*ATMA;
  AggAbetaROSproduction1: AggAbeta => AggAbeta + ROS; kgenROSAbeta*AggAbeta;
  AggAbetaROSproduction2: AggAbeta_Proteasome => AggAbeta_Proteasome + ROS; kgenROSAbeta*AggAbeta_Proteasome;
  ROSDNAdamage: ROS => ROS + damDNA; kdamROS*ROS;
  basalROSDNAdamage: basalROS => basalROS + damDNA; kdamBasalROS*basalROS;
  TauSynthesis: $Source => Tau; ksynTau*Source;
  TauProteasomeBinding: Tau + Proteasome => Proteasome_Tau; kbinTauProt*Tau*Proteasome;
  Tau20SProteasomeDegradation: Proteasome_Tau => Proteasome; kdegTau20SProt*Proteasome_Tau;

  // Events:
  stressCell: at (time >= 3600): IR = 25;
  stopStress: at (time >= 3660): IR = 0;

  // Unit definitions:
  unit substance = item;
end
