// SBML level 2 version 4

model Passos2010_DNAdamage_CellularSenescence()
  // This is the model described in: Feedback between p21 and reactive oxygen production is necessary for cell senescence.
  // Passos JF, Nelson G, Wang C, Richter T, Simillion C, Proctor CJ, Miwa S, Olijslagers S, Hallinan J, Wipat A, Saretzki G, Rudolph KL, Kirkwood TB, von Zglinicki T. ; Mol Sys Biol2010;6:347. Epub 2010 Feb 16. PMID: 20160708doi: 10.1038/msb.2010.5;
  // Abstract:
  // Cellular senescence--the permanent arrest of cycling in normally proliferating cells such as fibroblasts--contributes both to age-related loss of mammalian tissue homeostasis and acts as a tumour suppressor mechanism. The pathways leading to establishment of senescence are proving to be more complex than was previously envisaged. Combining in-silico interactome analysis and functional target gene inhibition, stochastic modelling and live cell microscopy, we show here that there exists a dynamic feedback loop that is triggered by a DNA damage response (DDR) and, which after a delay of several days, locks the cell into an actively maintained state of 'deep' cellular senescence. The essential feature of the loop is that long-term activation of the checkpoint gene CDKN1A (p21) induces mitochondrial dysfunction and production of reactive oxygen species (ROS) through serial signalling through GADD45-MAPK14(p38MAPK)-GRB2-TGFBR2-TGFbeta. These ROS in turn replenish short-lived DNA damage foci and maintain an ongoing DDR. We show that this loop is both necessary and sufficient for the stability of growth arrest during the establishment of the senescent phenotype.
  // This model originates from BioModels Database: A Database of Annotated Published Models (http://www.ebi.ac.uk/biomodels/). It is copyright (c) 2005-2010 The BioModels.net Team.
  // For more information see the terms of use.
  // To cite BioModels Database, please use: Li C, Donizelli M, Rodriguez N, Dharuri H, Endler L, Chelliah V, Li L, He E, Henry A, Stefan MI, Snoep JL, Hucka M, Le Novère N, Laibe C (2010) BioModels Database: An enhanced, curated and annotated resource for published quantitative kinetic models. BMC Syst Biol., 4:92.
  // biomodels.db:MODEL5989624192
  // biomodels.db:BIOMD0000000287
  // isDescribedBy pubmed:20160708
  // isDerivedFrom biomodels.db:BIOMD0000000188 biomodels.db:BIOMD0000000189
  // isPartOf kegg.pathway:ko05200
  // hasTaxon taxonomy:9606

  // Compartments:
  compartment cell = 1;  // isVersionOf GO:0005623

  // Species:
  substanceOnly species Mdm2 in cell = 5;  // isVersionOf uniprot:Q00987
  substanceOnly species p53 in cell = 5;  // isVersionOf uniprot:P04637
  substanceOnly species Mdm2_p53 in cell = 95;  // hasPart uniprot:Q00987 uniprot:P04637
  substanceOnly species Mdm2_mRNA in cell = 10;  // encodes uniprot:Q00987
  substanceOnly species p53_mRNA in cell = 10;  // encodes uniprot:P04637
  substanceOnly species ATMA in cell = 0;  // isVersionOf uniprot:Q13315
  substanceOnly species ATMI in cell = 200;  // isVersionOf uniprot:Q13315
  substanceOnly species p21 in cell = 0;  // isVersionOf uniprot:P38936
  substanceOnly species p21_mRNA in cell = 1;  // encodes uniprot:P38936
  substanceOnly species p21step1 in cell = 0;  // isVersionOf uniprot:P38936
  substanceOnly species p21step2 in cell = 0;  // isVersionOf uniprot:P38936
  substanceOnly species p53_P in cell = 0;  // isVersionOf uniprot:P04637
  substanceOnly species Mdm2_P in cell = 0;  // isVersionOf uniprot:Q00987
  substanceOnly species p21_basal in cell = 7;  // isVersionOf uniprot:P38936
  substanceOnly species p38 in cell = 100;  // isVersionOf uniprot:Q16539
  substanceOnly species p38_P in cell = 0;  // isVersionOf uniprot:Q16539
  substanceOnly species GADD45 in cell = 0;  // hasPart uniprot:P24522 uniprot:O75293 uniprot:O95257
  substanceOnly species IR in cell = 0;
  substanceOnly species damDNA in cell = 0;  // isVersionOf CHEBI:16991
  substanceOnly species ROS in cell = 0;  // isVersionOf CHEBI:26523
  substanceOnly species basalROS in cell = 10;  // isVersionOf CHEBI:26523
  substanceOnly species $Sink in cell = 1;
  substanceOnly species $Source in cell = 1;

  // Parameters:
  ksynMdm2 = 0.000495;
  kdegMdm2 = 0.000433;
  ksynp53 = 0.006;
  kdegp53 = 0.000825;
  kdegp53mdm2ind = 8.25e-7;
  kbinMdm2p53 = 0.001155;
  krelMdm2p53 = 1.155e-6;
  ksynMdm2mRNA = 0.0001;
  kdegMdm2mRNA = 0.0001;
  kactATM = 2e-5;
  kdegATMMdm2 = 0.0004;
  kinactATM = 0.0005;
  kphosp53 = 0.006;
  kdephosp53 = 0.5;
  kphosMdm2 = 2;
  kdephosMdm2 = 0.5;
  kphosp38 = 0.008;
  kdephosp38 = 0.1;
  kdam = 0.007;
  krepair = 6e-5;
  kGADD45 = 4e-6;
  kdegGADD45 = 1e-5;
  ksynp53mRNA = 0.001;
  kdegp53mRNA = 0.0001;
  ksynp21mRNAp53P = 6e-6;
  ksynp21mRNAp53 = 6e-8;
  kdegp21mRNA = 2.4e-5;
  ksynp21step1 = 0.0004;
  ksynp21step2 = 4e-5;
  ksynp21step3 = 4e-5;
  kdegp21 = 0.00019;
  kremROS = 0.000383;
  kgenROSp38 = 0.00045;
  kdamROS = 1e-5;
  kdamBasalROS = 1e-9;
  kp38ROS = 1;

  // Reactions:
  p53mRNASynthesis: $Source => p53_mRNA; ksynp53mRNA*Source;  // isPartOf GO:0006351
  p53mRNADegradation: p53_mRNA => $Sink; kdegp53mRNA*p53_mRNA;  // isVersionOf GO:0009056
  Mdm2Synthesis: Mdm2_mRNA => Mdm2_mRNA + Mdm2; ksynMdm2*Mdm2_mRNA;  // isVersionOf GO:0006412
  Mdm2mRNASynthesis1: p53 => p53 + Mdm2_mRNA; ksynMdm2mRNA*p53;  // isVersionOf GO:0006351
  Mdm2mRNASynthesis2: p53_P => p53_P + Mdm2_mRNA; ksynMdm2mRNA*p53_P;  // isVersionOf GO:0006351
  Mdm2mRNADegradation: Mdm2_mRNA => $Sink; kdegMdm2mRNA*Mdm2_mRNA;  // isVersionOf GO:0009056
  Mdm2Degradation: Mdm2 => $Sink; kdegMdm2*Mdm2;  // isVersionOf GO:0009056
  p53Synthesis: p53_mRNA => p53 + p53_mRNA; ksynp53*p53_mRNA;  // isVersionOf GO:0006412
  p53Degradation: Mdm2_p53 => Mdm2; kdegp53*Mdm2_p53;  // isVersionOf GO:0009056
  p53Mdm2IndepDegradation1: p53_P => $Sink; kdegp53mdm2ind*p53_P;  // isVersionOf GO:0009056
  p53Mdm2IndepDegradation2: p53 => $Sink; kdegp53mdm2ind*p53;  // isVersionOf GO:0009056
  P53_Mdm2Binding: p53 + Mdm2 => Mdm2_p53; kbinMdm2p53*p53*Mdm2;  // isVersionOf GO:0006461
  P53_Mdm2Release: Mdm2_p53 => p53 + Mdm2; krelMdm2p53*Mdm2_p53;  // isVersionOf GO:0043241
  DNAdamage: IR => IR + damDNA; kdam*IR;  // isVersionOf GO:0006950
  DNArepair: damDNA => $Sink; krepair*damDNA;  // isVersionOf GO:0006281
  ATMactivation: damDNA + ATMI => damDNA + ATMA; kactATM*damDNA*ATMI;  // isPartOf GO:0006974
  p53phoshorylation: p53 + ATMA => p53_P + ATMA; kphosp53*p53*ATMA;  // isVersionOf GO:0016310
  p53dephosorylation: p53_P => p53; kdephosp53*p53_P;  // isVersionOf GO:0016310
  Mdm2phoshorylation: Mdm2 + ATMA => Mdm2_P + ATMA; kphosMdm2*Mdm2*ATMA;  // isVersionOf GO:0016310
  Mdm2dephosorylation: Mdm2_P => Mdm2; kdephosMdm2*Mdm2_P;  // isVersionOf GO:0016311
  Mdm2Pdegradation: Mdm2_P => $Sink; kdegATMMdm2*Mdm2_P;  // isVersionOf GO:0009056
  ATMInactivation: ATMA => ATMI; kinactATM*ATMA;  // isVersionOf GO:0006464
  p21mRNASynthesis1: p53 => p53 + p21_mRNA; ksynp21mRNAp53*p53;  // isVersionOf GO:0006351
  p21mRNASynthesis2: p53_P => p53_P + p21_mRNA; ksynp21mRNAp53P*p53_P;  // isVersionOf GO:0006351
  p21mRNADegradation: p21_mRNA => $Sink; kdegp21mRNA*p21_mRNA;  // isVersionOf GO:0009056
  p21Synthesis1: p21_mRNA => p21_mRNA + p21step1; ksynp21step1*p21_mRNA;  // isVersionOf GO:0006412
  p21Synthesis2: p21step1 => p21step2; ksynp21step2*p21step1;  // isVersionOf GO:0006412
  p21Synthesis3: p21step2 => p21; ksynp21step3*p21step2;  // isVersionOf GO:0006412
  p21degradation: p21 => $Sink; kdegp21*p21;  // isVersionOf GO:0009056
  GADD45activation2: p21 => p21 + GADD45; kGADD45*p21;  // isVersionOf GO:0006412
  GADD45degradation: GADD45 => $Sink; kdegGADD45*GADD45;  // isVersionOf GO:0009056
  p38activation: p38 + GADD45 => p38_P + GADD45; kphosp38*p38*GADD45;  // isVersionOf GO:0006464
  p38inactivation: p38_P => p38; kdephosp38*p38_P;  // isVersionOf GO:0006464
  ROSgenerationP38: p38_P => p38_P + ROS; kgenROSp38*p38_P*kp38ROS;  // isVersionOf GO:0052064
  ROSremoval: ROS => $Sink; kremROS*ROS;  // isVersionOf GO:0009056
  ROSDNAdamage: ROS => ROS + damDNA; kdamROS*ROS;  // isVersionOf GO:0034614
  basalROSDNAdamage: basalROS => basalROS + damDNA; kdamBasalROS*basalROS;  // isVersionOf GO:0034614

  // Events:
  stressCell: at (time >= 172800): IR = 200;
  stopStress: at (time >= 172860): IR = 0;
  stopp38ROS: at (time >= 691200): kp38ROS = 0.6;

  // Unit definitions:
  unit substance = item;
end
