// SBML level 2 version 4

model main()

  // Compartments:
  compartment cell = 1;

  // Species:
  species sumrc1 in cell = 1;
  species r in cell;
  species c1 in cell;
  species c2 in cell = 0;
  species ePI3K in cell;
  species m3PI in cell = 0;
  species eGEF in cell;
  species mRas in cell = 0;
  species x1 in cell = 0;
  species x2 in cell = 0;
  species y in cell = 1;
  species yp in cell;
  species ypp in cell = 0;
  species z in cell = 1;
  species zp in cell;
  species zpp in cell = 0;
  species fGEF in cell = 1;
  species w in cell = 0;
  species eph in cell = 1;

  // Parameters:
  L = ;
  KDL = ;
  kxR0 = ;
  kminusx = ;
  ke = ;
  kt = ;
  alphaPI3K = ;
  kappaPI3K = ;
  k3PI = ;
  KGR = ;
  KGP = ;
  kRas = ;
  Gamma = ;
  kdx1 = ;
  kdx2 = ;
  Kx2 = ;
  VmaxOVERKMx11 = ;
  KMx11 = ;
  VmaxOVERKMx21 = ;
  KMx21 = ;
  VmaxOVERKMyph1 = ;
  KMyph1 = ;
  VmaxOVERKMx12 = ;
  KMx12 = ;
  VmaxOVERKMx22 = ;
  KMx22 = ;
  VmaxOVERKMyph2 = ;
  KMyph2 = ;
  VmaxOVERKMy1 = ;
  KMy1 = ;
  VmaxOVERKMzph1 = ;
  KMzph1 = ;
  VmaxOVERKMy2 = ;
  KMy2 = ;
  VmaxOVERKMzph2 = ;
  KMzph2 = ;
  kFBf = ;
  Zf = ;
  n = ;
  Kf = ;
  kdw = ;
  kFBph = ;
  Wph = ;
  p = ;
  Kph = ;

  // Assignment rules:
  r := KDL*sumrc1/(KDL + L);
  c1 := L*sumrc1/(KDL + L);
  ePI3K := (1 + kappaPI3K + 2*alphaPI3K*c2 - ((1 + kappaPI3K + 2*alphaPI3K*c2)^2 - 8*alphaPI3K*c2)^0.5)/2;
  eGEF := (KGR*c2 + KGP*m3PI)/(1 + KGR*c2 + KGP*m3PI)*fGEF;
  yp := 1 - y - ypp;
  zp := 1 - z - zpp;

  // Reactions:
  sumrc1ODE: -> sumrc1; kt*(1 - sumrc1) + 2*(kminusx*c2 - kxR0*c1^2);  // modifiers: c2, c1
  c2ODE: -> c2; kxR0*c1^2 - (kminusx + ke)*c2;  // modifiers: c1
  m3PIODE: -> m3PI; k3PI*(ePI3K - m3PI);  // modifiers: ePI3K
  mRasODE: -> mRas; kRas*((1 + Gamma)*eGEF - (1 + Gamma*eGEF)*mRas);  // modifiers: eGEF
  x1ODE: -> x1; kdx1*(mRas - x1/(1 + y/KMx11 + yp/KMx12));  // modifiers: mRas, y, yp
  x2ODE: -> x2; kdx2*((1 + Kx2)*m3PI/(1 + Kx2*m3PI) - x2/(1 + y/KMx21 + yp/KMx22));  // modifiers: m3PI, y, yp
  yODE: -> y; VmaxOVERKMyph1*yp/(1 + yp/KMyph1 + ypp/KMyph2) - VmaxOVERKMx11*x1*y/(1 + y/KMx11 + yp/KMx12) - VmaxOVERKMx21*x2*y/(1 + y/KMx21 + yp/KMx22);  // modifiers: yp, ypp, x1, x2
  yppODE: -> ypp; VmaxOVERKMx12*x1*yp/(1 + y/KMx11 + yp/KMx12) + VmaxOVERKMx22*x2*yp/(1 + y/KMx21 + yp/KMx22) - VmaxOVERKMyph2*ypp/((1 + z/KMy1 + zp/KMy2)*(1 + yp/KMyph1) + ypp/KMyph2);  // modifiers: x1, yp, y, x2, z, zp
  zODE: -> z; VmaxOVERKMzph1*eph*zp/(1 + zp/KMzph1 + zpp/KMzph2) - VmaxOVERKMy1*ypp*z/(1 + z/KMy1 + zp/KMy2);  // modifiers: eph, zp, zpp, ypp
  zppODE: -> zpp; VmaxOVERKMy2*ypp*zp/(1 + z/KMy1 + zp/KMy2) - VmaxOVERKMzph2*eph*zpp/(1 + zp/KMzph1 + zpp/KMzph2);  // modifiers: ypp, zp, z, eph
  fGEFODE: -> fGEF; kFBf*((1 - fGEF)/Kf - zpp^n/(Zf^n + zpp^n)*fGEF);  // modifiers: zpp
  wODE: -> w; kdw*(zpp - w);  // modifiers: zpp
  ephODE: -> eph; kFBph*(w^p/(Wph^p + w^p) - (eph - 1)/Kph);  // modifiers: w
end
