// SBML level 2 version 1

model LeloupNeurospora2loop()

  // Compartments:
  compartment default = 1;

  // Species:
  species FC in default = 2.462463;
  species FCp in default = 2.712311;
  species FN in default = 1.844;
  species FNp in default = 2.74225;
  species MF in default = 0.7255793;

  // Parameters:
  vs = 1.223633;
  ki = 5.045433;
  n = 6.3958;
  vm = 0.8853763;
  km = 0.08460041;
  ks = 0.3138465;
  vd = 0.1611115;
  k1n = 0.2226367;
  k2n = 0.3314845;
  ksp = 0.2948402;
  vdp = 0.1397503;
  k1np = 0.2723065;
  k2np = 0.2954207;
  amp = 0;
  dawn = 6;
  dusk = 18;
  d/dt(time) = 1;
  time_ = 0;

  // Reactions:
  MFtrn: => MF; (vs + amp*((1 + tanh(2*(time_ - 24*floor(time_/24) - dawn)))*(1 - tanh(2*(time_ - 24*floor(time_/24) - dusk)))/4))*ki^n/(ki^n + (FN + FNp)^n);  // modifiers: FN, FNp
  MFdeg: MF => ; vm*MF/(km + MF);
  FCtrl: => FC; ks*MF;  // modifiers: MF
  FCdeg: FC => ; vd*FC;
  FCtrs: FC -> FN; k1n*FC - k2n*FN;
  FCptrl: => FCp; ksp*MF;  // modifiers: MF
  FCpdeg: FCp => ; vdp*FCp;
  FCptrs: FCp -> FNp; k1np*FCp - k2np*FNp;
end
