// SBML level 2 version 4

model blub()
  // Balagaddé2008_E_coli_Predator_Prey
  // This is the reduced model described in the article:
  // A synthetic Escherichia coli predator–prey ecosystem
  // Balagaddé FK, Song H, Ozaki J, Collins CH, Barnet M, Arnold FH, Quake SR, You L. Mol Syst Biol.2008;4:187. Epub 2008 Apr 15. PMID: 18414488; DOI: 10.1038/msb.2008.24
  // Abstract:
  // We have constructed a synthetic ecosystem consisting of two Escherichia coli populations, which communicate bi-directionally through quorum sensing and regulate each other's gene expression and survival via engineered gene circuits. Our synthetic ecosystem resembles canonical predator–prey systems in terms of logic and dynamics. The predator cells kill the prey by inducing expression of a killer protein in the prey, while the prey rescue the predators by eliciting expression of an antidote protein in the predator. Extinction, coexistence and oscillatory dynamics of the predator and prey populations are possible depending on the operating conditions as experimentally validated by long-term culturing of the system in microchemostats. A simple mathematical model is developed to capture these system dynamics. Coherent interplay between experiments and mathematical analysis enables exploration of the dynamics of interacting populations in a predictable manner.
  // In the article the cell density is given in per 10 3cells per microlitre. To evade a conversion factor in the SBML implementation, the unit for the cell densities was just left the same as for the AHLs A and A2 (nM).
  // This model originates from BioModels Database: A Database of Annotated Published Models (http://www.ebi.ac.uk/biomodels/). It is copyright (c) 2005-2012 The BioModels.net Team.
  // For more information see the terms of use.
  // To cite BioModels Database, please use: Li C, Donizelli M, Rodriguez N, Dharuri H, Endler L, Chelliah V, Li L, He E, Henry A, Stefan MI, Snoep JL, Hucka M, Le Novère N, Laibe C (2010) BioModels Database: An enhanced, curated and annotated resource for published quantitative kinetic models. BMC Syst Biol., 4:92.
  // biomodels.db:MODEL8305195207
  // biomodels.db:BIOMD0000000296
  // isDescribedBy pubmed:18414488
  // hasTaxon taxonomy:562
  // hasVersion GO:0009372
  // isVersionOf GO:0002120

  // Compartments:
  compartment environment = 1;  // GO:0005576

  // Species:
  // IPTG default 5 nM
  species $IPTG in environment = 5;  // CHEBI:61448 pubchem.compound:656894
  // predator cells (MG1655) (per 10 3cells per microlitre)
  species C1 in environment = 20;  // isVersionOf taxonomy:562
  // prey cells (Top10F) (per 10 3cells per microlitre)
  species C2 in environment = 20;  // isVersionOf taxonomy:562
  // 3OC12HSL
  species A1 in environment = 0.1;  // CHEBI:56080
  // 3OC6HSL
  species A2 in environment = 0.1;  // CHEBI:55474 kegg.compound:C18049
  species $sink in environment = 0;
  species $source in environment = 0;

  // Parameters:
  // predator cell growth rate constant
  kc1 = 0.8;
  // prey cell growth rate constant
  kc2 = 0.4;
  // Cell carrying capacity
  Cm = 100;
  // Dilution rate
  D = 0.1125;
  // predator cell A1 (3OC12HSL) synthesis rate costant
  kA1 = 0.1;
  // prey cell death rate constant
  d2 = 0.3;
  // A1 (3OC12HSL) concentration for half-maximal activation of PluxI promoter
  K2 = 10;
  // A2 (3OC6HSL) concentration for half-maximal inhibition of PluxI promoter
  K1 = 10;
  // cellular A1 (3OC12HSL) decay rate constant
  dAA1 = 0.017;
  // cellular A2 (3OC6HSL) decay rate constant
  dAA2 = 0.11;

  // Assignment rules:
  d1 := 0.5 + IPTG^2/(5^2 + IPTG^2);
  kA2 := 0.02 + 0.03*(IPTG^2/(5^2 + IPTG^2));

  // Reactions:
  J0: $source => C1; environment*kc1*C1*(1 - (C1 + C2)/Cm); J0 is "predator growth";  // modifiers: C2; isVersionOf GO:0008283
  J1: C1 => $sink; environment*(D + d1*K1/(K1 + A2^2))*C1; J1 is "predator death";  // modifiers: A2; isVersionOf GO:0008219
  J2: $source => C2; environment*kc2*C2*(1 - (C1 + C2)/Cm); J2 is "prey growth";  // modifiers: C1; GO:0008283
  J3: C2 => $sink; environment*(D + d2*A1^2/(K2 + A1^2))*C2; J3 is "prey death";  // modifiers: A1; isVersionOf GO:0008219
  J4: $source => A1; environment*kA1*C1; J4 is "3OC12HSL synthesis";  // modifiers: C1; hasVersion ec-code:2.3.1.184; GO:0009058
  J5: A1 => $sink; environment*(dAA1 + D)*A1; J5 is "3OC12HSL removal";  // isVersionOf GO:0009056
  J6: $source => A2; environment*kA2*C2; J6 is "3OC6HSL synthesis";  // modifiers: C2; GO:0009058; hasVersion ec-code:2.3.1.184
  J7: A2 => $sink; environment*(dAA2 + D)*A2; J7 is "3OC6HSL removal";  // isVersionOf GO:0009056

  // Unit definitions:
  unit substance = 1e-9 mole; substance is "nanomole";
  unit time = 3600 second; time is "hours";
end
