// SBML level 2 version 4

function goldbeter_koshland(v1, v2, J1, J2)
  2*v1*J2/(v2 - v1 + J1*v2 + J2*v1 + ((v2 - v1 + J1*v2 + J2*v1)^2 - 4*(v2 - v1)*v1*J2)^(1/2));
end

model Tyson2003_Activator_Inhibitor()
  // Tyson2003_Substrate_Depletion_Osc
  // This is an SBML implementation the model of the substrate depletion oscillator (figure 2c) described in the article:
  // Sniffers, buzzers, toggles and blinkers: dynamics of regulatory and signaling pathways in the cell.
  // Tyson JJ, Chen KC, Novak B. Curr Opin Cell Biol.2003 Apr;15(2):221-31. PubmedID: 12648679; DOI: 10.1016/S0955-0674(03)00017-6;
  // Abstract:
  // The physiological responses of cells to external and internal stimuli are governed by genes and proteins interacting in complex networks whose dynamical properties are impossible to understand by intuitive reasoning alone. Recent advances by theoretical biologists have demonstrated that molecular regulatory networks can be accurately modeled in mathematical terms. These models shed light on the design principles of biological control systems and make predictions that have been verified experimentally.
  // Originally created by libAntimony v1.4 (using libSBML 3.4.1)
  // This model originates from BioModels Database: A Database of Annotated Published Models (http://www.ebi.ac.uk/biomodels/). It is copyright (c) 2005-2011 The BioModels.net Team.
  // For more information see the terms of use.
  // To cite BioModels Database, please use: Li C, Donizelli M, Rodriguez N, Dharuri H, Endler L, Chelliah V, Li L, He E, Henry A, Stefan MI, Snoep JL, Hucka M, Le Novère N, Laibe C (2010) BioModels Database: An enhanced, curated and annotated resource for published quantitative kinetic models. BMC Syst Biol., 4:92.
  // biomodels.db:MODEL1102100006
  // biomodels.db:BIOMD0000000307
  // isDescribedBy pubmed:12648679
  // hasProperty mamo:MAMO_0000046
  // isVersionOf GO:0051098
  // hasTaxon taxonomy:131567

  // Compartments:
  compartment env = 1;  // isVersionOf GO:0005623

  // Species:
  species R in env = 0;
  species X in env = 0;
  species $S in env = 0;
  species $Ep in env;  // isVersionOf kegg.compound:C00562; hasVersion MOD:00696
  species $E in env;  // isVersionOf CHEBI:36080

  // Parameters:
  k0_prime = 0.01 per_s;
  k0 = 0.4 per_M_per_s;
  k1 = 1 per_s;
  k2 = 1 per_s;
  k3 = 1 per_s;
  J3 = 0.05 dimensionless;
  k4 = 0.3 M_per_s;
  J4 = 0.05 dimensionless;
  Et = 1 M;
  Km3 has M;
  Km4 has M;

  // Assignment rules:
  Km3 := J3*Et;
  Km4 := J4*Et;
  Ep := goldbeter_koshland(k3*R, k4, J3, J4)*Et;
  E := Et - Ep;

  // Reactions:
  r0: X => R; env*(k0_prime + k0*Ep)*X;  // modifiers: Ep
  r1: => X; env*k1*S;  // modifiers: S; isVersionOf GO:0009058
  r2: R => ; env*k2*R;  // isVersionOf GO:0009056
  r3: $E => $Ep; env*k3*R*E/(Km3 + E);  // modifiers: R; isVersionOf GO:0006468
  r4: $Ep => $E; env*k4*Ep/(Km4 + Ep);  // isVersionOf GO:0006470

  // Unit definitions:
  unit time = second; time is "s";
  unit substance = mole; substance is "mole";
  unit per_s = 1 / second;
  unit M_per_s = mole / (second * litre);
  unit M = mole / litre;
  unit per_M_per_s = litre / (mole * second);
end
