// SBML level 2 version 4

model Tyson2003_Negative_Feedback_Oscillator()
  // Tyson2003_NegFB_Oscillator
  // Originally created by libAntimony v1.4 (using libSBML 3.4.1)
  // This is an SBML implementation the model of negative feedback oscillator (figure 2a) described in the article:
  // Sniffers, buzzers, toggles and blinkers: dynamics of regulatory and signaling pathways in the cell.
  // Tyson JJ, Chen KC, Novak B. Curr Opin Cell Biol.2003 Apr;15(2):221-31. PubmedID: 12648679; DOI: 10.1016/S0955-0674(03)00017-6;
  // Abstract:
  // The physiological responses of cells to external and internal stimuli are governed by genes and proteins interacting in complex networks whose dynamical properties are impossible to understand by intuitive reasoning alone. Recent advances by theoretical biologists have demonstrated that molecular regulatory networks can be accurately modeled in mathematical terms. These models shed light on the design principles of biological control systems and make predictions that have been verified experimentally.
  // Originally created by libAntimony v1.4 (using libSBML 3.4.1)
  // This model originates from BioModels Database: A Database of Annotated Published Models (http://www.ebi.ac.uk/biomodels/). It is copyright (c) 2005-2011 The BioModels.net Team.
  // For more information see the terms of use.
  // To cite BioModels Database, please use: Li C, Donizelli M, Rodriguez N, Dharuri H, Endler L, Chelliah V, Li L, He E, Henry A, Stefan MI, Snoep JL, Hucka M, Le Novère N, Laibe C (2010) BioModels Database: An enhanced, curated and annotated resource for published quantitative kinetic models. BMC Syst Biol., 4:92.
  // biomodels.db:MODEL1102100004
  // biomodels.db:BIOMD0000000308
  // isDescribedBy pubmed:12648679
  // isVersionOf GO:0051098
  // hasPart GO:0007243
  // hasProperty mamo:MAMO_0000046

  // Compartments:
  compartment env = 1;  // isVersionOf GO:0005623

  // Species:
  species Rp in env = 0;  // isVersionOf kegg.compound:C00562; hasVersion MOD:00696
  species X in env = 0;  // isVersionOf CHEBI:36080
  species Yp in env = 0;  // isVersionOf kegg.compound:C00562; hasVersion MOD:00696; hasProperty GO:0016301
  species $S in env = 0;
  species $Y in env;  // isVersionOf CHEBI:36080
  species $R in env;  // isVersionOf CHEBI:36080

  // Parameters:
  k0 = 0 M_per_s;
  k1 = 1 per_s;
  k2 = 0.01 per_s;
  k2_prime = 10 per_M_per_s;
  k3 = 0.1 per_s;
  Yt = 1 M;
  Km3 = 0.01 M;
  k4 = 0.2 M_per_s;
  Km4 = 0.01 M;
  k5 = 0.1 per_s;
  Rt = 1 M;
  Km5 = 0.01 M;
  k6 = 0.05 M_per_s;
  Km6 = 0.01 M;

  // Assignment rules:
  Y := Yt - Yp;
  R := Rt - Rp;

  // Reactions:
  r1: => X; env*(k0 + k1*S);  // modifiers: S; isVersionOf GO:0009058
  r2: X => ; env*(k2 + k2_prime*Rp)*X;  // modifiers: Rp; isVersionOf GO:0009056
  r3: $Y => Yp; env*k3*X*(Yt - Yp)/(Km3 + (Yt - Yp));  // modifiers: X; isVersionOf GO:0006468
  r4: Yp => $Y; env*k4*Yp/(Km4 + Yp);  // isVersionOf GO:0006470
  r5: $R => Rp; env*k5*Yp*(Rt - Rp)/(Km5 + (Rt - Rp));  // modifiers: Yp; isVersionOf GO:0006468
  r6: Rp => $R; env*k6*Rp/(Km6 + Rp);  // isVersionOf GO:0006470

  // Unit definitions:
  unit time = second; time is "s";
  unit substance = mole; substance is "mole";
  unit per_s = 1 / second;
  unit M_per_s = mole / (second * litre);
  unit M = mole / litre;
  unit per_M_per_s = litre / (mole * second);
end
