// SBML level 2 version 1

model Minimal_two_feedback_model()
  // Definitions for the model in Figure 1A
  // L- Ligand
  // R- Receptor
  // C - Ligand-Receptor Complex
  // I - Inactive Transcription Factor
  // X - C bound to I
  // A - Active Transcription Factor

  // Parameters:
  L = 0.1;
  BR = 0.005;
  kdegR = 0.005;
  kon = 0.001;
  koff = 0.05;
  Rs = 3;
  KD = 200;
  kdegC = 0.01;
  k1 = 1;
  k2 = 5;
  k3 = 45;
  BI = 0.005;
  kdegI = 0.005;
  TFs = 3;
  kdegX = 0.005;
  kdegA = 0.005;
  R = 1;
  C = 0;
  I = 1;
  X = 0;
  A = 0;

  // Rate rules:
  R' = BR - kdegR*R - kon*L*R + koff*C + Rs*A/(KD + A);
  C' = kon*L*R - koff*C - kdegC*C - k1*C*I + (k2 + k3)*X;
  I' = BI - kdegI*I - k1*C*I + k2*X + TFs*A/(KD + A);
  X' = k1*C*I - (k2 + k3)*X - kdegX*X;
  A' = k3*X - kdegA*A;
end
