// SBML level 2 version 4

model Larsen2004_CalciumSpiking_EnzymeBinding()
  // This a model from the article:
  // On the encoding and decoding of calcium signals in hepatocytes
  // Ann Zahle Larsen, Lars Folke Olsen and Ursula Kummera Biophysical ChemistryVolume 107, Issue 1, 1 January 2004, Pages 83-99 14871603,
  // Abstract:
  // Many different agonists use calcium as a second messenger. Despite intensive research in intracellular calcium signalling it is an unsolved riddle how the different types of information represented by the different agonists, is encoded using the universal carrier calcium. It is also still not clear how the information encoded is decoded again into the intracellular specific information at the site of enzymes and genes. After the discovery of calcium oscillations, one likely mechanism is that information is encoded in the frequency, amplitude and waveform of the oscillations. This hypothesis has received some experimental support. However, the mechanism of decoding of oscillatory signals is still not known. Here, we study a mechanistic model of calcium oscillations, which is able to reproduce both spiking and bursting calcium oscillations. We use the model to study the decoding of calcium signals on the basis of co-operativity of calcium binding to various proteins. We show that this co-operativity offers a simple way to decode different calcium dynamics into different enzyme activities.
  // This model corresponds to the improved model eqn 1-7, as described by Larsen et al., 2004 implemented to investigate how the cell can decode different oscillations. This is done by introducing 2 more variables Enzyme and Product in addition to the 5 variables G-alpha, PLC, Ca_cyt, Ca_ER and Ca_mit receptor-operated model described in the first part of the paper. The receptor-operated model is itself a modified version of the model described in Kummer 2000 (PMID: 10968983)
  // biomodels.db:MODEL1105060002
  // biomodels.db:BIOMD0000000331
  // isDescribedBy pubmed:14871603
  // occursIn CL:0000182
  // isVersionOf GO:0019722 GO:0019899
  // hasTaxon taxonomy:10116

  // Compartments:
  compartment cytoplasm = 1;  // isVersionOf GO:0005737
  compartment ER = 1;  // isVersionOf GO:0005783
  compartment mit = 1; mit is "mitochondria";  // isVersionOf GO:0005739

  // Species:
  species G_alpha in cytoplasm = 0.01; G_alpha is "G-alpha";  // isVersionOf uniprot:Q9JID2
  species PLC in cytoplasm = 0.01/cytoplasm;  // isVersionOf uniprot:P10687
  species Ca_cyt in cytoplasm = 0.01/cytoplasm; Ca_cyt is "Calcium-Cyt";  // occursIn GO:0005737
  species Ca_ER in ER = 10/ER; Ca_ER is "Calcium-ER";  // occursIn GO:0005783
  species Ca_mit in mit = 0.001; Ca_mit is "Calcium-mit";  // occursIn GO:0005739
  species Enz in cytoplasm = 0; Enz is "Enzyme";
  species Product in cytoplasm = 0; Product is "EnzCatlysedProduct";

  // Parameters:
  k1 = 0.01;
  k2 = 1.65;
  k3 = 0.64;
  K4 = 0.09;
  k5 = 4.88;
  K6 = 1.18;
  k7 = 2.08;
  k8 = 32.24;
  K9 = 29.09;
  k10 = 0.7;
  K11 = 3;
  k12 = 2.8;
  k13 = 13.4;
  k14 = 153;
  K15 = 0.16;
  k16 = 7;
  K17 = 0.05;
  k18 = 79;
  K19 = 3.5;
  k20 = 0.81;
  K21 = 4.5;
  k_act = 5;
  KM = 0.62;
  k_inact = 0.4;
  p = 4;
  k_enz = 3;
  k_rem = 3;

  // Rate rules:
  G_alpha' = k1 + k2*G_alpha - k3*G_alpha*PLC/(G_alpha + K4) - k5*G_alpha*Ca_cyt/(G_alpha + K6);
  PLC' = k7*G_alpha - k8*PLC/(PLC + K9);
  Ca_cyt' = (Ca_ER - Ca_cyt)*k10*Ca_cyt*PLC^4/(PLC^4 + K11^4) + k12*PLC + k13*G_alpha - k14*Ca_cyt/(Ca_cyt + K15) - k16*Ca_cyt/(Ca_cyt + K17) - k18*Ca_cyt^8/(K19^8 + Ca_cyt^8) + (Ca_mit - Ca_cyt)*k20*Ca_cyt/(Ca_cyt + K21);
  Ca_ER' = -(Ca_ER - Ca_cyt)*k10*Ca_cyt*PLC^4/(PLC^4 + K11^4) + k16*Ca_cyt/(Ca_cyt + K17);
  Ca_mit' = k18*Ca_cyt^8/(K19^8 + Ca_cyt^8) - (Ca_mit - Ca_cyt)*k20*Ca_cyt/(Ca_cyt + K21);
  Enz' = k_act*Ca_cyt^p/(KM^p + Ca_cyt^p) - k_inact*Enz;
  Product' = k_enz*Enz - k_rem*Product;
end
