// SBML level 2 version 4

model Brannmark2010_InsulinSignalling_Mifamodel_Fig5D()
  // This model is from the article:
  // Mass and information feedbacks through receptor endocytosis govern insulin signaling as revealed using a parameter-free modeling framework.
  // Brannmark C, Palmer R, Glad ST, Cedersund G, Stralfors P. J Biol Chem.2010 Jun 25;285(26):20171-9. 20421297,
  // Abstract:
  // Insulin and other hormones control target cells through a network of signal-mediating molecules. Such networks are extremely complex due to multiple feedback loops in combination with redundancy, shared signal mediators, and cross-talk between signal pathways. We present a novel framework that integrates experimental work and mathematical modeling to quantitatively characterize the role and relation between co-existing submechanisms in complex signaling networks. The approach is independent of knowing or uniquely estimating model parameters because it only relies on (i) rejections and (ii) core predictions (uniquely identified properties in unidentifiable models). The power of our approach is demonstrated through numerous iterations between experiments, model-based data analyses, and theoretical predictions to characterize the relative role of co-existing feedbacks governing insulin signaling. We examined phosphorylation of the insulin receptor and insulin receptor substrate! -1 and endocytosis of the receptor in response to various different experimental perturbations in primary human adipocytes. The analysis revealed that receptor endocytosis is necessary for two identified feedback mechanisms involving mass and information transfer, respectively. Experimental findings indicate that interfering with the feedback may substantially increase overall signaling strength, suggesting novel therapeutic targets for insulin resistance and type 2 diabetes. Because the central observations are present in other signaling networks, our results may indicate a general mechanism in hormonal control.
  // This model originates from BioModels Database: A Database of Annotated Published Models (http://www.ebi.ac.uk/biomodels/). It is copyright (c) 2005-2011 The BioModels.net Team.
  // For more information see the terms of use.
  // To cite BioModels Database, please use: Li C, Donizelli M, Rodriguez N, Dharuri H, Endler L, Chelliah V, Li L, He E, Henry A, Stefan MI, Snoep JL, Hucka M, Le Novère N, Laibe C (2010) BioModels Database: An enhanced, curated and annotated resource for published quantitative kinetic models. BMC Syst Biol., 4:92.

  // Compartments:
  compartment compartemnt_1 = 1;

  // Species:
  species $IR in compartemnt_1 = 10/compartemnt_1;
  species $IRins in compartemnt_1 = 0;
  species $IRp in compartemnt_1 = 0;
  species $IRip in compartemnt_1 = 0;
  species $IRi in compartemnt_1 = 0;
  species $IRS in compartemnt_1 = 10;
  species $IRSip in compartemnt_1 = 0;
  species $X in compartemnt_1 = 10/compartemnt_1;
  species $Xp in compartemnt_1 = 0;
  species $V1a in compartemnt_1;
  species $V1b in compartemnt_1;
  species $V1c in compartemnt_1;
  species $V1d in compartemnt_1;
  species $V1e in compartemnt_1;
  species $V1g in compartemnt_1;
  species $V1r in compartemnt_1; V1r is "v1r";
  species $V2 in compartemnt_1;
  species $Vm2 in compartemnt_1;
  species $V3 in compartemnt_1;
  species $Vm3 in compartemnt_1;
  species $simXP in compartemnt_1; simXP is "simXp";
  species $intamount in compartemnt_1;
  species $measIRp in compartemnt_1;
  species $measdoublestep in compartemnt_1;
  species $measanna in compartemnt_1;
  species $measdosR in compartemnt_1;

  // Parameters:
  k1a = 0.3892882;
  k1abasic = 0.012452744;
  k1b = 0.02000225;
  k1e = 4.38334e-5;
  k1f = 20.0726;
  k1g = 286.6995;
  k1r = 3.632777;
  k21 = 1.67225;
  k22 = 0.036381619;
  km2 = 32.59424;
  k3 = 1.628659;
  km3 = 0.1131074;
  ky1 = 152.9632;
  ky2 = 8936.22;
  kyanna = 16760.12;
  kyDosR = 13740.43;
  ins = 0.65;
  k1c = 0.3635168;
  k1d = 1580.678;

  // Assignment rules:
  intamount := (IRi + IRip)/10;
  measIRp := ky1*(IRp + IRip);
  measdosR := kyDosR*IRSip;
  measanna := kyanna*IRSip;
  measdoublestep := ky2*IRSip;
  V1a := k1a*ins*IR + k1abasic*IR;
  V1b := k1b*IRins;
  V1c := k1c*IRins;
  V1d := k1d*IRp;
  V1e := IRip*((k1e + k1f*Xp)/(1 + Xp));
  V1g := k1g*IRp;
  V1r := k1r*IRi;
  V2 := k21*(IRp + k22*IRip)*IRS;
  Vm2 := km2*IRSip;
  V3 := k3*X*IRSip;
  Vm3 := km3*Xp;
  simXP := Xp;

  // Rate rules:
  IR' = -V1a + V1b + V1r + V1g;
  IRins' = V1a - V1b - V1c;
  IRp' = V1c - V1d - V1g;
  IRip' = V1d - V1e;
  IRi' = V1e - V1r;
  IRS' = -V2 + Vm2;
  IRSip' = V2 - Vm2;
  X' = -V3 + Vm3;
  Xp' = V3 - Vm3;

  // Events:
  initial_ins: at (time == 0): ins = 1.2;
  ins_addition: at (time >= 4): ins = 10;

  // Unit definitions:
  unit time = 60 second;
end
