// SBML level 2 version 3

model Hsp70Model()
  // Proctor2011_ProteinHomeostasis_ModerateStress
  // This model is from the article:
  // Modelling the Role of the Hsp70/Hsp90 System in the Maintenance of Protein Homeostasis
  // Proctor CJ, Lorimer IAJ PLoS ONE2011; 6(7): e22038. doi:10.1371/journal.pone.0022038,
  // Abstract:
  // Neurodegeneration is an age-related disorder which is characterised by the accumu lation of aggregated protein and neuronal cell death. There are many different ne urodegenerative diseases which are classified according to the specific proteins involved and the regions of the brain which are affected. Despite individual diff erences, there are common mechanisms at the sub-cellular level leading to loss of protein homeostasis. The two central systems in protein homeostasis are the chap erone system, which promotes correct protein folding, and the cellular proteolyti c system, which degrades misfolded or damaged proteins. Since these systems and t heir interactions are very complex, we use mathematical modelling to aid understa nding of the processes involved. The model developed in this study focuses on the role of Hsp70 (IPR00103) and Hsp90 (IPR001404) chaperones in preventing both pro tein aggregation and cell death. Simulations were performed under three different conditions: no stress; transient stress due to an increase in reactive oxygen sp ecies; and high stress due to sustained increases in reactive oxygen species. The model predicts that protein homeostasis can be maintained during short periods o f stress. However, under long periods of stress, the chaperone system becomes ove rwhelmed and the probability of cell death pathways being activated increases. Si mulations were also run in which cell death mediated by the JNK (P45983) and p38 (Q16539) pathways was inhibited. The model predicts that inhibiting either or bot h of these pathways may delay cell death but does not stop the aggregation proces s and that eventually cells die due to aggregated protein inhibiting proteasomal function. This problem can be overcome if the sequestration of aggregated protein into inclusion bodies is enhanced. This model predicts responses to reactive oxy gen species-mediated stress that are consistent with currently available experime ntal data. The model can be used to assess specific interventions to reduce cell death due to impaired protein homeostasis.
  // Simulations were performed under three different conditions: 1) normal condition (no stress), 2) moderate stress due to an increase in reactive oxygen species (ROS) i.e. ROS levels were increased by a factor of 4 at time=4hours for a period of 1 hour (not 2 hours as mentioned in the figure 5 legend of the reference publication. This is a typo in the paper and is clarified by the author) and 3) high stress due to sustained increase in reactive oxygen species (ROS) (here ROS increases with time).
  // This model is for moderately stressed cells (i.e. moderate stress condition). The model that corresponds to the normal condition is submitted as a main model in the BioModels Database.
  // Supplementary figures S3 (normal condition), S4 (moderate stress condition) and S6 (high stress condition) are reproduced here.

  // Compartments:
  compartment cytosol = 1;
  compartment nucleus = 1;

  // Species:
  substanceOnly species NatP in cytosol = 17600;
  substanceOnly species MisP in cytosol = 0;
  substanceOnly species Hsp70 in cytosol = 1400;
  substanceOnly species Hsp90 in cytosol = 1850;
  substanceOnly species Hsp70_dam in cytosol = 0;
  substanceOnly species Hsp90_dam in cytosol = 0;
  substanceOnly species Hsp90_Proteasome in cytosol = 0;
  substanceOnly species Hsp70_Proteasome in cytosol = 0;
  substanceOnly species Hsp70Client in cytosol = 490;
  substanceOnly species Hsp90Client in cytosol = 590;
  substanceOnly species Hsp70_Hsp70Client in cytosol = 10;
  substanceOnly species Hsp90_Hsp90Client in cytosol = 10;
  substanceOnly species Akt in cytosol = 340;
  substanceOnly species Akt_Hsp90 in cytosol = 30;
  substanceOnly species CHIP in cytosol = 255;
  substanceOnly species Akt_CHIP_Hsp90 in cytosol = 80;
  substanceOnly species Akt_Proteasome in cytosol = 0;
  substanceOnly species Hsf1 in cytosol = 5;
  substanceOnly species Hsf1_Hsp90 in cytosol = 95;
  substanceOnly species Hsp90_MisP in cytosol = 470;
  substanceOnly species Hsp70_MisP in cytosol = 410;
  substanceOnly species Hsf1_Hsf1_Hsf1 in nucleus = 0;
  substanceOnly species Hsf1_Hsf1_Hsf1_P in nucleus = 0;
  substanceOnly species Hsf1_Hsf1 in cytosol = 0;
  substanceOnly species HSEHsp70 in nucleus = 2;
  substanceOnly species HSEHsp90 in nucleus = 2;
  substanceOnly species HSEHsp70_Hsf1_Hsf1_Hsf1 in nucleus = 0;
  substanceOnly species HSEHsp70_Hsf1_Hsf1_Hsf1_P in nucleus = 0;
  substanceOnly species HSEHsp90_Hsf1_Hsf1_Hsf1 in nucleus = 0;
  substanceOnly species HSEHsp90_Hsf1_Hsf1_Hsf1_P in nucleus = 0;
  substanceOnly species Jnk in cytosol = 100;
  substanceOnly species Jnk_P in cytosol = 0;
  substanceOnly species Ppx in cytosol = 0;
  substanceOnly species Mkp1 in cytosol = 0;
  substanceOnly species Mkp1_P in cytosol = 100;
  substanceOnly species Mkp1_Proteasome in cytosol = 0;
  substanceOnly species Hsp70_Ppx in cytosol = 100;
  substanceOnly species Pkc in cytosol = 100;
  substanceOnly species p38 in cytosol = 100;
  substanceOnly species p38_P in cytosol = 0;
  substanceOnly species Proteasome in cytosol = 500;
  substanceOnly species MisP_Proteasome in cytosol = 0;
  substanceOnly species AggP in cytosol = 0;
  substanceOnly species SeqAggP in cytosol = 0;
  substanceOnly species AggP_Proteasome in cytosol = 0;
  species $ROS in cytosol;
  substanceOnly species $ATP in cytosol = 10000;
  substanceOnly species $ADP in cytosol = 1000;
  substanceOnly species $Source in cytosol = 1;
  substanceOnly species $Sink in cytosol = 1;
  substanceOnly species p38Death in cytosol = 0;
  substanceOnly species JNKDeath in cytosol = 0;
  substanceOnly species PIDeath in cytosol = 0;
  substanceOnly species CellDeath in cytosol = 0;

  // Parameters:
  ksynNatP = 0.042;
  kmisfold = 2e-6;
  kbinMisPProt = 1e-7;
  kdegMisP = 0.01;
  kagg = 1e-8;
  kseqagg = 7e-7;
  kbinAggPProt = 1e-5;
  kbinHspMisp = 8e-6;
  krelHspMisp = 8e-5;
  krefold = 0.00055;
  kbinHsf1Hsp90 = 0.02;
  krelHsf1Hsp90 = 0.5;
  kdimerHsf1 = 8e-5;
  ktrimerHsf1 = 0.01;
  kdetrimerHsf1 = 0.5;
  kdedimerHsf1 = 0.5;
  kbinHSEHsf1 = 0.05;
  krelHSEHsf1 = 0.08;
  kupregHsp = 0.2;
  kbasalsynHsp70 = 0.008;
  kbasalsynHsp90 = 0.008;
  kbinHsp70Prot = 1.2e-8;
  kbinHsp90Prot = 1e-8;
  kdegHsp70 = 0.01;
  kdegHsp90 = 0.01;
  kgenROS = 0.01;
  kremROS = 0.001;
  kbinHsp70client = 0.0002;
  krelHsp70client = 5;
  kbinHsp90client = 0.0002;
  krelHsp90client = 5;
  kphosJnk = 0.02;
  kdephosJnkMkp1 = 0.05;
  kbinHsp70Ppx = 0.2;
  krelHsp70Ppx = 5;
  kphosHsf1 = 0.03;
  kdephosHsf1 = 0.01;
  kbinHSEPhosTriH = 0.1;
  krelHSEPhosTriH = 0.08;
  kphosp38 = 0.02;
  kdephosp38Mkp1 = 0.05;
  kgenROSAggP = 1e-6;
  ksynAkt = 0.0015;
  kbinAktHsp90 = 0.00037;
  krelAktHsp90 = 7;
  kbinAktProt = 6e-8;
  krelAktProt = 1e-8;
  kdegAkt = 0.01;
  kbinCHIP = 2e-7;
  krelCHIP = 1e-8;
  ksynMkp1 = 1e-5;
  kbinMkp1Prot = 9.6e-9;
  kdegMkp1 = 0.01;
  kphosMkp1 = 0.02;
  kdephosMkp1 = 0.001;
  kgenROSp38 = 0.0001;
  kdamHsp = 1e-8;
  kp38death = 1.5e-7;
  kJnkdeath = 1.5e-7;
  kPIdeath = 2e-8;
  kp38act = 1;
  kalive = 1;

  // Assignment rules:
  tot_Hsp90 := Hsp90 + Hsp90_dam + Hsp90_Proteasome + Hsp90_Hsp90Client + Akt_Hsp90 + Akt_CHIP_Hsp90 + Hsf1_Hsp90 + Hsp90_MisP;
  tot_Hsp70 := Hsp70 + Hsp70_dam + Hsp70_Proteasome + Hsp70_Hsp70Client + Hsp70_MisP + Hsp70_Ppx;
  tot_MisP := MisP + Hsp70_MisP + Hsp90_MisP;
  ROS := piecewise(40, (time > 14400) && (time < 21600), 10);

  // Reactions:
  ProteinSynthesis: $Source => NatP; ksynNatP*Source*kalive;
  Misfolding: NatP + $ROS => MisP + $ROS; kmisfold*NatP*ROS*kalive;
  Hsp90MisPBinding: MisP + Hsp90 => Hsp90_MisP; kbinHspMisp*MisP*Hsp90*kalive;
  Hsp90unsuccessulRefolding: Hsp90_MisP => MisP + Hsp90; krelHspMisp*Hsp90_MisP*kalive;
  Hsp90refolding: Hsp90_MisP + $ATP => Hsp90 + NatP + $ADP; krefold*Hsp90_MisP*kalive*ATP/(5000 + ATP);
  Hsp70MisPBinding: MisP + Hsp70 => Hsp70_MisP; kbinHspMisp*MisP*Hsp70*kalive;
  Hsp70unsuccessulRefolding: Hsp70_MisP => MisP + Hsp70; krelHspMisp*Hsp70_MisP*kalive;
  Hsp70refolding: Hsp70_MisP + $ATP => Hsp70 + NatP + $ADP; krefold*Hsp70_MisP*kalive*ATP/(5000 + ATP);
  Hsp70ClientBinding: Hsp70 + Hsp70Client => Hsp70_Hsp70Client; kbinHsp70client*Hsp70*Hsp70Client*kalive;
  Hsp70ClientRelease: Hsp70_Hsp70Client => Hsp70 + Hsp70Client; krelHsp70client*Hsp70_Hsp70Client*kalive;
  Hsp90ClientBinding: Hsp90 + Hsp90Client => Hsp90_Hsp90Client; kbinHsp90client*Hsp90*Hsp90Client*kalive;
  Hsp90ClientRelease: Hsp90_Hsp90Client => Hsp90 + Hsp90Client; krelHsp90client*Hsp90_Hsp90Client*kalive;
  Hsp90HSF1Binding: Hsp90 + Hsf1 => Hsf1_Hsp90; kbinHsf1Hsp90*Hsp90*Hsf1*kalive;
  Hsp90HSF1Release: Hsf1_Hsp90 => Hsp90 + Hsf1; krelHsf1Hsp90*Hsf1_Hsp90*kalive;
  dimerisation: 2 Hsf1 => Hsf1_Hsf1; (Hsf1 - 1)*kdimerHsf1*kalive*Hsf1/2;
  trimerisation: Hsf1 + Hsf1_Hsf1 => Hsf1_Hsf1_Hsf1; ktrimerHsf1*Hsf1*Hsf1_Hsf1*kalive;
  deTrimerisation: Hsf1_Hsf1_Hsf1 => Hsf1 + Hsf1_Hsf1; kdetrimerHsf1*Hsf1_Hsf1_Hsf1*kalive;
  deDimerisation: Hsf1_Hsf1 => 2 Hsf1; kdedimerHsf1*Hsf1_Hsf1*kalive;
  HSE70TriHBinding: Hsf1_Hsf1_Hsf1 + HSEHsp70 => HSEHsp70_Hsf1_Hsf1_Hsf1; kbinHSEHsf1*HSEHsp70*Hsf1_Hsf1_Hsf1*kalive;
  HSE70TriHRelease: HSEHsp70_Hsf1_Hsf1_Hsf1 => HSEHsp70 + Hsf1_Hsf1_Hsf1; krelHSEHsf1*HSEHsp70_Hsf1_Hsf1_Hsf1*kalive;
  HSE90TriHBinding: Hsf1_Hsf1_Hsf1 + HSEHsp90 => HSEHsp90_Hsf1_Hsf1_Hsf1; kbinHSEHsf1*HSEHsp90*Hsf1_Hsf1_Hsf1*kalive;
  HSE90TriHRelease: HSEHsp90_Hsf1_Hsf1_Hsf1 => HSEHsp90 + Hsf1_Hsf1_Hsf1; krelHSEHsf1*HSEHsp90_Hsf1_Hsf1_Hsf1*kalive;
  Hsf1_Hsf1_Hsf1Phosphorylation: Hsf1_Hsf1_Hsf1 + Pkc => Hsf1_Hsf1_Hsf1_P + Pkc; kphosHsf1*Hsf1_Hsf1_Hsf1*Pkc*kalive;
  Hsf1_Hsf1_Hsf1DePhosphorylation: Hsf1_Hsf1_Hsf1_P + Hsp70_Ppx => Hsf1_Hsf1_Hsf1 + Hsp70_Ppx; kdephosHsf1*Hsf1_Hsf1_Hsf1_P*Hsp70_Ppx*kalive;
  HSE70PhosTriHBinding: Hsf1_Hsf1_Hsf1_P + HSEHsp70 => HSEHsp70_Hsf1_Hsf1_Hsf1_P; kbinHSEPhosTriH*HSEHsp70*Hsf1_Hsf1_Hsf1_P*kalive;
  HSE70PhosTriHRelease: HSEHsp70_Hsf1_Hsf1_Hsf1_P => Hsf1_Hsf1_Hsf1_P + HSEHsp70; krelHSEPhosTriH*HSEHsp70_Hsf1_Hsf1_Hsf1_P*kalive;
  HSE90PhosTriHBinding: Hsf1_Hsf1_Hsf1_P + HSEHsp90 => HSEHsp90_Hsf1_Hsf1_Hsf1_P; kbinHSEPhosTriH*HSEHsp90*Hsf1_Hsf1_Hsf1_P*kalive;
  HSE90PhosTriHRelease: HSEHsp90_Hsf1_Hsf1_Hsf1_P => Hsf1_Hsf1_Hsf1_P + HSEHsp90; krelHSEPhosTriH*HSEHsp90_Hsf1_Hsf1_Hsf1_P*kalive;
  Hsp90BasalSynthesis: $Source => Hsp90; kbasalsynHsp90*kalive;
  Hsp90Upregulation: HSEHsp90_Hsf1_Hsf1_Hsf1_P => HSEHsp90_Hsf1_Hsf1_Hsf1_P + Hsp90; kupregHsp*HSEHsp90_Hsf1_Hsf1_Hsf1_P*kalive;
  Hsp90ProteasomeBinding: Hsp90 + Proteasome => Hsp90_Proteasome; kbinHsp90Prot*Hsp90*Proteasome*kalive;
  Hsp90Degradation: Hsp90_Proteasome + $ATP => Proteasome + $ADP; kdegHsp90*Hsp90_Proteasome*kalive*ATP/(5000 + ATP);
  Hsp70BasalSynthesis: $Source => Hsp70; kbasalsynHsp70*kalive;
  Hsp70Upregulation: HSEHsp70_Hsf1_Hsf1_Hsf1_P => HSEHsp70_Hsf1_Hsf1_Hsf1_P + Hsp70; kupregHsp*HSEHsp70_Hsf1_Hsf1_Hsf1_P*kalive;
  Hsp70ProteasomeBinding: Hsp70 + Proteasome => Hsp70_Proteasome; kbinHsp70Prot*Hsp70*Proteasome*kalive;
  Hsp70Degradation: Hsp70_Proteasome + $ATP => Proteasome + $ADP; kdegHsp70*Hsp70_Proteasome*kalive*ATP/(5000 + ATP);
  MisPProteasomeBinding1: Hsp70_MisP + Proteasome => MisP_Proteasome + Hsp70; kbinMisPProt*Hsp70_MisP*Proteasome*kalive;
  MisPProteasomeBinding2: Hsp90_MisP + Proteasome => MisP_Proteasome + Hsp90; kbinMisPProt*Hsp90_MisP*Proteasome*kalive;
  MisPDegradation: MisP_Proteasome + $ATP => Proteasome + $ADP; kdegMisP*MisP_Proteasome*kalive*ATP/(5000 + ATP);
  radicalFormation: $Source => $ROS; kgenROS*Source*kalive;
  radicalScavenging: $ROS => $Sink; kremROS*ROS*kalive;
  Hsp70_PpxBinding: Hsp70 + Ppx => Hsp70_Ppx; kbinHsp70Ppx*Hsp70*Ppx*kalive;
  Hsp70_PPXRelease: Hsp70_Ppx => Hsp70 + Ppx; krelHsp70Ppx*Hsp70_Ppx*kalive;
  JnkPhosphorylation: $ROS + Jnk => $ROS + Jnk_P; kphosJnk*Jnk*ROS*kalive;
  JNKDephosphorylatioByMkp1: Jnk_P + Mkp1_P => Jnk + Mkp1_P; kdephosJnkMkp1*Jnk_P*Mkp1_P*kalive;
  p38Phosphorylation: $ROS + p38 => $ROS + p38_P; kphosp38*ROS*p38*kalive;
  p38DePhosphorylationByMkp1: p38_P + Mkp1_P => p38 + Mkp1_P; kdephosp38Mkp1*p38_P*Mkp1_P*kalive;
  Aggregation1: 2 MisP => AggP; kagg*MisP*(MisP - 1)*0.5*kalive;
  SequesteringOfAggregate: MisP + AggP => SeqAggP; kagg*MisP*AggP*kalive;
  InclusionGrowth: SeqAggP + MisP => 2 SeqAggP; kseqagg*SeqAggP*MisP*kalive;
  ProteasomeInhibtion: AggP + Proteasome => AggP_Proteasome; kbinAggPProt*AggP*Proteasome*kalive;
  ROSgenerationSmallAggP: AggP => AggP + $ROS; kgenROSAggP*AggP*kalive;
  ROSgenerationAggPProteasome: AggP_Proteasome => AggP_Proteasome + $ROS; kgenROSAggP*AggP_Proteasome*kalive;
  AktSynthesis: $Source => Akt; ksynAkt*Source*kalive;
  Hsp90AktBinding: Hsp90 + Akt => Akt_Hsp90; kbinAktHsp90*Hsp90*Akt*kalive;
  Hsp90AktRelease: Akt_Hsp90 => Akt + Hsp90; krelAktHsp90*Akt_Hsp90*kalive;
  CHIPbinding: CHIP + Akt_Hsp90 => Akt_CHIP_Hsp90; kbinCHIP*CHIP*Akt_Hsp90*kalive;
  CHIPrelease: Akt_CHIP_Hsp90 => CHIP + Akt_Hsp90; krelCHIP*Akt_CHIP_Hsp90*kalive;
  AktProteasomeBinding: Akt_CHIP_Hsp90 + Proteasome => Akt_Proteasome + CHIP + Hsp90; kbinAktProt*Akt_CHIP_Hsp90*Proteasome*kalive;
  AktProteasomeRelease: Akt_Proteasome => Akt + Proteasome; krelAktProt*Akt_Proteasome*kalive;
  AktDegradation: Akt_Proteasome + $ATP => Proteasome + $ADP; kdegAkt*Akt_Proteasome*kalive*ATP/(5000 + ATP);
  Mkp1Synthesis: $Source => Mkp1; ksynMkp1*Source*kalive;
  Mkp1ProteasomeBinding: Mkp1 + Proteasome => Mkp1_Proteasome; kbinMkp1Prot*Mkp1*Proteasome*kalive;
  Mkp1Degradation: Mkp1_Proteasome + $ATP => Proteasome + $ADP; kdegMkp1*Mkp1_Proteasome*kalive*ATP/(5000 + ATP);
  Mkp1Phosphorylation: Mkp1 + Hsp70 => Mkp1_P + Hsp70; kphosMkp1*Mkp1*Hsp70*kalive;
  Mkp1Dephosphorylation: Mkp1_P + $ROS => Mkp1 + $ROS; kdephosMkp1*Mkp1_P*ROS*kalive;
  p38ROSproduction: p38_P => p38_P + $ROS; kgenROSp38*p38_P*kalive*kp38act;
  Hsp70Damage: Hsp70 + $ROS => Hsp70_dam + $ROS; kdamHsp*Hsp70*ROS*kalive;
  Hsp90Damage: Hsp90 + $ROS => Hsp90_dam + $ROS; kdamHsp*Hsp90*ROS*kalive;
  Hsp70DamProteasomeBinding: Hsp70_dam + Proteasome => Hsp70_Proteasome; kbinHsp70Prot*Hsp70_dam*Proteasome*kalive;
  Hsp90DamProteasomeBinding: Hsp90_dam + Proteasome => Hsp90_Proteasome; kbinHsp90Prot*Hsp90_dam*Proteasome*kalive;
  Hsp70DamAggregation1: 2 Hsp70_dam => AggP; kagg*Hsp70_dam*(Hsp70_dam - 1)*0.5*kalive;
  Hsp70DamInclusionFormation: Hsp70_dam + AggP => SeqAggP; kagg*Hsp70_dam*AggP*kalive;
  Hsp90DamAggregation: 2 Hsp90_dam => AggP; kagg*Hsp90_dam*(Hsp90_dam - 1)*0.5*kalive;
  Hsp90DamInclusionFormation: Hsp90_dam + AggP => SeqAggP; kagg*Hsp90_dam*AggP*kalive;
  Hsp70DamSequestering: Hsp70_dam + SeqAggP => 2 SeqAggP; kseqagg*Hsp70_dam*SeqAggP*kalive;
  Hsp90DamSequestering: Hsp90_dam + SeqAggP => 2 SeqAggP; kseqagg*Hsp90_dam*SeqAggP*kalive;
  p38CellDeath: p38_P => p38_P + p38Death + CellDeath; kp38death*p38_P*kalive*kp38act;
  JnkCellDeath: Jnk_P => Jnk_P + JNKDeath + CellDeath; kJnkdeath*Jnk_P*kalive;
  PICellDeath: AggP_Proteasome => AggP_Proteasome + PIDeath + CellDeath; kPIdeath*AggP_Proteasome*kalive;

  // Events:
  DeathOfCell: at (CellDeath >= 1): kalive = 0;

  // Unit definitions:
  unit substance = item;
end
