// SBML level 2 version 4

model model01()
  // auxin_signaling

  // Compartments:
  compartment c_1 = 1;

  // Species:
  species I in c_1 = 10; I is "Aux/IAA";
  species A in c_1 = 10; A is "ARF";
  species D_II in c_1 = 10; D_II is "Aux/IAA:Aux/IAA";
  species D_IA in c_1 = 10; D_IA is "Aux/IAA:ARF";
  species R in c_1 = 1; R is "mRNA";
  species aux in c_1 = 0.11; aux is "auxin";

  // Parameters:
  pi_I = 1;
  // Auxin target gene mRNA degradation rate. Computed from the mean half life of Aux/IAA mRNA in Narsai et al. The Plant Cell 2007.
  d_r = 0.007;
  // ARF degradation rate, based on the value for ARF1, cf. Salmon et al. The Plant Journal (2008)
  d_A = 0.003;
  d_II = 0.003;
  d_IA = 0.003;
  k_II = 1;
  k_IA = 1;
  B_d = 100;
  f_A = 10;
  gamma_I = 10;
  K_aux = 1;
  K_II = 10;
  K_IA = 10;
  f_c = 10;
  w_A = 10;
  w_I = 10;
  w_D = 10;
  // Aux/IAA basal degradation rate (without auxin), based on half-lifes measured in Dreher et al. The Plant Cell 2006.
  d_I = 0.05;
  pi_A = 1;
  k_Am = 10;
  kprime_IA = 10;
  kprime_II = 10;
  aux_basal = 0.11;

  // Reactions:
  reac_DIA: A + I -> D_IA; k_IA*I*A - kprime_IA*D_IA;
  reac_DII: I + I -> D_II; k_II*I*I - kprime_II*D_II;
  reac_degrI: I => ; gamma_I*d_I*K_aux*aux/(K_aux*aux + 1)*I;  // modifiers: aux
  reac_degrA: A => ; d_A*A;
  reac_degrDIA: D_IA => ; d_IA*D_IA;
  reac_degrDII: D_II => ; d_II*D_II;
  reac_DIAxA: D_IA => A; gamma_I*d_I*K_aux*aux/(K_aux*aux + 1)*D_IA;  // modifiers: aux
  reac_DIIxI: D_II => I; gamma_I*d_I*K_aux*aux/(K_aux*aux + 1)*D_II;  // modifiers: aux
  reac_degrR: R => ; d_r*R;
  reac_prodI: => I; pi_I*R;  // modifiers: R
  reac_prodA: => A; pi_A;
  reac_prodR: => R; (1 + f_c/B_d*A*(1 + w_A*f_A*A/B_d))/(1 + A/B_d*(1 + w_A*A/B_d) + w_I*A*I/(K_IA*B_d) + w_D*D_IA/B_d + k_Am);  // modifiers: A, D_IA, I

  // Constraints:
  constraint kprime_IA == K_IA*k_IA;
  constraint kprime_II == K_II*k_II;
  constraint aux_basal == 1/(K_aux*(gamma_I - 1));
end
