// SBML level 2 version 4

model Abell2011_CalciumSignaling_WithoutAdaptation()
  // This model is from the article:
  // Parallel adaptive feedback enhances reliability of the Ca2+ signaling system.
  // Abell E, Ahrends R, Bandara S, Park BO, Teruel MN. Proc Natl Acad Sci U S A. 2011 Aug 15. 21844332 ,
  // Abstract:
  // Despite large cell-to-cell variations in the concentrations of individual signaling proteins, cells transmit signals correctly. This phenomenon raises the question of what signaling systems do to prevent a predicted high failure rate. Here we combine quantitative modeling, RNA interference, and targeted selective reaction monitoring (SRM) mass spectrometry, and we show for the ubiquitous and fundamental calcium signaling system that cells monitor cytosolic and endoplasmic reticulum (ER) Ca(2+) levels and adjust in parallel the concentrations of the store-operated Ca(2+) influx mediator stromal interaction molecule (STIM), the plasma membrane Ca(2+) pump plasma membrane Ca-ATPase (PMCA), and the ER Ca(2+) pump sarco/ER Ca(2+)-ATPase (SERCA). Model calculations show that this combined parallel regulation in protein expression levels effectively stabilizes basal cytosolic and ER Ca(2+) levels and preserves receptor signaling. Our results demonstrate that, rather than directly controlling the relative level of signaling proteins in a forward regulation strategy, cells prevent transmission failure by sensing the state of the signaling pathway and using multiple parallel adaptive feedbacks.
  // There are two models described in the paper to simulate basal and receptor stimulated Ca 2+ signaling. 1) No adaptive feedback (this model: MODEL1108050000) and 2) with three slow adaptive feedback loops (MODEL1108050001).
  // biomodels.db:BIOMD0000000354
  // biomodels.db:MODEL1108050000
  // isDescribedBy pubmed:21844332
  // occursIn taxonomy:7215
  // isVersionOf GO:0019722

  // Compartments:
  compartment cytosol = 1;  // isVersionOf GO:0005829
  compartment outside = 1; outside is "Outside";  // isVersionOf GO:0005576
  compartment ER_store in cytosol = 1;  // isVersionOf GO:0005783
  compartment mitochondria in cytosol = 1;  // isVersionOf GO:0005739

  // Species:
  species CaI in cytosol = 0.05/cytosol;  // isVersionOf CHEBI:29108 kegg.compound:C00076
  species IP3 in cytosol = 0;  // isVersionOf CHEBI:16595 kegg.compound:C01255
  species g in cytosol = 0.002/cytosol;  // isVersionOf GO:0019855
  species CaO in outside = 1000/outside;  // isVersionOf CHEBI:29108 kegg.compound:C00076
  species CaS in ER_store = 2/ER_store;  // isVersionOf CHEBI:29108 kegg.compound:C00076
  species CaM in mitochondria = 0;  // isVersionOf CHEBI:29108 kegg.compound:C00076

  // Parameters:
  A = 3; A is "IP3R";
  B = 0.266; B is "SERCA";
  D = 2; D is "IP3degradation";
  E = 5; E is "IP3Rinhibition";
  F = 0.018; F is "IP3Rrecovery";
  k2 = 0.175; k2 is "kSERCA";
  L = 0.01; L is "ERleak";
  R = 1;
  kIP3R = 0.175;
  PMleak = 0.0346;
  kSTIM = 1;
  STIM = 0.02;
  kIP3Rca = 0.13;
  kPMCA = 0.2;
  PMCA = 0.013;
  kG = 1;
  DirTransf = 0.03;
  MitNaCaEx = 0.005;
  UniPort = 0.03;
  kUniP = 0.6;

  // Reactions:
  kPLC: => IP3; R*CaI; kPLC is "PLC: Receptor and Ca2+ regulated IP3 production";  // modifiers: CaI; isVersionOf GO:0032959
  JPump: CaI => CaS; B*CaI^2/(CaI^2 + k2^2); JPump is "SERCA: Pumps Ca2+ into ER Ca2+ stores";  // isVersionOf GO:0060401
  JChannel: CaS => CaI; (1 - DirTransf)*(L + (1 - g)*A*IP3^2/(IP3^2 + kIP3R^2)*CaI^2/(CaI^2 + kIP3Rca^2))*CaS; JChannel is "IP3R: IP3 and Ca2+ regulated Ca2+ channel, plus leak";  // modifiers: g, IP3; isVersionOf GO:0051209
  kPhosphatase: IP3 => ; D*IP3; kPhosphatase is "IP3 phosphatase: Degradation of IP3";  // isVersionOf GO:0032961
  inhibition_parameter1: => g; E*CaI^4/(CaI^4 + kG^4)*(1 - g); inhibition_parameter1 is "Inhibition of IP3R (mechanism not well understood)";  // modifiers: CaI; isVersionOf GO:0031586
  inhibition_parameter2: g => ; F*g; inhibition_parameter2 is "Recovery of IP3R from Ca2+ iinhibition when Ca2+ drops";  // isVersionOf GO:0031587
  Regulation_of_Orai_by_STIM_plus_leak: => CaI; STIM*(PMleak + kSTIM^8/(CaS^8 + kSTIM^8)); Regulation_of_Orai_by_STIM_plus_leak is "Regulation of Orai by STIM, plus leak";  // modifiers: CaS; isVersionOf GO:0032234
  PMCA_Pumps_Ca2_across_PM_out_of_cell: CaI => ; PMCA*CaI^2/(CaI^2 + kPMCA^2); PMCA_Pumps_Ca2_across_PM_out_of_cell is "PMCA: Pumps Ca2+ across PM out of cell";  // isVersionOf GO:0006816
  UniporterFromCytosol: CaI => CaM; UniPort*CaI^4/(CaI^4 + kUniP^4);  // isVersionOf GO:0006851
  MitoToCytosol: CaM => CaI; MitNaCaEx*CaM/(CaM + 0.01);  // isVersionOf GO:0006851
  ERtoMito: CaS => CaM; DirTransf*(L + (1 - g)*A*IP3^2/(IP3^2 + kIP3R^2)*CaI^2/(CaI^2 + kIP3Rca^2))*CaS;  // modifiers: CaI, g, IP3; isVersionOf GO:0006889 GO:0006851
end
