// SBML level 2 version 4

function HenriMichaelisMenten_irreversible_kcat(kcat, enzyme, substrate, Km)
  kcat*enzyme*substrate/(Km + substrate);
end
HenriMichaelisMenten_irreversible_kcat is "Henri-Michaelis-Menten (irreversible) kcat";

model Model_1()
  // Orfao2008_ThrombinGeneration_AmidolyticActivity
  // biomodels.db:MODEL1108260000
  // biomodels.db:BIOMD0000000366
  // isDescribedBy doi:10.1016%2Fj.jmaa.2008.05.060
  // isDerivedFrom biomodels.db:BIOMD0000000358
  // isVersionOf GO:0007596
  // hasTaxon taxonomy:2759

  // Compartments:
  compartment compartment_1 = 1;

  // Species:
  species X in compartment_1 = 0.1999999;  // uniprot:P00742
  species Xa in compartment_1 = 0;  // uniprot:P00742
  species Xa_ATIII in compartment_1 = 0;  // hasPart uniprot:P00742 uniprot:P01008
  species PL in compartment_1 = 0.04999999;
  species PT in compartment_1 = 0;
  species Va in compartment_1 = 0;  // uniprot:P12259
  species IIa in compartment_1 = 0;  // uniprot:P00734
  species V in compartment_1 = 0.02999999;  // uniprot:P12259
  species II in compartment_1 = 1.4;  // uniprot:P00734
  species IIa_alpha2M in compartment_1 = 0;  // hasPart uniprot:P00734 uniprot:P01023
  species IIa_ATIII in compartment_1 = 0;  // hasPart uniprot:P00734 uniprot:P01008
  species RVV in compartment_1 = 0.03;

  // Parameters:
  kcat_X = 239.1;
  km_X = 23.65;
  ki_Xa = 4.531;
  k_PT = 122.9;
  k_PL = 801.4;
  kcat_V = 7.844;
  km_V = 149.7;
  kcat_II = 43.87;
  km_II = 62.25;
  kcat_2 = 12.4;
  km_2 = 0.06148;
  ki_IIaAlpha2M = 0.1762;
  ki_IIaATIII = 0.7859;

  // Assignment rules:
  AmAct := IIa + 0.556*IIa_alpha2M;

  // Reactions:
  R1: X => Xa; compartment_1*HenriMichaelisMenten_irreversible_kcat(kcat_X, RVV, X, km_X);  // modifiers: RVV
  R2: Xa => Xa_ATIII; compartment_1*ki_Xa*Xa;
  R3: Va + Xa + PL -> PT; compartment_1*(k_PT*Va*Xa*PL - k_PL*PT);
  R4: V => Va; compartment_1*HenriMichaelisMenten_irreversible_kcat(kcat_V, IIa, V, km_V);  // modifiers: IIa
  R5: II => IIa; compartment_1*HenriMichaelisMenten_irreversible_kcat(kcat_II, PT, II, km_II);  // modifiers: PT
  R6: II => IIa; compartment_1*HenriMichaelisMenten_irreversible_kcat(kcat_2, Xa, II, km_2);  // modifiers: Xa
  R7: IIa => IIa_alpha2M; compartment_1*ki_IIaAlpha2M*IIa;
  R8: IIa => IIa_ATIII; compartment_1*ki_IIaATIII*IIa;

  // Unit definitions:
  unit time = 60 second;
  unit substance = 1e-6 mole;
end
