// SBML level 2 version 4

model DeVries2000_PancreaticBetaCells_InsulinSecretion()
  // This a model from the article:
  // Channel sharing in pancreatic beta -cells revisited: enhancement of emergent bursting by noise.
  // De Vries G, Sherman A. J Theor Biol2000 Dec 21;207(4):513-30 11093836,
  // Abstract:
  // Secretion of insulin by electrically coupled populations of pancreatic beta -cells is governed by bursting electrical activity. Isolated beta -cells, however, exhibit atypical bursting or continuous spike activity. We study bursting as an emergent property of the population, focussing on interactions among the subclass of spiking cells. These are modelled by equipping the fast subsystem with a saddle-node-loop bifurcation, which makes it monostable. Such cells can only spike tonically or remain silent when isolated, but can be induced to burst with weak diffusive coupling. With stronger coupling, the cells revert to tonic spiking. We demonstrate that the addition of noise dramatically increases, via a phenomenon like stochastic resonance, the coupling range over which bursting is seen. Copyright 2000 Academic Press.
  // This model was taken from the CellML repository and automatically converted to SBML.
  // The original model was: De Vries G, Sherman A. (2000) - version01
  // This model originates from BioModels Database: A Database of Annotated Published Models (http://www.ebi.ac.uk/biomodels/). It is copyright (c) 2005-2011 The BioModels.net Team.
  // For more information see the terms of use.
  // To cite BioModels Database, please use: Li C, Donizelli M, Rodriguez N, Dharuri H, Endler L, Chelliah V, Li L, He E, Henry A, Stefan MI, Snoep JL, Hucka M, Le Novère N, Laibe C (2010) BioModels Database: An enhanced, curated and annotated resource for published quantitative kinetic models. BMC Syst Biol., 4:92.
  // biomodels.db:MODEL0911270002
  // biomodels.db:BIOMD0000000371
  // isDescribedBy pubmed:11093836
  // isDerivedFrom pubmed:2850029
  // isVersionOf GO:0061469 GO:0044342 GO:0030073
  // hasTaxon taxonomy:9606

  // Compartments:
  compartment Compartment = 1;

  // Species:
  species V_membrane in Compartment = -65/Compartment;  // PATO:0001462
  species n in Compartment = 0.05/Compartment;  // isVersionOf GO:0005251
  species s in Compartment = 0.025/Compartment;  // PATO:0001227

  // Parameters:
  tau_membrane = 20;
  g_Ca = 3.6;
  V_Ca = 25;
  V_m = -20;
  theta_m = 12;
  V_K = -75;
  g_K = 10;
  V_n = -17;
  theta_n = 5.6;
  lamda = 0.8;
  tau_potassium_current_n_gate = 20; tau_potassium_current_n_gate is "tau_2";
  g_s = 4;
  V_s = -22;
  theta_s = 8;
  tau_s = 20000;
  g_K_ATP = 1.2;
  p = 0.5;

  // Assignment rules:
  m_infinity := 1/(1 + exp((V_m - V_membrane)/theta_m));
  i_Ca := g_Ca*m_infinity*(V_membrane - V_Ca);
  i_K := g_K*n*(V_membrane - V_K);
  n_infinity := 1/(1 + exp((V_n - V_membrane)/theta_n));
  i_s := g_s*s*(V_membrane - V_K);
  s_infinity := 1/(1 + exp((V_s - V_membrane)/theta_s));
  i_K_ATP := g_K_ATP*p*(V_membrane - V_K);

  // Rate rules:
  V_membrane' = -(i_Ca + i_K + i_K_ATP + i_s)/tau_membrane;
  n' = lamda*(n_infinity - n)/tau_potassium_current_n_gate;
  s' = (s_infinity - s)/tau_s;
end
