// SBML level 2 version 4

model Maree2006_DuCa_Type1DiabetesModel()
  // This a model from the article:
  // Modelling the onset of Type 1 diabetes: can impaired macrophage phagocytosis make the difference between health and disease?
  // Maree AF, Kublik R, Finegood DT, Edelstein-Keshet L. Philos Transact A Math Phys Eng Sci.2006 May 15;364(1842):1267-82. 16608707,
  // Abstract:
  // A wave of apoptosis (programmed cell death) occurs normally in pancreatic beta-cells of newborn mice. We previously showed that macrophages from non-obese diabetic (NOD) mice become activated more slowly and engulf apoptotic cells at a lower rate than macrophages from control (Balb/c) mice. It has been hypothesized that this low clearance could result in secondary necrosis, escalating inflammation and self-antigen presentation that later triggers autoimmune, Type 1 diabetes (T1D). We here investigate whether this hypothesis could offer a reasonable and parsimonious explanation for onset of T1D in NOD mice. We quantify variants of the Copenhagen model (Freiesleben De Blasio et al. 1999 Diabetes 48, 1677), based on parameters from NOD and Balb/c experimental data. We show that the original Copenhagen model fails to explain observed phenomena within a reasonable range of parameter values, predicting an unrealistic all-or-none disease occurrence for both strains. However, if we take into account that, in general, activated macrophages produce harmful cytokines only when engulfing necrotic (but not apoptotic) cells, then the revised model becomes qualitatively and quantitatively reasonable. Further, we show that known differences between NOD and Balb/c mouse macrophage kinetics are large enough to account for the fact that an apoptotic wave can trigger escalating inflammatory response in NOD, but not Balb/c mice. In Balb/c mice, macrophages clear the apoptotic wave so efficiently, that chronic inflammation is prevented.
  // This model originates from BioModels Database: A Database of Annotated Published Models (http://www.ebi.ac.uk/biomodels/). It is copyright (c) 2005-2011 The BioModels.net Team.
  // For more information see the terms of use.
  // To cite BioModels Database, please use: Li C, Donizelli M, Rodriguez N, Dharuri H, Endler L, Chelliah V, Li L, He E, Henry A, Stefan MI, Snoep JL, Hucka M, Le Novère N, Laibe C (2010) BioModels Database: An enhanced, curated and annotated resource for published quantitative kinetic models. BMC Syst Biol., 4:92.
  // biomodels.db:MODEL1110070000
  // biomodels.db:BIOMD0000000381
  // isDescribedBy pubmed:16608707
  // isDerivedFrom pubmed:10480594
  // hasTaxon taxonomy:10090
  // isVersionOf GO:0071888 GO:0006909 GO:0042116

  // Compartments:
  compartment compartment1 = 1;

  // Species:
  species $M in compartment1 = 477000;  // isVersionOf BTO:0000801
  species $Ma in compartment1 = 0;  // isVersionOf BTO:0000801
  species $Bn in compartment1 = 0;  // isVersionOf BTO:0000783
  species $Ba in compartment1 = 0;  // isVersionOf BTO:0000783
  species $Cy in compartment1 = 0;

  // Parameters:
  J = 50000;
  c = 0.1;
  b = 0.09;
  d = 0.5;
  k = 0.4;
  e1 = 1e-8;
  e2 = 1e-8;
  Amax = 20000000;
  kc = 1;
  alpha = 5e-9;
  delta = 25;
  g = 1e-5;
  f1 = 1e-5;
  f2 = 1e-5;
  Wmax = 40000000;
  var x;

  // Assignment rules:
  x := ((time - 9)/3)^2;
  W := Wmax*exp(-x);

  // Rate rules:
  M' = J + (k + b)*Ma - c*M - f1*M*Ba - e1*M*(M + Ma);
  Ma' = f1*M*Ba - k*Ma - e2*Ma*(M + Ma);
  Bn' = d*Ba - (f1*M + f2*Ma)*Bn;
  Ba' = W + Amax*Cy/(kc + Cy) - (f1*M + f2*Ma + d)*Ba;
  Cy' = alpha*Bn*Ma - delta*Cy;
end
