// SBML level 2 version 4

model Nyman2012_InsulinSignalling()
  // This model is from the article:
  // Mechanistic explanations for counter-intuitive phosphorylation dynamics of the insulin receptor and insulin receptor substrate-1 in response to insulin in murine adipocytes.
  // Nyman E, Fagerholm S, Jullesson D, Strålfors P, Cedersund G. FEBS J. 2012 Jan 16. 22248283 ,
  // Abstract:
  // Insulin signaling through insulin receptor (IR) and insulin receptor substrate-1 (IRS1) is important for insulin control of target cells. We have previously demonstrated a rapid and simultaneous overshoot behavior in the phosphorylation dynamics of IR and IRS1 in human adipocytes. Herein, we demonstrate that in murine adipocytes a similar overshoot behavior is not simultaneous for IR and IRS1. The peak of IRS1 phosphorylation, which is a direct consequence of the phosphorylation and the activation of IR, occurs earlier than the peak of IR phosphorylation. We used a conclusive modeling framework to unravel the mechanisms behind this counter-intuitive order of phosphorylation. Through a number of rejections, we demonstrate that two fundamentally different mechanisms may create the reversed order of peaks: (i) two pools of phosphorylated IR, where a large pool of internalized IR peaks late, but phosphorylation of IRS1 is governed by a small plasma membrane-localized pool of IR with an early peak, or (ii) inhibition of the IR-catalyzed phosphorylation of IRS1 by negative feedback. Although (i) may explain the reversed order, this two-pool hypothesis alone requires extensive internalization of IR, which is not supported by experimental data. However, with the additional assumption of limiting concentrations of IRS1, (i) can explain all data. Also, (ii) can explain all available data. Our findings illustrate how modeling can potentiate reasoning, to help draw nontrivial conclusions regarding competing mechanisms in signaling networks. Our work also reveals new differences between human and murine insulin signaling. Database The mathematical model described here has been submitted to the Online Cellular Systems Modelling Database and can be accessed at http://jjj.biochem.sun.ac.za/database/nyman/index.html free of charge.
  // biomodels.db:MODEL1207270000
  // biomodels.db:BIOMD0000000423
  // isDescribedBy pubmed:22248283
  // isDerivedFrom biomodels.db:BIOMD0000000343
  // isVersionOf GO:0008286
  // hasTaxon taxonomy:39107 BTO:0000443

  // Compartments:
  compartment default = 1;  // isVersionOf GO:0005623

  // Species:
  species IR in default = 8.940676;  // hasPart uniprot:P15208
  species IRins in default = 0.59689;  // hasPart uniprot:P15208 uniprot:P01325
  species IRp in default = 0.03835259;  // isVersionOf uniprot:P15208 kegg.compound:C00562
  species IRiP in default = 0.4240766;  // isVersionOf uniprot:P15208 kegg.compound:C00562
  species IRi in default = 4.838639e-6;  // isVersionOf uniprot:P15208
  species IRS in default = 9.439982;  // isVersionOf uniprot:P35569
  species IRSiP in default = 0.5600181;  // isVersionOf uniprot:P35569 kegg.compound:C00562
  species X in default = 9.996359;  // isVersionOf FMA:74531
  species Xp in default = 0.003641136;  // isVersionOf kegg.compound:C00562 FMA:74531

  // Parameters:
  k1a = 0.153418;
  k1aBasic = 0.0383389;
  k1b = 3.4699e-6;
  k1c = 0.574266;
  k1d = 4.78844;
  k1e = 5.25027e-5;
  k1f = 119.353;
  k1g = 4.14899;
  k1r = 3.79547e4;
  k21 = 538004;
  k22 = 1.7252e-6;
  km2 = 262759;
  km23 = 88.9096;
  k3 = 8.62917e-5;
  km3 = 0.132671;
  ins = 100;

  // Assignment rules:
  measIRS1 := IRSiP;
  measIRp := IRp + IRiP;
  IRmem := IRp + IRins + IR;

  // Reactions:
  v1a: IR => IRins; k1a*ins*IR + k1aBasic*IR;
  v1b: IRins => IR; k1b*IRins;
  v1c: IRins => IRp; k1c*IRins;
  v1d: IRp => IRiP; k1d*IRp;
  v1e: IRiP => IRi; IRiP*(k1e + k1f*Xp/(1 + Xp));  // modifiers: Xp
  v1g: IRp => IR; k1g*IRp;
  v1r: IRi => IR; k1r*IRi;
  v2: IRS => IRSiP; k21*IRS*(IRp + k22*IRiP)/(1 + km23*Xp);  // modifiers: IRiP, IRp, Xp
  vm2: IRSiP => IRS; km2*IRSiP;
  v3: X => Xp; k3*X*IRSiP;  // modifiers: IRSiP
  vm3: Xp => X; km3*Xp;
end
