// SBML level 2 version 4

function function_1(ICSmax, IC, ICt, IS)
  ICSmax/(1 + (IC/ICt)^IS);
end
function_1 is "Rate Law for Intestinal Cholesterol Synthesis";

function Rate_Law_for_Bile_Salt_Synthesis(k5, HFC, HBS)
  k5*HFC/HBS;
end

function function_3(k6, IC, IBS)
  k6*IC*IBS;
end
function_3 is "Rate Law for Cholesterol Absorption";

function function_4(k7, IC, IBS)
  k7*IC*IBS;
end
function_4 is "Rate Law for Cholesterol Excretion";

function function_5(k8, PFC)
  k8*PFC;
end
function_5 is "Rate Law for Intestinal Nascent HDL Synthesis";

function function_6(BCRmax, BCRt, HFC, BS)
  BCRmax/(1 + (BCRt/HFC)^BS);
end
function_6 is "Rate Law for Billary Cholesterol Release";

function function_7(HCSmax, HFC, HCSt, HS)
  HCSmax/(1 + (HFC/HCSt)^HS);
end
function_7 is "Rate Law for Hepatic Cholesterol Synthesis";

function function_8(k9, ACAT, HFC)
  k9*ACAT*HFC;
end
function_8 is "Rate Law for Hepatic Cholesterol Storage_1";

function function_9(k10, CEH, HCE)
  k10*CEH*HCE;
end
function_9 is "Rate Law for Release of Stored Cholesterol";

function function_10(k11, PFC)
  k11*PFC;
end
function_10 is "Rate Law for Hepatic Nascent HDL Synthesis";

function function_11(khrs, HLDLRsS, HFC)
  khrs*HLDLRsS/HFC;
end
function_11 is "Rate Law for Hepatic LDLR Synthesis";

function function_12(k15, VLDLC, LPL)
  k15*VLDLC*LPL;
end
function_12 is "Rate Law for IDL Cholesterol Formation";

function function_13(k17, IDLC, HSL)
  k17*IDLC*HSL;
end
function_13 is "Rate Law for LDL Cholesterol Formation";

function function_14(k18, LDLC, HLDLRs)
  k18*LDLC*HLDLRs;
end
function_14 is "Rate Law for Receptor Dependent Hepatic Uptake";

function function_15(k20, PLDLRs, LDLC)
  k20*PLDLRs*LDLC;
end
function_15 is "Rate Law for Receptor Dependent Peripheral Uptake";

function function_16(kprs, PLDLRsS, PFC)
  kprs*PLDLRsS/PFC;
end
function_16 is "Rate Law for Peripheral LDLR Synthesis";

function function_17(k23, ACAT, PFC)
  k23*ACAT*PFC;
end
function_17 is "Rate Law for Peripheral Cholesterol Storage";

function function_18(k24, CEH, PCE)
  k24*CEH*PCE;
end
function_18 is "Rate Law for Release of Stored Peripheral Cholesterol";

function function_19(k26, PFC, NHDL, LCAT)
  k26*PFC*NHDL*LCAT;
end
function_19 is "Rate Law for HDL Cholesterol Formation";

function function_20(PCSmax, PFC, PPCt, PCSS)
  PCSmax/(1 + (PFC/PPCt)^PCSS);
end
function_20 is "Rate Law for Peripheral Cholesterol Synthesis";

function function_21(k27, HDLC, CETP)
  k27*HDLC*CETP;
end
function_21 is "Rate Law for CETP Mediated Transfer To VLDL";

function function_22(k28, HDLC, CETP)
  k28*HDLC*CETP;
end
function_22 is "Rate Law for CETP Mediated TransferTo LDL";

function function_23(k29, HDLC, SRB1)
  k29*HDLC*SRB1;
end
function_23 is "Rate Law for Reverse Cholesterol Transport";

model Model_1()
  // New Model

  // Compartments:
  compartment Body = 1;

  // Species:
  species $DC in Body = 304;
  species IC in Body = 3150;
  species $ICS in Body = 0;
  species HBS in Body = 400;
  species IBS in Body = 467;
  species EBS in Body = 0;
  species HFC in Body = 60000;
  species EC in Body = 0;
  species $INHDLS in Body = 0;
  species NHDL in Body = 100;
  species PFC in Body = 57516;
  species $HCS in Body = 0;
  species HCE in Body = 10000;
  species ACAT in Body = 100;
  species CEH in Body = 100;
  species $HNHDLS in Body = 0;
  species VLDLC in Body = 20;
  species HLDLRs in Body = 100;
  species $HLDLRsS in Body = 600;
  species HLDLRD in Body = 0;
  species IDLC in Body = 20;
  species LPL in Body = 100;
  species LDLC in Body = 100;
  species HSL in Body = 100;
  species PLDLRs in Body = 100;
  species $PLDLRsS in Body = 575.16;
  species PLDLRD in Body = 0;
  species PCE in Body = 9363;
  species PSS in Body = 0;
  species HDLC in Body = 45;
  species LCAT in Body = 100;
  species $PCS in Body = 0;
  species CETP in Body = 100;
  species SRB1 in Body = 100;

  // Reactions:
  Ingestion: $DC => IC; Body*Ingestion_k1*DC;
    Ingestion_k1 = 1;
  Intestinal_Cholesterol_Synthesis: $ICS => IC; Body*function_1(ICSmax, IC, ICt, IS);
    ICSmax = 100; ICt = 3120; IS = 5;
  Bile_Salt_Release: HBS => IBS; Body*Bile_Salt_Release_k1*HBS;
    Bile_Salt_Release_k1 = 6;
  Bile_Salt_Return: IBS => HBS; Body*Bile_Salt_Return_k1*IBS;
    Bile_Salt_Return_k1 = 4.29;
  Bile_Salt_Excretion: IBS => EBS; Body*Bile_Salt_Excretion_k1*IBS;
    Bile_Salt_Excretion_k1 = 0.856;
  Bile_Salt_Synthesis: HFC => HBS; Body*Rate_Law_for_Bile_Salt_Synthesis(k5, HFC, HBS);
    k5 = 2.66;
  Cholesterol_Absorption: IC => HFC; Body*function_3(k6, IC, IBS);  // modifiers: IBS
    k6 = 0.0005286;
  Cholesterol_Excretion: IC => EC; Body*function_4(k7, IC, IBS);  // modifiers: IBS
    k7 = 0.0005286;
  Intestinal_Nascent_HDL_Synthesis: $INHDLS => NHDL; Body*function_5(k8, PFC);  // modifiers: PFC
    k8 = 0.0005;
  Billary_Cholesterol_Release: HFC => IC; Body*function_6(BCRmax, BCRt, HFC, BS);
    BCRmax = 2000; BCRt = 55326; BS = 5;
  Hepatic_Cholesterol_Synthesis: $HCS => HFC; Body*function_7(HCSmax, HFC, HCSt, HS);
    HCSmax = 500; HCSt = 93925; HS = 5;
  Hepatic_Cholesterol_Storage: HFC => HCE; Body*function_8(k9, ACAT, HFC);  // modifiers: ACAT
    k9 = 1;
  Release_of_Stored_Cholesterol: HCE => HFC; Body*function_9(k10, CEH, HCE);  // modifiers: CEH
    k10 = 5.998;
  Hepatic_Nascent_HDL_Synthesis: $HNHDLS => NHDL; Body*function_10(k11, PFC);  // modifiers: PFC
    k11 = 0.005;
  VLDL_Cholesterol_Formation: HFC => VLDLC; Body*VLDL_Cholesterol_Formation_k1*HFC;
    VLDL_Cholesterol_Formation_k1 = 0.016;
  Hepatic_LDLR_Synthesis: $HLDLRsS => HLDLRs; Body*function_11(khrs, HLDLRsS, HFC);  // modifiers: HFC
    khrs = 100;
  Hepatic_LDL_Receptor_Degradation: HLDLRs => HLDLRD; Body*Hepatic_LDL_Receptor_Degradation_k1*HLDLRs;
    Hepatic_LDL_Receptor_Degradation_k1 = 0.01;
  VLDL_Cholesterol_ReUptake: VLDLC => HFC; Body*VLDL_Cholesterol_ReUptake_k1*VLDLC;
    VLDL_Cholesterol_ReUptake_k1 = 0.0496;
  IDL_Cholesterol_Formation: VLDLC => IDLC; Body*function_12(k15, VLDLC, LPL);  // modifiers: LPL
    k15 = 0.43;
  IDL_Cholesterol_ReUptake: IDLC => HFC; Body*IDL_Cholesterol_ReUptake_k1*IDLC;
    IDL_Cholesterol_ReUptake_k1 = 0.054;
  LDL_Cholesterol_Formation: IDLC => LDLC; Body*function_13(k17, IDLC, HSL);  // modifiers: HSL
    k17 = 0.38;
  reaction_22: LDLC => HFC; Body*function_14(k18, LDLC, HLDLRs); reaction_22 is "Receptor Dependent Hepatic Uptake";  // modifiers: HLDLRs
    k18 = 0.068;
  reaction_23: LDLC => HFC; Body*reaction_23_k1*LDLC; reaction_23 is "Receptor Independent Hepatic Uptake";
    reaction_23_k1 = 0.005;
  reaction_24: LDLC => PFC; Body*function_15(k20, PLDLRs, LDLC); reaction_24 is "Receptor Dependent Peripheral Uptake";  // modifiers: PLDLRs
    k20 = 0.00675;
  reaction_25: LDLC => PFC; Body*reaction_25_k1*LDLC; reaction_25 is "Receptor Independent Peripheral Uptake";
    reaction_25_k1 = 5e-6;
  Peripheral_LDLR_Synthesis: $PLDLRsS => PLDLRs; Body*function_16(kprs, PLDLRsS, PFC);  // modifiers: PFC
    kprs = 100;
  reaction_27: PLDLRs => PLDLRD; Body*reaction_27_k1*PLDLRs; reaction_27 is "Peripheral LDL Receptor Degradation";
    reaction_27_k1 = 0.01;
  Peripheral_Cholesterol_Storage: PFC => PCE; Body*function_17(k23, ACAT, PFC);  // modifiers: ACAT
    k23 = 0.017386;
  reaction_29: PCE => PFC; Body*function_18(k24, CEH, PCE); reaction_29 is "Release of Stored Peripheral Cholesterol";  // modifiers: CEH
    k24 = 0.1068;
  Peripheral_Steroid_Production: PFC => PSS; Body*Peripheral_Steroid_Production_k1*PFC;
    Peripheral_Steroid_Production_k1 = 0.0005;
  HDL_Cholesterol_Formation: PFC + NHDL => HDLC; Body*function_19(k26, PFC, NHDL, LCAT);  // modifiers: LCAT
    k26 = 1.5e-5;
  Peripheral_Cholesterol_Synthesis: $PCS => PFC; Body*function_20(PCSmax, PFC, PPCt, PCSS);
    PCSmax = 500; PPCt = 80342; PCSS = 5;
  CETP_Mediated_Transfer_To_VLDL: HDLC => VLDLC; Body*function_21(k27, HDLC, CETP);  // modifiers: CETP
    k27 = 0.01;
  CETP_Mediated_TransferTo_LDL: HDLC => LDLC; Body*function_22(k28, HDLC, CETP);  // modifiers: CETP
    k28 = 0.001;
  Reverse_Cholesterol_Transport: HDLC => HFC; Body*function_23(k29, HDLC, SRB1);  // modifiers: SRB1
    k29 = 0.05;

  // Unit definitions:
  unit volume = dimensionless;
  unit time = 86400 second;
  unit substance = dimensionless;
end
