// SBML level 2 version 4

model MODEL1212040001()
  // Smith2009 - RGS mediated GTP hydrolysis
  // This model is described in the article:
  // Dual positive and negative regulation of GPCR signaling by GTP hydrolysis.
  // Smith B, Hill C, Godfrey EL, Rand D, van den Berg H, Thornton S, Hodgkin M, Davey J, Ladds G.
  // Cell Signal. 2009 Jul;21(7):1151-60.
  // Abstract:
  // G protein-coupled receptors (GPCRs) regulate a variety of intracellular pathways through their ability to promote the binding of GTP to heterotrimeric G proteins. Regulator of G protein signaling (RGS) proteins increases the intrinsic GTPase activity of Galpha-subunits and are widely regarded as negative regulators of G protein signaling. Using yeast we demonstrate that GTP hydrolysis is not only required for desensitization, but is essential for achieving a high maximal (saturated level) response. Thus RGS-mediated GTP hydrolysis acts as both a negative (low stimulation) and positive (high stimulation) regulator of signaling. To account for this we generated a new kinetic model of the G protein cycle where Galpha(GTP) enters an inactive GTP-bound state following effector activation. Furthermore, in vivo and in silico experimentation demonstrates that maximum signaling output first increases and then decreases with RGS concentration. This unimodal, non-monotone dependence on RGS concentration is novel. Analysis of the kinetic model has revealed a dynamic network motif that shows precisely how inclusion of the inactive GTP-bound state for the Galpha produces this unimodal relationship.
  // To reproduce dose-response plots in the publication, the model is simulated with 12 different concentrations (see parameter Ligand_conc). For each concentration, a single value must be obtained from the integral of the trajectory of species z3 from time=0 to time=30. These values are then used to build a dose-response plot (authors used GraphPad Prism). Mutant strains are simulated with alternative parameter values or initial conditions in Table S3.
  // This model is hosted on BioModels Database and identified by: MODEL1212040001 .
  // To cite BioModels Database, please use: BioModels Database: An enhanced, curated and annotated resource for published quantitative kinetic models. PMID: 20587024 .
  // To the extent possible under law, all copyright and related or neighbouring rights to this encoded model have been dedicated to the public domain worldwide. Please refer to CC0 Public Domain Dedication for more information.
  // biomodels.db:MODEL1212040001
  // biomodels.db:BIOMD0000000439
  // isDescribedBy pubmed:19285552
  // isDerivedFrom pubmed:12446706
  // hasTaxon taxonomy:4896
  // isPartOf GO:0008277

  // Compartments:
  compartment compartment = 1; compartment is "cell";  // GO:0005623

  // Species:
  species R in compartment = 205;  // substance in nanomole; isVersionOf interpro:IPR000276
  species L in compartment = 0;  // substance in nanomole
  species RL in compartment = 0;  // substance in nanomole; isVersionOf GO:0043235
  species Gabg in compartment = 0;  // substance in nanomole; isVersionOf GO:0005834
  species RGabg in compartment = 0;  // substance in nanomole; hasPart interpro:IPR000276 GO:0005834
  species RGabgL in compartment = 0;  // substance in nanomole; hasPart interpro:IPR000276 GO:0005834
  species GaGTP in compartment = 0;  // substance in nanomole; hasPart CHEBI:15996 uniprot:P04695
  species Gbg in compartment = 205;  // substance in nanomole; hasPart uniprot:P62873 uniprot:P63211
  // NoRGS=0, 1xRGS=60, 2xRGS=120, 3xRGS=180
  species RGS in compartment = 60;  // substance in nanomole; hasProperty interpro:IPR000342
  species RGSGaGTP in compartment = 0;  // substance in nanomole; hasPart CHEBI:15996 uniprot:P04695 interpro:IPR000342
  species GaGDPP in compartment = 0;  // substance in nanomole; hasPart CHEBI:17552 uniprot:P04695
  species Effector in compartment = 205;  // substance in nanomole
  species GaGTPEffector in compartment = 0;  // substance in nanomole; hasPart CHEBI:15996 uniprot:P04695
  species inertGaGTP in compartment = 0;  // substance in nanomole; hasPart CHEBI:15996 uniprot:P04695; hasProperty PATO:0002355
  species RGSinertGaGTP in compartment = 0;  // substance in nanomole; hasPart CHEBI:15996 uniprot:P04695 interpro:IPR000342; hasProperty PATO:0002355
  species GaGDP in compartment = 205;  // substance in nanomole; hasPart CHEBI:17552 uniprot:P04695
  species P in compartment = 0;  // substance in nanomole; isVersionOf CHEBI:18367
  species z1 in compartment = 0;  // substance in nanomole
  species z2 in compartment = 0;  // substance in nanomole
  species z3 in compartment = 0;  // substance in nanomole

  // Parameters:
  ka = 1.5 FirstOrder;
  // Dose-response plots use: 0.1, 1, 3.16228, 10, 31.6228, 100, 316.228, 1000, 3162.28, 10000, 31622.8, 100000
  Ligand_conc = 0.1 nanoMolar;

  // Reactions:
  Receptor_Ligand_association: R + L => RL; compartment*R*L*k1; Receptor_Ligand_association is "Receptor-Ligand association";
    k1 = 0.0025 SecondOrder;
  Receptor_Gprotein_association: R + Gabg => RGabg; compartment*R*Gabg*k2; Receptor_Gprotein_association is "Receptor-Gprotein association";
    k2 = 0.005 SecondOrder;
  RL_Gprotein_association: RL + Gabg => RGabgL; compartment*RL*Gabg*k3; RL_Gprotein_association is "RL-Gprotein association";
    k3 = 0.02 SecondOrder;
  RGabg_Ligand_association: RGabg + L => RGabgL; compartment*RGabg*L*k4; RGabg_Ligand_association is "RGabg-Ligand association";
    k4 = 0.005 SecondOrder;
  Galpha_activation_by_receptor: RGabgL => RL + GaGTP + Gbg; compartment*RGabgL*k5;  // isVersionOf GO:0004872
    k5 = 50 FirstOrder;
  Galpha_activation_spontaneous: Gabg => GaGTP + Gbg; compartment*Gabg*k6;  // isVersionOf GO:0004872
    k6 = 0.2 FirstOrder;
  Galpha_RGS_association: GaGTP + RGS => RGSGaGTP; compartment*GaGTP*RGS*k7; Galpha_RGS_association is "Galpha-RGS association";
    k7 = 500 SecondOrder;
  Galpha_deactivation_by_RGS: RGSGaGTP => GaGDPP + RGS; compartment*RGSGaGTP*k8;
    k8 = 2.5 FirstOrder;
  Galpha_deactivation_spontaneous: GaGTP => GaGDPP; compartment*GaGTP*k9;
    k9 = 0.005 FirstOrder;
  Galpha_Effector_association: Effector + GaGTP => GaGTPEffector; compartment*Effector*GaGTP*k10; Galpha_Effector_association is "Galpha-Effector association";
    k10 = 10 SecondOrder;
  Galpha_becomes_inert: GaGTPEffector => inertGaGTP + Effector; compartment*GaGTPEffector*k11;
    k11 = 1 FirstOrder;
  inertGalpha_RGS_association: inertGaGTP + RGS => RGSinertGaGTP; compartment*inertGaGTP*RGS*k12; inertGalpha_RGS_association is "inertGalpha-RGS association";
    k12 = 50 SecondOrder;
  inertGalpha_deactivation_by_RGS: RGSinertGaGTP => GaGDPP + RGS; compartment*RGSinertGaGTP*k13;
    k13 = 0.3 FirstOrder;
  R14: inertGaGTP => GaGDPP; compartment*inertGaGTP*k14; R14 is "inertGalpha deactivation spontaneous";
    k14 = 0.005 FirstOrder;
  Phosphate_release: GaGDPP => GaGDP + P; compartment*GaGDPP*k15;
    k15 = 1000 FirstOrder;
  Gprotein_subunits_association: GaGDP + Gbg => Gabg; compartment*GaGDP*Gbg*k16;
    k16 = 1000 SecondOrder;
  Phosphate_degradation: P => ; compartment*P*k17;
    k17 = 10 FirstOrder;
  Delay_1: => z1; compartment*GaGTPEffector*ka;  // modifiers: GaGTPEffector
  Delay_2: z1 => z2; compartment*z1*ka;
  Delay_3: z2 => z3; compartment*z2*ka;
  Delay_4: z3 => ; compartment*z3*ka;

  // Events:
  // The model in the publication uses a tanh step function to add ligand, but only because the solver used by the authors did not support Events. Results are identical using this event, and has been changed in agreement with the authors.
  Ligand_addition: at (time >= 14): L = L + Ligand_conc;

  // Unit definitions:
  unit nanoMolar = 1e-9 mole / litre; nanoMolar is "nM";
  unit hour = 3600 second; hour is "hr";
  unit FirstOrder = 1 / (3600 second); FirstOrder is "1/hr";
  unit SecondOrder = litre / (1e-9 mole * 3600 second); SecondOrder is "1/(nM*hr)";
  unit nanomole = 1e-9 mole; nanomole is "nm";
end
