// SBML level 2 version 4

function function_4_b_glu_loss_1(b_glu)
  0.1*b_glu;
end

function Constant_flux_reversible(v)
  v;
end
Constant_flux_reversible is "Constant flux (reversible)";

function function_4_VmHCOOHc_1(c_coo, cytosol, k_in_coo, k_out_coo, m_coo, mito)
  k_in_coo*m_coo*mito/3 - k_out_coo*c_coo*cytosol;
end

function function_4_b_cys_cystine_conv_1(b_cys)
  0.25*b_cys;
end

function function_4_b_gsg_decomp_1(b_gsg)
  67.5*b_gsg;
end

function function_4_b_cys_loss_1(b_cys)
  0.1*b_cys;
end

function function_4_b_gsh_decomp_1(b_gsh)
  90*b_gsh;
end

function function_4_V_GDC_1(K_gly_GDC, K_thf_GDC, Vm_GDC, m_gly, m_thf)
  Vm_GDC*m_thf*m_gly/((K_thf_GDC + m_thf)*(K_gly_GDC + m_gly));
end

function function_4_b_gsg_loss_1(b_gsg)
  7.5*b_gsg;
end

function function_4_VmNE_1(HCHO, k1_mNE, k2_mNE, m_2cf, m_thf, mito)
  mito*(k1_mNE*m_thf*HCHO - k2_mNE*m_2cf);
end

function function_4_b_gsh_loss_1(b_gsh)
  0.7*b_gsh;
end

function function_4_b_gly_loss_1(b_gly)
  0.1*b_gly;
end

function function_4_VmFTD_1(K_10f_FTD, Vm_mFTD, m_10f)
  Vm_mFTD*m_10f/(K_10f_FTD + m_10f);
end

function MM_twosubst(Vmax, Km1, Km2, S1, S2)
  Vmax*S1*S2/((Km1 + S1)*(Km2 + S2));
end

function MM(Vmax, Km, S)
  Vmax*S/(Km + S);
end

function function_4_V_c_gshLb_1(K_gshLb, V_gshLb, c_gsh, cytosol, h_gshLb)
  cytosol*V_gshLb*c_gsh^h_gshLb/(K_gshLb^h_gshLb + c_gsh^h_gshLb);
end

function function_4_V_MS_1(H2O2, K_5mf_MS, K_hcy_MS, Ki_MS, Vm_MS, c_5mf, hcy, ssH2O2)
  MM_twosubst(Vm_MS, K_5mf_MS, K_hcy_MS, c_5mf, hcy)*(ssH2O2 + Ki_MS)/(H2O2 + Ki_MS);
end

function function_4_V_DHFR_1(K_NADPH_DHFR, K_dhf_DHFR, NADPH, Vm_DHFR, c_dhf)
  Vm_DHFR*c_dhf*NADPH/((K_dhf_DHFR + c_dhf)*(K_NADPH_DHFR + NADPH));
end

function function_4_VcFTD_1(K_10f_FTD, Vm_cFTD, c_10f)
  Vm_cFTD*c_10f/(K_10f_FTD + c_10f);
end

function function_4_V_PGT_1(GAR, K_10f_PGT, K_GAR_PGT, Vm_PGT, c_10f)
  Vm_PGT*c_10f*GAR/((K_10f_PGT + c_10f)*(K_GAR_PGT + GAR));
end

function function_4_VcFTS_1(K_coo_cFTS, K_thf_cFTS, Vm_cFTS, c_coo, c_thf)
  Vm_cFTS*c_thf*c_coo/((K_thf_cFTS + c_thf)*(K_coo_cFTS + c_coo));
end

function function_4_VcSHMT_1(K_2cf_SHMT, K_gly_SHMT, K_ser_SHMT, K_thf_SHMT, Vf_cSHMT, Vr_cSHMT, c_2cf, c_gly, c_ser, c_thf)
  MM_twosubst(Vf_cSHMT, K_thf_SHMT, K_ser_SHMT, c_thf, c_ser) - MM_twosubst(Vr_cSHMT, K_gly_SHMT, K_2cf_SHMT, c_gly, c_2cf);
end

function function_4_VcNE_1(HCHO, c_2cf, c_thf, cytosol, k1_cNE, k2_cNE)
  cytosol*(k1_cNE*c_thf*HCHO - k2_cNE*c_2cf);
end

function function_4_V_TS_1(DUMP, K_2cf_TS, K_DUMP_TS, Vm_TS, c_2cf)
  Vm_TS*DUMP*c_2cf/((K_DUMP_TS + DUMP)*(K_2cf_TS + c_2cf));
end

function function_4_V_MTHFR_1(K_2cf_MTHFR, K_NADPH_MTHFR, NADPH, Vm_MTHFR, c_2cf, sah, sam)
  MM_twosubst(Vm_MTHFR, K_2cf_MTHFR, K_NADPH_MTHFR, c_2cf, NADPH)*72/(10 + sam - sah);
end

function function_4_VcMTD_1(K_1cf_MTD, K_2cf_MTD, Vf_cMTD, Vr_cMTD, c_1cf, c_2cf)
  MM(Vf_cMTD, K_2cf_MTD, c_2cf) - MM(Vr_cMTD, K_1cf_MTD, c_1cf);
end

function function_4_VcMTCH_1(K_10f_MTCH, K_1cf_MTCH, Vf_cMTCH, Vr_MTCH, c_10f, c_1cf)
  MM(Vf_cMTCH, K_1cf_MTCH, c_1cf) - MM(Vr_MTCH, K_10f_MTCH, c_10f);
end

function function_4_V_ART_1(K_10f_ART, K_aic_ART, Vm_ART, aic, c_10f)
  Vm_ART*c_10f*aic/((K_10f_ART + c_10f)*(K_aic_ART + aic));
end

function function_4_V_BHMT_1(BET, H2O2, K_bet_BHMT, K_hcy_BHMT, Ki_BHMT, Vm_BHMT, cytosol, hcy, sah, sam, ssH2O2)
  cytosol*exp(-0.0021*(sam + sah))*exp(0.0021*102.6)*MM_twosubst(Vm_BHMT, K_hcy_BHMT, K_bet_BHMT, hcy, BET)*((ssH2O2 + Ki_BHMT)/(H2O2 + Ki_BHMT));
end

function function_4_V_MATI_1(Ki_MAT1, Km_MAT1, Vm_MAT1, c_gsg, met, sam)
  Vm_MAT1*(met/(Km_MAT1 + met))*(0.23 + 0.8*exp(-0.0026*sam))*((Ki_MAT1 + 66.71)/(Ki_MAT1 + c_gsg));
end

function function_4_V_MATIII_1(Ka_MAT3, Ki_MAT3, Km_MAT3, Vm_MAT3, c_gsg, met, sam)
  Vm_MAT3*(met^1.21/(Km_MAT3 + met^1.21))*(1 + 7.2*sam^2/(Ka_MAT3^2 + sam^2))*((Ki_MAT3 + 66.71)/(Ki_MAT3 + c_gsg));
end

function function_4_V_GNMT_1(K_gly_GNMT, K_sam_GNMT, Ki_GNMT, Vm_GNMT, c_5mf, c_gly, cytosol, sah, sam)
  cytosol*MM_twosubst(Vm_GNMT, K_sam_GNMT, K_gly_GNMT, sam, c_gly)*(1/(1 + sah/Ki_GNMT))*(4.8/(0.35 + c_5mf));
end

function function_4_V_DNMT_1(Ki_DNMT, Km_DNMT, Vm_DNMT, sah, sam)
  Vm_DNMT*(sam/(Km_DNMT*(1 + sah/Ki_DNMT) + sam));
end

function function_4_V_SAHH_1(K_hcy_SAHH, K_sah_SAHH, Vf_SAHH, Vr_SAHH, hcy, sah)
  MM(Vf_SAHH, K_sah_SAHH, sah) - MM(Vr_SAHH, K_hcy_SAHH, hcy);
end

function function_4_gluconeogenesis_ser_1(c_ser)
  1.2*c_ser;
end

function function_4_V_CBS_1(H2O2, K_hcy_CBS, K_ser_CBS, Ka_CBS, Vm_CBS, c_ser, hcy, sah, sam, ssH2O2)
  MM_twosubst(Vm_CBS, K_hcy_CBS, K_ser_CBS, hcy, c_ser)*(((30/102.59)^2 + 1)/((30/(sam + sah))^2 + 1))*((H2O2 + Ka_CBS)/(ssH2O2 + Ka_CBS));
end

function function_4_V_CTGL_1(K_cyt_CTGL, Vm_CTGL, cyt)
  Vm_CTGL*cyt/(K_cyt_CTGL + cyt);
end

function function_4_V_GCS_1(H2O2, K_cys_GCS, K_glu_GCS, Ka_GCS, Ke_GCS, Ki_GCS, Kp_GCS, Vm_GCS, c_cys, c_glu, c_gsh, glc, ssH2O2)
  Vm_GCS*(c_cys*c_glu - glc/Ke_GCS)/(K_cys_GCS*K_glu_GCS + c_glu*K_cys_GCS + c_cys*(K_glu_GCS*(1 + c_gsh/Ki_GCS) + c_glu) + glc/Kp_GCS + c_gsh/Ki_GCS)*((H2O2 + Ka_GCS)/(ssH2O2 + Ka_GCS));
end

function function_4_V_GS_1(K_glc_GS, K_gly_GS, Ke_GS, Kp_GS, Vm_GS, c_gly, c_gsh, glc)
  Vm_GS*(c_gly*glc - c_gsh/Ke_GS)/(K_gly_GS*K_glc_GS + glc*K_gly_GS + c_gly*(K_glc_GS + glc) + c_gsh/Kp_GS);
end

function function_4_c_glu_usage_1(c_glu)
  0.07*c_glu;
end

function function_4_cys_usage_1(c_cys)
  0.35*c_cys^2/200;
end

function function_4_V_GPX_1(H2O2, K_H2O2_GPX, K_gsh_GPX, Vm_GPX, c_gsh)
  Vm_GPX*(c_gsh/(K_gsh_GPX + c_gsh))^2*(H2O2/(K_H2O2_GPX + H2O2));
end

function function_4_V_GR_1(K_NADPH_GR, K_gsg_GR, NADPH, Vm_GR, c_gsg)
  Vm_GR*c_gsg*NADPH/((K_gsg_GR + c_gsg)*(K_NADPH_GR + NADPH));
end

function function_4_c_gsh_degr_1(c_gsh)
  0.002*c_gsh;
end

function function_4_c_gsg_degr_1(c_gsg)
  0.1*c_gsg;
end

function function_4_V_ODC_1(Kipodc, Kmodc, Vm_ODC, Putrescine, Ornithine)
  Vm_ODC*Ornithine/(Kmodc*(1 + Putrescine/Kipodc) + Ornithine);
end

function function_4_V_SAMDC_1(Kapsamdc, Kiasamdc, Kissamdc, Kmsamdc, Vm_SAMDC, sam, dcSAM, Putrescine, Spermine)
  Vm_SAMDC/(1 + Spermine/Kissamdc)*sam/(Kmsamdc*(1 + Kapsamdc/Putrescine + dcSAM/Kiasamdc) + sam);
end

function function_4_V_SSAT_S_1(C, Kmaccoassat, Kmcoassat, Kmdssat, Kmsssat, Vm_SSAT, Spermine, Spermidine, Acetyl_CoA, CoA)
  1/C*Vm_SSAT*Spermine*Acetyl_CoA/(Kmsssat*(1 + Spermidine/Kmdssat)*Kmaccoassat*(1 + CoA/Kmcoassat) + Kmaccoassat*(1 + CoA/Kmcoassat)*Spermine + Kmsssat*(1 + Spermidine/Kmdssat)*Acetyl_CoA + Spermine*Acetyl_CoA);
end

function function_4_V_SSAT_D_1(Kmaccoassat, Kmcoassat, Kmdssat, Kmsssat, Vm_SSAT, Spermine, Spermidine, Acetyl_CoA, CoA)
  Vm_SSAT*Spermidine*Acetyl_CoA/(Kmdssat*(1 + Spermine/Kmsssat)*Kmaccoassat*(1 + CoA/Kmcoassat) + Kmaccoassat*(1 + CoA/Kmcoassat)*Spermidine + Kmdssat*(1 + Spermine/Kmsssat)*Acetyl_CoA + Spermidine*Acetyl_CoA);
end

function function_4_V_PAO_AS_1(Kmadpao, Kmaspao, Kmdpao, Kmspao, Vmpao, Spermine, Spermidine, Acetylspermine, Acetylspermidine)
  Vmpao*Acetylspermine/(Kmaspao*(1 + Acetylspermidine/Kmadpao + Acetylspermine/Kmaspao + Spermidine/Kmdpao + Spermine/Kmspao));
end

function function_4_V_PAO_AD_1(Kmadpao, Kmaspao, Kmdpao, Kmspao, Vmpao, Spermine, Spermidine, Acetylspermine, Acetylspermidine)
  Vmpao*Acetylspermidine/(Kmadpao*(1 + Acetylspermidine/Kmadpao + Acetylspermine/Kmaspao + Spermidine/Kmdpao + Spermine/Kmspao));
end

function function_4_V_SPDS_1(KaSpds, Kiaspds, Kidspds, Kpspds, Vmspds, dcSAM, Putrescine, Spermidine)
  Vmspds*dcSAM*Putrescine/(Kiaspds*Kpspds*(1 + Spermidine/Kidspds) + Kpspds*dcSAM + KaSpds*(1 + Spermidine/Kidspds)*Putrescine + dcSAM*Putrescine);
end

function function_4_V_SPMS_1(Kaspms, Kdspms, Kiaspms, Kisspms, Vmspms, dcSAM, Spermine, Spermidine)
  Vmspms*dcSAM*Spermidine/(Kiaspms*Kdspms*(1 + Spermine/Kisspms) + Kdspms*dcSAM + Kaspms*(1 + Spermine/Kisspms)*Spermidine + dcSAM*Spermidine);
end

function function_4_V_MATII(Ki, Km, met, Vm_MATII, sam)
  Vm_MATII/(1 + (Km*(1 + sam/Ki)/met)^0.76);
end

function function_4_V_SDH_1(K_src_SDH, K_thf_SDH, Vm_SDH, m_thf, mito, src)
  mito*MM_twosubst(Vm_SDH, K_thf_SDH, K_src_SDH, m_thf, src);
end

function function_4_V_b_GLU_c_1(K_bglutc, V_bglutc, b_glu, c_glu, cytosol, k_out_glu)
  cytosol*(MM(V_bglutc, K_bglutc, b_glu) - k_out_glu*c_glu);
end

function function_4_VmGLYc_1(K_cgly, K_mgly, V_cgly, V_mgly, c_gly, cytosol, m_gly, mito)
  MM(V_mgly, K_mgly, m_gly)*mito*(1/3) - MM(V_cgly, K_cgly, c_gly)*cytosol;
end

function function_4_V_b_SER_c_1(K_bserc, V_bserc, b_ser, c_ser, cytosol, k_out_ser)
  cytosol*(MM(V_bserc, K_bserc, b_ser) - k_out_ser*c_ser);
end

function function_4_VmSHMT_1(K_2cf_SHMT, K_gly_SHMT, K_ser_SHMT, K_thf_SHMT, Vf_mSHMT, Vr_mSHMT, m_2cf, m_gly, m_ser, m_thf)
  MM_twosubst(Vf_mSHMT, K_thf_SHMT, K_ser_SHMT, m_thf, m_ser) - MM_twosubst(Vr_mSHMT, K_gly_SHMT, K_2cf_SHMT, m_gly, m_2cf);
end

function function_4_V_c_gshHb_1(K_gshHb, V_gshHb, c_gsh, cytosol)
  cytosol*MM(V_gshHb, K_gshHb, c_gsh);
end

function function_4_V_b_MET_c_1(K_bmetc, V_bmetc, b_met, cytosol, k_out_met, met)
  cytosol*(MM(V_bmetc, K_bmetc, b_met) - k_out_met*met);
end

function function_4_V_b_GLY_c_1(K_bglyc, V_bglyc, b_gly, c_gly, cytosol, k_out_gly)
  cytosol*(MM(V_bglyc, K_bglyc, b_gly) - k_out_gly*c_gly);
end

function function_4_VmFTS_1(K_10f_mFTS, K_coo_mFTS, K_thf_mFTS, Vf_mFTS, Vr_mFTS, m_10f, m_coo, m_thf)
  MM_twosubst(Vf_mFTS, K_thf_mFTS, K_coo_mFTS, m_thf, m_coo) - MM(Vr_mFTS, K_10f_mFTS, m_10f);
end

function function_4_VmMTD_1(K_1cf_MTD, K_2cf_MTD, Vf_mMTD, Vr_MTD, m_1cf, m_2cf)
  MM(Vf_mMTD, K_2cf_MTD, m_2cf) - MM(Vr_MTD, K_1cf_MTD, m_1cf);
end

function function_4_V_DMGD_1(K_dmg_DMGD, K_thf_DMGD, Vm_DMGD, dmg, m_thf, mito)
  mito*MM_twosubst(Vm_DMGD, K_thf_DMGD, K_dmg_DMGD, m_thf, dmg);
end

function function_4_VmMTCH_1(K_10f_MTCH, K_1cf_MTCH, Vf_mMTCH, Vr_MTCH, m_10f, m_1cf)
  MM(Vf_mMTCH, K_1cf_MTCH, m_1cf) - MM(Vr_MTCH, K_10f_MTCH, m_10f);
end

function function_4_V_b_CYS_c_1(K_bcysc, V_bcysc, b_cys, cytosol)
  cytosol*MM(V_bcysc, K_bcysc, b_cys);
end

function function_4_V_c_gsgLb_1(K_gsgLb, V_gsgLb, c_gsg, cytosol)
  cytosol*MM(V_gsgLb, K_gsgLb, c_gsg);
end

function function_4_VmSERc_1(K_cser, K_mser, V_cser, V_mser, c_ser, cytosol, m_ser, mito)
  (MM(V_mser, K_mser, m_ser)*mito/3 - MM(V_cser, K_cser, c_ser))*cytosol;
end

function function_4_V_c_gsgHb_1(K_gsgHb, V_gsgHb, c_gsg, cytosol)
  cytosol*MM(V_gsgHb, K_gsgHb, c_gsg);
end

model MODEL1305060001()
  // Reyes-Palomares2012 - a combined model hepatic polyamine and sulfur aminoacid metabolism - version2
  // Mammalian polyamine metabolism consists of a bi-cycle with two required entrances, omithine and S-adenosyl methionine (SAM), and several alternative exists. The relevant regulatory roles of the short half-life enzymes ornithine decarboxylase (ODC), S-adenosyl methione decarboxylase (SAMDC) and spermindine/spermine acetyl transferase (SSAT) in polyamine metabolism are well studied, and has been modelled here.
  // This model is described in the article:
  // A combined model of hepatic polyamine and sulfur amino acid metabolism to analyze S-adenosyl methionine availability.
  // Reyes-Palomares A, Montañez R, Sánchez-Jiménez F, Medina MA
  // Amino Acids, February 2012, Volume 42, Issue 2-3, pp 597-610
  // Abstract:
  // Many molecular details remain to be uncovered concerning the regulation of polyamine metabolism. A previous model of mammalian polyamine metabolism showed that S-adenosyl methionine availability could play a key role in polyamine homeostasis. To get a deeper insight in this prediction, we have built a combined model by integration of the previously published polyamine model and one-carbon and glutathione metabolism model, published by different research groups. The combined model is robust and it is able to achieve physiological steady-state values, as well as to reproduce the predictions of the individual models. Furthermore, a transition between two versions of our model with new regulatory factors added properly simulates the switch in methionine adenosyl transferase isozymes occurring when the liver enters in proliferative conditions. The combined model is useful to support the previous prediction on the role of S-adenosyl methionine availability in polyamine homeostasis. Furthermore, it could be easily adapted to get deeper insights on the connections of polyamines with energy metabolism.
  // Notes by the author:
  // This model combines BIOMD0000000190 and BIOMD0000000268 from BioModels Database, both models include corrections respect to their originals publications.
  // To simulate a MATI/MATIII switch to MATII in proliferating liver:
  // We set to 0 the Vmax parameters of MATI and MATIII
  // We included MATII reaction equation.
  // We add a regulation factor dependent of SAM levels in ODC and SAMDCe rates of synthesis (66.5/[SAM]).
  // H2O2 was increased in a 50 % according to an initial state ofproliferating and regenerating liver.
  // This model is hosted on BioModels Database and identified by: MODEL1305060001 .
  // To cite BioModels Database, please use: BioModels Database: An enhanced, curated and annotated resource for published quantitative kinetic models .
  // To the extent possible under law, all copyright and related or neighbouring rights to this encoded model have been dedicated to the public domain worldwide. Please refer to CC0 Public Domain Dedication for more information.
  // biomodels.db:MODEL1305060001
  // biomodels.db:BIOMD0000000450
  // isDescribedBy pubmed:21814788
  // isDerivedFrom biomodels.db:BIOMD0000000190 biomodels.db:BIOMD0000000268
  // hasPart GO:0000096 GO:0006595
  // hasTaxon taxonomy:40674

  // Compartments:
  compartment blood = 1;  // isVersionOf BTO:0000089
  compartment cytosol = 1;  // isVersionOf GO:0005829
  compartment mito = 1; mito is "mitochondrion";  // isVersionOf GO:0005739
  compartment cell = 1;  // isVersionOf GO:0005623

  // Species:
  species $b_met in blood; b_met is "b_Methionine";  // isVersionOf CHEBI:16811 kegg.compound:C01733
  species $b_ser in blood; b_ser is "b_Serine";  // isVersionOf CHEBI:17822 kegg.compound:C00716
  species b_gly in blood = 218.7332; b_gly is "b_Glycine";  // isVersionOf CHEBI:15428 kegg.compound:C00037
  species b_glu in blood = 60.46516; b_glu is "b_Glutamate";  // isVersionOf CHEBI:18237 kegg.compound:C00302
  species b_cys in blood = 183.0995; b_cys is "b_Cysteine";  // isVersionOf CHEBI:15356 kegg.compound:C00736
  species b_gsg in blood = 0.4726329; b_gsg is "b_GSSG";  // isVersionOf CHEBI:17858 kegg.compound:C00127
  species b_gsh in blood = 12.54707; b_gsh is "b_GSH";  // isVersionOf CHEBI:16856 kegg.compound:C00051
  species $GAR in cytosol = 10;  // isVersionOf CHEBI:18349 kegg.compound:C003838
  species $NADPH in cytosol = 50;  // isVersionOf CHEBI:16474 kegg.compound:C00005
  species $BET in cytosol = 50; BET is "Betaine";  // CHEBI:17750 kegg.compound:C00719
  species $DUMP in cytosol = 20; DUMP is "dUMP";  // isVersionOf CHEBI:17622 kegg.compound:C00365
  species $H2O2 in cytosol = 0.015;  // isVersionOf CHEBI:16240 kegg.compound:C00027
  species c_thf in cytosol = Fol/(2*3/4) - (c_5mf + c_2cf + c_1cf + c_10f + c_dhf); c_thf is "c_THF";  // isVersionOf CHEBI:15635 kegg.compound:C00101
  species c_5mf in cytosol = 5.360799; c_5mf is "c_5-methyl-THF";  // isVersionOf CHEBI:15641 kegg.compound:C00440
  species c_2cf in cytosol = 0.4639627; c_2cf is "c_5-10-methylene-THF";  // isVersionOf CHEBI:1989 kegg.compound:C00143
  species c_1cf in cytosol = 0.2594977; c_1cf is "c_5-10-methenyl-THF";  // isVersionOf pubchem.compound:644350
  species c_10f in cytosol = 3.255395; c_10f is "c_10-formyl-THF";  // isVersionOf CHEBI:15637 kegg.compound:C00234
  species c_dhf in cytosol = 0.03525272; c_dhf is "c_DHF";  // isVersionOf CHEBI:15633 kegg.compound:C00415
  species aic in cytosol = 0.9446767; aic is "AICAR";  // isVersionOf CHEBI:18406 kegg.compound:C04677
  species c_glu in cytosol = 3236.782; c_glu is "c_Glutamate";  // isVersionOf CHEBI:18237 kegg.compound:C00302
  species c_cys in cytosol = 179.7922; c_cys is "c_Cysteine";  // isVersionOf CHEBI:15356 kegg.compound:C00736
  species glc in cytosol = 9.607066; glc is "Glutamyl-Cysteine";  // isVersionOf CHEBI:17515 kegg.compound:C00669
  species c_gly in cytosol = 927.5601; c_gly is "c_Glycine";  // isVersionOf CHEBI:15428 kegg.compound:C00037
  species c_gsg in cytosol = 59.80627; c_gsg is "c_GSSG";  // isVersionOf CHEBI:17858 kegg.compound:C00127
  species c_gsh in cytosol = 6272.515; c_gsh is "c_GSH";  // isVersionOf CHEBI:16856 kegg.compound:C00051
  species cyt in cytosol = 32.30476; cyt is "Cystathionine";  // isVersionOf pubchem.compound:834
  species hcy in cytosol = 1.024252; hcy is "Homocysteine";  // isVersionOf CHEBI:17230 kegg.compound:C05330
  species c_ser in cytosol = 571.2253; c_ser is "c_Serine";  // isVersionOf CHEBI:17822 kegg.compound:C00716
  species sah in cytosol = 15.56267; sah is "SAH";  // isVersionOf CHEBI:16680 kegg.compound:C00021
  species sam in cytosol = 65.06138; sam is "SAM";  // isVersionOf CHEBI:15414 kegg.compound:C00019
  species met in cytosol = 50.60069; met is "c_Methionine";  // CHEBI:16811 kegg.compound:C01733
  species c_coo in cytosol = 13.97581; c_coo is "c_Formate";  // isVersionOf CHEBI:15740 kegg.compound:C00058
  species dcSAM in cytosol = 0.01117864;  // isVersionOf CHEBI:15625
  species Putrescine in cytosol = 98.20363;  // isVersionOf CHEBI:17148
  species Spermine in cytosol = 61.35951;  // isVersionOf CHEBI:15746
  species Spermidine in cytosol = 79.59175;  // isVersionOf CHEBI:16610
  species Acetylspermine in cytosol = 0.02727425;  // isVersionOf CHEBI:17312
  species Acetylspermidine in cytosol = 0.9037514;  // isVersionOf CHEBI:17927
  species $Ornithine in cytosol = 300;  // isVersionOf CHEBI:18257
  species Acetyl_CoA in cytosol = 38.83339; Acetyl_CoA is "Acetyl-CoA";  // isVersionOf CHEBI:15351
  species CoA in cytosol = 160.6666;  // isVersionOf CHEBI:15346
  species $CO in mito = 0; CO is "CO2";  // isVersionOf CHEBI:16526 kegg.compound:C00011
  species m_thf in mito = Fol/(2*1/4) - (m_2cf + m_1cf + m_10f); m_thf is "m_THF";  // isVersionOf CHEBI:15635 kegg.compound:C00101
  species m_2cf in mito = 1.667297; m_2cf is "m_5-10-methylene-THF";  // isVersionOf CHEBI:1989 kegg.compound:C00143
  species m_1cf in mito = 1.550221; m_1cf is "m_5-10-methenyl-THF";  // isVersionOf pubchem.compound:644350
  species m_10f in mito = 15.99312; m_10f is "m_10-formyl-THF";  // isVersionOf CHEBI:15637 kegg.compound:C00234
  species m_ser in mito = 2150.058; m_ser is "m_Serine";  // isVersionOf CHEBI:17822 kegg.compound:C00716
  species m_gly in mito = 2043.47; m_gly is "m_Glycine";  // isVersionOf CHEBI:15428 kegg.compound:C00037
  species m_coo in mito = 58.37101; m_coo is "m_Formate";  // isVersionOf CHEBI:15740 kegg.compound:C00058
  species $Fol in cell = 20.1; Fol is "Folate";  // isVersionOf CHEBI:27470 kegg.compound:C00504
  species $HCHO in cell = 500; HCHO is "Formaldehyde";  // isVersionOf CHEBI:16842 kegg.compound:C00067
  species src in cell = 8.25411; src is "Sarcosine";  // isVersionOf CHEBI:15611 kegg.compound:C00213
  species dmg in cell = 0.6775595; dmg is "Dimethylglycine";  // isVersionOf CHEBI:17724 kegg.compound:C01026

  // Parameters:
  V_gshHb = 150;
  K_gshHb = 150;
  V_gshLb = 1100;
  h_gshLb = 3;
  K_gshLb = 3000;
  V_gsgHb = 40;
  K_gsgHb = 1250;
  V_gsgLb = 4025;
  K_gsgLb = 7100;
  V_bcysc = 14950;
  K_bcysc = 2100;
  V_bglutc = 28000;
  K_bglutc = 300;
  k_out_glu = 1;
  V_bglyc = 4600;
  K_bglyc = 150;
  k_out_gly = 1;
  V_bserc = 2700;
  K_bserc = 150;
  k_out_ser = 1;
  V_bmetc = 913.4;
  K_bmetc = 150;
  k_out_met = 1;
  Vm_mFTD = 1050;
  K_10f_FTD = 20;
  Vf_mSHMT = 11440;
  K_thf_SHMT = 50;
  K_ser_SHMT = 600;
  Vr_mSHMT = 30000000;
  K_gly_SHMT = 10000;
  K_2cf_SHMT = 3200;
  Vf_mFTS = 2000;
  K_thf_mFTS = 3;
  K_coo_mFTS = 43;
  Vr_mFTS = 6300;
  K_10f_mFTS = 22;
  k1_mNE = 0.03;
  k2_mNE = 20;
  Vm_GDC = 15000;
  K_thf_GDC = 50;
  K_gly_GDC = 3400;
  Vm_SDH = 15000;
  K_thf_SDH = 50;
  K_src_SDH = 320;
  Vm_DMGD = 15000;
  K_thf_DMGD = 50;
  K_dmg_DMGD = 50;
  Vf_mMTD = 180000;
  K_2cf_MTD = 2;
  Vr_MTD = 594000;
  K_1cf_MTD = 10;
  Vf_mMTCH = 790000;
  K_1cf_MTCH = 250;
  Vr_MTCH = 20000;
  K_10f_MTCH = 100;
  V_mser = 10000;
  K_mser = 5700;
  V_cser = 10000;
  K_cser = 5700;
  k_in_coo = 100;
  k_out_coo = 100;
  V_mgly = 10000;
  K_mgly = 5700;
  V_cgly = 10000;
  K_cgly = 5700;
  Vm_MS = 500;
  K_5mf_MS = 25;
  K_hcy_MS = 1;
  ssH2O2 = 0.01;
  Ki_MS = 0.01;
  Vm_DHFR = 2000;
  K_dhf_DHFR = 0.5;
  K_NADPH_DHFR = 4;
  Vm_cFTD = 500;
  Vm_PGT = 24300;
  K_10f_PGT = 4.9;
  K_GAR_PGT = 520;
  Vm_cFTS = 3900;
  K_thf_cFTS = 3;
  K_coo_cFTS = 43;
  Vf_cSHMT = 5200;
  Vr_cSHMT = 15000000;
  k1_cNE = 0.03;
  k2_cNE = 22;
  Vm_TS = 5000;
  K_DUMP_TS = 6.3;
  K_2cf_TS = 14;
  Vm_MTHFR = 5300;
  K_2cf_MTHFR = 50;
  K_NADPH_MTHFR = 16;
  Vf_cMTD = 80000;
  Vr_cMTD = 600000;
  Vf_cMTCH = 500000;
  Vm_ART = 55000;
  K_10f_ART = 5.9;
  K_aic_ART = 100;
  Vm_BHMT = 2160;
  K_hcy_BHMT = 12;
  K_bet_BHMT = 100;
  Ki_BHMT = 0.01;
  Vm_MAT1 = 0;
  Km_MAT1 = 41;
  Ki_MAT1 = 2140;
  Vm_MAT3 = 0;
  Km_MAT3 = 300;
  Ka_MAT3 = 360;
  Ki_MAT3 = 4030;
  Vm_GNMT = 260;
  K_sam_GNMT = 63;
  K_gly_GNMT = 130;
  Ki_GNMT = 18;
  Vm_DNMT = 180;
  Km_DNMT = 1.4;
  Ki_DNMT = 1.4;
  Vf_SAHH = 320;
  K_sah_SAHH = 6.5;
  Vr_SAHH = 4530;
  K_hcy_SAHH = 150;
  Vm_CBS = 420000;
  K_hcy_CBS = 1000;
  K_ser_CBS = 2000;
  Ka_CBS = 0.035;
  Vm_CTGL = 1500;
  K_cyt_CTGL = 500;
  Vm_GCS = 3600;
  Ke_GCS = 5597;
  K_cys_GCS = 100;
  K_glu_GCS = 1900;
  Ki_GCS = 8200;
  Kp_GCS = 300;
  Ka_GCS = 0.01;
  Vm_GS = 5400;
  Ke_GS = 5600;
  K_gly_GS = 300;
  K_glc_GS = 22;
  Kp_GS = 30;
  Vm_GPX = 4500;
  K_gsh_GPX = 1330;
  K_H2O2_GPX = 0.09;
  Vm_GR = 892.5;
  K_gsg_GR = 107;
  K_NADPH_GR = 10.4;
  dinner = 1;
  lunch = 1;
  breakfast = 1;
  fasting = 1;
  var aa_input; aa_input is "Aminoacid_input";
  b_met_basal = 30;
  b_ser_basal = 150;
  V_oGly_b_basal = 630;
  V_oGlu_b_basal = 273;
  V_oCys_b_basal = 70;
  k_out_cys = 1;
  Vm_ODC = 72.25572;
  Vm_SSAT = 42.28538;
  Vm_SAMDC = 21.13401;
  ANTZ = 0.5849783;
  Ke_POL = 1;
  Kd_ODC = 3;
  Ks_ODC = 300;
  Kd_SSAT = 12;
  Ks_SSAT = 0.06;
  Kd_SAMDC = 1.2;
  Ks_SAMDC = 60;
  Kd_ANTZ = 0.02;
  Ks_ANTZ = 0.02;
  var K_accoa;
  var K_coa;
  R = 0.24;
  var S_D; S_D is "S+D";
  var R_percent;
  Vm_MATII = 220;

  // Assignment rules:
  tot_cfol := c_5mf + c_2cf + c_1cf + c_10f + c_dhf + c_thf;
  tot_mfol := m_thf + m_2cf + m_1cf + m_10f;
  daytime := time - 24*floor(time/24);
  aa_input := piecewise(breakfast, (7 <= daytime) && (daytime <= 10), piecewise(lunch, (12 <= daytime) && (daytime <= 15), piecewise(dinner, (18 <= daytime) && (daytime <= 21), fasting)));
  b_met := aa_input*b_met_basal;
  b_ser := aa_input*b_ser_basal;
  V_oGly_b := aa_input*V_oGly_b_basal;
  V_oCys_b := aa_input*V_oCys_b_basal;
  V_oGlu_b := aa_input*V_oGlu_b_basal;
  K_accoa := R;
  K_coa := 3*R;
  S_D := Spermine + Spermidine;
  R_percent := 100*(R/0.24);

  // Rate rules:
  Vm_ODC' = 60*(65.06/sam)*Ks_ODC*(1/(1 + Ke_POL*(Spermidine + Spermine))) - Kd_ODC*ANTZ*Vm_ODC;
  Vm_SSAT' = 60*Ks_SSAT*(1 - 1/(1 + Ke_POL*(Spermidine + Spermine))) - Kd_SSAT*(1/(1 + Ke_POL*(Spermidine + Spermine)))*Vm_SSAT;
  Vm_SAMDC' = 60*(65.06/sam)*Ks_SAMDC*(1/(1 + Ke_POL*(Spermidine + Spermine))) - Kd_SAMDC*Vm_SAMDC;
  ANTZ' = 1*Ks_ANTZ*(1 - 1/(1 + Ke_POL*0.01*(Spermidine + Spermine))) - Kd_ANTZ*ANTZ;

  // Reactions:
  b_gsh_decomp: b_gsh -> b_cys + b_gly + b_glu; blood*function_4_b_gsh_decomp_1(b_gsh);  // isVersionOf GO:0006751
  b_gsg_decomp: b_gsg -> 2 b_cys + 2 b_gly + 2 b_glu; blood*function_4_b_gsg_decomp_1(b_gsg);  // isVersionOf GO:0006751
  b_cys_cystine_conv: b_cys -> ; blood*function_4_b_cys_cystine_conv_1(b_cys);  // isVersionOf GO:0019456
  b_cys_loss: b_cys -> ; blood*function_4_b_cys_loss_1(b_cys);  // isVersionOf GO:0009093
  b_glu_loss: b_glu -> ; blood*function_4_b_glu_loss_1(b_glu);  // isVersionOf GO:0006538
  b_gly_loss: b_gly -> ; blood*function_4_b_gly_loss_1(b_gly);  // isVersionOf GO:0006546
  b_gsh_loss: b_gsh -> ; blood*function_4_b_gsh_loss_1(b_gsh);  // isVersionOf GO:0006751
  b_gsg_loss: b_gsg -> ; blood*function_4_b_gsg_loss_1(b_gsg);  // isVersionOf GO:0006751
  b_cys_import: -> b_cys; blood*Constant_flux_reversible(V_oCys_b);  // isVersionOf GO:0042883
  b_gly_import: -> b_gly; blood*Constant_flux_reversible(V_oGly_b);  // isVersionOf GO:0015816
  b_glu_import: -> b_glu; blood*Constant_flux_reversible(V_oGlu_b);  // isVersionOf GO:0015813
  V_c_gshHb: c_gsh -> b_gsh; function_4_V_c_gshHb_1(K_gshHb, V_gshHb, c_gsh, cytosol);  // isVersionOf GO:0034635
  V_c_gshLb: c_gsh -> b_gsh; function_4_V_c_gshLb_1(K_gshLb, V_gshLb, c_gsh, cytosol, h_gshLb);  // isVersionOf GO:0034635
  V_c_gsgHb: c_gsg -> b_gsg; function_4_V_c_gsgHb_1(K_gsgHb, V_gsgHb, c_gsg, cytosol);  // isVersionOf GO:0034635
  V_c_gsgLb: c_gsg -> b_gsg; function_4_V_c_gsgLb_1(K_gsgLb, V_gsgLb, c_gsg, cytosol);  // isVersionOf GO:0034635
  V_b_CYS_c: b_cys -> c_cys; function_4_V_b_CYS_c_1(K_bcysc, V_bcysc, b_cys, cytosol);  // isVersionOf GO:0042883
  V_b_GLU_c: b_glu -> c_glu; function_4_V_b_GLU_c_1(K_bglutc, V_bglutc, b_glu, c_glu, cytosol, k_out_glu);  // isVersionOf GO:0015813
  V_b_GLY_c: b_gly -> c_gly; function_4_V_b_GLY_c_1(K_bglyc, V_bglyc, b_gly, c_gly, cytosol, k_out_gly);  // isVersionOf GO:0015816
  V_b_SER_c: $b_ser -> c_ser; function_4_V_b_SER_c_1(K_bserc, V_bserc, b_ser, c_ser, cytosol, k_out_ser);  // isVersionOf GO:0032329
  V_b_MET_c: $b_met -> met; function_4_V_b_MET_c_1(K_bmetc, V_bmetc, b_met, cytosol, k_out_met, met);  // isVersionOf GO:0015821
  VmFTD: m_10f -> m_thf; mito*function_4_VmFTD_1(K_10f_FTD, Vm_mFTD, m_10f);  // isVersionOf kegg.reaction:R00941
  VmSHMT: m_thf + m_ser -> m_gly + m_2cf; mito*function_4_VmSHMT_1(K_2cf_SHMT, K_gly_SHMT, K_ser_SHMT, K_thf_SHMT, Vf_mSHMT, Vr_mSHMT, m_2cf, m_gly, m_ser, m_thf);  // isVersionOf kegg.reaction:R00945
  VmFTS: m_thf + m_coo -> m_10f; mito*function_4_VmFTS_1(K_10f_mFTS, K_coo_mFTS, K_thf_mFTS, Vf_mFTS, Vr_mFTS, m_10f, m_coo, m_thf);  // isVersionOf kegg.reaction:R00944
  VmNE: m_thf + $HCHO -> m_2cf; function_4_VmNE_1(HCHO, k1_mNE, k2_mNE, m_2cf, m_thf, mito);  // isVersionOf kegg.reaction:R09093
  V_GDC: m_thf + m_gly -> m_2cf + $CO; mito*function_4_V_GDC_1(K_gly_GDC, K_thf_GDC, Vm_GDC, m_gly, m_thf);
  V_SDH: m_thf + src -> m_2cf + m_gly; function_4_V_SDH_1(K_src_SDH, K_thf_SDH, Vm_SDH, m_thf, mito, src);
  V_DMGD: m_thf + dmg -> m_2cf + src; function_4_V_DMGD_1(K_dmg_DMGD, K_thf_DMGD, Vm_DMGD, dmg, m_thf, mito);
  VmMTD: m_2cf -> m_1cf; mito*function_4_VmMTD_1(K_1cf_MTD, K_2cf_MTD, Vf_mMTD, Vr_MTD, m_1cf, m_2cf);
  VmMTCH: m_1cf -> m_10f; mito*function_4_VmMTCH_1(K_10f_MTCH, K_1cf_MTCH, Vf_mMTCH, Vr_MTCH, m_10f, m_1cf);
  VmSERc: 3 m_ser -> c_ser; function_4_VmSERc_1(K_cser, K_mser, V_cser, V_mser, c_ser, cytosol, m_ser, mito);
  VmHCOOHc: 3 m_coo -> c_coo; function_4_VmHCOOHc_1(c_coo, cytosol, k_in_coo, k_out_coo, m_coo, mito);
  VmGLYc: 3 m_gly -> c_gly; function_4_VmGLYc_1(K_cgly, K_mgly, V_cgly, V_mgly, c_gly, cytosol, m_gly, mito);
  V_MS: c_5mf + hcy -> c_thf + met; cytosol*function_4_V_MS_1(H2O2, K_5mf_MS, K_hcy_MS, Ki_MS, Vm_MS, c_5mf, hcy, ssH2O2);  // modifiers: H2O2
  V_DHFR: c_dhf + $NADPH -> c_thf; cytosol*function_4_V_DHFR_1(K_NADPH_DHFR, K_dhf_DHFR, NADPH, Vm_DHFR, c_dhf);
  VcFTD: c_10f -> c_thf; cytosol*function_4_VcFTD_1(K_10f_FTD, Vm_cFTD, c_10f);
  V_PGT: c_10f + $GAR -> aic + c_thf; cytosol*function_4_V_PGT_1(GAR, K_10f_PGT, K_GAR_PGT, Vm_PGT, c_10f);
  VcFTS: c_thf + c_coo -> c_10f; cytosol*function_4_VcFTS_1(K_coo_cFTS, K_thf_cFTS, Vm_cFTS, c_coo, c_thf);
  VcSHMT: c_ser + c_thf -> c_gly + c_2cf; cytosol*function_4_VcSHMT_1(K_2cf_SHMT, K_gly_SHMT, K_ser_SHMT, K_thf_SHMT, Vf_cSHMT, Vr_cSHMT, c_2cf, c_gly, c_ser, c_thf);
  VcNE: c_thf + $HCHO -> c_2cf; function_4_VcNE_1(HCHO, c_2cf, c_thf, cytosol, k1_cNE, k2_cNE);
  V_TS: $DUMP + c_2cf -> c_dhf; cytosol*function_4_V_TS_1(DUMP, K_2cf_TS, K_DUMP_TS, Vm_TS, c_2cf);  // isVersionOf kegg.reaction:R02101
  V_MTHFR: c_2cf + $NADPH -> c_5mf; cytosol*function_4_V_MTHFR_1(K_2cf_MTHFR, K_NADPH_MTHFR, NADPH, Vm_MTHFR, c_2cf, sah, sam);  // modifiers: sah, sam; isVersionOf kegg.reaction:R01220
  VcMTD: c_2cf -> c_1cf + $NADPH; cytosol*function_4_VcMTD_1(K_1cf_MTD, K_2cf_MTD, Vf_cMTD, Vr_cMTD, c_1cf, c_2cf);  // isVersionOf kegg.reaction:R01220
  VcMTCH: c_1cf -> c_10f; cytosol*function_4_VcMTCH_1(K_10f_MTCH, K_1cf_MTCH, Vf_cMTCH, Vr_MTCH, c_10f, c_1cf);  // isVersionOf kegg.reaction:R01655
  V_ART: c_10f + aic -> c_thf; cytosol*function_4_V_ART_1(K_10f_ART, K_aic_ART, Vm_ART, aic, c_10f);  // isVersionOf kegg.reaction:R04560
  V_BHMT: hcy + $BET -> met + dmg; function_4_V_BHMT_1(BET, H2O2, K_bet_BHMT, K_hcy_BHMT, Ki_BHMT, Vm_BHMT, cytosol, hcy, sah, sam, ssH2O2);  // modifiers: H2O2, sah, sam; isVersionOf kegg.reaction:R02821
  V_MATI: met -> sam; cytosol*function_4_V_MATI_1(Ki_MAT1, Km_MAT1, Vm_MAT1, c_gsg, met, sam);  // modifiers: c_gsg; isVersionOf kegg.reaction:R00650
  V_MATIII: met -> sam; cytosol*function_4_V_MATIII_1(Ka_MAT3, Ki_MAT3, Km_MAT3, Vm_MAT3, c_gsg, met, sam);  // modifiers: c_gsg; isVersionOf kegg.reaction:R00650
  V_GNMT: sam + c_gly -> sah + src; function_4_V_GNMT_1(K_gly_GNMT, K_sam_GNMT, Ki_GNMT, Vm_GNMT, c_5mf, c_gly, cytosol, sah, sam);  // modifiers: c_5mf; isVersionOf kegg.reaction:R00367
  V_DNMT: sam -> sah; cytosol*function_4_V_DNMT_1(Ki_DNMT, Km_DNMT, Vm_DNMT, sah, sam);  // isVersionOf kegg.reaction:R00649
  V_SAHH: sah -> hcy; cytosol*function_4_V_SAHH_1(K_hcy_SAHH, K_sah_SAHH, Vf_SAHH, Vr_SAHH, hcy, sah);  // isVersionOf kegg.reaction:R00192
  gluconeogenesis_ser: c_ser -> ; cytosol*function_4_gluconeogenesis_ser_1(c_ser);  // isVersionOf kegg.reaction:R0006565
  V_CBS: hcy + c_ser -> cyt; cytosol*function_4_V_CBS_1(H2O2, K_hcy_CBS, K_ser_CBS, Ka_CBS, Vm_CBS, c_ser, hcy, sah, sam, ssH2O2);  // modifiers: H2O2, sah, sam; isVersionOf kegg.reaction:R01289
  V_CTGL: cyt -> c_cys; cytosol*function_4_V_CTGL_1(K_cyt_CTGL, Vm_CTGL, cyt);  // isVersionOf kegg.reaction:R00894
  V_GCS: c_cys + c_glu -> glc; cytosol*function_4_V_GCS_1(H2O2, K_cys_GCS, K_glu_GCS, Ka_GCS, Ke_GCS, Ki_GCS, Kp_GCS, Vm_GCS, c_cys, c_glu, c_gsh, glc, ssH2O2);  // modifiers: H2O2, c_gsh; isVersionOf kegg.reaction:R00894
  cys_usage: c_cys -> ; cytosol*function_4_cys_usage_1(c_cys);  // isVersionOf GO:0009093
  c_glu_usage: c_glu -> ; cytosol*function_4_c_glu_usage_1(c_glu);  // isVersionOf GO:0006538
  V_GS: glc + c_gly -> c_gsh; cytosol*function_4_V_GS_1(K_glc_GS, K_gly_GS, Ke_GS, Kp_GS, Vm_GS, c_gly, c_gsh, glc);  // isVersionOf kegg.reaction:R00497
  V_GPX: 2 c_gsh + $H2O2 -> c_gsg; cytosol*function_4_V_GPX_1(H2O2, K_H2O2_GPX, K_gsh_GPX, Vm_GPX, c_gsh);  // isVersionOf kegg.reaction:R00274
  V_GR: c_gsg + $NADPH -> 2 c_gsh; cytosol*function_4_V_GR_1(K_NADPH_GR, K_gsg_GR, NADPH, Vm_GR, c_gsg);  // isVersionOf kegg.reaction:R00115
  c_gsh_degr: c_gsh -> ; cytosol*function_4_c_gsh_degr_1(c_gsh);  // isVersionOf GO:0006751
  c_gsg_degr: c_gsg -> ; cytosol*function_4_c_gsg_degr_1(c_gsg);  // isVersionOf GO:0006751
  V_ODC: $Ornithine -> Putrescine; cytosol*function_4_V_ODC_1(Kipodc, Kmodc, Vm_ODC, Putrescine, Ornithine);
    Kipodc = 1300; Kmodc = 60;
  V_SAMDC: sam -> dcSAM; cytosol*function_4_V_SAMDC_1(Kapsamdc, Kiasamdc, Kissamdc, Kmsamdc, Vm_SAMDC, sam, dcSAM, Putrescine, Spermine);  // modifiers: Spermine, Putrescine
    Kapsamdc = 0.5; Kiasamdc = 2.5; Kissamdc = 500; Kmsamdc = 50;
  V_SSAT_S: Spermine + Acetyl_CoA -> Acetylspermine + CoA; cytosol*function_4_V_SSAT_S_1(C, V_SSAT_S_Kmaccoassat, V_SSAT_S_Kmcoassat, V_SSAT_S_Kmdssat, V_SSAT_S_Kmsssat, Vm_SSAT, Spermine, Spermidine, Acetyl_CoA, CoA);  // modifiers: Spermidine
    C = 4.44; V_SSAT_S_Kmaccoassat = 1.5; V_SSAT_S_Kmcoassat = 40; V_SSAT_S_Kmdssat = 130; V_SSAT_S_Kmsssat = 35;
  V_SSAT_D: Spermidine + Acetyl_CoA -> Acetylspermidine + CoA; cytosol*function_4_V_SSAT_D_1(V_SSAT_D_Kmaccoassat, V_SSAT_D_Kmcoassat, V_SSAT_D_Kmdssat, V_SSAT_D_Kmsssat, Vm_SSAT, Spermine, Spermidine, Acetyl_CoA, CoA);  // modifiers: Spermine
    V_SSAT_D_Kmaccoassat = 1.5; V_SSAT_D_Kmcoassat = 40; V_SSAT_D_Kmdssat = 130; V_SSAT_D_Kmsssat = 35;
  V_PAO_AD: Acetylspermidine -> Putrescine; cytosol*function_4_V_PAO_AD_1(V_PAO_AD_Kmadpao, V_PAO_AD_Kmaspao, V_PAO_AD_Kmdpao, V_PAO_AD_Kmspao, V_PAO_AD_Vmpao, Spermine, Spermidine, Acetylspermine, Acetylspermidine);  // modifiers: Acetylspermine, Spermidine, Spermine
    V_PAO_AD_Kmadpao = 14; V_PAO_AD_Kmaspao = 0.6; V_PAO_AD_Kmdpao = 50; V_PAO_AD_Kmspao = 15; V_PAO_AD_Vmpao = 621;
  V_PAO_AS: Acetylspermine -> Spermidine; cytosol*function_4_V_PAO_AS_1(V_PAO_AS_Kmadpao, V_PAO_AS_Kmaspao, V_PAO_AS_Kmdpao, V_PAO_AS_Kmspao, V_PAO_AS_Vmpao, Spermine, Spermidine, Acetylspermine, Acetylspermidine);  // modifiers: Acetylspermidine, Spermine
    V_PAO_AS_Kmadpao = 14; V_PAO_AS_Kmaspao = 0.6; V_PAO_AS_Kmdpao = 50; V_PAO_AS_Kmspao = 15; V_PAO_AS_Vmpao = 621;
  V_SPDS: dcSAM + Putrescine -> Spermidine; cytosol*function_4_V_SPDS_1(KaSpds, Kiaspds, Kidspds, Kpspds, Vmspds, dcSAM, Putrescine, Spermidine);
    KaSpds = 0.3; Kiaspds = 0.8; Kidspds = 100; Kpspds = 40; Vmspds = 657;
  V_SPMS: dcSAM + Spermidine -> Spermine; cytosol*function_4_V_SPMS_1(Kaspms, Kdspms, Kiaspms, Kisspms, Vmspms, dcSAM, Spermine, Spermidine);
    Kaspms = 0.1; Kdspms = 60; Kiaspms = 0.06; Kisspms = 25; Vmspms = 193.8;
  V_COA: Acetyl_CoA => CoA; cytosol*K_coa*Acetyl_CoA;
  V_ACCOA: CoA => Acetyl_CoA; cytosol*K_accoa*CoA;
  V_PUT_efflux: Putrescine => ; cytosol*V_PUT_efflux_k1*Putrescine;
    V_PUT_efflux_k1 = 0.6;
  V_AD_efflux: Acetylspermidine => ; cytosol*V_AD_efflux_k1*Acetylspermidine;
    V_AD_efflux_k1 = 0.6;
  V_MATII: met -> sam; cytosol*function_4_V_MATII(Ki, Km, met, Vm_MATII, sam);
    Ki = 50; Km = 4;

  // Unit definitions:
  unit time = 3600 second;
  unit substance = 1e-6 mole;
end
