// SBML level 2 version 3

model AbetaAggregation()

  // Compartments:
  compartment cell = 1;

  // Species:
  substanceOnly species Abeta in cell = 0; Abeta is "AbetaMonomer";
  substanceOnly species AbDim in cell = 0; AbDim is "AbetaDimer";
  substanceOnly species AbP in cell = 0; AbP is "AbetaPlaque";
  substanceOnly species $Source in cell = 1;
  substanceOnly species $Sink in cell = 1;
  substanceOnly species Nep in cell = 1000; Nep is "Neprilysin";

  // Parameters:
  kprod = 1.86e-5;
  kdeg = 2.1e-5;
  kdimer = 1.1783e-7;
  kdedimer = 8.4655e-6;
  kdisagg = 5.4357e-5;
  kpf = 2.785e-6;
  kpg = 0.00574;
  kpghalf = 4;
  kdegNep = 1.8e-10;

  // Reactions:
  Abetaproduction: $Source => Abeta; kprod*Source;
  AbetaDegradation: Abeta + Nep => $Sink + Nep; kdeg*Abeta*Nep*0.001;
  AbetaDimerisation: 2 Abeta => AbDim; kdimer*Abeta*(Abeta - 1)*0.5;
  AbetaDedimerisation: AbDim => 2 Abeta; kdedimer*AbDim;
  AbetaPlaqueFormation: 2 AbDim => 4 AbP; kpf*AbDim*(AbDim - 1)*0.5;
  AbetaPlaqueGrowth: Abeta + AbP => 2 AbP; kpg*Abeta*AbP^2/(kpghalf^2 + AbP^2);
  AbetaDisaggregation: AbP => Abeta; kdisagg*AbP;
  NepDegradation: Nep => $Sink; kdegNep*Nep;

  // Unit definitions:
  unit substance = item;
end
