// SBML level 2 version 4

model MODEL1305280000()
  // Croft2013 - GPCR-RGS interaction that compartmentalizes RGS activity
  // Through modelling studies, the classic quaternary complex (ligand-GPCR-G-RGS) has been extended to include an additional layer of regulation through GPCR-RGS interactions, which facilitate the compartmentalization of RGS activity into the plasma membrane and non-plasma compartments.
  // This model is described in the article:
  // A physiologically required G protein-coupled receptor (GPCR)-regulator of G protein signaling (RGS) interaction that compartmentalizes RGS activity.
  // Croft W, Hill C, McCann E, Bond M, Esparza-Franco M, Bennett J, Rand D, Davey J, Ladds G.
  // J Biol Chem. 2013 Sep 20;288(38):27327-42.
  // Abstract:
  // G protein-coupled receptors (GPCRs) can interact with regulator of G protein signaling (RGS) proteins. However, the effects of such interactions on signal transduction and their physiological relevance have been largely undetermined. Ligand-bound GPCRs initiate by promoting exchange of GDP for GTP on the Gα subunit of heterotrimeric G proteins. Signaling is terminated by hydrolysis of GTP to GDP through intrinsic GTPase activity of the Gα subunit, a reaction catalyzed by RGS proteins. Using yeast as a tool to study GPCR signaling in isolation, we define an interaction between the cognate GPCR (Mam2) and RGS (Rgs1), mapping the interaction domains. This reaction tethers Rgs1 at the plasma membrane and is essential for physiological signaling response. In vivo quantitative data inform the development of a kinetic model of the GTPase cycle, which extends previous attempts by including GPCR-RGS interactions. In vivo and in silico data confirm that GPCR-RGS interactions can impose an additional layer of regulation through mediating RGS subcellular localization to compartmentalize RGS activity within a cell, thus highlighting their importance as potential targets to modulate GPCR signaling pathways.
  // Author's comment on reproducing the plots:
  // To reproduce dose-response plots in the publication, the model is simulated with 12 different ligand concentrations (see parameter Ligand_conc).
  // For each ligand concentration, a single value corresponding to total amount of output must be obtained, by calculating the area under the curve of the trajectory of species z3, from time=0 to time=30.
  // These total output values are then used to build a dose-response plot (authors used GraphPad Prism).
  // Mutant strains are simulated with alternative parameter values or initial conditions specified in the Supplementary Material.
  // This model is hosted on BioModels Database and identified by: BIOMD0000000479 .
  // To cite BioModels Database, please use: BioModels Database: An enhanced, curated and annotated resource for published quantitative kinetic models .
  // To the extent possible under law, all copyright and related or neighbouring rights to this encoded model have been dedicated to the public domain worldwide. Please refer to CC0 Public Domain Dedication for more information.
  // biomodels.db:MODEL1305280000
  // biomodels.db:BIOMD0000000479
  // isDescribedBy pubmed:23900842
  // isDerivedFrom biomodels.db:BIOMD0000000439 pubmed:15313578
  // hasTaxon taxonomy:4932
  // isVersionOf GO:0043087

  // Compartments:
  compartment compartment = 1; compartment is "cell";  // isVersionOf GO:0005623

  // Species:
  species L in compartment = 0;  // substance in nanomole
  species R in compartment = 205;  // substance in nanomole; isVersionOf interpro:IPR000239
  species LR in compartment = 0;  // substance in nanomole; hasPart interpro:IPR000239
  species Gabg in compartment = 0;  // substance in nanomole; hasPart interpro:IPR001019 interpro:IPR001632 interpro:IPR001770
  species RGabg in compartment = 0;  // substance in nanomole; hasPart interpro:IPR000239 interpro:IPR001019 interpro:IPR001632 interpro:IPR001770
  species LRGabg in compartment = 0;  // substance in nanomole; hasPart interpro:IPR000239 interpro:IPR001019 interpro:IPR001632 interpro:IPR001770
  species RRGSm in compartment = 0;  // substance in nanomole; hasPart interpro:IPR000239 interpro:IPR000342; occursIn FMA:63841
  species LRRGSm in compartment = 0;  // substance in nanomole; occursIn FMA:63841; hasPart interpro:IPR000239 interpro:IPR000342
  species RRGSmGabg in compartment = 0;  // substance in nanomole; hasPart interpro:IPR000239 interpro:IPR000342 interpro:IPR001019 interpro:IPR001632; occursIn FMA:63841
  species LRRGSmGabg in compartment = 0;  // substance in nanomole; occursIn FMA:63841; hasPart interpro:IPR000239 interpro:IPR001019 interpro:IPR000342 interpro:IPR001632
  species GaGTP in compartment = 0;  // substance in nanomole; hasPart CHEBI:15996 interpro:IPR001019
  species Gbg in compartment = 205;  // substance in nanomole; hasPart interpro:IPR001632 interpro:IPR001770
  species Effector in compartment = 305;  // substance in nanomole; isVersionOf CHEBI:35224
  species GaGTPEffector in compartment = 0;  // substance in nanomole; hasPart CHEBI:15996 interpro:IPR001019; isVersionOf CHEBI:35224
  species RGSc in compartment = 60;  // substance in nanomole; occursIn FMA:66835; isVersionOf interpro:IPR000342
  species RGSm in compartment = 0;  // substance in nanomole; occursIn FMA:63841; isVersionOf interpro:IPR000342
  species RGSmGaGTP in compartment = 0;  // substance in nanomole; occursIn FMA:63841; hasPart CHEBI:15996 interpro:IPR000342 interpro:IPR001019
  species GaGTPEffectorOFF in compartment = 0;  // substance in nanomole; hasPart CHEBI:15996 interpro:IPR001019; hasProperty PATO:0002355; isVersionOf CHEBI:35224
  species RGSmGaGTPEffectorOFF in compartment = 0;  // substance in nanomole; isVersionOf CHEBI:35224; hasPart CHEBI:15996 interpro:IPR000342 interpro:IPR001019; hasProperty PATO:0002355
  species GaGDPP in compartment = 0;  // substance in nanomole; hasPart CHEBI:17552 interpro:IPR001019; hasProperty PATO:0002220
  species LRRGSmGaGTP in compartment = 0;  // substance in nanomole; hasPart CHEBI:15996 interpro:IPR000342 interpro:IPR000239 interpro:IPR001019
  species RRGSmGaGTP in compartment = 0;  // substance in nanomole; hasPart CHEBI:15996 interpro:IPR000239 interpro:IPR000342 interpro:IPR001019
  species LRRGSmGaGTPEffectorOFF in compartment = 0;  // substance in nanomole; hasPart CHEBI:15996 interpro:IPR000239 interpro:IPR001019 interpro:IPR000342; isVersionOf CHEBI:35224; hasProperty PATO:0002355
  species GaGDP in compartment = 205;  // substance in nanomole; hasPart CHEBI:17552 interpro:IPR001019
  species P in compartment = 0;  // substance in nanomole; isVersionOf CHEBI:18367
  species z1 in compartment = 0;  // substance in nanomole
  species z2 in compartment = 0;  // substance in nanomole
  species z3 in compartment = 0;  // substance in nanomole

  // Parameters:
  ka = 1.5 FirstOrder;
  // Dose-response plots use: 0.1, 1, 3.16228, 10, 31.6228, 100, 316.228, 1000, 3162.28, 10000, 31622.8, 100000
  Ligand_conc = 0.1 nanoMolar;

  // Reactions:
  Receptor_Ligand_association: L + R => LR; compartment*L*R*k1; Receptor_Ligand_association is "Receptor-Ligand association";
    k1 = 0.0025 SecondOrder;
  Receptor_Gprotein_association: R + Gabg => RGabg; compartment*R*Gabg*k2; Receptor_Gprotein_association is "Receptor-Gprotein association";
    k2 = 0.005 SecondOrder;
  LR_Gprotein_association: LR + Gabg => LRGabg; compartment*LR*Gabg*k3; LR_Gprotein_association is "LR-Gprotein association";
    k3 = 0.02 SecondOrder;
  Ligand_RGabg_association: L + RGabg => LRGabg; compartment*L*RGabg*k4; Ligand_RGabg_association is "Ligand-RGabg association";
    k4 = 0.005 SecondOrder;
  Ligand_RRGSm_association: L + RRGSm => LRRGSm; compartment*L*RRGSm*k5; Ligand_RRGSm_association is "Ligand-RRGSm association";
    k5 = 0.005 SecondOrder;
  RRGSm_Gprotein_association: RRGSm + Gabg => RRGSmGabg; compartment*RRGSm*Gabg*k6; RRGSm_Gprotein_association is "RRGSm-Gprotein association";
    k6 = 0.005 SecondOrder;
  LRRGSm_Gprotein_association: LRRGSm + Gabg => LRRGSmGabg; compartment*LRRGSm*Gabg*k7; LRRGSm_Gprotein_association is "LRRGSm-Gprotein association";
    k7 = 0.02 SecondOrder;
  Ligand_RRGSmGabg_association: L + RRGSmGabg => LRRGSmGabg; compartment*L*RRGSmGabg*k8; Ligand_RRGSmGabg_association is "Ligand-RRGSmGabg association";
    k8 = 0.005 SecondOrder;
  Gprotein_activation_by_LR: LRGabg => LR + GaGTP + Gbg; compartment*LRGabg*k9;
    k9 = 50 FirstOrder;
  Gprotein_spontaneous_activation: Gabg => GaGTP + Gbg; compartment*Gabg*k10;
    k10 = 0.2 FirstOrder;
  Gprotein_activation_by_LRRGSm: LRRGSmGabg => GaGTP + Gbg + LRRGSm; compartment*LRRGSmGabg*k11;
    k11 = 40 FirstOrder;
  Effector_GaGTP_association: Effector + GaGTP => GaGTPEffector; compartment*Effector*GaGTP*k12; Effector_GaGTP_association is "Effector-GaGTP association";
    k12 = 10 SecondOrder;
  RGS_in_cytosol_moves_to_membrane: RGSc => RGSm; compartment*RGSc*k13;
    k13 = 0.0005 FirstOrder;
  RGS_in_membrane_moves_to_cytosol: RGSm => RGSc; compartment*RGSm*k14;
    k14 = 0.005 FirstOrder;
  R15: R + RGSc => RRGSm; compartment*R*RGSc*k15; R15 is "Receptor recruits RGSc to membrane";
    k15 = 0.1 SecondOrder;
  R_RGSm_dissociation: RRGSm => R + RGSm; compartment*RRGSm*k16; R_RGSm_dissociation is "R-RGSm dissociation";
    k16 = 100 FirstOrder;
  LR_recruits_RGSc_to_membrane: LR + RGSc => LRRGSm; compartment*LR*RGSc*k17;
    k17 = 0.1 SecondOrder;
  LR_RGSm_dissociation: LRRGSm => LR + RGSm; compartment*LRRGSm*k18; LR_RGSm_dissociation is "LR-RGSm dissociation";
    k18 = 100 FirstOrder;
  RGabg_recruits_RGSc_to_membrane: RGabg + RGSc => RRGSmGabg; compartment*RGabg*RGSc*k19;
    k19 = 0.1 SecondOrder;
  RRGSmGabg_dissociation: RRGSmGabg => RGabg + RGSm; compartment*RRGSmGabg*k20;
    k20 = 0.1 FirstOrder;
  LRGabg_recruits_RGSc_to_membrane: LRGabg + RGSc => LRRGSmGabg; compartment*LRGabg*RGSc*k21;
    k21 = 0.1 SecondOrder;
  GaGTP_recruits_RGSc_to_membrane: GaGTP + RGSc => RGSmGaGTP; compartment*GaGTP*RGSc*k22;
    k22 = 60 SecondOrder;
  RGSmGaGTP_dissociation: RGSmGaGTP => GaGTP + RGSc; compartment*RGSmGaGTP*k23;
    k23 = 0.05 FirstOrder;
  R24: GaGTPEffectorOFF + RGSc => RGSmGaGTPEffectorOFF; compartment*GaGTPEffectorOFF*RGSc*k24; R24 is "GaGTPEffectorOFF recruits RGS from cytosol";
    k24 = 0.0001 SecondOrder;
  Effector_turns_off: GaGTPEffector => GaGTPEffectorOFF; compartment*GaGTPEffector*k25;
    k25 = 1 FirstOrder;
  GaGTP_hydrolyzes_GTP: GaGTP => GaGDPP; compartment*GaGTP*k26;
    k26 = 0.005 FirstOrder;
  GaGTP_RGSm_association: GaGTP + RGSm => RGSmGaGTP; compartment*GaGTP*RGSm*k27; GaGTP_RGSm_association is "GaGTP-RGSm association";
    k27 = 500 SecondOrder;
  RGSmGaGTP_hydrolyzes_GTP: RGSmGaGTP => GaGDPP + RGSc; compartment*RGSmGaGTP*k28;
    k28 = 2.5 FirstOrder;
  GaGTP_LRRGSm_association: GaGTP + LRRGSm => LRRGSmGaGTP; compartment*GaGTP*LRRGSm*k29; GaGTP_LRRGSm_association is "GaGTP-LRRGSm association";
    k29 = 100 SecondOrder;
  LRRGSmGaGTP_hydrolyzes_GTP: LRRGSmGaGTP => GaGDPP + LRRGSm; compartment*LRRGSmGaGTP*k30;
    k30 = 2.5 FirstOrder;
  GaGTP_RRGSm_association: GaGTP + RRGSm => RRGSmGaGTP; compartment*GaGTP*RRGSm*k31; GaGTP_RRGSm_association is "GaGTP-RRGSm association";
    k31 = 0.5 SecondOrder;
  RRGSmGaGTP_hydrolyzes_GTP: RRGSmGaGTP => GaGDPP + RRGSm; compartment*RRGSmGaGTP*k32;
    k32 = 0.5 FirstOrder;
  GaGTPEffectorOFF_hydrolyzes_GTP: GaGTPEffectorOFF => GaGDPP + Effector; compartment*GaGTPEffectorOFF*k33;
    k33 = 0.005 FirstOrder;
  R34: GaGTPEffectorOFF + RGSm => RGSmGaGTPEffectorOFF; compartment*GaGTPEffectorOFF*RGSm*k34; R34 is "GaGTPEffectorOFF-RGSm association";
    k34 = 50 SecondOrder;
  R35: RGSmGaGTPEffectorOFF => GaGDPP + RGSc + Effector; compartment*RGSmGaGTPEffectorOFF*k35; R35 is "RGSmGaGTPEffectorOFF hydrolyzes GTP";
    k35 = 0.3 FirstOrder;
  R36: GaGTPEffectorOFF + LRRGSm => LRRGSmGaGTPEffectorOFF; compartment*GaGTPEffectorOFF*LRRGSm*k36; R36 is "GaGTPEffectorOFF-LRRGSm association";
    k36 = 50 SecondOrder;
  R37: LRRGSmGaGTPEffectorOFF => GaGDPP + LRRGSm + Effector; compartment*LRRGSmGaGTPEffectorOFF*k37; R37 is "LRRGSmGaGTPEffectorOFF hydrolyzes GTP";
    k37 = 0.3 FirstOrder;
  Phosphate_release: GaGDPP => GaGDP + P; compartment*GaGDPP*k38;
    k38 = 1000 FirstOrder;
  Gprotein_subunits_association: GaGDP + Gbg => Gabg; compartment*GaGDP*Gbg*k39;
    k39 = 1000 SecondOrder;
  Phosphate_degradation: P => ; compartment*P*k40;
    k40 = 10 FirstOrder;
  Delay_1: => z1; compartment*GaGTPEffector*ka;  // modifiers: GaGTPEffector
  Delay_2: z1 => z2; compartment*z1*ka;
  Delay_3: z2 => z3; compartment*z2*ka;
  Final_output: z3 => ; compartment*z3*ka;

  // Events:
  Ligand_addition: at (time >= 14): L = L + Ligand_conc;

  // Unit definitions:
  unit nanoMolar = 1e-9 mole / litre; nanoMolar is "nM";
  unit hour = 3600 second; hour is "hr";
  unit FirstOrder = 1 / (3600 second); FirstOrder is "1/hr";
  unit SecondOrder = litre / (1e-9 mole * 3600 second); SecondOrder is "1/(nM*hr)";
  unit nanomole = 1e-9 mole; nanomole is "nm";
end
