// SBML level 3 version 1

model Schittler2010_Osteochondroswitch()

  // Compartments:
  compartment default_compartment = 1;

  // Species:
  species P in default_compartment = 12.03;
  species O in default_compartment = 0.14;
  species C in default_compartment = 0.14;

  // Parameters:
  aP = 0.2;
  n = 2;
  bP = 0.5;
  mP = 10;
  zD = 0;
  cPP = 0.1;
  kP = 0.1;
  aO = 0.1;
  bO = 0.9;
  zO = 0;
  mO = 1;
  cOC = 0.1;
  cOP = 0.5;
  cOO = 0.1;
  kO = 0.1;
  aC = 0.1;
  bC = 1;
  zC = 0;
  mC = 1;
  cCO = 0.1;
  cCP = 0.5;
  cCC = 0.1;
  kC = 0.1;

  // Reactions:
  a1: -> P; (aP*P^n + bP)/(mP + zD + cPP*P^n);
  a2: P -> ; kP*P;
  a3: -> O; (aO*O^n + bO + zO)/(mO + cOC*C^n + cOP*P^n + cOO*O^n);  // modifiers: P, C
  a4: O -> ; kO*O;
  a5: -> C; (aC*C^n + bC + zC)/(mC + cCO*O^n + cCP*P^n + cCC*C^n);  // modifiers: P, O
  a6: C -> ; kC*C;

  // Events:
  _E0: at (100) after (P > 12.03): zD = 0.8;
  _E2: at (500) after (P > 12.03): zO = 1;
  _E1: at (800) after (P > 12.03): zO = 0, zD = 0;
end
