// SBML level 2 version 4

model MODEL1311290001()
  // Messiha2013 - combined glycolysis and pentose phosphate pathway model
  // BIOMD0000000502 and MODEL1303260018 are combined to examine the response to oxidative stress.
  // This model is described in the article:
  // Enzyme characterisation and kinetic modelling of pentose phosphate pathway in yeast.
  // Hanan L. Messiha, Edward Kent, Naglis Malys, Kathleen M. Carroll, Pedro Mendes, Kieran Smallbone
  // PeerJ PrePrints 1:e146v2
  // Abstract:
  // We present the quantification and kinetic characterisation of the enzymes of the pentose phosphate pathway in Saccharomyces cerevisiae. The data are combined into a mathematical model that describes the dynamics of this system and allows for the predicting changes in metabolite concentrations and fluxes in response to perturbations. We use the model to study the response of yeast to a glucose pulse. We then combine the model with an existing glycolysis one to study the effect of oxidative stress on carbohydrate metabolism. The combination of these two models was made possible by the standardized enzyme kinetic experiments carried out in both studies. This work demonstrates the feasibility of constructing larger network models by merging smaller pathway models.
  // This model is hosted on BioModels Database and identified by: BIOMD0000000503 .
  // To cite BioModels Database, please use: BioModels Database: An enhanced, curated and annotated resource for published quantitative kinetic models .
  // To the extent possible under law, all copyright and related or neighbouring rights to this encoded model have been dedicated to the public domain worldwide. Please refer to CC0 Public Domain Dedication for more information.
  // biomodels.db:MODEL1311290001
  // biomodels.db:BIOMD0000000503
  // isDescribedBy doi:10.7287%2Fpeerj.preprints.146v2
  // isDerivedFrom biomodels.db:BIOMD0000000502 biomodels.db:MODEL1303260018
  // hasPart GO:0006098 GO:0006096
  // hasProperty mamo:MAMO_0000046

  // Compartments:
  compartment cell = 1;  // GO:0005829
  compartment extracellular = 1;  // GO:0005576

  // Species:
  species ADP in cell = 1.29;  // CHEBI:16761 kegg.compound:C00008
  species ATP in cell = 4.29;  // CHEBI:15422 kegg.compound:C00002
  species AcAld in cell = 0.1781406;  // CHEBI:15343 kegg.compound:C00084
  species BPG in cell = 0.0007368735;  // CHEBI:16001 kegg.compound:C00236
  species DHAP in cell = 1.161377;  // CHEBI:16108 kegg.compound:C00111
  species F16bP in cell = 4.583219;  // CHEBI:28013 kegg.compound:C05378
  species F6P in cell = 0.2354412;  // CHEBI:16084 kegg.compound:C05345
  species G1P in cell = 0.5392485;  // CHEBI:16077
  species G3P in cell = 0.2740029;  // CHEBI:15978 kegg.compound:C00093
  species G6P in cell = 0.7724832;  // CHEBI:17665 kegg.compound:C00668
  species GAP in cell = 0.315891;  // CHEBI:29052 kegg.compound:C00118
  species GLC in cell = 6.280002;  // CHEBI:4167 kegg.compound:C00031
  species NAD in cell = 1.50329;  // CHEBI:15846 kegg.compound:C00003
  species P2G in cell = 0.06773791;  // CHEBI:17835 kegg.compound:C00631
  species P3G in cell = 0.469825;  // CHEBI:17794 kegg.compound:C00197
  species PEP in cell = 0.6100054;  // CHEBI:18021 kegg.compound:C00074
  species PYR in cell = 2.108471;  // CHEBI:15361 kegg.compound:C00022
  species T6P in cell = 0.02;  // CHEBI:18283
  species UDP in cell = 0.2815;  // CHEBI:17659
  species UTP in cell = 0.6491;  // CHEBI:46398
  species $AMP in cell;  // CHEBI:16027 kegg.compound:C00020
  species $NADH in cell;  // CHEBI:16908 kegg.compound:C00004
  species $UDG in cell;  // CHEBI:18066
  species $ACE in cell = 223.0003;  // CHEBI:30089
  species $EtOH in cell = 221.8903;  // CHEBI:16236 kegg.compound:C00469
  species $F26bP in cell = 0.003;  // CHEBI:28602 kegg.compound:C00665
  species $GLCx in extracellular = 74;  // CHEBI:4167 kegg.compound:C00031
  species $GLY in cell = 0.15;  // CHEBI:17754 kegg.compound:C00116
  species $SUC in cell = 0;  // CHEBI:30031 kegg.compound:C00042
  species $TRH in cell = 0.01538789;  // CHEBI:16551 kegg.compound:C01083
  species $ADH1 in cell = 0.1639085;  // isEncodedBy sgd:S000005446; uniprot:P00330
  species $CDC19 in cell = 2.04839;  // isEncodedBy sgd:S000000036; uniprot:P00549
  species $ENO1 in cell = 0.686372;  // isEncodedBy sgd:S000003486; uniprot:P00924
  species $ENO2 in cell = 1.974446;  // isEncodedBy sgd:S000001217; uniprot:P00925
  species $FBA1 in cell = 1.338395;  // isEncodedBy sgd:S000001543; uniprot:P14540
  species $GLK1 in cell = 0.04508696;  // isEncodedBy sgd:S000000545; uniprot:P17709
  species $GPD1 in cell = 0.006835112;  // isEncodedBy sgd:S000002180; uniprot:A5YWB0
  species $GPD2 in cell = 0.0007934057;  // isEncodedBy sgd:S000005420; uniprot:P41911
  species $GPM1 in cell = 0.7300003;  // isEncodedBy sgd:S000001635; uniprot:P00950
  species $HOR2 in cell = 0.00547347;  // isEncodedBy sgd:S000000864; uniprot:P40106
  species $HXK1 in cell = 0.01678075;  // isEncodedBy sgd:S000001949; uniprot:P04806
  species $HXK2 in cell = 0.06133135;  // isEncodedBy sgd:S000003222; uniprot:P04807
  species $PDC1 in cell = 1.067811;  // isEncodedBy sgd:S000004034; uniprot:P06169
  species $PDC5 in cell = 0.01235474;  // isEncodedBy sgd:S000004124; uniprot:P16467
  species $PDC6 in cell = 0.006540864;  // isEncodedBy sgd:S000003319; uniprot:P26263
  species $PFK1 in cell = 0.04678503;  // isEncodedBy sgd:S000003472; uniprot:P16861
  species $PFK2 in cell = 0.03903662;  // isEncodedBy sgd:S000004818; uniprot:P16862
  species $PGI1 in cell = 0.1382907;  // isEncodedBy sgd:S000000400; uniprot:P12709
  species $PGK1 in cell = 0.2576569;  // isEncodedBy sgd:S000000605; uniprot:P00560
  species $PGM1 in cell = 0.003262295;  // uniprot:P33401; isEncodedBy sgd:S000001610
  species $PGM2 in cell = 0.001258689;  // uniprot:P37012; isEncodedBy sgd:S000004711
  species $RHR2 in cell = 0.05118048;  // isEncodedBy sgd:S000001315; uniprot:P41277
  species $TDH1 in cell = 0.3508646;  // isEncodedBy sgd:S000003588; uniprot:P00360
  species $TDH3 in cell = 4.204405;  // isEncodedBy sgd:S000003424; uniprot:P00359
  species $TPI1 in cell = 0.2943578;  // isEncodedBy sgd:S000002457; uniprot:P00942
  species $TPS1 in cell = 0.003392482;  // uniprot:Q00764; isEncodedBy sgd:S000000330
  species $TPS2 in cell = 0.002659852;  // uniprot:P31688; isEncodedBy sgd:S000002481
  species $UGP1 in cell = 0.006202114;  // uniprot:P32861; isEncodedBy sgd:S000001518
  species E4P in cell = 0.029;  // CHEBI:16897 kegg.compound:C00279
  species G6L in cell = 0.1;  // CHEBI:57955 kegg.compound:C01236
  species NADPH in cell = 0.16;  // CHEBI:57783 kegg.compound:C00005
  species P6G in cell = 0.25;  // CHEBI:58759 kegg.compound:C00345
  species R5P in cell = 0.118;  // CHEBI:18189 kegg.compound:C03736
  species Ru5P in cell = 0.033;  // CHEBI:58121 kegg.compound:C00199
  species S7P in cell = 0.082;  // CHEBI:57483 kegg.compound:C05382
  species X5P in cell = 0.041;  // CHEBI:57737 kegg.compound:C00231
  species $NADP in cell;  // CHEBI:58349 kegg.compound:C00006
  species $GND1 in cell = 0.013;  // uniprot:P38720; isEncodedBy sgd:S000001226 sce:YHR183W
  species $GND2 in cell = 0.003;  // uniprot:P53319; isEncodedBy sgd:S000003488 sce:YGR256W
  species $NQM1 in cell = 0.02;  // uniprot:P53228; isEncodedBy sgd:S000003275 sce:YGR043C
  species $RKI1 in cell = 0.05;  // uniprot:Q12189; isEncodedBy sgd:S000005621 sce:YOR095C
  species $RPE1 in cell = 0.03;  // uniprot:P46969; isEncodedBy sgd:S000003657 sce:YJL121C
  species $SOL3 in cell = 0.0296;  // uniprot:P38858; isEncodedBy sgd:S000001206 sce:YHR163W
  species $TAL1 in cell = 0.144;  // uniprot:P15019; isEncodedBy sgd:S000004346 sce:YLR354C
  species $TKL1 in cell = 0.455;  // uniprot:P23254; isEncodedBy sgd:S000006278 sce:YPR074C
  species $ZWF1 in cell = 0.02;  // uniprot:P11412; isEncodedBy sgd:S000005185 sce:YNL241C

  // Parameters:
  sum_AxP = 6.02 mM;
  sum_NAD = 1.59 mM;
  sum_UxP = 1.397846 mM;
  sum_NADP = 0.33 mM;
  Kx5p_TAL = 0.67 mM;
  Ke4p_TAL = 0.946 mM;
  Kr5p_TAL = 0.235 mM;
  Kgap_TAL = 0.1 mM;
  Kf6p_TAL = 1.1 mM;
  Ks7p_TAL = 0.15 mM;

  // Assignment rules:
  AMP := sum_AxP - ATP - ADP;
  NADH := sum_NAD - NAD;
  UDG := sum_UxP - UTP - UDP;
  NADP := sum_NADP - NADPH;

  // Reactions:
  ADH: AcAld + $NADH -> $EtOH + NAD; cell*(ADH1*ADH_kcat*(AcAld*NADH/(Kacald*Kinadh) - EtOH*NAD/(Kacald*Kinadh*ADH_Keq))/(1 + NADH/Kinadh + AcAld*ADH_Knadh/(Kinadh*Kacald) + EtOH*ADH_Knad/(Kinad*Ketoh) + NAD/Kinad + AcAld*NADH/(Kinadh*Kacald) + NADH*EtOH*ADH_Knad/(Kinadh*Kinad*Ketoh) + AcAld*NAD*ADH_Knadh/(Kinadh*Kinad*Kacald) + EtOH*NAD/(Ketoh*Kinad) + AcAld*NADH*EtOH/(Kinadh*Kietoh*Kacald) + AcAld*EtOH*NAD/(Kiacald*Kinad*Ketoh)));  // modifiers: ADH1; isVersionOf ec-code:1.1.1.1 GO:0004022; kegg.reaction:R00754
    ADH_kcat = 176 per_s; Ketoh = 17 mM; Kinad = 0.92 mM; ADH_Knad = 0.17 mM; ADH_Knadh = 0.11 mM; Kinadh = 0.031 mM; Kacald = 0.4622 mM; Kiacald = 1.1 mM; Kietoh = 90 mM; ADH_Keq = 14492.75 dimensionless;
  AK: 2 ADP -> ATP + $AMP; cell*AK_k*(ADP*ADP - AMP*ATP/AK_Keq);  // kegg.reaction:R00127; isVersionOf ec-code:2.7.4.3 GO:0004017
    AK_k = 0.75 per_mM_per_s; AK_Keq = 0.45 dimensionless;
  ATPase: ATP => ADP; cell*(ATPase_Vmax*ATP/ATPase_Katp/(1 + ATP/ATPase_Katp));  // isVersionOf GO:0016887
    ATPase_Vmax = 6.16 mM_per_s; ATPase_Katp = 3 mM;
  ENO: P2G -> PEP; cell*(ENO1*kcat_ENO1*(P2G/Kp2g_ENO1 - PEP/(Kp2g_ENO1*ENO_Keq))/(1 + P2G/Kp2g_ENO1 + PEP/Kpep_ENO1)) + cell*(ENO2*kcat_ENO2*(P2G/Kp2g_ENO2 - PEP/(Kp2g_ENO2*ENO_Keq))/(1 + P2G/Kp2g_ENO2 + PEP/Kpep_ENO2));  // modifiers: ENO1, ENO2; kegg.reaction:R00658; isVersionOf ec-code:4.2.1.11 GO:0004634
    kcat_ENO1 = 7.6 per_s; Kp2g_ENO1 = 0.043 mM; Kpep_ENO1 = 0.5 mM; kcat_ENO2 = 19.87 per_s; Kp2g_ENO2 = 0.104 mM; Kpep_ENO2 = 0.5 mM; ENO_Keq = 6.7 dimensionless;
  FBA: F16bP -> DHAP + GAP; cell*(FBA1*FBA_kcat*(F16bP/Kf16bp - DHAP*GAP/(Kf16bp*FBA_Keq))/(1 + F16bP/Kf16bp + DHAP/FBA_Kdhap + GAP/FBA_Kgap + F16bP*GAP/(Kf16bp*FBA_Kigap) + DHAP*GAP/(FBA_Kdhap*FBA_Kgap)));  // modifiers: FBA1; kegg.reaction:R01068; isVersionOf ec-code:4.1.2.13 GO:0004332
    FBA_kcat = 4.139 per_s; Kf16bp = 0.4507 mM; FBA_Keq = 0.069 mM; FBA_Kdhap = 2 mM; FBA_Kgap = 2.4 mM; FBA_Kigap = 10 mM;
  GPD: DHAP + $NADH -> G3P + NAD; cell*(GPD_Vmax/(GPD_Kdhap*GPD_Knadh)*(DHAP*NADH - G3P*NAD/GPD_Keq)/((1 + F16bP/Kfbp + ATP/GPD_Katp + ADP/GPD_Kadp)*(1 + DHAP/GPD_Kdhap + G3P/GPD_Kg3p)*(1 + NADH/GPD_Knadh + NAD/GPD_Knad)));  // modifiers: ADP, ATP, F16bP, GPD1, GPD2; ec-code:1.1.1.94 kegg.reaction:R00842
    GPD_Vmax = 0.7833333 mM_per_s; GPD_Knadh = 0.023 mM; GPD_Kdhap = 0.54 mM; GPD_Keq = 10000 dimensionless; Kfbp = 4.8 mM; GPD_Katp = 0.73 mM; GPD_Kadp = 2 mM; GPD_Knad = 0.93 mM; GPD_Kg3p = 1.2 mM;
  GPM: P3G -> P2G; cell*(GPM1*GPM_kcat*(P3G/GPM_Kp3g - P2G/(GPM_Kp3g*GPM_Keq))/(1 + P3G/GPM_Kp3g + P2G/Kp2g));  // modifiers: GPM1; isVersionOf ec-code:5.4.2.1 GO:0004619; kegg.reaction:R01518
    GPM_kcat = 400 per_s; GPM_Kp3g = 1.2 mM; GPM_Keq = 0.19 dimensionless; Kp2g = 1.41 mM;
  GPP: G3P => $GLY; cell*(GPP_Vmax*G3P/GPP_Kg3p/(1 + G3P/GPP_Kg3p));  // modifiers: HOR2, RHR2; ec-code:3.1.3.21 kegg.reaction:R00841
    GPP_Vmax = 0.8833333 mM_per_s; GPP_Kg3p = 3.5 mM;
  HXK: GLC + ATP -> G6P + ADP; cell*(HXK1*kcat_HXK1*(GLC*ATP/(Kglc_HXK1*Katp_HXK1) - G6P*ADP/(Kglc_HXK1*Katp_HXK1*HXK_Keq))/((1 + GLC/Kglc_HXK1 + G6P/Kg6p_HXK1 + T6P/Kit6p_HXK1)*(1 + ATP/Katp_HXK1 + ADP/Kadp_HXK1))) + cell*(HXK2*kcat_HXK2*(GLC*ATP/(Kglc_HXK2*Katp_HXK2) - G6P*ADP/(Kglc_HXK2*Katp_HXK2*HXK_Keq))/((1 + GLC/Kglc_HXK2 + G6P/Kg6p_HXK2 + T6P/Kit6p_HXK2)*(1 + ATP/Katp_HXK2 + ADP/Kadp_HXK2))) + cell*(GLK1*kcat_GLK1*(GLC*ATP/(Kglc_GLK1*Katp_GLK1) - G6P*ADP/(Kglc_GLK1*Katp_GLK1*HXK_Keq))/((1 + GLC/Kglc_GLK1 + G6P/Kg6p_GLK1)*(1 + ATP/Katp_GLK1 + ADP/Kadp_GLK1)));  // modifiers: HXK1, T6P, HXK2, GLK1; kegg.reaction:R02848; isVersionOf ec-code:2.7.1.1 GO:0004396
    kcat_HXK1 = 10.2 per_s; Kglc_HXK1 = 0.15 mM; Katp_HXK1 = 0.293 mM; Kg6p_HXK1 = 30 mM; Kadp_HXK1 = 0.23 mM; Kit6p_HXK1 = 0.2 mM; kcat_HXK2 = 63.1 per_s; Kglc_HXK2 = 0.2 mM; Katp_HXK2 = 0.195 mM; Kg6p_HXK2 = 30 mM; Kadp_HXK2 = 0.23 mM; Kit6p_HXK2 = 0.04 mM; kcat_GLK1 = 0.0721 per_s; Kglc_GLK1 = 0.0106 mM; Katp_GLK1 = 0.865 mM; Kg6p_GLK1 = 30 mM; Kadp_GLK1 = 0.23 mM; HXK_Keq = 2000 dimensionless;
  PDC: PYR => AcAld; cell*(PDC1*kcat_PDC1*PYR/Kpyr_PDC1/(1 + PYR/Kpyr_PDC1)) + cell*(PDC5*kcat_PDC5*PYR/Kpyr_PDC5/(1 + PYR/Kpyr_PDC5)) + cell*(PDC6*kcat_PDC6*PYR/Kpyr_PDC6/(1 + PYR/Kpyr_PDC6));  // modifiers: PDC1, PDC5, PDC6; kegg.reaction:R00636; isVersionOf ec-code:4.1.1.1 GO:0004737
    kcat_PDC1 = 12.14 per_s; Kpyr_PDC1 = 8.5 mM; kcat_PDC5 = 10.32 per_s; Kpyr_PDC5 = 7.08 mM; kcat_PDC6 = 9.21 per_s; Kpyr_PDC6 = 2.92 mM;
  PFK: ATP + F6P => ADP + F16bP; cell*PFK2*PFK_kcat*(gR*(F6P/PFK_Kf6p)*(ATP/PFK_Katp)*(1 - F16bP*ADP/(F6P*ATP)/PFK_Keq)*(1 + F6P/PFK_Kf6p + ATP/PFK_Katp + gR*F6P/PFK_Kf6p*ATP/PFK_Katp + F16bP/Kf16 + ADP/PFK_Kadp + gR*F16bP/Kf16*ADP/PFK_Kadp)/((1 + F6P/PFK_Kf6p + ATP/PFK_Katp + gR*F6P/PFK_Kf6p*ATP/PFK_Katp + F16bP/Kf16 + ADP/PFK_Kadp + gR*F16bP/Kf16*ADP/PFK_Kadp)^2 + PFK_L0*((1 + Ciatp*ATP/PFK_Kiatp)/(1 + ATP/PFK_Kiatp))^2*((1 + Camp*AMP/Kamp)/(1 + AMP/Kamp))^2*((1 + Cf26*F26bP/Kf26 + Cf16*F16bP/Kf16)/(1 + F26bP/Kf26 + F16bP/Kf16))^2*(1 + Catp*ATP/PFK_Katp)^2));  // modifiers: AMP, F26bP, PFK1, PFK2; isVersionOf ec-code:2.7.1.11 GO:0003872; kegg.reaction:R00756
    PFK_kcat = 209.6 per_s; gR = 5.12 dimensionless; PFK_Kf6p = 0.1 mM; PFK_Katp = 0.71 mM; PFK_L0 = 0.66 dimensionless; Ciatp = 100 dimensionless; PFK_Kiatp = 0.65 mM; Camp = 0.0845 dimensionless; Kamp = 0.0995 mM; Cf26 = 0.0174 dimensionless; Kf26 = 0.000682 mM; Cf16 = 0.397 dimensionless; Kf16 = 0.111 mM; Catp = 3 dimensionless; PFK_Kadp = 1 mM; PFK_Keq = 800 dimensionless;
  PGI: G6P -> F6P; cell*(PGI1*PGI_kcat*(G6P/PGI_Kg6p - F6P/(PGI_Kg6p*PGI_Keq))/(1 + G6P/PGI_Kg6p + F6P/PGI_Kf6p));  // modifiers: PGI1; kegg.reaction:R00771; isVersionOf ec-code:5.3.1.9 GO:0004347
    PGI_kcat = 487.36 per_s; PGI_Kg6p = 1.0257 mM; PGI_Keq = 0.29 dimensionless; PGI_Kf6p = 0.307 mM;
  PGK: ADP + BPG -> ATP + P3G; cell*(PGK1*PGK_kcat*(ADP/PGK_Kadp)^(nHadp - 1)*(BPG*ADP/(Kbpg*PGK_Kadp) - P3G*ATP/(Kbpg*PGK_Kadp*PGK_Keq))/((1 + BPG/Kbpg + P3G/PGK_Kp3g)*(1 + (ADP/PGK_Kadp)^nHadp + ATP/PGK_Katp)));  // modifiers: PGK1; kegg.reaction:R01512; isVersionOf ec-code:2.7.2.3 GO:0004618
    PGK_kcat = 58.6 per_s; PGK_Keq = 3200 dimensionless; PGK_Kp3g = 4.58 mM; PGK_Katp = 1.99 mM; Kbpg = 0.003 mM; PGK_Kadp = 0.2 mM; nHadp = 2 dimensionless;
  PGM: G6P -> G1P; cell*(PGM_Vmax*(G6P/PGM_Kg6p - G1P/(PGM_Kg6p*PGM_Keq))/(1 + G6P/PGM_Kg6p + G1P/PGM_Kg1p));  // modifiers: PGM1, PGM2; isVersionOf ec-code:5.4.2.2
    PGM_Vmax = 0.12762 mM_per_s; PGM_Kg6p = 0.05 mM; PGM_Kg1p = 0.023 mM; PGM_Keq = 0.1667 dimensionless;
  PYK: ADP + PEP -> ATP + PYR; cell*(CDC19*PYK_kcat*(PEP*ADP - PYR*ATP/PYK_Keq)/(Kpep*PYK_Kadp)/((1 + PEP/Kpep + PYR/Kpyr + PYK_L0*((ATP/PYK_Kiatp + 1)/(F16bP/Kf16p + 1)))*(1 + ADP/PYK_Kadp + ATP/PYK_Katp)));  // modifiers: CDC19, F16bP; kegg.reaction:R00200; isVersionOf ec-code:2.7.1.40 GO:0004743
    PYK_kcat = 20.146 per_s; Kpep = 0.281 mM; PYK_Kadp = 0.243 mM; Kpyr = 21 mM; PYK_Katp = 1.5 mM; PYK_Kiatp = 9.3 mM; Kf16p = 0.2 mM; PYK_L0 = 100 dimensionless; PYK_Keq = 6500 dimensionless;
  TDH: GAP + NAD -> BPG + $NADH; cell*(TDH1*kcat_TDH1*(GAP*NAD/(Kgap_TDH1*Knad_TDH1) - BPG*NADH/(Kgap_TDH1*Knad_TDH1*TDH_Keq))/((1 + GAP/Kgap_TDH1 + BPG/Kbpg_TDH1)*(1 + NAD/Knad_TDH1 + NADH/Knadh_TDH1))) + cell*(TDH3*kcat_TDH3*(GAP*NAD/(Kgap_TDH3*Knad_TDH3) - BPG*NADH/(Kgap_TDH3*Knad_TDH3*TDH_Keq))/((1 + GAP/Kgap_TDH3 + BPG/Kbpg_TDH3)*(1 + NAD/Knad_TDH3 + NADH/Knadh_TDH3)));  // modifiers: TDH1, TDH3; kegg.reaction:R01061; isVersionOf ec-code:1.2.1.12 GO:0004365
    kcat_TDH1 = 19.12 per_s; Kgap_TDH1 = 0.495 mM; Knad_TDH1 = 0.09 mM; Kbpg_TDH1 = 0.0098 mM; Knadh_TDH1 = 0.06 mM; kcat_TDH3 = 18.162 per_s; Kgap_TDH3 = 0.423 mM; Knad_TDH3 = 0.09 mM; Kbpg_TDH3 = 0.909 mM; Knadh_TDH3 = 0.06 mM; TDH_Keq = 0.005334127 dimensionless;
  TPI: DHAP -> GAP; cell*(TPI1*TPI_kcat/TPI_Kdhap*(DHAP - GAP/TPI_Keq)/(1 + DHAP/TPI_Kdhap + GAP/TPI_Kgap*(1 + (GAP/TPI_Kigap)^4)));  // modifiers: TPI1; kegg.reaction:R01015; isVersionOf ec-code:5.3.1.1 GO:0004807
    TPI_kcat = 564.38 per_s; TPI_Kdhap = 6.454 mM; TPI_Kgap = 5.25 mM; TPI_Kigap = 35.1 mM; TPI_Keq = 0.045 dimensionless;
  TPP: T6P => $TRH; cell*(TPP_Vmax*T6P/Kt6p/(1 + T6P/Kt6p));  // modifiers: TPS1, TPS2; isVersionOf ec-code:3.1.3.12
    TPP_Vmax = 2.34 mM_per_s; Kt6p = 0.5 mM;
  TPS: G6P + $UDG => T6P + UDP; cell*(TPS_Vmax*G6P*UDG/(TPS_Kg6p*Kudg)/((1 + G6P/TPS_Kg6p)*(1 + UDG/Kudg)));  // modifiers: TPS1, TPS2; isVersionOf ec-code:2.4.1.15
    TPS_Vmax = 0.49356 mM_per_s; TPS_Kg6p = 3.8 mM; Kudg = 0.886 mM;
  UGP: G1P + UTP => $UDG; cell*(UGP_Vmax*UTP*G1P/(Kutp*UGP_Kg1p)/(Kiutp/Kutp + UTP/Kutp + G1P/UGP_Kg1p + UTP*G1P/(Kutp*UGP_Kg1p) + Kiutp/Kutp*UDG/Kiudg + G1P*UDG/(UGP_Kg1p*Kiudg)));  // modifiers: UGP1; isVersionOf ec-code:2.7.7.9
    UGP_Vmax = 13.2552 mM_per_s; Kutp = 0.11 mM; Kiutp = 0.11 mM; UGP_Kg1p = 0.32 mM; Kiudg = 0.0035 mM;
  acetate_branch: AcAld + NAD => $ACE + $NADH; cell*acetate_branch_k*AcAld*NAD;  // isVersionOf GO:0006105
    acetate_branch_k = 0.005543396 per_mM_per_s;
  udp_to_utp: UDP + ATP => UTP + ADP; cell*udp_to_utp_k*UDP*ATP;
    udp_to_utp_k = 0.07452583 per_mM_per_s;
  HXT: $GLCx -> GLC; cell*(HXT_Vmax*(GLCx - GLC)/Kglc/(1 + GLCx/Kglc + GLC/Kglc + Ki*GLCx/Kglc*GLC/Kglc));  // isVersionOf GO:0015758
    HXT_Vmax = 3.35 mM_per_s; Kglc = 0.9 mM; Ki = 0.91 dimensionless;
  GND: P6G + $NADP => Ru5P + NADPH; cell*(GND1*kcat_GND1*P6G*NADP/(Kp6g_GND1*Knadp_GND1)/((1 + P6G/Kp6g_GND1 + Ru5P/Kru5p_GND1)*(1 + NADP/Knadp_GND1 + NADPH/Knadph_GND1)) + GND2*kcat_GND2*P6G*NADP/((1 + P6G/Kp6g_GND2 + Ru5P/Kru5p_GND2)*(1 + NADP/Knadp_GND2 + NADPH/Knadph_GND2)));  // modifiers: GND1, GND2; ec-code:1.1.1.44
    kcat_GND1 = 28 per_s; Kp6g_GND1 = 0.062 mM; Knadp_GND1 = 0.094 mM; Kru5p_GND1 = 0.1 mM; Knadph_GND1 = 0.055 mM; kcat_GND2 = 27.3 per_s; Kp6g_GND2 = 0.115 mM; Knadp_GND2 = 0.094 mM; Kru5p_GND2 = 0.1 mM; Knadph_GND2 = 0.055 mM;
  RKI: Ru5P -> R5P; cell*RKI1*RKI_kcat*(Ru5P - R5P/RKI_Keq)/RKI_Kru5p/(1 + Ru5P/RKI_Kru5p + R5P/Kr5p);  // modifiers: RKI1; ec-code:5.3.1.6
    RKI_kcat = 335 per_s; RKI_Kru5p = 2.47 mM; Kr5p = 5.7 mM; Kiru5p = 9.88 mM; RKI_Keq = 4 dimensionless;
  RPE: Ru5P -> X5P; cell*RPE1*RPE_kcat*(Ru5P - X5P/RPE_Keq)/RPE_Kru5p/(1 + Ru5P/RPE_Kru5p + X5P/Kx5p);  // modifiers: RPE1; ec-code:5.1.3.1
    RPE_kcat = 4020 per_s; RPE_Kru5p = 5.97 mM; Kx5p = 7.7 mM; RPE_Keq = 1.4 dimensionless;
  SOL: G6L => P6G; cell*SOL3*SOL_kcat*G6L/SOL_Kg6l/(1 + G6L/SOL_Kg6l + P6G/Kp6g);  // modifiers: SOL3; ec-code:3.1.1.31
    SOL_kcat = 4.3 per_s; SOL_Kg6l = 0.8 mM; Kp6g = 0.5 mM;
  TAL: GAP + S7P -> F6P + E4P; cell*(TAL1*kcat_TAL1*(GAP*S7P - F6P*E4P/TAL_Keq)/(Kgap_TAL1*Ks7p_TAL1)/((1 + GAP/Kgap_TAL1 + F6P/Kf6p_TAL1)*(1 + S7P/Ks7p_TAL1 + E4P/Ke4p_TAL1)) + NQM1*kcat_NQM1*(GAP*S7P - F6P*E4P/TAL_Keq)/(Kgap_NQM1*Ks7p_NQM1)/((1 + GAP/Kgap_NQM1 + F6P/Kf6p_NQM1)*(1 + S7P/Ks7p_NQM1 + E4P/Ke4p_NQM1)));  // modifiers: TAL1, NQM1; ec-code:2.2.1.2
    kcat_TAL1 = 0.694 per_s; Kgap_TAL1 = 0.272 mM; Ks7p_TAL1 = 0.786 mM; Kf6p_TAL1 = 1.44 mM; Ke4p_TAL1 = 0.362 mM; kcat_NQM1 = 0.694 per_s; Kgap_NQM1 = 0.272 mM; Ks7p_NQM1 = 0.786 mM; Kf6p_NQM1 = 1.04 mM; Ke4p_NQM1 = 0.305 mM; TAL_Keq = 1.05 dimensionless;
  TKL_E4P: X5P + E4P -> GAP + F6P; cell*TKL1*TKL_E4P_kcat*(X5P*E4P - GAP*F6P/TKL_E4P_Keq)/(Kx5p_TAL*Ke4p_TAL)/((1 + X5P/Kx5p_TAL + GAP/Kgap_TAL)*(1 + E4P/Ke4p_TAL + F6P/Kf6p_TAL + R5P/Kr5p_TAL + S7P/Ks7p_TAL)); TKL_E4P is "TKL (E4P:F6P)";  // modifiers: TKL1, R5P, S7P; ec-code:2.2.1.1
    TKL_E4P_kcat = 47.1 per_s; TKL_E4P_Keq = 10 dimensionless;
  TKL_R5P: X5P + R5P -> GAP + S7P; cell*TKL1*TKL_R5P_kcat*(X5P*R5P - GAP*S7P/TKL_R5P_Keq)/(Kx5p_TAL*Kr5p_TAL)/((1 + X5P/Kx5p_TAL + GAP/Kgap_TAL)*(1 + E4P/Ke4p_TAL + F6P/Kf6p_TAL + R5P/Kr5p_TAL + S7P/Ks7p_TAL)); TKL_R5P is "TKL (R5P:S7P)";  // modifiers: TKL1, E4P, F6P; ec-code:2.2.1.1
    TKL_R5P_kcat = 40.5 per_s; TKL_R5P_Keq = 1.2 dimensionless;
  ZWF: G6P + $NADP => G6L + NADPH; cell*ZWF1*ZWF_kcat*G6P*NADP/(ZWF_Kg6p*Knadp)/((1 + G6P/ZWF_Kg6p + G6L/ZWF_Kg6l)*(1 + NADP/Knadp + NADPH/Knadph));  // modifiers: ZWF1; ec-code:1.1.1.49
    ZWF_kcat = 189 per_s; ZWF_Kg6p = 0.042 mM; Knadp = 0.045 mM; ZWF_Kg6l = 0.01 mM; Knadph = 0.017 mM;
  NADPH_oxidase: NADPH => $NADP; cell*NADPH_oxidase_k*NADPH;
    NADPH_oxidase_k = 1 per_s;
  E4P_sink: E4P => ; cell*E4P_sink_k*E4P;
    E4P_sink_k = 1 per_s;
  R5P_sink: R5P => ; cell*R5P_sink_k*R5P;
    R5P_sink_k = 1 per_s;

  // Unit definitions:
  unit substance = 1e-3 mole; substance is "mmol";
  unit mM = 1e-3 mole / litre;
  unit mM_per_s = 1e-3 mole / (litre * second);
  unit per_s = 1 / second;
  unit per_mM_per_s = litre / (1e-3 mole * second);
end
