// SBML level 2 version 4

model MODEL1401200001()
  // Barrack2014 - Calcium/cell cycle coupling - Rs dependent ATP release
  // This model is designed based on the hypothesis that cytoplasmic calcium accelerates entry into S phase of the cell cycle and/or acts to recruit otherwise quiescents cells onto the cell cycle. The model describes the ATP mediated calcium-cell cycle coupling via Rs (retinoblastoma tumour suppressor protein bound to the E2F transcription factor) in a single radial glial cell.
  // This model is described in the article:
  // Modelling the coupling between intracellular calcium release and the cell cycle during cortical brain development.
  // Barrack DS, Thul R, Owen MR.
  // J Theor Biol. 2014 Jan 13;347C:17-32.
  // Abstract:
  // Most neocortical neurons formed during embryonic brain development arise from radial glial cells which communicate, in part, via ATP mediated calcium signals. Although the intercellular signalling mechanisms that regulate radial glia proliferation are not well understood, it has recently been demonstrated that ATP dependent intracellular calcium release leads to an increase of nearly 100% in overall cellular proliferation. It has been hypothesised that cytoplasmic calcium accelerates entry into S phase of the cell cycle and/or acts to recruit otherwise quiescent cells onto the cell cycle. In this paper we study this cell cycle acceleration and recruitment by forming a differential equation model for ATP mediated calcium-cell cycle coupling via Cyclin D in a single radial glial cell. Bifurcation analysis and numerical simulations suggest that the cell cycle period depends only weakly on cytoplasmic calcium. Therefore, the accelerative impact of calcium on the cell cycle can only account for a small fraction of the large increase in proliferation observed experimentally. Crucially however, our bifurcation analysis reveals that stable fixed point and stable limit cycle solutions can coexist, and that calcium dependent Cyclin D dynamics extend the oscillatory region to lower Cyclin D synthesis rates, thus rendering cells more susceptible to cycling. This supports the hypothesis that cycling glial cells recruit quiescent cells (in G0 phase) onto the cell cycle, via a calcium signalling mechanism, and that this may be the primary means by which calcium augments proliferation rates at the population scale. Numerical simulations of two coupled cells demonstrate that such a scenario is indeed feasible.
  // This model is hosted on BioModels Database and identified by: BIOMD0000000509 .
  // To cite BioModels Database, please use: BioModels Database: An enhanced, curated and annotated resource for published quantitative kinetic models .
  // To the extent possible under law, all copyright and related or neighbouring rights to this encoded model have been dedicated to the public domain worldwide. Please refer to CC0 Public Domain Dedication for more information.
  // biomodels.db:MODEL1401200001
  // biomodels.db:BIOMD0000000509
  // isDescribedBy pubmed:24434742
  // hasProperty mamo:MAMO_0000046
  // isPartOf GO:0007049 GO:0005388
  // isDerivedFrom biomodels.db:BIOMD0000000168 pubmed:16055527

  // Compartments:
  compartment cell = 1;

  // Species:
  species d in cell = 0;  // hasPart uniprot:P11802 uniprot:P24385
  species ad in cell;
  species e in cell = 1;  // hasPart uniprot:P24864 uniprot:P24941
  species r in cell = 0;  // isVersionOf uniprot:Q08999
  species rs in cell = 1.1;  // hasPart uniprot:Q08999 uniprot:Q01094
  species x in cell = 0;  // isVersionOf CHEBI:47867 CHEBI:16541
  species ip3 in cell = 0;  // isVersionOf CHEBI:16595
  species kg in cell;
  species gstar in cell;
  species ro in cell;
  species ip3con in cell;
  species rscon in cell;
  species atp in cell = 0;  // isVersionOf CHEBI:15422
  species y in cell = 0;  // isVersionOf CHEBI:15422
  species delta in cell;
  species ca in cell;  // isVersionOf CHEBI:29108

  // Parameters:
  addash = 0.41;
  vatp_s = 50;
  smoothness = 0.01;
  vdeg = 2;
  alpha = 0.083;
  gamma = 1;
  ae = 0.16;
  ax = 0.08;
  k = 0.05;
  qd = 0.6;
  qe = 0.6;
  qx = 0.8;
  f = 0.2;
  g = 0.528;
  ps = 0.6;
  pd = 0.48;
  pe = 0.096;
  px = 0.48;
  ddd = 0.4;
  dee = 0.2;
  dxx = 1.04;
  af = 0.9;
  rt = 2.5;
  yo = 1.5;
  gf = 6.3;
  kdeg = 0.0625;
  kkdeg = 50;
  ka = 0.017;
  kd = 0.15;
  rhstar = 0.6;
  dip = 280;
  krel = 10;
  ip3min = 0.012;
  datpp = 300;
  kr = 25;
  scale = 3600;
  rscrit = 1;
  ymax = 500;
  cabasil = 0.02055236;
  p1 = 0.0159835;
  p2 = 0.514987;
  p3 = 1.31319;
  p4 = 0.332195;
  p5 = 0.787902;
  m = 24.1946;
  n = 9.79183;
  dist = 50;
  ip30 = 0.013;

  // Assignment rules:
  ad := addash + gamma*(ca - p1);
  kg := kd/ka;
  gstar := (ro + delta)/(kg + delta + ro);
  ro := atp/(kr + atp);
  ip3con := (tanh((ip3 - ip3min)/0.01) + 1)/2;
  rscon := (tanh((rscrit - rs)/0.01) + 1)/2;
  delta := kg*kdeg*ip30/(rhstar - kdeg*ip30);
  ca := p1 + p2*ip3^m/(p3^m + ip3^m) + p4*ip3^n/(p5^n + ip3^n);

  // Rate rules:
  d' = ad*(k*gf/(1 + k*gf)) - ddd*e*d;
  e' = ae*(1 + af*(yo - rs)) - dee*x*e;
  r' = px*(rt - rs - r)*x/(qx + (rt - rs - r) + x) - ps*(yo - rs)*r;
  rs' = ps*(yo - rs)*r - pd*rs*d/(qd + rs + d) - pe*rs*e/(qe + rs + e);
  x' = ax*e + f*(yo - rs) + g*x^2*e - dxx*x;
  ip3' = scale*(rhstar*gstar - kdeg*ip3);
  atp' = scale*(vatp_s*(y - atp)*rscon*ip3con*((ip3 - ip3min)/(krel + ip3)) - vdeg*atp/(kkdeg + atp));
  y' = scale*(alpha*(ymax - y) - rscon*ip3con*vatp_s*(y - atp)*((ip3 - ip3min)/(krel + ip3)));
end
