// SBML level 2 version 4

model MODEL1402030000()
  // Benson2014 - FAAH inhibitors for the treatment of osteoarthritic pain
  // Evaluation of fatty acid amide hydrolase (FAAH) as a target for osteoarthritic pain in humans, using an integrated systems pharmacology model.
  // The SBML version of the model is obtained from the supplementary material of the corresponding paper (see below).
  // This model is described in the article:
  // A systems pharmacology perspective on the clinical development of Fatty Acid amide hydrolase inhibitors for pain.
  // Benson N, Metelkin E, Demin O, Li GL, Nichols D, van der Graaf PH.
  // CPT Pharmacometrics Syst Pharmacol. 2014 Jan 15;3:e91.
  // Abstract:
  // The level of the endocannabinoid anandamide is controlled by fatty acid amide hydrolase (FAAH). In 2011, PF-04457845, an irreversible inhibitor of FAAH, was progressed to phase II clinical trials for osteoarthritic pain. This article discusses a prospective, integrated systems pharmacology model evaluation of FAAH as a target for pain in humans, using physiologically based pharmacokinetic and systems biology approaches. The model integrated physiological compartments; endocannabinoid production, degradation, and disposition data; PF-04457845 pharmacokinetics and pharmacodynamics, and cannabinoid receptor CB1-binding kinetics. The modeling identified clear gaps in our understanding and highlighted key risks going forward, in particular relating to whether methods are in place to demonstrate target engagement and pharmacological effect. The value of this modeling exercise will be discussed in detail and in the context of the clinical phase II data, together with recommendations to enable optimal future evaluation of FAAH inhibitors.
  // This model is hosted on BioModels Database and identified by: MODEL1402030000 .
  // To cite BioModels Database, please use: BioModels Database: An enhanced, curated and annotated resource for published quantitative kinetic models .
  // To the extent possible under law, all copyright and related or neighbouring rights to this encoded model have been dedicated to the public domain worldwide. Please refer to CC0 Public Domain Dedication for more information.
  // biomodels.db:MODEL1402030000
  // biomodels.db:BIOMD0000000512
  // isDescribedBy pubmed:24429592
  // hasProperty mamo:MAMO_0000046
  // hasTaxon taxonomy:9606
  // isVersionOf GO:0071926 GO:0017064

  // Compartments:
  compartment Default = 1;
  compartment BRAIN in Default = 1.45;  // isVersionOf BTO:0000142
  compartment PLASMA in Default = 2.649;  // isVersionOf BTO:0000131
  compartment ROB in Default = 65.3;  // isVersionOf FMA:76445 FMA:70779
  compartment MEC in Default = 1.5e-5;  // isVersionOf BTO:0003123

  // Species:
  species A_b in BRAIN = 0.7493309;  // isVersionOf CHEBI:2700
  species O_b in BRAIN = 20.77858;  // isVersionOf CHEBI:71466
  species P_b in BRAIN = 6.541209;  // isVersionOf CHEBI:71464
  species L_b in BRAIN = 2.319571;  // isVersionOf CHEBI:64032
  species S_b in BRAIN = 3.427807;  // isVersionOf pubchem.compound:27902
  // precursor of anandamide
  species NAPE_b in BRAIN = 3.879041e-5;  // isVersionOf CHEBI:2700
  // precursor of oleoyl ethanolamide
  species NOPE_b in BRAIN = 0.0008814287;  // isVersionOf CHEBI:71466
  // precursor of palmitoyl ethanolamide
  species NPPE_b in BRAIN = 0.0001732296;  // isVersionOf CHEBI:71464
  // precursor of linoleoyl ethanolamide
  species NLPE_b in BRAIN = 7.550331e-5;  // isVersionOf CHEBI:64032
  // precursor of stearoyl ethanolamide
  species NSPE_b in BRAIN = 0.0001272629;  // isVersionOf pubchem.compound:27902
  species FAAH_b in BRAIN = 15.366;  // isVersionOf uniprot:O00519
  species FAAHinh_b in BRAIN = 0;  // isVersionOf CHEBI:64033
  species A_r in ROB = 0.5419204;  // isVersionOf CHEBI:2700
  species O_r in ROB = 14.23822;  // isVersionOf CHEBI:71466
  species P_r in ROB = 4.121915;  // isVersionOf CHEBI:71464
  species L_r in ROB = 1.705466;  // isVersionOf CHEBI:64032
  species S_r in ROB = 2.515968;  // isVersionOf pubchem.compound:27902
  // precursor of anandamide
  species NAPE_r in ROB = 4.241633e-6;  // isVersionOf CHEBI:2700
  // precursor of oleoyl ethanolamide
  species NOPE_r in ROB = 9.638198e-5;  // isVersionOf CHEBI:71466
  // precursor of palmitoyl ethanolamide
  species NPPE_r in ROB = 1.894222e-5;  // isVersionOf CHEBI:71464
  // precursor of linoleoyl ethanolamide
  species NLPE_r in ROB = 8.256095e-6;  // isVersionOf CHEBI:64032
  // precursor of stearoyl ethanolamide
  species NSPE_r in ROB = 1.391587e-5;  // isVersionOf pubchem.compound:27902
  species FAAH_r in ROB = 2.165868;  // isVersionOf uniprot:O00519
  species FAAHinh_r in ROB = 0;  // isVersionOf CHEBI:64033
  species A_m in MEC = 0.97761;  // isVersionOf CHEBI:2700
  species O_m in MEC = 16.3219;  // isVersionOf CHEBI:71466
  species P_m in MEC = 5.809415;  // isVersionOf CHEBI:71464
  species L_m in MEC = 0;  // isVersionOf CHEBI:64032
  species S_m in MEC = 2.968774;  // isVersionOf pubchem.compound:27902
  species FAAH_m in MEC = 10.686;  // isVersionOf uniprot:O00519
  species FAAHinh_m in MEC = 0;  // isVersionOf CHEBI:64033
  species A_p in PLASMA = 0.8740574;  // isVersionOf CHEBI:2700
  species O_p in PLASMA = 5.085073;  // isVersionOf CHEBI:71466
  species P_p in PLASMA = 4.849307;  // isVersionOf CHEBI:71464
  species L_p in PLASMA = 1.916254;  // isVersionOf CHEBI:64032
  species S_p in PLASMA = 0.273772;  // isVersionOf pubchem.compound:27902
  species PFM_gut in Default = 0;  // isVersionOf chembl.compound:CHEMBL1651534
  species PFM_p in Default = 0;  // isVersionOf chembl.compound:CHEMBL1651534
  species PFM_r in Default = 0;  // isVersionOf chembl.compound:CHEMBL1651534

  // Parameters:
  AG2_b = 0;
  Dose = 10;
  ED50 = 0.53;
  Emax_PFM = 0.773;
  FAAH_t = 78;
  Gut = 1.65;
  H = 0.48;
  Heart = 0.31;
  Kd_AG2 = 3424;
  Kd_CB1_A = 239.2;
  Ki_A = 230;
  Ki_L = 1000;
  Ki_O = 240;
  Ki_P = 6700;
  Ki_S = 840;
  Kidney = 0.28;
  Km_FAAH_A = 8200;
  Km_FAAH_L = 10800;
  Km_FAAH_O = 52200;
  Km_FAAH_P = 543000;
  Km_FAAH_S = 10000;
  Km_NA_PE = 2800;
  Km_NL_PE = 1000;
  Km_NO_PE = 2900;
  Km_NP_PE = 3300;
  Km_NS_PE = 3400;
  Km_PFM = 26.1;
  Km_p_m_A = 1;
  Kp_b_PF = 1.3;
  Kp_m_PF = 1.3;
  Kp_r_PF = 1.5;
  Ktr_p_m_A = 1.89;
  Ktr_p_m_L = 2.77;
  Ktr_p_m_O = 9.07;
  Ktr_p_m_P = 2.65;
  Ktr_p_m_S = 30.01;
  Ktr_p_r_A = 0.62;
  Ktr_p_r_L = 0.89;
  Ktr_p_r_O = 2.8;
  Ktr_p_r_P = 0.85;
  Ktr_p_r_S = 9.19;
  LEU = 0.025;
  LIVER = 1.69;
  Leucocytes = 0.025;
  Lungs = 1.172;
  M_A = 347.5;
  M_L = 323.5;
  M_O = 325.5;
  M_P = 299.5;
  M_PF = 455.4;
  M_S = 321.5;
  Muscles = 35;
  PLD_b = 10000000;
  PLD_r = 10000000;
  Pancreas = 0.077;
  R_PF = 0.6;
  Spleen = 0.192;
  Testis = 0.036;
  Thymus = 0.029;
  Vm_PFM = 1511;
  Vmax_NAT = 300;
  Vss_PFM = 58.328;
  a_FAAH_A = 1;
  a_FAAH_L = 1.15;
  a_FAAH_O = 5.7;
  a_FAAH_P = 37.8;
  a_FAAH_S = 1;
  a_NAT_A = 1;
  a_NAT_L = 8.6;
  a_NAT_O = 13;
  a_NAT_P = 0.42;
  a_NAT_S = 1;
  b_FAAH_Brain = 0.197;
  b_FAAH_Gut = 0.034;
  b_FAAH_Kidney = 0.069;
  b_FAAH_Leucocytes = 0;
  b_FAAH_Liver = 1;
  b_FAAH_Lungs = 0.032;
  b_FAAH_MEC = 0.137;
  b_FAAH_Spleen = 0.03;
  b_FAAH_Testis = 0.126;
  b_NAAA_Brain = 0.6;
  b_NAAA_Gut = 0.2;
  b_NAAA_Heart = 0.2;
  b_NAAA_Kidney = 0.6;
  b_NAAA_Liver = 1;
  b_NAAA_Lungs = 14;
  b_NAAA_Spleen = 8;
  b_NAAA_Testis = 0.6;
  b_NAAA_Thymus = 4;
  b_NAT_Brain = 1.667;
  b_NAT_Heart = 1;
  b_NAT_Kidney = 0.667;
  b_NAT_Leucocytes = 0;
  b_NAT_Lungs = 0.033;
  b_NAT_Muscles = 0.333;
  b_NAT_Pancreas = 0.333;
  b_NAT_Testis = 0.667;
  e1 = 0;
  k_NA_PE = 202;
  k_NL_PE = 100;
  k_NO_PE = 230;
  k_NP_PE = 270;
  k_NS_PE = 280;
  k_deg_FAAH = 0.0051;
  k_inh = 1.1;
  kabs_PFM = 2.2;
  kcat_FAAH = 18000;
  kcl_A = 1.74;
  kcl_L = 1.25;
  kcl_O = 2.5;
  kcl_P = 2.61;
  kcl_S = 1.2;
  kin_PFM = 0.117;
  klinear_PFM = 0.0803;
  kout_PFM = 0.18;
  ktr_m_p_A = 150;
  ktr_m_p_L = 0;
  ktr_m_p_O = 10;
  ktr_m_p_P = 10;
  ktr_m_p_S = 10;
  ktr_r_p = 100;
  p_A = 0.051;
  p_L = 0.016;
  p_O = 0.098;
  p_P = 0.615;
  p_S = 0.191;
  t = 0;

  // Assignment rules:
  F_PFM := Emax_PFM*Dose/(ED50 + Dose);
  MD := PFM_gut + 1e6*Dose*F_PFM;
  PF_p := 1/M_PF*PFM_p/Vss_PFM;
  PF_b := PF_p*Kp_b_PF;
  PF_r := PF_p*Kp_r_PF;
  PF_m := PF_p*Kp_m_PF;
  FAAH_D_b := 1 + A_b/Km_FAAH_A + O_b/Km_FAAH_O + P_b/Km_FAAH_P + L_b/Km_FAAH_L + S_b/Km_FAAH_S;
  slag1_b := NAPE_b/Km_NA_PE + NOPE_b/Km_NO_PE + NPPE_b/Km_NP_PE + NLPE_b/Km_NL_PE + NSPE_b/Km_NS_PE;
  slag2_b := A_b/Ki_A + O_b/Ki_O + P_b/Ki_P + L_b/Ki_L + S_b/Ki_S;
  den_b := 1 + slag1_b + slag2_b;
  FAAH_D_r := 1 + A_r/Km_FAAH_A + O_r/Km_FAAH_O + P_r/Km_FAAH_P + L_r/Km_FAAH_L + S_r/Km_FAAH_S;
  c_NAT_ROB := Pancreas*b_NAT_Pancreas + Kidney*b_NAT_Kidney + Heart*b_NAT_Heart + Lungs*b_NAT_Lungs + Muscles*b_NAT_Muscles + Testis*b_NAT_Testis + Leucocytes*b_NAT_Leucocytes;
  slag1_r := NAPE_r/Km_NA_PE + NOPE_r/Km_NO_PE + NPPE_r/Km_NP_PE + NLPE_r/Km_NL_PE + NSPE_r/Km_NS_PE;
  slag2_r := A_r/Ki_A + O_r/Ki_O + P_r/Ki_P + L_r/Ki_L + S_r/Ki_S;
  den_r := 1 + slag1_r + slag2_r;
  c_FAAH_ROB := LIVER*b_FAAH_Liver + Gut*b_FAAH_Gut + Spleen*b_FAAH_Spleen + Kidney*b_FAAH_Kidney + Lungs*b_FAAH_Lungs + Testis*b_FAAH_Testis + Leucocytes*b_FAAH_Leucocytes;
  c_NAAA_ROB := LIVER*b_NAAA_Liver + Gut*b_NAAA_Gut + Spleen*b_NAAA_Spleen + Kidney*b_NAAA_Kidney + Heart*b_NAAA_Heart + Lungs*b_NAAA_Lungs + Thymus*b_NAAA_Thymus + Testis*b_NAAA_Thymus*Testis;
  FAAH_D_m := 1 + A_m/Km_FAAH_A + O_m/Km_FAAH_O + P_m/Km_FAAH_P + L_m/Km_FAAH_L + S_m/Km_FAAH_S;
  F_r := 1.5e3*FAAH_r/(FAAHinh_r + FAAH_r);
  PFG_p := 1e-3*PFM_p/Vss_PFM;
  AG_p := 1e-3*A_p*M_A;
  OG_p := 1e-3*O_p*M_O;
  PG_p := 1e-3*P_p*M_P;
  LG_p := 1e-3*L_p*M_L;
  SG_p := 1e-3*S_p*M_S;
  CB1_b := (A_b/Kd_CB1_A + AG2_b/Kd_AG2)/(1 + A_b/Kd_CB1_A + AG2_b/Kd_AG2);
  tid := t/2.4e1;

  // Reactions:
  vA_degr_b: A_b => ; BRAIN*FAAH_b*kcat_FAAH*a_FAAH_A*A_b/(Km_FAAH_A*FAAH_D_b);  // modifiers: FAAH_b; fast
  vO_degr_b: O_b => ; BRAIN*FAAH_b*kcat_FAAH*a_FAAH_O*O_b/(Km_FAAH_O*FAAH_D_b);  // modifiers: FAAH_b; fast
  vP_degr_b: P_b => ; BRAIN*FAAH_b*kcat_FAAH*a_FAAH_P*P_b/(Km_FAAH_P*FAAH_D_b);  // modifiers: FAAH_b; fast
  vL_degr_b: L_b => ; BRAIN*FAAH_b*kcat_FAAH*a_FAAH_L*L_b/(Km_FAAH_L*FAAH_D_b);  // modifiers: FAAH_b; fast
  vS_degr_b: S_b => ; BRAIN*FAAH_b*kcat_FAAH*a_FAAH_S*S_b/(Km_FAAH_S*FAAH_D_b);  // modifiers: FAAH_b; fast
  vNAPE_syn_b: => NAPE_b; BRAIN*Vmax_NAT*p_A*a_NAT_A*b_NAT_Brain;  // fast
  vNOPE_syn_b: => NOPE_b; BRAIN*Vmax_NAT*p_O*a_NAT_O*b_NAT_Brain;  // fast
  vNPPE_syn_b: => NPPE_b; BRAIN*Vmax_NAT*p_P*a_NAT_P*b_NAT_Brain;  // fast
  vNLPE_syn_b: => NLPE_b; BRAIN*Vmax_NAT*p_L*a_NAT_L*b_NAT_Brain;  // fast
  vNSPE_syn_b: => NSPE_b; BRAIN*Vmax_NAT*p_S*a_NAT_S*b_NAT_Brain;  // fast
  vA_syn_b: NAPE_b => A_b; BRAIN*PLD_b*k_NA_PE*NAPE_b/Km_NA_PE/den_b;  // fast
  vO_syn_b: NOPE_b => O_b; BRAIN*PLD_b*k_NO_PE*NOPE_b/Km_NO_PE/den_b;  // fast
  vP_syn_b: NPPE_b => P_b; BRAIN*PLD_b*k_NP_PE*NPPE_b/Km_NP_PE/den_b;  // fast
  vL_syn_b: NLPE_b => L_b; BRAIN*PLD_b*k_NL_PE*NLPE_b/Km_NL_PE/den_b;  // fast
  vS_syn_b: NSPE_b => S_b; BRAIN*PLD_b*k_NS_PE*NSPE_b/Km_NS_PE/den_b;  // fast
  vFAAH_syn_b: => FAAH_b; BRAIN*FAAH_t*b_FAAH_Brain*k_deg_FAAH;  // fast
  vFAAH_degr_b: FAAH_b => ; BRAIN*k_deg_FAAH*FAAH_b;  // fast
  vFAAH_inh_b: FAAH_b => FAAHinh_b; BRAIN*k_inh*FAAH_b*PF_b;  // fast
  vFAAH_inh_degr_b: FAAHinh_b => ; BRAIN*k_deg_FAAH*FAAHinh_b;  // fast
  vA_UE_b: A_b => ; BRAIN*b_FAAH_Brain*kcl_A*A_b;  // fast
  vO_UE_b: O_b => ; BRAIN*b_FAAH_Brain*kcl_O*O_b;  // fast
  vP_UE_b: P_b => ; BRAIN*b_FAAH_Brain*kcl_P*P_b;  // fast
  vL_UE_b: L_b => ; BRAIN*b_FAAH_Brain*kcl_L*L_b;  // fast
  vS_UE_b: S_b => ; BRAIN*b_FAAH_Brain*kcl_S*S_b;  // fast
  vA_degr_r: A_r => ; ROB*FAAH_r*kcat_FAAH*a_FAAH_A*A_r/(Km_FAAH_A*FAAH_D_r);  // modifiers: FAAH_r; fast
  vO_degr_r: O_r => ; ROB*FAAH_r*kcat_FAAH*a_FAAH_O*O_r/(Km_FAAH_O*FAAH_D_r);  // modifiers: FAAH_r; fast
  vP_degr_r: P_r => ; ROB*FAAH_r*kcat_FAAH*a_FAAH_P*P_r/(Km_FAAH_P*FAAH_D_r);  // modifiers: FAAH_r; fast
  vL_degr_r: L_r => ; ROB*FAAH_r*kcat_FAAH*a_FAAH_L*L_r/(Km_FAAH_L*FAAH_D_r);  // modifiers: FAAH_r; fast
  vS_degr_r: S_r => ; ROB*FAAH_r*kcat_FAAH*a_FAAH_S*S_r/(Km_FAAH_S*FAAH_D_r);  // modifiers: FAAH_r; fast
  vNAPE_syn_r: => NAPE_r; Vmax_NAT*p_A*a_NAT_A*c_NAT_ROB;  // fast
  vNOPE_syn_r: => NOPE_r; Vmax_NAT*p_O*a_NAT_O*c_NAT_ROB;  // fast
  vNPPE_syn_r: => NPPE_r; Vmax_NAT*p_P*a_NAT_P*c_NAT_ROB;  // fast
  vNLPE_syn_r: => NLPE_r; Vmax_NAT*p_L*a_NAT_L*c_NAT_ROB;  // fast
  vNSPE_syn_r: => NSPE_r; Vmax_NAT*p_S*a_NAT_S*c_NAT_ROB;  // fast
  vA_syn_r: NAPE_r => A_r; ROB*PLD_r*k_NA_PE*NAPE_r/Km_NA_PE/den_r;  // fast
  vO_syn_r: NOPE_r => O_r; ROB*PLD_r*k_NO_PE*NOPE_r/Km_NO_PE/den_r;  // fast
  vP_syn_r: NPPE_r => P_r; ROB*PLD_r*k_NP_PE*NPPE_r/Km_NP_PE/den_r;  // fast
  vL_syn_r: NLPE_r => L_r; ROB*PLD_r*k_NL_PE*NLPE_r/Km_NL_PE/den_r;  // fast
  vS_syn_r: NSPE_r => S_r; ROB*PLD_r*k_NS_PE*NSPE_r/Km_NS_PE/den_r;  // fast
  vFAAH_syn_r: => FAAH_r; FAAH_t*c_FAAH_ROB*k_deg_FAAH;  // fast
  vFAAH_degr_r: FAAH_r => ; ROB*k_deg_FAAH*FAAH_r;  // fast
  vFAAH_inh_r: FAAH_r => FAAHinh_r; ROB*k_inh*FAAH_r*PF_r;  // fast
  vFAAH_inh_degr_r: FAAHinh_r => ; ROB*k_deg_FAAH*FAAHinh_r;  // fast
  vA_UE_r: A_r => ; c_NAAA_ROB*kcl_A*A_r;  // fast
  vO_UE_r: O_r => ; c_NAAA_ROB*kcl_O*O_r;  // fast
  vP_UE_r: P_r => ; c_NAAA_ROB*kcl_P*P_r;  // fast
  vL_UE_r: L_r => ; c_NAAA_ROB*kcl_L*L_r;  // fast
  vS_UE_r: S_r => ; c_NAAA_ROB*kcl_S*S_r;  // fast
  vA_degr_m: A_m => ; MEC*FAAH_m*kcat_FAAH*a_FAAH_A*A_m/(Km_FAAH_A*FAAH_D_m);  // modifiers: FAAH_m; fast
  vO_degr_m: O_m => ; MEC*FAAH_m*kcat_FAAH*a_FAAH_O*O_m/(Km_FAAH_O*FAAH_D_m);  // modifiers: FAAH_m; fast
  vP_degr_m: P_m => ; MEC*FAAH_m*kcat_FAAH*a_FAAH_P*P_m/(Km_FAAH_P*FAAH_D_m);  // modifiers: FAAH_m; fast
  vL_degr_m: L_m => ; MEC*FAAH_m*kcat_FAAH*a_FAAH_L*L_m/(Km_FAAH_L*FAAH_D_m);  // modifiers: FAAH_m; fast
  vS_degr_m: S_m => ; MEC*FAAH_m*kcat_FAAH*a_FAAH_S*S_m/(Km_FAAH_S*FAAH_D_m);  // modifiers: FAAH_m; fast
  vFAAH_syn_m: => FAAH_m; MEC*FAAH_t*b_FAAH_MEC*k_deg_FAAH;  // fast
  vFAAH_degr_m: FAAH_m => ; MEC*k_deg_FAAH*FAAH_m;  // fast
  vFAAH_inh_m: FAAH_m => FAAHinh_m; MEC*k_inh*FAAH_m*PF_m;  // fast
  vFAAH_inh_degr_m: FAAHinh_m => ; MEC*k_deg_FAAH*FAAHinh_m;  // fast
  vA_m_p: A_m => A_p; MEC*ktr_m_p_A*(A_m - A_p*Ktr_p_m_A)/(A_m + A_p + Km_p_m_A);  // fast
  vo_m_p: O_m => O_p; MEC*ktr_m_p_O*(O_m - O_p*Ktr_p_m_O);  // fast
  vP_m_p: P_m => P_p; MEC*ktr_m_p_P*(P_m - P_p*Ktr_p_m_P);  // fast
  vL_m_p: L_m => L_p; MEC*ktr_m_p_L*(L_m - L_p*Ktr_p_m_L);  // fast
  vS_m_p: S_m => S_p; MEC*ktr_m_p_S*(S_m - S_p*Ktr_p_m_S);  // fast
  vA_b_m: A_b => A_m; MEC*ktr_m_p_A*(A_b - A_m)/(A_m + A_b + Km_p_m_A);  // fast
  vO_b_m: O_b => O_m; MEC*ktr_m_p_O*(O_b - O_m);  // fast
  vP_b_m: P_b => P_m; MEC*ktr_m_p_P*(P_b - P_m);  // fast
  vL_b_m: L_b => L_m; MEC*ktr_m_p_L*(L_b - L_m);  // fast
  vS_b_m: S_b => S_m; MEC*ktr_m_p_S*(S_b - S_m);  // fast
  vA_r_p: A_r => A_p; PLASMA*ktr_r_p*(A_r - A_p*Ktr_p_r_A)/(A_r + A_p + Km_p_m_A);  // fast
  vO_r_p: O_r => O_p; PLASMA*ktr_r_p*(O_r - O_p*Ktr_p_r_O);  // fast
  vP_r_p: P_r => P_p; PLASMA*ktr_r_p*(P_r - P_p*Ktr_p_r_P);  // fast
  vL_r_p: L_r => L_p; PLASMA*ktr_r_p*(L_r - L_p*Ktr_p_r_L);  // fast
  vS_r_p: S_r => S_p; PLASMA*ktr_r_p*(S_r - S_p*Ktr_p_r_S);  // fast
  absorp: PFM_gut => PFM_p; kabs_PFM*MD;  // fast
  dist: PFM_p => PFM_r; kout_PFM*PFM_p - kin_PFM*PFM_r;  // fast
  elim: PFM_p => ; klinear_PFM*PFM_p + Vm_PFM*PFM_p/(Km_PFM + PFM_p/Vss_PFM)/Vss_PFM;  // fast
end
