// SBML level 2 version 4

model MODEL1306190000()
  // Smallbone2013 - Colon Crypt cycle - Version 0
  // This model is described in the article:
  // A mathematical model of the colon crypt capturing compositional dynamic interactions between cell types
  // Kieran Smallbone, Bernard M. Corfe
  // Int J Exp Pathol. 2014 Feb;95(1):1-7.
  // Abstract:
  // Models of the development and early progression of colorectal cancer are based upon understanding the cycle of stem cell turnover, proliferation, differentiation and death. Existing crypt compartmental models feature a linear pathway of cell types, with little regulatory mechanism. Previous work has shown that there are perturbations in the enteroendocrine cell population of macroscopically normal crypts, a compartment not included in existing models. We show that existing models do not adequately recapitulate the dynamics of cell fate pathways in the crypt. We report the progressive development, iterative testing and fitting of a developed compartmental model with additional cell types, and which includes feedback mechanisms and cross-regulatory mechanisms between cell types. The fitting of the model to existing data sets suggests a need to invoke cross-talk between cell types as a feature of colon crypt cycle models.
  // This model is hosted on BioModels Database and identified by: MODEL1306190000 .
  // To cite BioModels Database, please use: BioModels Database: An enhanced, curated and annotated resource for published quantitative kinetic models .
  // To the extent possible under law, all copyright and related or neighbouring rights to this encoded model have been dedicated to the public domain worldwide. Please refer to CC0 Public Domain Dedication for more information.
  // biomodels.db:MODEL1306190000
  // biomodels.db:BIOMD0000000520
  // isDescribedBy pubmed:24354351
  // biomodels.db:MODEL1306190000
  // isDerivedFrom pubmed:17360468
  // occursIn BTO:0000305

  // Compartments:
  compartment compartment = 1; compartment is "crypt";  // isVersionOf BTO:0000305

  // Species:
  species N0 in compartment = 1.754448/compartment;  // isVersionOf CL:0000034
  species N1 in compartment = 43.81467/compartment;  // isVersionOf CL:0000034
  species N2 in compartment = 27.45588/compartment;  // isVersionOf CL:0000034

  // Parameters:
  d0 = 0.1 per_day;
  b0 = 0.218 per_day;
  c0 = 1 per_day;
  m0 = 2.924081 cell;
  a0 = 0.1 per_day;
  d1 = 0.263 per_day;
  b1 = 0.547 per_day;
  c1 = 1 per_day;
  m1 = 29.24081 cell;
  a1 = 0.2392548 per_day;
  d2 = 1.83 per_day;
  T has cell; T is "cellularity";

  // Assignment rules:
  T := N0 + N1 + N2;

  // Reactions:
  R0X: N0 => ; d0*N0; R0X is "N0 death";
  N0_differentiation: N0 => N0 + N1; (b0 + c0*N0/(N0 + m0))*N0;
  N0_renewal: N0 => 2 N0; a0*N0;
  R1X: N1 => ; d1*N1; R1X is "N1 death";
  N1_differentiation: N1 => N1 + N2; (b1 + c1*N1/(N1 + m1))*N1;
  N1_renewal: N1 => 2 N1; a1*N1;
  R2X: N2 => ; d2*N2; R2X is "N2 death";

  // Unit definitions:
  unit substance = item; substance is "cell";
  unit time = 86400 second; time is "day";
  unit volume = dimensionless;
  unit per_day = 1 / (86400 second);
  unit cell = item;
end
