// SBML level 2 version 4

model New_Model()

  // Compartments:
  compartment cell = 1;

  // Species:
  species $RCT0 in cell = 76;
  species $alpha in cell = 11;
  species $BN1 in cell = 13;
  species $BN2 in cell = 0;
  species $BN3 in cell = 0;
  species $BN4 in cell = 0;
  species $BTX in cell = 0;
  species $BM in cell = 0;
  species $RCT1 in cell = 0;
  species $RC in cell;
  species $beta in cell;
  species $BN5 in cell = 0;
  species $BN6 in cell = 0;

  // Parameters:
  k0 = 0.0154;
  k1 = 0.0318;
  k2 = 0.0282;
  k3 = 0.0565;
  k4 = 0.52;
  q = 2;
  epsilon = 0;

  // Assignment rules:
  RC := RCT0 + RCT1;
  beta := BM + BN1 + BN2 + BN3 + BN4 + BN5 + BN6 + BTX;

  // Rate rules:
  RCT0' = -k0*(epsilon + BM)*RCT0 - k1*BTX*RCT0;
  alpha' = k1*BTX*RCT0 - k2*BTX^q*alpha;
  BN1' = k2*BTX^q*alpha - 6*k3*BN1;
  BN2' = 6*k3*BN1 - 6*k3*BN2;
  BN3' = 6*k3*BN2 - 6*k3*BN3;
  BN4' = 6*k3*BN3 - 6*k3*BN4;
  BTX' = 6*k3*BN6 - k4*BTX;
  BM' = k4*BTX;
  RCT1' = k0*(epsilon + BM)*RCT0;
  BN5' = 6*k3*BN4 - 6*k3*BN5;
  BN6' = 6*k3*BN5 - 6*k3*BN6;

  // Unit definitions:
  unit volume = 1e-3 litre;
  unit time = 86400 second;
  unit substance = 1e-3 mole;
end
