// SBML level 2 version 4

model PFKL()

  // Compartments:
  compartment default = 1 volume;

  // Species:
  substanceOnly species PFKL in default = 1;  // substance in dimensionless
  substanceOnly species FBPase in default = 1;  // substance in dimensionless
  substanceOnly species F6P in default = 14.07743;
  substanceOnly species F1_6BP in default = 104.0724; F1_6BP is "F1,6BP";
  substanceOnly species PEP in default = 108.0945;
  substanceOnly species Isocitrate in default = 1.794872;
  substanceOnly species _2_oxoglutarate in default = 25.18854; _2_oxoglutarate is "2-oxoglutarate";
  substanceOnly species Malate in default = 68.87883;
  substanceOnly species F2_6BP in default = 1; F2_6BP is "F2,6BP";
  substanceOnly species Citrate in default = 17.74761;
  species sa4_degraded in default = 0;
  substanceOnly species ALDO in default = 1;  // substance in dimensionless
  substanceOnly species pPFKL in default = 0.768939345;  // substance in dimensionless
  species sa8_degraded in default = 0;
  species sa7_degraded in default = 0;
  species sa5_degraded in default = 0;
  species sa6_degraded in default = 0;
  species sa9_degraded in default = 0;
  species sa13_degraded in default = 0;
  species sa3_degraded in default = 0;
  species sa10_degraded in default = 0;
  substanceOnly species $F6P_proxy in default;

  // Parameters:
  K_FBPase_cit = 0.0211646 substance;
  K_FBPase_f16bp = 0.104089638 substance;
  K_FBPase_f26bp = 17.51744 dimensionless;
  K_PFKL_PHOS_S775 = 6.283706 dimensionless;
  K_PFKL_akg = 24661.01 dimensionless;
  K_PFKL_cit = 41.30426 dimensionless;
  K_PFKL_f26bp = 1.282443 dimensionless;
  K_PFKL_f6p = 0.014114844 dimensionless;
  K_PFKL_icit = 1784.508 dimensionless;
  K_PFKL_mal = 9.544729 dimensionless;
  K_PFKL_pep = 0.633518366 dimensionless;
  Vf_FBPase = 9.932861 dimensionless;
  Vf_PFKL = 695063.7 dimensionless;
  k_ALDO = 0.008187906 dimensionless;
  k_mal = 4.022122 substance;
  k_akg = -4.223228 substance;
  k_pep = 43.23781 substance;
  k_icit = -0.1112368 substance;
  k_f26bp = -0.181345338 substance;
  k_cit = -0.6535948 substance;
  k_pfkl_s775 = 0 substance;
  k_f6p = 0.5027652 dimensionless;

  // Assignment rules:
  F6P_proxy := F6P;

  // Reactions:
  re1: $F6P_proxy => F1_6BP; F2_6BP/(K_PFKL_f26bp + F2_6BP)*(K_PFKL_akg/(K_PFKL_akg + _2_oxoglutarate))*(K_PFKL_pep/(K_PFKL_pep + PEP))*(K_PFKL_cit/(K_PFKL_cit + Citrate))*(K_PFKL_icit/(K_PFKL_icit + Isocitrate))*(K_PFKL_mal/(K_PFKL_mal + Malate))*(pPFKL/(K_PFKL_PHOS_S775 + pPFKL))*(Vf_PFKL*F6P_proxy/(K_PFKL_f6p + F6P_proxy));  // modifiers: PFKL, PEP, Isocitrate, _2_oxoglutarate, Malate, F2_6BP, Citrate, pPFKL
  re2: F1_6BP => $F6P_proxy; K_FBPase_f26bp/(K_FBPase_f26bp + F2_6BP)*(Citrate/(K_FBPase_cit + Citrate))*(Vf_FBPase*F1_6BP/(K_FBPase_f16bp + F1_6BP));  // modifiers: FBPase, F2_6BP, Citrate
  re3: F1_6BP => sa4_degraded; k_ALDO*F1_6BP;  // modifiers: ALDO
  re4: Malate => sa8_degraded; -k_mal;
  re5: _2_oxoglutarate => sa7_degraded; -k_akg;
  re6: PEP => sa5_degraded; -k_pep;
  re7: Isocitrate => sa6_degraded; -k_icit;
  re8: F2_6BP => sa9_degraded; -k_f26bp;
  re9: Citrate => sa10_degraded; -k_cit;
  re10: pPFKL => sa13_degraded; -k_pfkl_s775;
  re11: F6P => sa3_degraded; -k_f6p;

  // Events:
  ev2min: at (time > 2): k_akg = -1.432881, k_cit = 0.1508296, k_f6p = 2.362996, k_icit = 0, k_f26bp = 0.010962773, k_mal = -6.033183, k_pep = 1.508296, k_pfkl_s775 = 0;
  ev5min: at (time > 5): k_akg = -0.2714932, k_cit = -0.2714932, k_f6p = 1.628959, k_icit = 0.01131222, k_f26bp = 0.034852204, k_mal = 0, k_pep = -4.524887, k_pfkl_s775 = 0;
  ev10min: at (time > 10): k_akg = 0, k_cit = 0.060331825, k_f6p = -1.900452, k_icit = -0.011312217, k_f26bp = -0.031487108, k_mal = 2.714932, k_pep = 0.904977376, k_pfkl_s775 = 0;
  ev15min: at (time > 15): k_akg = 0.090497738, k_cit = 0.2413273, k_f6p = 0.693815988, k_icit = -0.002262443, k_f26bp = 0.083691707, k_mal = 0, k_pep = -2.413273, k_pfkl_s775 = 0;
  ev20min: at (time > 20): k_akg = 0.113122172, k_cit = 0.090497738, k_f6p = -0.090497738, k_icit = -0.033936652, k_f26bp = -0.010719796, k_mal = 0.60331825, k_pep = -2.865762, k_pfkl_s775 = 0;
  ev30min: at (time > 30): k_akg = 0.263951735, k_cit = 0.135746606, k_f6p = -0.09552539, k_icit = 0.011689291, k_f26bp = -0.003477353, k_mal = 0.351935646, k_pep = -0.301659125, k_pfkl_s775 = 0;
  ev45min: at (time > 45): k_akg = 0.263951735, k_cit = 0.135746606, k_f6p = -0.09552539, k_icit = 0.011689291, k_f26bp = -0.003477353, k_mal = 0.351935646, k_pep = -0.301659125, k_pfkl_s775 = 0;

  // Unit definitions:
  unit substance = mole;
  unit volume = litre;
  unit area = metre^2;
  unit length = metre;
  unit time = second;
  unit rate = 1 / (60 second);
end
