// SBML level 2 version 4

function Constant_flux__irreversible(v)
  v;
end
Constant_flux__irreversible is "Constant flux (irreversible)";

function Henri_Michaelis_Menten__irreversible(substrate, Km, V)
  V*substrate/(Km + substrate);
end
Henri_Michaelis_Menten__irreversible is "Henri-Michaelis-Menten (irreversible)";

function Mass_Action(k1, x1, x2)
  k1*x1*x2;
end
Mass_Action is "Mass Action*";

function Michaelis_Menten(k1, x1, x2, k2)
  k1*x1*x2/(k2 + x1);
end
Michaelis_Menten is "Michaelis-Menten*";

function Mass_Action_(K1, x1, x2, x3)
  K1*x1*x2*x3;
end
Mass_Action_ is "Mass Action**";

function Nucleation(k1, x1)
  k1*x1^2;
end

model MODEL1408150000()
  // Yuraszeck2010 - Vulnerabilities in the Tau Network in Tau Pathophysiology
  // This model is described in the article:
  // Vulnerabilities in the tau network and the role of ultrasensitive points in tau pathophysiology.
  // Yuraszeck TM, Neveu P, Rodriguez-Fernandez M, Robinson A, Kosik KS, Doyle FJ 3rd.
  // PLoS Comput. Biol. 2010; 6(11): e1000997
  // Abstract:
  // The multifactorial nature of disease motivates the use of systems-level analyses to understand their pathology. We used a systems biology approach to study tau aggregation, one of the hallmark features of Alzheimer's disease. A mathematical model was constructed to capture the current state of knowledge concerning tau's behavior and interactions in cells. The model was implemented in silico in the form of ordinary differential equations. The identifiability of the model was assessed and parameters were estimated to generate two cellular states: a population of solutions that corresponds to normal tau homeostasis and a population of solutions that displays aggregation-prone behavior. The model of normal tau homeostasis was robust to perturbations, and disturbances in multiple processes were required to achieve an aggregation-prone state. The aggregation-prone state was ultrasensitive to perturbations in diverse subsets of networks. Tau aggregation requires that multiple cellular parameters are set coordinately to a set of values that drive pathological assembly of tau. This model provides a foundation on which to build and increase our understanding of the series of events that lead to tau aggregation and may ultimately be used to identify critical intervention points that can direct the cell away from tau aggregation to aid in the treatment of tau-mediated (or related) aggregation diseases including Alzheimer's.
  // This model is hosted on BioModels Database and identified by: BIOMD0000000542.
  // To cite BioModels Database, please use: BioModels Database: An enhanced, curated and annotated resource for published quantitative kinetic models.
  // To the extent possible under law, all copyright and related or neighbouring rights to this encoded model have been dedicated to the public domain worldwide. Please refer to CC0 Public Domain Dedication for more information.
  // biomodels.db:MODEL1408150000
  // biomodels.db:BIOMD0000000542
  // isDescribedBy pubmed:21085645
  // isVersionOf GO:0070841
  // hasProperty DOID:10652 DOID:680
  // hasTaxon taxonomy:9606

  // Compartments:
  compartment Brain = 1;  // BTO:0000142

  // Species:
  // Energy
  species ADP in Brain = 1;  // CHEBI:16761
  // Energy
  species ATP in Brain = 0;  // CHEBI:15422
  // Microtubules
  species MT in Brain = 15;  // isVersionOf uniprot:Q71U36
  // 20S proteasome
  species $_20S in Brain = 1;  // GO:0005839
  // Chaperone
  species Hsc70 in Brain = 0.1;  // uniprot:P11142
  // Refolding chaperone
  species Hsp90 in Brain = 0.1;  // uniprot:Q16543
  // Degrading chaperone
  species CHIP in Brain = 0.1;  // uniprot:Q9UNE7
  // Bag2
  species Bag2 in Brain = 0.1;  // uniprot:O95816
  // 26S proteasome
  species $_26S in Brain = 1;  // GO:0000502
  // Ubiquitinated 3R tau
  species TauH3RUb in Brain = 0;  // hasPart uniprot:P10636; hasProperty PATO:0002216
  // Ubiquitinated 4R tau
  species TauH4RUb in Brain = 0;  // hasPart uniprot:P10636; hasProperty PATO:0002216
  // Nucleus for aggregaion (dimer) from 3R tau
  species Nucleus3 in Brain = 0;  // isVersionOf uniprot:P10636; hasProperty PATO:0001629
  // Nucleus for aggregaion (dimer) from 4R tau
  species Nucleus4 in Brain = 0;  // isVersionOf uniprot:P10636; hasProperty PATO:0001629
  // Aggregates of length 3, 3R tau
  species Agg33 in Brain = 0;  // isVersionOf uniprot:P10636; hasProperty PATO:0001629
  // Aggregates greater than length 3, 3R tau
  species $Ap in Brain = 0;  // isVersionOf uniprot:P10636; hasProperty PATO:0001629
  // Aggregates of length 3, 4R tau
  species Agg43 in Brain = 0;  // isVersionOf uniprot:P10636; hasProperty PATO:0001629
  // Aggregates greater than length 3, 4R tau
  species $Bp in Brain = 0;  // isVersionOf uniprot:P10636; hasProperty PATO:0001629
  // Newly synthesized 3R tau, unphosphorylated
  species Tau03R in Brain = 0;  // isVersionOf uniprot:P10636
  // Normally phosphorylated 3R tau
  species TauN3R in Brain = 0;  // isVersionOf uniprot:P10636; hasProperty PATO:0002220
  // Misfolded 3R tau prone to aggregation
  species TauH3R in Brain = 0;  // isVersionOf uniprot:P10636
  // Conformationally altered, unphosphorylated, 3R tau with afinity for MT
  species Tau0_3R in Brain = 0; Tau0_3R is "Tau0*3R";  // isVersionOf uniprot:P10636
  // Unphosphorylated 3R tau bound to microtubule
  species Tau03RMT in Brain = 0;  // isVersionOf uniprot:Q71U36; isVersionOf uniprot:P10636
  // Conformationally altered, normal, 3R tau with affinity for MT
  species TauN_3R in Brain = 0; TauN_3R is "TauN*3R";  // isVersionOf uniprot:P10636; hasProperty PATO:0002220
  // Normal 3R tau bound to microtubule
  species TauN3RMT in Brain = 0;  // hasPart uniprot:Q71U36; isVersionOf uniprot:P10636; hasProperty PATO:0002220
  // Conformationally altered, misfolded, 3R tau with affinity for MT
  species TauH_3R in Brain = 0; TauH_3R is "TauH*3R";  // isVersionOf uniprot:P10636
  // Misfolded 3R tau bound to microtubule
  species TauH3RMT in Brain = 0;  // hasPart uniprot:Q71U36; isVersionOf uniprot:P10636
  // Protein triage complex, 3R tau
  species TauH3R_Hsc70 in Brain = 0; TauH3R_Hsc70 is "TauH3R-Hsc70";  // hasPart uniprot:P11142; isVersionOf uniprot:P10636
  // Refolding complex, 3R tau
  species TauH3R_Hsp90 in Brain = 0; TauH3R_Hsp90 is "TauH3R-Hsp90";  // hasPart uniprot:Q16543; isVersionOf uniprot:P10636
  // Refolding complex with restored substrate, 3R tau
  species Tau03R_Hsp90 in Brain = 0; Tau03R_Hsp90 is "Tau03R-Hsp90";  // hasPart uniprot:Q16543; isVersionOf uniprot:P10636
  // Degradation complex, 3R tau
  species TauH3R_CHIP_Hsc70 in Brain = 0; TauH3R_CHIP_Hsc70 is "TauH3R-CHIP-Hsc70";  // hasPart uniprot:P11142 uniprot:Q9UNE7; isVersionOf uniprot:P10636
  // Protein triage complex, 3R tau
  species TauH3R_CHIP_Hsc70_Bag2 in Brain = 0; TauH3R_CHIP_Hsc70_Bag2 is "TauH3R-CHIP-Hsc70-Bag2";  // hasPart uniprot:P11142 uniprot:Q9UNE7 uniprot:O95816; isVersionOf uniprot:P10636
  // Newly synthesized 4R tau, unphosphorylated
  species Tau04R in Brain = 0;  // isVersionOf uniprot:P10636
  // Normally phosphorylated 4R tau
  species TauN4R in Brain = 0;  // isVersionOf uniprot:P10636; hasProperty PATO:0002220
  // Misfolded 4R tau prone to aggregation
  species TauH4R in Brain = 0;  // isVersionOf uniprot:P10636
  // Conformationally altered, unphosphorylated, 4R tau with afinity for MT
  species Tau0_4R in Brain = 0; Tau0_4R is "Tau0*4R";  // isVersionOf uniprot:P10636
  // Unphosphorylated 4R tau bound to microtubule
  species Tau04RMT in Brain = 0;  // hasPart uniprot:Q71U36; isVersionOf uniprot:P10636
  // Conformationally altered, normal, 4R tau with affinity for MT
  species TauN_4R in Brain = 0; TauN_4R is "TauN*4R";  // isVersionOf uniprot:P10636; hasProperty PATO:0002220
  // Normal 4R tau bound to microtubule
  species TauN4RMT in Brain = 0;  // hasPart uniprot:Q71U36; isVersionOf uniprot:P10636; hasProperty PATO:0002220
  // Conformationally altered, misfolded, 4R tau with affinity for MT
  species TauH_4R in Brain = 0; TauH_4R is "TauH*4R";  // isVersionOf uniprot:P10636
  // Misfolded 4R tau bound to microtubule
  species TauH4RMT in Brain = 0;  // hasPart uniprot:Q71U36; isVersionOf uniprot:P10636
  // Protein triage complex, 4R tau
  species TauH4R_Hsc70 in Brain = 0; TauH4R_Hsc70 is "TauH4R-Hsc70";  // hasPart uniprot:P11142; isVersionOf uniprot:P10636
  // Refolding complex, 4R tau
  species TauH4R_Hsp90 in Brain = 0; TauH4R_Hsp90 is "TauH4R-Hsp90";  // hasPart uniprot:Q16543; isVersionOf uniprot:P10636
  // Refolding complex with restored substrate, 4R tau
  species Tau04R_Hsp90 in Brain = 0; Tau04R_Hsp90 is "Tau04R-Hsp90";  // hasPart uniprot:Q16543; isVersionOf uniprot:P10636
  // Degradation complex, 4R tau
  species TauH4R_CHIP_Hsc70 in Brain = 0; TauH4R_CHIP_Hsc70 is "TauH4R-CHIP-Hsc70";  // hasPart uniprot:P11142 uniprot:Q9UNE7; isVersionOf uniprot:P10636
  // Protein triage complex, 4R tau
  species TauH4R_CHIP_Hsc70_Bag2 in Brain = 0; TauH4R_CHIP_Hsc70_Bag2 is "TauH4R-CHIP-Hsc70-Bag2";  // hasPart uniprot:P11142 uniprot:Q9UNE7 uniprot:O95816; isVersionOf uniprot:P10636

  // Parameters:
  k1 = 0.03725;
  k2 = 0.391818;
  k3 = 27.5668;
  k4 = 6.065997;
  k5 = 7.99621;
  k6 = 0.142099;
  k7 = 21.91138;
  k8 = 0.608448;
  k9 = 5.760257;
  k10 = 7.118684;
  k11 = 15;
  k12 = 9.633772;
  k13 = 0.163388;
  k14 = 1.540886;
  k15 = 9.220426;
  k16 = 50.66157;
  k17 = 0.202066;
  k18 = 3.940468;
  k19 = 8.052152;
  k20 = 19.76984;
  k21 = 7.248652;
  k22 = 0.173127;
  k23 = 0.075176;
  k24 = 0.039141;
  k25 = 0.066012;
  k26 = 0.1452;
  k27 = 0.473124;
  k28 = 12.62955;
  k29 = 0.006017;
  k30 = 16.56551;
  k31 = 3.991539;
  k32 = 7.130081;
  k33 = 0.009267;
  k34 = 0.000111;
  k35 = 0.146177;
  k36 = 0.006298;
  k37 = 1.07;
  k38 = 0.029266;
  k39 = 1.163756;
  k40 = 0.050949;
  k41 = 0.279;
  k42 = 0.025365;
  k43 = 3.68998;
  k44 = 27.5668;
  k45 = 0.216599;
  k46 = 7.99621;
  k47 = 2.801964;
  k48 = 21.91138;
  k49 = 0.003379;
  k50 = 5.760257;
  k51 = 7.118684;
  k52 = 15;
  k53 = 9.633772;
  k54 = 0.054463;
  k55 = 1.540886;
  k56 = 9.220426;
  k57 = 50.66157;
  k58 = 0.067355;
  k59 = 3.940468;
  k60 = 8.052152;
  k61 = 19.76984;
  k62 = 2.416217;
  k63 = 0.211664;
  k64 = 0.074306;
  k65 = 0.001334;
  k66 = 0.028914;
  k67 = 0.1452;
  k68 = 0.004313;
  k69 = 12.62955;
  k70 = 0.073055;
  k71 = 16.56551;
  k72 = 0.014352;
  k73 = 7.130081;
  k74 = 0.000161;
  k75 = 8.57e-5;
  k76 = 0.283991;
  k77 = 1.185806;
  k78 = 0.004562;
  k79 = 0.346673;
  k80 = 0.551509;
  k81 = 5.59e-5;
  k82 = 0.644848;
  k83 = 0.006502;
  k84 = 0.68;
  k85 = 0.015317;
  k86 = 5e-6;
  k87 = 0.0012;
  k88 = 5e-6;
  k89 = 0.06;
  k90 = 0.095;
  k91 = 0.005429;
  k92 = 0.095;
  k93 = 0.019;

  // Rate rules:
  _20S' = 0;
  _26S' = 0;
  Ap' = r77;
  Bp' = r82;

  // Reactions:
  // Tau synthesis
  r1: => Tau03R; Brain*Constant_flux__irreversible(k1);
  // Phosphorylation of newly synthesized tau
  r2: Tau03R + ATP => TauN3R + ADP; Brain*Michaelis_Menten(k2, Tau03R, ATP, k3);
  // dephosphosrylation of normally phosphorylated tau
  r3: TauN3R => Tau03R; Brain*Henri_Michaelis_Menten__irreversible(TauN3R, k5, k4);
  // Phosphorylation of normally phosphorylated tau
  r4: TauN3R + ATP => TauH3R + ADP; Brain*Michaelis_Menten(k6, TauN3R, ATP, k7);
  // Dephosphorylation of abnormal/misfolded tau
  r5: TauH3R => TauN3R; Brain*Henri_Michaelis_Menten__irreversible(TauH3R, k9, k8);
  // Conformation change favoring MT binding
  r6: Tau03R => Tau0_3R; Brain*k10*Tau03R;
  // Conformational change back to original
  r7: Tau0_3R => Tau03R; Brain*k11*Tau0_3R;
  // Binding of newly synthesized tau to MT
  r8: Tau0_3R + MT => Tau03RMT; Brain*Mass_Action(k12, Tau0_3R, MT);
  // Release of newly synthesized au from MT
  r9: Tau03RMT => Tau0_3R + MT; Brain*k13*Tau03RMT;
  // Conformation chang favoring MT binding
  r10: TauN3R => TauN_3R; Brain*k14*TauN3R;
  // Conformational change back to original
  r11: TauN_3R => TauN3R; Brain*k15*TauN_3R;
  // Binding of normally phosphorylated tau to MT
  r12: TauN_3R + MT => TauN3RMT; Brain*Mass_Action(k16, TauN_3R, MT);
  // Release of normally phosphorylated tau from MT
  r13: TauN3RMT => TauN_3R + MT; Brain*k17*TauN3RMT;
  // Conformational change favoring MT binding
  r14: TauH3R => TauH_3R; Brain*k18*TauH3R;
  // Conformational change backt to original
  r15: TauH_3R => TauH3R; Brain*k19*TauH_3R;
  // Binding of misfolded tau to MT
  r16: TauH_3R + MT => TauH3RMT; Brain*Mass_Action(k20, TauH_3R, MT);
  // Release of misfolded tau from microtubules
  r17: TauH3RMT => TauH_3R + MT; Brain*k21*TauH3RMT;
  // Degradation of newly synthesized tau
  r18: Tau03R + $_20S + ATP => ADP + $_20S; Brain*Mass_Action_(k22, Tau03R, _20S, ATP);
  // Degradation of phosphorlated tau
  r19: TauN3R + $_20S + ATP => ADP + $_20S; Brain*Mass_Action_(k23, TauN3R, _20S, ATP);
  // Degradation of misfolded tau
  r20: TauH3R + $_20S + ATP => $_20S + ADP; Brain*Mass_Action_(k24, TauH3R, _20S, ATP);
  // Phosphorylation of MT-bound newly synthesized tau
  r21: Tau03RMT + ATP => TauN3RMT + ADP; Brain*Michaelis_Menten(k25, Tau03RMT, ATP, k26);
  // Dephosphorylation of MT-bound normally phosphorylated tau
  r22: TauN3RMT => Tau03RMT; Brain*Henri_Michaelis_Menten__irreversible(TauN3RMT, k28, k27);
  // Phosphorylation of MT-bound normally phosphorylated tau
  r23: TauN3RMT + ATP => TauH3RMT + ADP; Brain*Michaelis_Menten(k29, TauN3RMT, ATP, k30);
  // Dephosphorylation of MT-bound abnormal/midfolded tau
  r24: TauH3RMT => TauN3RMT; Brain*Henri_Michaelis_Menten__irreversible(TauH3RMT, k32, k31);
  // Association of misfolded tau with Hsp70
  r25: TauH3R + Hsc70 => TauH3R_Hsc70; Brain*Mass_Action(k33, TauH3R, Hsc70);
  // Hsc70 release
  r26: TauH3R_Hsc70 => TauH3R + Hsc70; Brain*k34*TauH3R_Hsc70;
  // Exchange of Hsc70 for Hsp90
  r27: TauH3R_Hsc70 + Hsp90 => TauH3R_Hsp90 + Hsc70; Brain*Mass_Action(k35, TauH3R_Hsc70, Hsp90);
  // Restoration of TauH to Tau0 via Hsp90
  r28: TauH3R_Hsp90 => Tau03R_Hsp90; Brain*Henri_Michaelis_Menten__irreversible(TauH3R_Hsp90, k9, k8);
  // Release of Tau0 from Hsp90
  r29: Tau03R_Hsp90 => Hsp90 + Tau03R; Brain*k36*Tau03R_Hsp90;
  // Exchange of Hsc70 for CHIP
  r30: TauH3R_Hsc70 + CHIP => TauH3R_CHIP_Hsc70; Brain*Mass_Action(k37, TauH3R_Hsc70, CHIP);
  // Ubiquitination of tau
  r31: TauH3R_CHIP_Hsc70 => TauH3RUb + Hsc70 + CHIP; Brain*k38*TauH3R_CHIP_Hsc70;
  // Binding of Bag-2 to the degradation complex
  r32: TauH3R_CHIP_Hsc70 + Bag2 => TauH3R_CHIP_Hsc70_Bag2; Brain*Mass_Action(k39, TauH3R_CHIP_Hsc70, Bag2);
  // Rescue for degradation by Bag2
  r33: TauH3R_CHIP_Hsc70_Bag2 => TauH3R_Hsc70 + CHIP + Bag2; Brain*k40*TauH3R_CHIP_Hsc70_Bag2;
  // Degradation of ubiquitinated tau
  r34: TauH3RUb + $_26S + ATP => ADP + $_26S; Brain*Mass_Action_(k41, TauH3RUb, _26S, ATP);
  // Synthesis of 4R tau
  r35: => Tau04R; Brain*Constant_flux__irreversible(k42);
  // Phosphorylation of newly synthesized tau
  r36: Tau04R + ATP => TauN4R + ADP; Brain*Michaelis_Menten(k43, Tau04R, ATP, k44);
  // Dephosphorylation of normally phosphorylated tau
  r37: TauN4R => Tau04R; Brain*Henri_Michaelis_Menten__irreversible(TauN4R, k46, k45);
  // Phosphorylation of normally phosphorylated tau
  r38: TauN4R + ATP => TauH4R + ADP; Brain*Michaelis_Menten(k47, TauN4R, ATP, k48);
  // Dephosphorylation of abnormal/misfolded tau
  r39: TauH4R => TauN4R; Brain*Henri_Michaelis_Menten__irreversible(TauH4R, k50, k49);
  // Conformation change favoring MT binding
  r40: Tau04R => Tau0_4R; Brain*k51*Tau04R;
  // Conformational change back to original
  r41: Tau0_4R => Tau04R; Brain*k52*Tau0_4R;
  // Binding of newly shynthesized tau to MT
  r42: Tau0_4R + MT => Tau04RMT; Brain*Mass_Action(k53, Tau0_4R, MT);
  // Release of newly shyntesized tau from MT
  r43: Tau04RMT => Tau0_4R + MT; Brain*k54*Tau04RMT;
  // Conformation change favoring MT binding
  r44: TauN4R => TauN_4R; Brain*k55*TauN4R;
  // Conformational change back to original
  r45: TauN_4R => TauN4R; Brain*k56*TauN_4R;
  // Binding of normally phosphorylated tau to MT
  r46: TauN_4R + MT => TauN4RMT; Brain*Mass_Action(k57, TauN_4R, MT);
  // Release of normally phosphorylated tau from MT
  r47: TauN4RMT => TauN_4R + MT; Brain*k58*TauN4RMT;
  // Conformation change favoring MT binding
  r48: TauH4R => TauH_4R; Brain*k59*TauH4R;
  // Conformational change back to original
  r49: TauH_4R => TauH4R; Brain*k60*TauH_4R;
  // Binding of misfolded tau to MT
  r50: TauH_4R + MT => TauH4RMT; Brain*Mass_Action(k61, TauH_4R, MT);
  // Release of misfolded tau from microtubules
  r51: TauH4RMT => TauH_4R + MT; Brain*k62*TauH4RMT;
  // Degradation of newly shynthesized tau
  r52: Tau04R + $_20S + ATP => ADP + $_20S; Brain*Mass_Action_(k63, Tau04R, _20S, ATP);
  // Degradation of phosphorylated tau
  r53: TauN4R + $_20S + ATP => ADP + $_20S; Brain*Mass_Action_(k64, TauN4R, _20S, ATP);
  // Degradation of misfolded tau
  r54: TauH4R + $_20S + ATP => ADP + $_20S; Brain*Mass_Action_(k65, TauH4R, _20S, ATP);
  // Phosphorylation of MT-bound newly synthesized tau
  r55: Tau04RMT + ATP => TauN4RMT + ADP; Brain*Michaelis_Menten(k66, Tau04RMT, ATP, k67);
  // Dephosphorylation of MT-bound normally phosphorylated tau
  r56: TauN4RMT => Tau04RMT; Brain*Henri_Michaelis_Menten__irreversible(TauN4RMT, k69, k68);
  // Phosphorylation of MT-bound normally phosphorylated tau
  r57: TauN4RMT + ATP => TauH4RMT + ADP; Brain*Michaelis_Menten(k70, TauN4RMT, ATP, k71);
  // Dephosphorylation of MT-bound abnormal/misfolded tau
  r58: TauH4RMT => TauN4RMT; Brain*Henri_Michaelis_Menten__irreversible(TauH4RMT, k73, k72);
  // Association of misfolded tau with Hsp70
  r59: TauH4R + Hsc70 => TauH4R_Hsc70; Brain*Mass_Action(k74, TauH4R, Hsc70);
  // Hsc70 release
  r60: TauH4R_Hsc70 => TauH4R + Hsc70; Brain*k75*TauH4R_Hsc70;
  // Exchange of Hsc70 for Hsp90
  r61: TauH4R_Hsc70 + Hsp90 => TauH4R_Hsp90 + Hsc70; Brain*Mass_Action(k76, TauH4R_Hsc70, Hsp90);
  // Restoration of TauH to Tau0 via Hsp90
  r62: TauH4R_Hsp90 => Tau04R_Hsp90; Brain*Henri_Michaelis_Menten__irreversible(TauH4R_Hsp90, k9, k77);
  // Release of Tau0 from Hsp90
  r63: Tau04R_Hsp90 => Hsp90 + Tau04R; Brain*k78*Tau04R_Hsp90;
  // Exchange of Hsc70 for CHIP
  r64: TauH4R_Hsc70 + CHIP => TauH4R_CHIP_Hsc70; Brain*Mass_Action(k79, TauH4R_Hsc70, CHIP);
  // Ubiquitination of tau
  r65: TauH4R_CHIP_Hsc70 => TauH4RUb + Hsc70 + CHIP; Brain*k80*TauH4R_CHIP_Hsc70;
  // Binding of Bag-2 to the degradation complex
  r66: TauH4R_CHIP_Hsc70 + Bag2 => TauH4R_CHIP_Hsc70_Bag2; Brain*Mass_Action(k81, TauH4R_CHIP_Hsc70, Bag2);
  // Rescue from degradation by Bag2
  r67: TauH4R_CHIP_Hsc70_Bag2 => TauH4R_Hsc70 + CHIP + Bag2; Brain*k82*TauH4R_CHIP_Hsc70_Bag2;
  // Degradation of ubiquitinated tau
  r68: TauH4RUb + $_26S + ATP => ADP + $_26S; Brain*Mass_Action_(k83, TauH4RUb, _26S, ATP);
  // Generation of ATP
  r69: ADP => ATP; Brain*k84*ADP;
  // Use of ATP by other processes
  r70: ATP => ADP; Brain*k85*ATP;
  // Nucleation of Tau3
  r71: 2 TauH3RUb => Nucleus3; Brain*Nucleation(k86, TauH3RUb);
  // Dissociation of Tau3 Nucleus
  r72: Nucleus3 => 2 TauH3RUb; Brain*k87*Nucleus3;
  // Nucleation of Tau4
  r73: 2 TauH4RUb => Nucleus4; Brain*Nucleation(k88, TauH4RUb);
  // Dissociation of Tau4 Nucleus
  r74: Nucleus4 => 2 TauH4RUb; Brain*k89*Nucleus4;
  // Formation of Tau3, length 3
  r75: Nucleus3 + TauH3RUb => Agg33; Brain*Mass_Action(k90, Nucleus3, TauH3RUb);
  // Dissociation
  r76: Agg33 => Nucleus3 + TauH3RUb; Brain*k91*Agg33;
  // Formation of Tau3, 1 > 3 from Tau3 aggregate of length 3
  r77: TauH3RUb + Agg33 => $Ap; Brain*Mass_Action(k90, TauH3RUb, Agg33);
  // Formation of Agg of 1 > 3 from aggregaties of 1 > 3
  r78: TauH3RUb + $Ap => $Ap; Brain*Mass_Action(k90, TauH3RUb, Ap);
  // Dissociation of aggregates 1 > 3
  r79: $Ap => TauH3RUb + $Ap; Brain*k91*Ap;
  // Formation of Tau4, length 3
  r80: Nucleus4 + TauH4RUb => Agg43; Brain*Mass_Action(k92, Nucleus4, TauH4RUb);
  // Dissociation
  r81: Agg43 => Nucleus4 + TauH4RUb; Brain*k93*Agg43;
  // Formation of Tau4, 1 > 3 from Tau3 aggreate of length 3
  r82: TauH4RUb + Agg43 => $Bp; Brain*Mass_Action(k92, TauH4RUb, Agg43);
  // Formation of Agg of 1 > 3 from aggregates of 1 >3
  r83: TauH4RUb + $Bp => $Bp; Brain*Mass_Action(k92, TauH4RUb, Bp);
  // Dissociation of aggregates 1 > 3
  r84: $Bp => TauH4RUb + $Bp; Brain*k93*Bp;

  // Unit definitions:
  unit volume = 1e-3 litre;
  unit substance = 1e-3 mole;
end
