// SBML level 3 version 1
// dcterms:bibliographicCitation: http://identifiers.org/pubmed/20410284

function Function_for_re9_neutralization_by_IgM(Kvm, V, Am)
  Kvm*V*Am;
end

function Function_for_re8_neutralization_by_IgG(Kvg, V, Ag)
  Kvg*V*Ag;
end

function Function_for_re4_Killing_of_Infected_Epithelial_cells_by_Te_Cells(ke, Eps, Te)
  ke*Eps*Te;
end

function Function_for_re7(pi_a, Eps)
  pi_a*Eps;
end

function Function_for_re1_1_0(beta_a, default, Ep, V)
  beta_a*Ep*V*default;
end

function Function_for_re3(rho_E, Ep)
  rho_E*Ep;
end

model Miao2010___Innate_and_adaptive_immune_responses_to_primary_Influenza_A_Virus_infection_1()
  // Miao2010 - Innate and adaptive immune responses to primary Influenza A Virus infection_1
  // Model 1 of the Miao et. al. 2010. This model cannot be readily simulated. The model requires time course arrays of parameters values of A_G, A_M and T_E. This feature is not implemented.
  // This model is hosted on BioModels Database and identified by: BIOMD0000000546.
  // To cite BioModels Database, please use: BioModels-15 Years of Sharing Computational Models in Life Science.
  // To the extent possible under law, all copyright and related or neighbouring rights to this encoded model have been dedicated to the public domain worldwide. Please refer to CC0 Public Domain Dedication for more information.
  // hasVersion DOID:8469
  // biomodels.db:BIOMD0000000546
  // biomodels.db:MODEL1405150000
  // isVersionOf GO:0002250
  // isVersionOf GO:0045087
  // hasTaxon taxonomy:39107
  // model units - substance: substance, time: time, volume: volume, area: area, length: length, extent: substance

  // Compartments:
  compartment default = 1 volume;  // isVersionOf FMA:7195

  // Species:
  // Initial no. of uninfected and infectible epithelial cells per lung
  species Ep in default = 580000;  // isVersionOf FMA:66768
  // This entity is refered as Ep* in the paper. Infected epithelial cells per lung.
  species Eps in default = 0;  // isVersionOf FMA:66768
  // Infective viral titer (EID50/ml)
  species V in default = 1000;  // isVersionOf taxonomy:132504

  // Parameters:
  // Net growth rate of uninfected epithelial cells (per day)
  rho_E = 6.2e-8 unit_0;
  // alpha x the infection rate of uninfected epithelial cells ml*per(EID50*day)
  beta_a = 1e-6 unit_0;
  // Death rate of infected epithelial cells (per day)
  delta_Es = 0.6 unit_0;
  pi_a = 100 unit_0;
  // Virus clearance rate (reduction of infectious viral titer) (per day)
  c_V = 4.2 unit_0;
  k_E = 0;
  k_VG = 0;
  k_VM = 0;
  // Experimentally measured time course Effector CD8+T cells per lung
  T_E_T = 0; T_E_T is "T_E(T)";
  // An array of experimentally measured Serum IgG antibody (pg/ml)
  A_G_T = 0; A_G_T is "A_G(T)";
  // An array of experimentally measured Serum IgM antibody (pg/ml)
  A_M_T = 0; A_M_T is "A_M(T)";

  // Reactions:
  re1: Ep => Eps; default*Function_for_re1_1_0(beta_a, default, Ep, V); re1 is "re1 Viral Infection of epithelial cells";  // modifiers: V
  re3: => Ep; default*Function_for_re3(rho_E, Ep); re3 is "re3 Growth of uninfected epithelial cells";
  re5: Eps => ; default*delta_Es*Eps; re5 is "re5 Death of infected epithelial cells";
  re6_Viral_Clearance: V => ; default*c_V*V;
  re7: => V; default*Function_for_re7(pi_a, Eps); re7 is "re7 Production of virus from infected epithelial cells";  // modifiers: Eps
  re4_Killing_of_Infected_Epithelial_cells_by_Te_Cells: Eps => ; default*Function_for_re4_Killing_of_Infected_Epithelial_cells_by_Te_Cells(k_E, Eps, T_E_T);
  re8_Neutralization_of_virus_by_IgG: V => ; default*Function_for_re8_neutralization_by_IgG(k_VG, V, A_G_T);
  re9_Neutralization_of_virus_by_IgM: V => ; default*Function_for_re9_neutralization_by_IgM(k_VM, V, A_M_T);

  // Unit definitions:
  unit length = metre;
  unit area = metre^2;
  unit volume = litre;
  unit time = 86400 second;
  unit substance = mole;
  unit unit_0 = mole; unit_0 is "mol";
end
