// SBML level 2 version 4

function Function_for_reaction_1_0(cell, ks_c4, tf)
  ks_c4*tf/cell;
end

function Function_for_reaction_2_0(nuc_e2f_b, nuc_e2f_b_1_rb_S788_P_S800_U_b_1, cell, ks_c2e2f, ks_c2myc, tf)
  (ks_c2myc*tf + ks_c2e2f*(nuc_e2f_b + nuc_e2f_b_1_rb_S788_P_S800_U_b_1))/cell;
end

function Function_for_reaction_58_0(nuc_dnapre2, cell, k_delay)
  k_delay*nuc_dnapre2/cell;
end

function Function_for_reaction_59_0(nuc_C4D1_b_1_p21_b_1, cell, kdeg_c4)
  kdeg_c4*nuc_C4D1_b_1_p21_b_1/cell;
end

function Function_for_reaction_3_0(nuc_C2E_T160_U_b_1_p21_b_1, cell, gsk3b, kdeg_c2, kdeg_c2gsk3b)
  (kdeg_c2 + kdeg_c2gsk3b*gsk3b)*nuc_C2E_T160_U_b_1_p21_b_1/cell;
end

function Function_for_reaction_4_0(cyto_C2E_T160_U_b, cell, gsk3b, kdeg_c2, kdeg_c2gsk3b)
  (kdeg_c2 + kdeg_c2gsk3b*gsk3b)*cyto_C2E_T160_U_b/cell;
end

function Function_for_reaction_5_0(nuc_e2f_b, cell, ks_p21e2f, ks_p21p53, tfp21)
  (ks_p21p53 + ks_p21e2f*nuc_e2f_b)*tfp21/cell;
end

function Function_for_reaction_6_0(nuc_C2E_T160_U_b_1_p21_b_1, cell, kd_p21c2)
  kd_p21c2*nuc_C2E_T160_U_b_1_p21_b_1/cell;
end

function Function_for_reaction_7_0(nuc_e2f_b, nuc_C2E_T160_P_b, nuc_C2E_T160_U_b_1_p21_b_1, cell, erk, kdeg_p21c2skp2, kdeg_p21erkskp2, kdeg_p21skp2)
  (kdeg_p21erkskp2*erk + kdeg_p21c2skp2*nuc_C2E_T160_P_b + kdeg_p21skp2)*nuc_e2f_b*nuc_C2E_T160_U_b_1_p21_b_1/cell;
end

function Function_for_reaction_8_0(nuc_e2f_b, cell, ks_rb, ks_rbe2f)
  (ks_rb + ks_rbe2f*nuc_e2f_b)/cell;
end

function Function_for_reaction_9_0(nuc_rb_S788_U_S800_U_b, cell, kdeg_rbfree)
  kdeg_rbfree*nuc_rb_S788_U_S800_U_b/cell;
end

function Function_for_reaction_10_0(nuc_e2f_b_1_rb_S788_U_S800_U_b_1, cell, kdeg_rbbound)
  kdeg_rbbound*nuc_e2f_b_1_rb_S788_U_S800_U_b_1/cell;
end

function Function_for_reaction_11_0(nuc_rb_S788_U_S800_U_b, nuc_p21_b, cell, kdeg_rbp21)
  kdeg_rbp21*nuc_p21_b*nuc_rb_S788_U_S800_U_b/cell;
end

function Function_for_reaction_12_0(nuc_p21_b, nuc_e2f_b_1_rb_S788_U_S800_U_b_1, cell, kdeg_rbp21)
  kdeg_rbp21*nuc_p21_b*nuc_e2f_b_1_rb_S788_U_S800_U_b_1/cell;
end

function Function_for_reaction_13_0(nuc_e2f_b, cell, ks_e2fe2f, ks_e2fmyc, tf)
  (ks_e2fe2f*nuc_e2f_b + ks_e2fmyc)*tf/cell;
end

function Function_for_reaction_14_0(nuc_e2f_b_1_rb_S788_U_S800_U_b_1, cell, kdeg_e2fbound)
  kdeg_e2fbound*nuc_e2f_b_1_rb_S788_U_S800_U_b_1/cell;
end

function Function_for_reaction_15_0(nuc_e2f_b_1_rb_S788_U_S800_U_b_1, cell, kd_rbe2f)
  kd_rbe2f*nuc_e2f_b_1_rb_S788_U_S800_U_b_1/cell;
end

function Function_for_reaction_16_0(Km_prb, nuc_rb_S788_U_S800_U_b, nuc_C4D1_b_1_p21_b_1, cell, kcatp_rbc4, nrb)
  kcatp_rbc4*nuc_C4D1_b_1_p21_b_1*nuc_rb_S788_U_S800_U_b^nrb/(Km_prb^nrb + nuc_rb_S788_U_S800_U_b^nrb)/cell;
end

function Function_for_reaction_17_0(Km_prb, nuc_e2f_b_1_rb_S788_U_S800_U_b_1, nuc_C4D1_b_1_p21_b_1, cell, kcatp_rbc4, nrb)
  kcatp_rbc4*nuc_C4D1_b_1_p21_b_1*nuc_e2f_b_1_rb_S788_U_S800_U_b_1^nrb/(Km_prb^nrb + nuc_e2f_b_1_rb_S788_U_S800_U_b_1^nrb)/cell;
end

function Function_for_reaction_18_0(nuc_e2f_b, nuc_C2E_T160_P_b, nuc_dnapre, cell, k_dna)
  k_dna*nuc_C2E_T160_P_b*nuc_e2f_b*nuc_dnapre/cell;
end

function Function_for_reaction_19_0(cyto_C4D1_b, cell, gsk3b, kdeg_c4, kdeg_c4gsk3b)
  (kdeg_c4 + kdeg_c4gsk3b*gsk3b)*cyto_C4D1_b/cell;
end

function Function_for_reaction_20_0(nuc_C2E_T160_U_b, cell, gsk3b, kdeg_c2, kdeg_c2gsk3b)
  (kdeg_c2 + kdeg_c2gsk3b*gsk3b)*nuc_C2E_T160_U_b/cell;
end

function Function_for_reaction_21_0(nuc_C2E_T160_U_b, cell, kp_c2cak)
  kp_c2cak*nuc_C2E_T160_U_b/cell;
end

function Function_for_reaction_22_0(cyto_C4D1_b, cyto_p21_b, cell, kb_p21c4)
  kb_p21c4*cyto_C4D1_b*cyto_p21_b/cell;
end

function Function_for_reaction_23_0(cyto_p21_b, cyto_C2E_T160_U_b, cell, kb_p21c2)
  kb_p21c2*cyto_C2E_T160_U_b*cyto_p21_b/cell;
end

function Function_for_reaction_24_0(nuc_p21_b, nuc_C2E_T160_U_b, cell, kb_p21c2)
  kb_p21c2*nuc_p21_b*nuc_C2E_T160_U_b/cell;
end

function Function_for_reaction_25_0(cyto_p21_b, Vratio, cell, kimport)
  kimport/Vratio*cyto_p21_b/cell;
end

function Function_for_reaction_26_0(cyto_p21_b, Vratio, cell, kimport)
  kimport*(1 - 1/Vratio)*cyto_p21_b/cell;
end

function Function_for_reaction_27_0(nuc_p21_b, cell, erk, gsk3b, kdeg_p21erk, kdeg_p21gsk3b)
  (kdeg_p21gsk3b*gsk3b + kdeg_p21erk*erk)*nuc_p21_b/cell;
end

function Function_for_reaction_28_0(cyto_p21_b, cell, erk, gsk3b, kdeg_p21erk, kdeg_p21gsk3b)
  (kdeg_p21gsk3b*gsk3b + kdeg_p21erk*erk)*cyto_p21_b/cell;
end

function Function_for_reaction_29_0(nuc_rb_S788_P_S800_U_b, cell, kdeg_rbfree)
  kdeg_rbfree*nuc_rb_S788_P_S800_U_b/cell;
end

function Function_for_reaction_30_0(nuc_e2f_b_1_rb_S788_P_S800_U_b_1, cell, kdeg_rbbound)
  kdeg_rbbound*nuc_e2f_b_1_rb_S788_P_S800_U_b_1/cell;
end

function Function_for_reaction_31_0(nuc_p21_b, nuc_rb_S788_P_S800_U_b, cell, kdeg_rbp21)
  kdeg_rbp21*nuc_p21_b*nuc_rb_S788_P_S800_U_b/cell;
end

function Function_for_reaction_32_0(nuc_p21_b, nuc_e2f_b_1_rb_S788_P_S800_U_b_1, cell, kdeg_rbp21)
  kdeg_rbp21*nuc_p21_b*nuc_e2f_b_1_rb_S788_P_S800_U_b_1/cell;
end

function Function_for_reaction_33_0(nuc_e2f_b, cell, kdeg_e2ffree)
  kdeg_e2ffree*nuc_e2f_b/cell;
end

function Function_for_reaction_34_0(nuc_e2f_b_1_rb_S788_P_S800_U_b_1, cell, kdeg_e2fbound)
  kdeg_e2fbound*nuc_e2f_b_1_rb_S788_P_S800_U_b_1/cell;
end

function Function_for_reaction_35_0(nuc_rb_S788_U_S800_U_b, nuc_e2f_b, cell, kb_rbe2f)
  kb_rbe2f*nuc_rb_S788_U_S800_U_b*nuc_e2f_b/cell;
end

function Function_for_reaction_36_0(nuc_e2f_b, nuc_rb_S788_P_S800_U_b, cell, kb_rbpe2f)
  kb_rbpe2f*nuc_e2f_b*nuc_rb_S788_P_S800_U_b/cell;
end

function Function_for_reaction_37_0(nuc_e2f_b_1_rb_S788_P_S800_U_b_1, cell, kd_rbpe2f)
  kd_rbpe2f*nuc_e2f_b_1_rb_S788_P_S800_U_b_1/cell;
end

function Function_for_reaction_38_0(Km_prb, nuc_rb_S788_P_S800_U_b, nuc_C2E_T160_P_b, cell, kcatp_rbc2, nrb)
  kcatp_rbc2*nuc_C2E_T160_P_b*nuc_rb_S788_P_S800_U_b^nrb/(Km_prb^nrb + nuc_rb_S788_P_S800_U_b^nrb)/cell;
end

function Function_for_reaction_39_0(Km_prb, nuc_e2f_b_1_rb_S788_P_S800_U_b_1, nuc_C2E_T160_P_b, cell, kcatp_rbc2, nrb)
  kcatp_rbc2*nuc_C2E_T160_P_b*nuc_e2f_b_1_rb_S788_P_S800_U_b_1^nrb/(Km_prb^nrb + nuc_e2f_b_1_rb_S788_P_S800_U_b_1^nrb)/cell;
end

function Function_for_reaction_40_0(Km_dprb, nuc_rb_S788_P_S800_U_b, nuc_C2E_T160_P_b, cell, kcatdp_rbc4, kinh_pp1, nrb)
  kcatdp_rbc4*nuc_rb_S788_P_S800_U_b^nrb/(Km_dprb^nrb + nuc_rb_S788_P_S800_U_b^nrb)*1/(1 + kinh_pp1*nuc_C2E_T160_P_b)/cell;
end

function Function_for_reaction_41_0(Km_dprb, nuc_e2f_b_1_rb_S788_P_S800_U_b_1, nuc_C2E_T160_P_b, cell, kcatdp_rbc4, kinh_pp1, nrb)
  kcatdp_rbc4*nuc_e2f_b_1_rb_S788_P_S800_U_b_1^nrb/(Km_dprb^nrb + nuc_e2f_b_1_rb_S788_P_S800_U_b_1^nrb)*1/(1 + kinh_pp1*nuc_C2E_T160_P_b)/cell;
end

function Function_for_reaction_42_0(nuc_dnapre1, cell, k_delay)
  k_delay*nuc_dnapre1/cell;
end

function Function_for_reaction_43_0(cyto_C4D1_b_1_p21_b_1, cell, gsk3b, kdeg_c4, kdeg_c4gsk3b)
  (kdeg_c4 + kdeg_c4gsk3b*gsk3b)*cyto_C4D1_b_1_p21_b_1/cell;
end

function Function_for_reaction_44_0(nuc_C2E_T160_P_b, cell, gsk3b, kdeg_c2, kdeg_c2gsk3b)
  (kdeg_c2 + kdeg_c2gsk3b*gsk3b)*nuc_C2E_T160_P_b/cell;
end

function Function_for_reaction_45_0(cyto_C2E_T160_U_b_1_p21_b_1, cell, gsk3b, kdeg_c2, kdeg_c2gsk3b)
  (kdeg_c2 + kdeg_c2gsk3b*gsk3b)*cyto_C2E_T160_U_b_1_p21_b_1/cell;
end

function Function_for_reaction_46_0(nuc_C2E_T160_P_b, cell, gsk3b, kdeg_c2c2gsk3b)
  kdeg_c2c2gsk3b*gsk3b*nuc_C2E_T160_P_b/cell;
end

function Function_for_reaction_47_0(nuc_C2E_T160_P_b, cell, kdp_c2cak)
  kdp_c2cak*nuc_C2E_T160_P_b/cell;
end

function Function_for_reaction_48_0(cyto_C4D1_b_1_p21_b_1, cell, kd_p21c4)
  kd_p21c4*cyto_C4D1_b_1_p21_b_1/cell;
end

function Function_for_reaction_49_0(nuc_p21_b, nuc_C2E_T160_P_b, cell, kb_p21c2)
  kb_p21c2*nuc_p21_b*nuc_C2E_T160_P_b/cell;
end

function Function_for_reaction_50_0(cyto_C2E_T160_U_b_1_p21_b_1, cell, kd_p21c2)
  kd_p21c2*cyto_C2E_T160_U_b_1_p21_b_1/cell;
end

function Function_for_reaction_51_0(cyto_C4D1_b_1_p21_b_1, Vratio, cell, kimport)
  kimport/Vratio*cyto_C4D1_b_1_p21_b_1/cell;
end

function Function_for_reaction_52_0(cyto_C2E_T160_U_b_1_p21_b_1, Vratio, cell, kimport)
  kimport/Vratio*cyto_C2E_T160_U_b_1_p21_b_1/cell;
end

function Function_for_reaction_53_0(cyto_C4D1_b_1_p21_b_1, Vratio, cell, kimport)
  kimport*(1 - 1/Vratio)*cyto_C4D1_b_1_p21_b_1/cell;
end

function Function_for_reaction_54_0(cyto_C2E_T160_U_b_1_p21_b_1, Vratio, cell, kimport)
  kimport*(1 - 1/Vratio)*cyto_C2E_T160_U_b_1_p21_b_1/cell;
end

function Function_for_reaction_55_0(nuc_rb_S788_P_S800_P_b, cell, kdeg_rbfree)
  kdeg_rbfree*nuc_rb_S788_P_S800_P_b/cell;
end

function Function_for_reaction_56_0(nuc_p21_b, nuc_rb_S788_P_S800_P_b, cell, kdeg_rbp21)
  kdeg_rbp21*nuc_p21_b*nuc_rb_S788_P_S800_P_b/cell;
end

function Function_for_reaction_57_0(Km_dprb, nuc_C2E_T160_P_b, nuc_rb_S788_P_S800_P_b, cell, kcatdp_rbc2, kinh_pp1, nrb)
  kcatdp_rbc2*nuc_rb_S788_P_S800_P_b^nrb/(Km_dprb^nrb + nuc_rb_S788_P_S800_P_b^nrb)*1/(1 + kinh_pp1*nuc_C2E_T160_P_b)/cell;
end

function Function_for_reaction_60_0(nuc_C2E_T160_P_b_1_p21_b_1, cell, gsk3b, kdeg_c2, kdeg_c2gsk3b)
  (kdeg_c2 + kdeg_c2gsk3b*gsk3b)*nuc_C2E_T160_P_b_1_p21_b_1/cell;
end

function Function_for_reaction_61_0(nuc_C4D1_b_1_p21_b_1, cell, kd_p21c4)
  kd_p21c4*nuc_C4D1_b_1_p21_b_1/cell;
end

function Function_for_reaction_62_0(nuc_C2E_T160_P_b_1_p21_b_1, cell, kd_p21c2)
  kd_p21c2*nuc_C2E_T160_P_b_1_p21_b_1/cell;
end

function Function_for_reaction_63_0(nuc_e2f_b, nuc_C2E_T160_P_b, nuc_C2E_T160_P_b_1_p21_b_1, cell, erk, kdeg_p21c2skp2, kdeg_p21erkskp2, kdeg_p21skp2)
  (kdeg_p21erkskp2*erk + kdeg_p21c2skp2*nuc_C2E_T160_P_b + kdeg_p21skp2)*nuc_e2f_b*nuc_C2E_T160_P_b_1_p21_b_1/cell;
end

function Function_for_reaction_64_0(nuc_e2f_b, nuc_C2E_T160_P_b, nuc_C4D1_b_1_p21_b_1, cell, erk, kdeg_p21c2skp2, kdeg_p21erkskp2, kdeg_p21skp2)
  (kdeg_p21erkskp2*erk + kdeg_p21c2skp2*nuc_C2E_T160_P_b + kdeg_p21skp2)*nuc_e2f_b*nuc_C4D1_b_1_p21_b_1/cell;
end

function Function_for_reaction_65_0(nuc_dnapre3, cell, k_delay)
  k_delay*nuc_dnapre3/cell;
end

function Function_for_reaction_66_0(nuc_C4D1_b, cell, gsk3b, kdeg_c4, kdeg_c4gsk3b)
  (kdeg_c4 + kdeg_c4gsk3b*gsk3b)*nuc_C4D1_b/cell;
end

function Function_for_reaction_67_0(nuc_p21_b, nuc_C4D1_b, cell, kb_p21c4)
  kb_p21c4*nuc_p21_b*nuc_C4D1_b/cell;
end

function Function_for_reaction_68_0(nuc_dnapre4, cell, k_delay)
  k_delay*nuc_dnapre4/cell;
end

function Function_for_reaction_69_0(nuc_dnapre5, cell, k_delay)
  k_delay*nuc_dnapre5/cell;
end

model Mueller2015()
  // Mueller2015 - Hepatocyte proliferation, T160 phosphorylation of CDK2
  // This model is described in the article:
  // T160-phosphorylated CDK2 defines threshold for HGF-dependent proliferation in primary hepatocytes.
  // Mueller S, Huard J, Waldow K, Huang X, D'Alessandro LA, Bohl S, Börner K, Grimm D, Klamt S, Klingmüller U, Schilling M.
  // Mol. Syst. Biol. 2015; 11(3): 795
  // Abstract:
  // Liver regeneration is a tightly controlled process mainly achieved by proliferation of usually quiescent hepatocytes. The specific molecular mechanisms ensuring cell division only in response to proliferative signals such as hepatocyte growth factor (HGF) are not fully understood. Here, we combined quantitative time-resolved analysis of primary mouse hepatocyte proliferation at the single cell and at the population level with mathematical modeling. We showed that numerous G1/S transition components are activated upon hepatocyte isolation whereas DNA replication only occurs upon additional HGF stimulation. In response to HGF, Cyclin:CDK complex formation was increased, p21 rather than p27 was regulated, and Rb expression was enhanced. Quantification of protein levels at the restriction point showed an excess of CDK2 over CDK4 and limiting amounts of the transcription factor E2F-1. Analysis with our mathematical model revealed that T160 phosphorylation of CDK2 correlated best with growth factor-dependent proliferation, which we validated experimentally on both the population and the single cell level. In conclusion, we identified CDK2 phosphorylation as a gate-keeping mechanism to maintain hepatocyte quiescence in the absence of HGF.
  // This model is hosted on BioModels Database and identified by: BIOMD0000000568.
  // To cite BioModels Database, please use: BioModels Database: An enhanced, curated and annotated resource for published quantitative kinetic models.
  // To the extent possible under law, all copyright and related or neighbouring rights to this encoded model have been dedicated to the public domain worldwide. Please refer to CC0 Public Domain Dedication for more information.
  // biomodels.db:MODEL1502090000
  // biomodels.db:BIOMD0000000568
  // isDescribedBy pubmed:25771250
  // hasVersion DOID:409
  // isVersionOf GO:0072574
  // hasTaxon taxonomy:10090

  // Compartments:
  compartment cell = 1; cell is "Cytoplasm";  // GO:0005737
  compartment Nucleus = 1;  // GO:0005634

  // Species:
  // Cyclin E:CDK2 complex - T160 phosphorylation
  species cyto_C2E_T160_U_b in cell = 0.415; cyto_C2E_T160_U_b is "@cyto::C2E(T160~U,b)";  // isVersionOf GO:0097134; hasProperty PATO:0002220
  // Cyclin D1:CDK4 complex
  species cyto_C4D1_b in cell = 0; cyto_C4D1_b is "@cyto::C4D1(b)";  // GO:0097128
  // p21 - Cyclin-dependent kinase inhibitor 1
  species cyto_p21_b in cell = 0; cyto_p21_b is "@cyto::p21(b)";  // uniprot:P46414
  // Cyclin D1:CDK4:p21 complex
  species cyto_C4D1_b_1_p21_b_1 in cell = 0; cyto_C4D1_b_1_p21_b_1 is "@cyto::C4D1(b!1).p21(b!1)";  // hasPart GO:0097128; hasPart uniprot:P46414
  // Cyclin E:CDK2:p21 complex - T160 phosphorylation
  species cyto_C2E_T160_U_b_1_p21_b_1 in cell = 0; cyto_C2E_T160_U_b_1_p21_b_1 is "@cyto::C2E(T160~U,b!1).p21(b!1)";  // hasPart GO:0097134; hasPart uniprot:P46414; hasProperty PATO:0002220
  // Hepatocyte Growth Factor
  species $hgf in cell; hgf is "HGF";  // uniprot:Q08048
  // p53 tumor suppressor
  species $inhp53 in cell;  // uniprot:P02340
  // Extracellular-signal-regulated Kinases
  species $inherk in cell; inherk is "inhERK";  // uniprot:Q63844
  // Protein kinase B
  species $inhakt in cell; inhakt is "inhAKT";  // uniprot:P31750
  // Cyclin D1:CDK4 complex
  species $inhc4d1 in cell;  // GO:0097128
  // Cyclin E:CDK2 complex
  species $ObsTotCycECDK2_obs in Nucleus;  // GO:0097134
  // CDK2 T160-phosphorylated (Thr160 site)
  species $ObsTotCDK2T160_obs in Nucleus;  // isVersionOf uniprot:P97377; hasProperty PATO:0002220
  // Cyclin D1:CDK4 complex
  species $ObsTotCycDCDK4_obs in Nucleus;  // GO:0097128
  // p21 - Cyclin-dependent kinase inhibitor 1
  species $ObsTotP21_obs in Nucleus;  // uniprot:P46414
  // p21:CDK2 complex
  species $ObsCDK2P21_obs in Nucleus;  // hasPart uniprot:P46414; hasPart uniprot:P97377
  // E2F-1 - E2F transcription factor
  species $ObsTotE2F_obs in Nucleus;  // uniprot:Q61501
  // Retinoblastoma Protein
  species $ObsTotRb_obs in Nucleus;  // uniprot:P13405
  // Rb S788-phosphorylated (serine 788 site)
  species $ObsPhosRbS788_obs in Nucleus;  // isVersionOf uniprot:P13405; hasProperty PATO:0002220
  // Rb S800/S804-phosphorylated (serine 800 and 804 sites)
  species $ObsPhosRbS800_obs in Nucleus;  // isVersionOf uniprot:P13405; hasProperty PATO:0002220
  // DNA content
  species $ObsDNAContent_obs in Nucleus;  // CHEBI:16991
  // Cyclin E:CDK2:p21 complex - T160 phosphorylation
  species nuc_C2E_T160_P_b_1_p21_b_1 in Nucleus = 0; nuc_C2E_T160_P_b_1_p21_b_1 is "@nuc::C2E(T160~P,b!1).p21(b!1)";  // hasPart GO:0097134; hasPart uniprot:P46414; hasProperty PATO:0002220
  // Cyclin E:CDK2 complex - T160 phosphorylation
  species nuc_C2E_T160_P_b in Nucleus = 0; nuc_C2E_T160_P_b is "@nuc::C2E(T160~P,b)";  // hasProperty PATO:0002220; isVersionOf GO:0097134
  // Cyclin E:CDK2:p21 complex - T160 phosphorylation
  species nuc_C2E_T160_U_b_1_p21_b_1 in Nucleus = 6.2223; nuc_C2E_T160_U_b_1_p21_b_1 is "@nuc::C2E(T160~U,b!1).p21(b!1)";  // hasPart GO:0097134; hasPart uniprot:P46414; hasProperty PATO:0002220
  // Cyclin E:CDK2 complex - T160 phosphorylation
  species nuc_C2E_T160_U_b in Nucleus = 0; nuc_C2E_T160_U_b is "@nuc::C2E(T160~U,b)";  // hasProperty PATO:0002220; isVersionOf GO:0097134
  // Cyclin D1:CDK4:p21 complex
  species nuc_C4D1_b_1_p21_b_1 in Nucleus = 0; nuc_C4D1_b_1_p21_b_1 is "@nuc::C4D1(b!1).p21(b!1)";  // hasPart GO:0097128; hasPart uniprot:P46414
  // Cyclin D1:CDK4 complex
  species nuc_C4D1_b in Nucleus = 0; nuc_C4D1_b is "@nuc::C4D1(b)";  // GO:0097128
  // Genes contributing to the formation of prereplication complexes.
  species nuc_dnapre in Nucleus = 1; nuc_dnapre is "@nuc::dnapre()";  // GO:0036387
  // Genes contributing to the formation of prereplication complexes.
  species nuc_dnapre1 in Nucleus = 0; nuc_dnapre1 is "@nuc::dnapre1()";  // GO:0036387
  // Genes contributing to the formation of prereplication complexes.
  species nuc_dnapre2 in Nucleus = 0; nuc_dnapre2 is "@nuc::dnapre2()";  // GO:0036387
  // Genes contributing to the formation of prereplication complexes.
  species nuc_dnapre3 in Nucleus = 0; nuc_dnapre3 is "@nuc::dnapre3()";  // GO:0036387
  // Genes contributing to the formation of prereplication complexes.
  species nuc_dnapre4 in Nucleus = 0; nuc_dnapre4 is "@nuc::dnapre4()";  // GO:0036387
  // E2F-1: Retinoblastoma Protein complex - S788 and S800 phosphorylation
  species nuc_e2f_b_1_rb_S788_P_S800_U_b_1 in Nucleus = 0; nuc_e2f_b_1_rb_S788_P_S800_U_b_1 is "@nuc::e2f(b!1).rb(S788~P,S800~U,b!1)";  // isVersionOf uniprot:Q61501; hasPart uniprot:P13405; hasProperty PATO:0002220
  // E2F-1: Retinoblastoma Protein complex - S788 and S800 phosphorylation
  species nuc_e2f_b_1_rb_S788_U_S800_U_b_1 in Nucleus = 0.0601; nuc_e2f_b_1_rb_S788_U_S800_U_b_1 is "@nuc::e2f(b!1).rb(S788~U,S800~U,b!1)";  // hasPart uniprot:Q61501; hasPart uniprot:P13405; hasProperty PATO:0002220
  // E2F-1 - E2F transcription factor
  species nuc_e2f_b in Nucleus = 0; nuc_e2f_b is "@nuc::e2f(b)";  // uniprot:Q61501
  // p21 - Cyclin-dependent kinase inhibitor 1
  species nuc_p21_b in Nucleus = 0; nuc_p21_b is "@nuc::p21(b)";  // uniprot:P46414
  // Retinoblastoma Protein - S788 and S800 phosphorylation
  species nuc_rb_S788_P_S800_P_b in Nucleus = 0; nuc_rb_S788_P_S800_P_b is "@nuc::rb(S788~P,S800~P,b)";  // isVersionOf uniprot:P13405; hasProperty PATO:0002220
  // Retinoblastoma Protein - S788 and S800 phosphorylation
  species nuc_rb_S788_P_S800_U_b in Nucleus = 0; nuc_rb_S788_P_S800_U_b is "@nuc::rb(S788~P,S800~U,b)";  // isVersionOf uniprot:P13405; hasProperty PATO:0002220
  // Retinoblastoma Protein - S788 and S800 phosphorylation
  species nuc_rb_S788_U_S800_U_b in Nucleus = 25.5914; nuc_rb_S788_U_S800_U_b is "@nuc::rb(S788~U,S800~U,b)";  // isVersionOf uniprot:P13405; hasProperty PATO:0002220
  // Genes contributing to the formation of prereplication complexes.
  species nuc_dnapre5 in Nucleus = 0; nuc_dnapre5 is "@nuc::dnapre5()";  // GO:0036387

  // Parameters:
  Vnuc = 0.25;
  Vcyto = 12.67;
  perk = 0.008573141;
  nerk = 1.146634;
  pakt = 0.0348;
  nakt = 1.0957;
  aerk = 0.16;
  aakt = 0.53;
  atf = 0.6012882;
  ks_c4 = 14298.67;
  kdeg_c4 = 1.014331;
  kdeg_c4gsk3b = 0.1076371;
  ks_c2myc = 0.1575117;
  ks_c2e2f = 2.199449;
  kdeg_c2c2gsk3b = 5.588356;
  kdeg_c2gsk3b = 1.550902e-5;
  kdeg_c2 = 0.2257466;
  kdp_c2cak = 101.2821;
  kc2cak = 0.3169933;
  ks_p21p53 = 3.841362e-6;
  ks_p21e2f = 0.8116172;
  kdeg_p21erkskp2 = 0.0002829763;
  kdeg_p21c2skp2 = 0.04010804;
  kdeg_p21skp2 = 0.7505748;
  kdeg_p21gsk3b = 0.004640107;
  kdeg_p21erk = 0.7364887;
  Kd_p21c4 = 99.99654;
  kb_p21c4 = 14.30834;
  Kd_p21c2 = 0.01000242;
  kb_p21c2 = 997.9381;
  ki = 0.09183266;
  kinh_p21akt = 0.4396629;
  ks_e2fe2f = 0.4596017;
  ks_e2fmyc = 2.491745e-6;
  kdege2fplus = 4.181533e-5;
  kdeg_e2fbound = 0.0999954;
  ks_rb = 72.52453;
  ks_rbe2f = 20.01298;
  kdeg_rbp21 = 0.8635708;
  kdeg_rbbound = 0.08899641;
  kdegrbplus = 0.2577635;
  kb_rbe2f = 229.9764;
  Kd_rb_e2f = 50.00253;
  kb_rbpe2f = 182.2185;
  Kd_rbp_e2f = 481.4845;
  kcatprbc4 = 2797.823;
  kcatp_rbc2 = 7142308;
  kcatdp_rbc2 = 0.003138417;
  kcatdp_rbc4 = 2892.022;
  kinh_pp1 = 16634.94;
  Km_dprb = 0.1189884;
  Km_prb = 2.034589;
  nrb = 3;
  k_dna = 0.009497905;
  k_delay = 23.66588;
  scale_TotcycDCDK4 = 0.5651;
  scale_TotcycECDK2 = 0.1889;
  scale_Totp21CDK2 = 0.3397907;
  scale_TotCDK2T160 = 2.728396;
  scale_TotRb = 0.2605;
  scale_PhosRbS788 = 0.6739073;
  scale_PhosRbS800 = 0.8237747;
  scale_Totp21 = 0.1728;
  scale_TotE2F = 28.7418;

  // Assignment rules:
  ObsCDK2P21_obs := scale_Totp21CDK2*(Vnuc*(nuc_C2E_T160_U_b_1_p21_b_1 + nuc_C2E_T160_P_b_1_p21_b_1) + Vcyto*cyto_C2E_T160_U_b_1_p21_b_1)/(Vnuc + Vcyto);
  ObsTotE2F_obs := (scale_TotE2F + scale_TotRb)*Vnuc*(nuc_e2f_b_1_rb_S788_U_S800_U_b_1 + nuc_e2f_b + nuc_e2f_b_1_rb_S788_P_S800_U_b_1)/(Vnuc + Vcyto);
  hgf := piecewise(0, time < -1, piecewise(0, time < 24, 1));
  inhp53 := piecewise(0, time < -1, piecewise(0, time < 0, 0));
  inherk := piecewise(0, time < -1, piecewise(0, time < 0, 0));
  inhakt := piecewise(0, time < -1, piecewise(0, time < 0, 0));
  inhc4d1 := piecewise(0, time < -1, piecewise(0, time < 0, 0));
  ObsTotCycECDK2_obs := scale_TotcycECDK2*(Vnuc*(nuc_C2E_T160_U_b_1_p21_b_1 + nuc_C2E_T160_U_b + nuc_C2E_T160_P_b + nuc_C2E_T160_P_b_1_p21_b_1) + Vcyto*(cyto_C2E_T160_U_b + cyto_C2E_T160_U_b_1_p21_b_1))/(Vnuc + Vcyto);
  ObsTotCDK2T160_obs := scale_TotCDK2T160*Vnuc*(nuc_C2E_T160_P_b + nuc_C2E_T160_P_b_1_p21_b_1)/(Vnuc + Vcyto);
  ObsTotCycDCDK4_obs := scale_TotcycDCDK4*(Vnuc*nuc_C4D1_b_1_p21_b_1 + Vcyto*cyto_C4D1_b_1_p21_b_1)/(Vnuc + Vcyto);
  ObsTotP21_obs := scale_Totp21*(Vnuc*(nuc_C2E_T160_U_b_1_p21_b_1 + nuc_p21_b + nuc_C2E_T160_P_b_1_p21_b_1 + nuc_C4D1_b_1_p21_b_1) + Vcyto*(cyto_p21_b + cyto_C4D1_b_1_p21_b_1 + cyto_C2E_T160_U_b_1_p21_b_1))/(Vnuc + Vcyto);
  ObsTotRb_obs := scale_TotRb*Vnuc*(nuc_rb_S788_U_S800_U_b + nuc_e2f_b_1_rb_S788_U_S800_U_b_1 + nuc_rb_S788_P_S800_U_b + nuc_e2f_b_1_rb_S788_P_S800_U_b_1 + nuc_rb_S788_P_S800_P_b)/(Vnuc + Vcyto);
  ObsPhosRbS788_obs := scale_PhosRbS788*Vnuc*(nuc_rb_S788_P_S800_U_b + nuc_e2f_b_1_rb_S788_P_S800_U_b_1 + nuc_rb_S788_P_S800_P_b)/(Vnuc + Vcyto);
  ObsPhosRbS800_obs := scale_PhosRbS800*Vnuc*nuc_rb_S788_P_S800_P_b/(Vnuc + Vcyto);
  ObsDNAContent_obs := 2 - (nuc_dnapre + nuc_dnapre1 + nuc_dnapre2 + nuc_dnapre3 + nuc_dnapre4 + nuc_dnapre5);
  Vratio := Vnuc/Vcyto;
  erk := (1 - inherk)*((1 - aerk)*(perk^nerk + 1)*hgf^nerk/(hgf^nerk + perk^nerk) + aerk);
  akt := (1 - inhakt)*((1 - aakt)*(pakt^nakt + 1)*hgf^nakt/(hgf^nakt + pakt^nakt) + aakt);
  gsk3b := 1 - akt;
  tf := (1 - atf)*erk*(1 - gsk3b) + atf;
  tfp21 := (1 - inhp53)*tf;
  kp_c2cak := kdp_c2cak + kc2cak;
  kd_p21c4 := Kd_p21c4*kb_p21c4;
  kd_p21c2 := Kd_p21c2*kb_p21c2;
  kimport := ki/(1 + kinh_p21akt*akt);
  kdeg_e2ffree := kdeg_e2fbound + kdege2fplus;
  kdeg_rbfree := kdeg_rbbound + kdegrbplus;
  kd_rbe2f := kb_rbe2f*Kd_rb_e2f;
  kd_rbpe2f := kb_rbpe2f*Kd_rbp_e2f;
  kcatp_rbc4 := kcatprbc4*(1 - inhc4d1);

  // Reactions:
  reaction_1: => cyto_C4D1_b; cell*Function_for_reaction_1_0(cell, ks_c4, tf);
  reaction_2: => cyto_C2E_T160_U_b; cell*Function_for_reaction_2_0(nuc_e2f_b, nuc_e2f_b_1_rb_S788_P_S800_U_b_1, cell, ks_c2e2f, ks_c2myc, tf);  // modifiers: nuc_e2f_b, nuc_e2f_b_1_rb_S788_P_S800_U_b_1
  reaction_3: nuc_C2E_T160_U_b_1_p21_b_1 => nuc_p21_b; Nucleus*Function_for_reaction_3_0(nuc_C2E_T160_U_b_1_p21_b_1, cell, gsk3b, kdeg_c2, kdeg_c2gsk3b);
  reaction_4: cyto_C2E_T160_U_b => ; cell*Function_for_reaction_4_0(cyto_C2E_T160_U_b, cell, gsk3b, kdeg_c2, kdeg_c2gsk3b);
  reaction_5: => cyto_p21_b; cell*Function_for_reaction_5_0(nuc_e2f_b, cell, ks_p21e2f, ks_p21p53, tfp21);  // modifiers: nuc_e2f_b
  reaction_6: nuc_C2E_T160_U_b_1_p21_b_1 => nuc_p21_b + nuc_C2E_T160_U_b; Nucleus*Function_for_reaction_6_0(nuc_C2E_T160_U_b_1_p21_b_1, cell, kd_p21c2);
  reaction_7: nuc_C2E_T160_U_b_1_p21_b_1 => nuc_C2E_T160_U_b; Nucleus*Function_for_reaction_7_0(nuc_e2f_b, nuc_C2E_T160_P_b, nuc_C2E_T160_U_b_1_p21_b_1, cell, erk, kdeg_p21c2skp2, kdeg_p21erkskp2, kdeg_p21skp2);  // modifiers: nuc_C2E_T160_P_b, nuc_e2f_b
  reaction_8: => nuc_rb_S788_U_S800_U_b; Nucleus*Function_for_reaction_8_0(nuc_e2f_b, cell, ks_rb, ks_rbe2f);  // modifiers: nuc_e2f_b
  reaction_9: nuc_rb_S788_U_S800_U_b => ; Nucleus*Function_for_reaction_9_0(nuc_rb_S788_U_S800_U_b, cell, kdeg_rbfree);
  reaction_10: nuc_e2f_b_1_rb_S788_U_S800_U_b_1 => nuc_e2f_b; Nucleus*Function_for_reaction_10_0(nuc_e2f_b_1_rb_S788_U_S800_U_b_1, cell, kdeg_rbbound);
  reaction_11: nuc_rb_S788_U_S800_U_b => ; Nucleus*Function_for_reaction_11_0(nuc_rb_S788_U_S800_U_b, nuc_p21_b, cell, kdeg_rbp21);  // modifiers: nuc_p21_b
  reaction_12: nuc_e2f_b_1_rb_S788_U_S800_U_b_1 => nuc_e2f_b; Nucleus*Function_for_reaction_12_0(nuc_p21_b, nuc_e2f_b_1_rb_S788_U_S800_U_b_1, cell, kdeg_rbp21);  // modifiers: nuc_p21_b
  reaction_13: => nuc_e2f_b; Nucleus*Function_for_reaction_13_0(nuc_e2f_b, cell, ks_e2fe2f, ks_e2fmyc, tf);
  reaction_14: nuc_e2f_b_1_rb_S788_U_S800_U_b_1 => nuc_rb_S788_U_S800_U_b; Nucleus*Function_for_reaction_14_0(nuc_e2f_b_1_rb_S788_U_S800_U_b_1, cell, kdeg_e2fbound);
  reaction_15: nuc_e2f_b_1_rb_S788_U_S800_U_b_1 => nuc_rb_S788_U_S800_U_b + nuc_e2f_b; Nucleus*Function_for_reaction_15_0(nuc_e2f_b_1_rb_S788_U_S800_U_b_1, cell, kd_rbe2f);
  reaction_16: nuc_rb_S788_U_S800_U_b => nuc_rb_S788_P_S800_U_b; Nucleus*Function_for_reaction_16_0(Km_prb, nuc_rb_S788_U_S800_U_b, nuc_C4D1_b_1_p21_b_1, cell, kcatp_rbc4, nrb);  // modifiers: nuc_C4D1_b_1_p21_b_1
  reaction_17: nuc_e2f_b_1_rb_S788_U_S800_U_b_1 => nuc_e2f_b_1_rb_S788_P_S800_U_b_1; Nucleus*Function_for_reaction_17_0(Km_prb, nuc_e2f_b_1_rb_S788_U_S800_U_b_1, nuc_C4D1_b_1_p21_b_1, cell, kcatp_rbc4, nrb);  // modifiers: nuc_C4D1_b_1_p21_b_1
  reaction_18: nuc_dnapre => nuc_dnapre1; Nucleus*Function_for_reaction_18_0(nuc_e2f_b, nuc_C2E_T160_P_b, nuc_dnapre, cell, k_dna);  // modifiers: nuc_C2E_T160_P_b, nuc_e2f_b
  reaction_19: cyto_C4D1_b => ; cell*Function_for_reaction_19_0(cyto_C4D1_b, cell, gsk3b, kdeg_c4, kdeg_c4gsk3b);
  reaction_20: nuc_C2E_T160_U_b => ; Nucleus*Function_for_reaction_20_0(nuc_C2E_T160_U_b, cell, gsk3b, kdeg_c2, kdeg_c2gsk3b);
  reaction_21: nuc_C2E_T160_U_b => nuc_C2E_T160_P_b; Nucleus*Function_for_reaction_21_0(nuc_C2E_T160_U_b, cell, kp_c2cak);
  reaction_22: cyto_C4D1_b + cyto_p21_b => cyto_C4D1_b_1_p21_b_1; cell*Function_for_reaction_22_0(cyto_C4D1_b, cyto_p21_b, cell, kb_p21c4);
  reaction_23: cyto_C2E_T160_U_b + cyto_p21_b => cyto_C2E_T160_U_b_1_p21_b_1; cell*Function_for_reaction_23_0(cyto_p21_b, cyto_C2E_T160_U_b, cell, kb_p21c2);
  reaction_24: nuc_p21_b + nuc_C2E_T160_U_b => nuc_C2E_T160_U_b_1_p21_b_1; Nucleus*Function_for_reaction_24_0(nuc_p21_b, nuc_C2E_T160_U_b, cell, kb_p21c2);
  reaction_25: cyto_p21_b => nuc_p21_b; Function_for_reaction_25_0(cyto_p21_b, Vratio, cell, kimport);
  reaction_26: cyto_p21_b -> ; cell*Function_for_reaction_26_0(cyto_p21_b, Vratio, cell, kimport);
  reaction_27: nuc_p21_b => ; Nucleus*Function_for_reaction_27_0(nuc_p21_b, cell, erk, gsk3b, kdeg_p21erk, kdeg_p21gsk3b);
  reaction_28: cyto_p21_b => ; cell*Function_for_reaction_28_0(cyto_p21_b, cell, erk, gsk3b, kdeg_p21erk, kdeg_p21gsk3b);
  reaction_29: nuc_rb_S788_P_S800_U_b => ; Nucleus*Function_for_reaction_29_0(nuc_rb_S788_P_S800_U_b, cell, kdeg_rbfree);
  reaction_30: nuc_e2f_b_1_rb_S788_P_S800_U_b_1 => nuc_e2f_b; Nucleus*Function_for_reaction_30_0(nuc_e2f_b_1_rb_S788_P_S800_U_b_1, cell, kdeg_rbbound);
  reaction_31: nuc_rb_S788_P_S800_U_b => ; Nucleus*Function_for_reaction_31_0(nuc_p21_b, nuc_rb_S788_P_S800_U_b, cell, kdeg_rbp21);  // modifiers: nuc_p21_b
  reaction_32: nuc_e2f_b_1_rb_S788_P_S800_U_b_1 => nuc_e2f_b; Nucleus*Function_for_reaction_32_0(nuc_p21_b, nuc_e2f_b_1_rb_S788_P_S800_U_b_1, cell, kdeg_rbp21);  // modifiers: nuc_p21_b
  reaction_33: nuc_e2f_b => ; Nucleus*Function_for_reaction_33_0(nuc_e2f_b, cell, kdeg_e2ffree);
  reaction_34: nuc_e2f_b_1_rb_S788_P_S800_U_b_1 => nuc_rb_S788_P_S800_U_b; Nucleus*Function_for_reaction_34_0(nuc_e2f_b_1_rb_S788_P_S800_U_b_1, cell, kdeg_e2fbound);
  reaction_35: nuc_rb_S788_U_S800_U_b + nuc_e2f_b => nuc_e2f_b_1_rb_S788_U_S800_U_b_1; Nucleus*Function_for_reaction_35_0(nuc_rb_S788_U_S800_U_b, nuc_e2f_b, cell, kb_rbe2f);
  reaction_36: nuc_e2f_b + nuc_rb_S788_P_S800_U_b => nuc_e2f_b_1_rb_S788_P_S800_U_b_1; Nucleus*Function_for_reaction_36_0(nuc_e2f_b, nuc_rb_S788_P_S800_U_b, cell, kb_rbpe2f);
  reaction_37: nuc_e2f_b_1_rb_S788_P_S800_U_b_1 => nuc_e2f_b + nuc_rb_S788_P_S800_U_b; Nucleus*Function_for_reaction_37_0(nuc_e2f_b_1_rb_S788_P_S800_U_b_1, cell, kd_rbpe2f);
  reaction_38: nuc_rb_S788_P_S800_U_b => nuc_rb_S788_P_S800_P_b; Nucleus*Function_for_reaction_38_0(Km_prb, nuc_rb_S788_P_S800_U_b, nuc_C2E_T160_P_b, cell, kcatp_rbc2, nrb);  // modifiers: nuc_C2E_T160_P_b
  reaction_39: nuc_e2f_b_1_rb_S788_P_S800_U_b_1 => nuc_e2f_b + nuc_rb_S788_P_S800_P_b; Nucleus*Function_for_reaction_39_0(Km_prb, nuc_e2f_b_1_rb_S788_P_S800_U_b_1, nuc_C2E_T160_P_b, cell, kcatp_rbc2, nrb);  // modifiers: nuc_C2E_T160_P_b
  reaction_40: nuc_rb_S788_P_S800_U_b => nuc_rb_S788_U_S800_U_b; Nucleus*Function_for_reaction_40_0(Km_dprb, nuc_rb_S788_P_S800_U_b, nuc_C2E_T160_P_b, cell, kcatdp_rbc4, kinh_pp1, nrb);  // modifiers: nuc_C2E_T160_P_b
  reaction_41: nuc_e2f_b_1_rb_S788_P_S800_U_b_1 => nuc_e2f_b_1_rb_S788_U_S800_U_b_1; Nucleus*Function_for_reaction_41_0(Km_dprb, nuc_e2f_b_1_rb_S788_P_S800_U_b_1, nuc_C2E_T160_P_b, cell, kcatdp_rbc4, kinh_pp1, nrb);  // modifiers: nuc_C2E_T160_P_b
  reaction_42: nuc_dnapre1 => nuc_dnapre2; Nucleus*Function_for_reaction_42_0(nuc_dnapre1, cell, k_delay);
  reaction_43: cyto_C4D1_b_1_p21_b_1 => cyto_p21_b; cell*Function_for_reaction_43_0(cyto_C4D1_b_1_p21_b_1, cell, gsk3b, kdeg_c4, kdeg_c4gsk3b);
  reaction_44: nuc_C2E_T160_P_b => ; Nucleus*Function_for_reaction_44_0(nuc_C2E_T160_P_b, cell, gsk3b, kdeg_c2, kdeg_c2gsk3b);
  reaction_45: cyto_C2E_T160_U_b_1_p21_b_1 => cyto_p21_b; cell*Function_for_reaction_45_0(cyto_C2E_T160_U_b_1_p21_b_1, cell, gsk3b, kdeg_c2, kdeg_c2gsk3b);
  reaction_46: nuc_C2E_T160_P_b => ; Nucleus*Function_for_reaction_46_0(nuc_C2E_T160_P_b, cell, gsk3b, kdeg_c2c2gsk3b);
  reaction_47: nuc_C2E_T160_P_b => nuc_C2E_T160_U_b; Nucleus*Function_for_reaction_47_0(nuc_C2E_T160_P_b, cell, kdp_c2cak);
  reaction_48: cyto_C4D1_b_1_p21_b_1 => cyto_C4D1_b + cyto_p21_b; cell*Function_for_reaction_48_0(cyto_C4D1_b_1_p21_b_1, cell, kd_p21c4);
  reaction_49: nuc_p21_b + nuc_C2E_T160_P_b => nuc_C2E_T160_P_b_1_p21_b_1; Nucleus*Function_for_reaction_49_0(nuc_p21_b, nuc_C2E_T160_P_b, cell, kb_p21c2);
  reaction_50: cyto_C2E_T160_U_b_1_p21_b_1 => cyto_C2E_T160_U_b + cyto_p21_b; cell*Function_for_reaction_50_0(cyto_C2E_T160_U_b_1_p21_b_1, cell, kd_p21c2);
  reaction_51: cyto_C4D1_b_1_p21_b_1 => nuc_C4D1_b_1_p21_b_1; Function_for_reaction_51_0(cyto_C4D1_b_1_p21_b_1, Vratio, cell, kimport);
  reaction_52: cyto_C2E_T160_U_b_1_p21_b_1 => nuc_C2E_T160_U_b_1_p21_b_1; Function_for_reaction_52_0(cyto_C2E_T160_U_b_1_p21_b_1, Vratio, cell, kimport);
  reaction_53: cyto_C4D1_b_1_p21_b_1 -> ; cell*Function_for_reaction_53_0(cyto_C4D1_b_1_p21_b_1, Vratio, cell, kimport);
  reaction_54: cyto_C2E_T160_U_b_1_p21_b_1 -> ; cell*Function_for_reaction_54_0(cyto_C2E_T160_U_b_1_p21_b_1, Vratio, cell, kimport);
  reaction_55: nuc_rb_S788_P_S800_P_b => ; Nucleus*Function_for_reaction_55_0(nuc_rb_S788_P_S800_P_b, cell, kdeg_rbfree);
  reaction_56: nuc_rb_S788_P_S800_P_b => ; Nucleus*Function_for_reaction_56_0(nuc_p21_b, nuc_rb_S788_P_S800_P_b, cell, kdeg_rbp21);  // modifiers: nuc_p21_b
  reaction_57: nuc_rb_S788_P_S800_P_b => nuc_rb_S788_P_S800_U_b; Nucleus*Function_for_reaction_57_0(Km_dprb, nuc_C2E_T160_P_b, nuc_rb_S788_P_S800_P_b, cell, kcatdp_rbc2, kinh_pp1, nrb);  // modifiers: nuc_C2E_T160_P_b
  reaction_58: nuc_dnapre2 => nuc_dnapre3; Nucleus*Function_for_reaction_58_0(nuc_dnapre2, cell, k_delay);
  reaction_59: nuc_C4D1_b_1_p21_b_1 => ; Nucleus*Function_for_reaction_59_0(nuc_C4D1_b_1_p21_b_1, cell, kdeg_c4);
  reaction_60: nuc_C2E_T160_P_b_1_p21_b_1 => nuc_p21_b; Nucleus*Function_for_reaction_60_0(nuc_C2E_T160_P_b_1_p21_b_1, cell, gsk3b, kdeg_c2, kdeg_c2gsk3b);
  reaction_61: nuc_C4D1_b_1_p21_b_1 => nuc_p21_b + nuc_C4D1_b; Nucleus*Function_for_reaction_61_0(nuc_C4D1_b_1_p21_b_1, cell, kd_p21c4);
  reaction_62: nuc_C2E_T160_P_b_1_p21_b_1 => nuc_p21_b + nuc_C2E_T160_P_b; Nucleus*Function_for_reaction_62_0(nuc_C2E_T160_P_b_1_p21_b_1, cell, kd_p21c2);
  reaction_63: nuc_C2E_T160_P_b_1_p21_b_1 => nuc_C2E_T160_P_b; Nucleus*Function_for_reaction_63_0(nuc_e2f_b, nuc_C2E_T160_P_b, nuc_C2E_T160_P_b_1_p21_b_1, cell, erk, kdeg_p21c2skp2, kdeg_p21erkskp2, kdeg_p21skp2);  // modifiers: nuc_e2f_b
  reaction_64: nuc_C4D1_b_1_p21_b_1 => nuc_C4D1_b; Nucleus*Function_for_reaction_64_0(nuc_e2f_b, nuc_C2E_T160_P_b, nuc_C4D1_b_1_p21_b_1, cell, erk, kdeg_p21c2skp2, kdeg_p21erkskp2, kdeg_p21skp2);  // modifiers: nuc_C2E_T160_P_b, nuc_e2f_b
  reaction_65: nuc_dnapre3 => nuc_dnapre4; Nucleus*Function_for_reaction_65_0(nuc_dnapre3, cell, k_delay);
  reaction_66: nuc_C4D1_b => ; Nucleus*Function_for_reaction_66_0(nuc_C4D1_b, cell, gsk3b, kdeg_c4, kdeg_c4gsk3b);
  reaction_67: nuc_p21_b + nuc_C4D1_b => nuc_C4D1_b_1_p21_b_1; Nucleus*Function_for_reaction_67_0(nuc_p21_b, nuc_C4D1_b, cell, kb_p21c4);
  reaction_68: nuc_dnapre4 => nuc_dnapre5; Nucleus*Function_for_reaction_68_0(nuc_dnapre4, cell, k_delay);
  reaction_69: nuc_dnapre5 => ; Nucleus*Function_for_reaction_69_0(nuc_dnapre5, cell, k_delay);

  // Unit definitions:
  unit time = 3600 second;
  unit substance = 1e-9 mole;
end
