// SBML level 2 version 4
// dcterms:bibliographicCitation: urn:miriam:doi:10.1371/journal.pcbi.1002815

model PC_IFNg100()
  // This model can be used to recreate the upper rows of Fig. S2 from the supplementary material of the following publication:
  // Rateitschak K, Winter F, Lange F, Jaster R, Wolkenhauer O (2012)
  // Parameter Identifiability and Sensitivity Analysis Predict Targets for Enhancement of STAT1 Activity in Pancreatic Cancer and Stellate Cells
  // PLoS Computational Biology 8: e1002815
  // DOI: 10.1371/journal.pcbi.1002815
  // experimental conditions: IFNgamma = 100ng/ml
  // The parameters k_v, k_0 and k_2 are omitted from the model as k_v has the value 1 and k_0 and k_2 have the value 0, which makes them redundant.
  // isDescribedBy doi:10.1371/journal.pcbi.1002815

  // Compartments:
  compartment cell = 1;

  // Species:
  species $Ifng in cell = 100;
  species $II in cell = 0;
  species $d1 in cell = 0;
  species $d2 in cell = 0;
  species $d3 in cell = 0;
  species $d4 in cell = 0;
  species $Stat1Pd in cell = 0; Stat1Pd is "STAT1D";
  species $Stat1Pdn in cell = 0; Stat1Pdn is "STAT1Dn";
  species $i1 in cell = 0;
  species $i2 in cell = 0;
  species $i3 in cell = 0;
  species $i4 in cell = 0;
  species $j1 in cell = 0;
  species $j2 in cell = 0;
  species $j3 in cell = 0;
  species $j4 in cell = 0;
  species $Ir in cell = 0.05721;
  species $Stat1U in cell = 0.950418; Stat1U is "STAT1Uc";
  species $Stat1Un in cell = 0.661213; Stat1Un is "STAT1Un";
  species $mRNA in cell = 0.108325; mRNA is "SOCS1";
  species $Stat1ex in cell; Stat1ex is "STAT1 (observed)";  // isEncodedBy hgnc.symbol:STAT1; isEncodedBy ensembl:ENSG00000115415
  species $Stat1cex in cell; Stat1cex is "STAT1c (observed)";
  species $Stat1nex in cell; Stat1nex is "STAT1n (observed)";
  species $Stat1Pex in cell; Stat1Pex is "STAT1D (observed)";
  species $Stat1Pcex in cell; Stat1Pcex is "STAT1Dc (observed)";
  species $Stat1Pnex in cell; Stat1Pnex is "STAT1Dn (observed)";
  species $Socs1ex in cell; Socs1ex is "SOCS1 (observed)";  // isEncodedBy ensembl:ENSG00000185338; isEncodedBy hgnc.symbol:SOCS1
  species $RSNCex in cell; RSNCex is "RSNC (observed)";

  // Parameters:
  k1 = 0.00094915;
  k3 = 0.0959796;
  k4 = 0.0997621;
  k5 = 298.763;
  k6 = 0.0666851;
  k9 = 4179.56; k9 is "k7";
  k10 = 0.0583427; k10 is "k8";
  k11 = 8.90244; k11 is "k9";
  k12 = 12.2679; k12 is "k10";
  k13 = 0.00949819; k13 is "k11";
  k14 = 0.748449; k14 is "k12";
  taud = 277.363; taud is "tau_1";
  tau = 79.3354; tau is "tau_2";
  tauj = 451.937; tauj is "tau_3";
  scale_Stat1ex = 1; scale_Stat1ex is "WB_STAT1";
  scale_Stat1cex = 0.747697; scale_Stat1cex is "WB_STAT1c";
  scale_Stat1nex = 1.21851; scale_Stat1nex is "WB_STAT1n";
  scale_Stat1Pex = 34.4009; scale_Stat1Pex is "WB_STAT1D";
  scale_Stat1Pcex = 19.0574; scale_Stat1Pcex is "WB_STAT1Dc";
  scale_Stat1Pnex = 9.16777e4; scale_Stat1Pnex is "WB_STAT1Dn";
  scale_Socs1ex = 1; scale_Socs1ex is "PCR_SOCS1";
  scale_RSNCex = 1;

  // Assignment rules:
  Stat1cex := (Stat1U + Stat1Pd)*scale_Stat1cex;
  Stat1ex := (Stat1U + Stat1Pd + Stat1Un + Stat1Pdn)/2;
  RSNCex := (Stat1Un + Stat1Pdn)/(Stat1U + Stat1Pd);
  Socs1ex := mRNA;
  Stat1Pnex := Stat1Pdn*scale_Stat1Pnex;
  Stat1Pcex := Stat1Pd*scale_Stat1Pcex;
  Stat1Pex := (Stat1Pd + Stat1Pdn)/2*scale_Stat1Pex;
  Stat1nex := (Stat1Un + Stat1Pdn)*scale_Stat1nex;

  // Rate rules:
  Ifng' = -(k1*Ifng*Ir);
  II' = k1*Ifng*Ir;
  d1' = 4*(II - d1)/taud;
  d2' = 4*(d1 - d2)/taud;
  d3' = 4*(d2 - d3)/taud;
  d4' = 4*(d3 - d4)/taud;
  Stat1Pd' = k4*II*Stat1U/(1 + k14*j4) - k6*Stat1Pd;
  Stat1Pdn' = k6*Stat1Pd - k5*Stat1Pdn;
  i1' = 4*(Stat1Pdn - i1)/tau;
  i2' = 4*(i1 - i2)/tau;
  i3' = 4*(i2 - i3)/tau;
  i4' = 4*(i3 - i4)/tau;
  j1' = 4*(mRNA - j1)/tauj;
  j2' = 4*(j1 - j2)/tauj;
  j3' = 4*(j2 - j3)/tauj;
  j4' = 4*(j3 - j4)/tauj;
  Ir' = -(k1*Ifng*Ir);
  Stat1U' = k3*d4 + k12*Stat1Un - k11*Stat1U - k4*II*Stat1U/(1 + k14*j4);
  Stat1Un' = k11*Stat1U - k12*Stat1Un + k5*Stat1Pdn;
  mRNA' = k13 + k9*i4 - k10*mRNA;
end
