// SBML level 3 version 2
// dcterms:bibliographicCitation: urn:miriam:doi:10.1371/journal.pcbi.1002815

model js_psc100_rationeu_1e8()
  // This model can be used to recreate the upper rows of Fig. S1 from the supplementary material of the following publication:
  // Rateitschak K, Winter F, Lange F, Jaster R, Wolkenhauer O (2012)
  // Parameter Identifiability and Sensitivity Analysis Predict Targets for Enhancement of STAT1 Activity in Pancreatic Cancer and Stellate Cells
  // PLoS Computational Biology 8: e1002815
  // DOI: 10.1371/journal.pcbi.1002815
  // experimental conditions: IFNgamma = 100ng/ml
  // isDescribedBy doi:10.1371/journal.pcbi.1002815
  // model units - substance: substance, time: second, volume: volume, area: area, length: metre, extent: substance

  // Compartments:
  compartment cell = 1 volume;

  // Species:
  species $Ifng in cell = 100;
  species $II in cell = 0;
  species $d1 in cell = 0;
  species $d2 in cell = 0;
  species $d3 in cell = 0;
  species $d4 in cell = 0;
  species $Stat1Pd in cell = 0; Stat1Pd is "STAT1Dc";
  species $Stat1Pdn in cell = 0; Stat1Pdn is "STAT1Dn";
  species $i1 in cell = 0;
  species $i2 in cell = 0;
  species $i3 in cell = 0;
  species $i4 in cell = 0;
  species $j1 in cell = 0;
  species $j2 in cell = 0;
  species $j3 in cell = 0;
  species $j4 in cell = 0;
  species $Ir in cell = 0.00131284;
  species $Stat1U in cell = 0.907502; Stat1U is "STAT1Uc";
  species $Stat1Un in cell = 0.914104; Stat1Un is "STAT1Un";
  species $mRNA in cell = 0.208345; mRNA is "SOCS1";
  species $Stat1ex in cell; Stat1ex is "STAT1 (observed)";  // isEncodedBy ensembl:ENSG00000115415; isEncodedBy hgnc.symbol:STAT1
  species $Stat1Pex in cell; Stat1Pex is "STAT1D (observed)";
  species $Socs1ex in cell; Socs1ex is "SOCS1 (observed)";  // isEncodedBy ensembl:ENSG00000185338; isEncodedBy hgnc.symbol:SOCS1
  species $RSNCex in cell; RSNCex is "RSNC (observed)";
  species $RSPNCex in cell; RSPNCex is "RSPNC (observed)";

  // Parameters:
  k0 = 0.00399946;
  k1 = 0.0231057;
  k2 = 0.0422019;
  k3 = 10.3153;
  k4 = 50.4962;
  k5 = 0.839496;
  k6 = 0.965946;
  k9 = 0.113424; k9 is "k7";
  k10 = 0.0117084; k10 is "k8";
  k11 = 0.0567402; k11 is "k9";
  k12 = 0.219033; k12 is "k10";
  k13 = 0.00477674; k13 is "k11";
  k14 = 1.16416; k14 is "k12";
  taud = 200.965;
  tau = 37.0745;
  tauj = 228.074;
  scale_Stat1Pex = 12.1866; scale_Stat1Pex is "WB_STAT1D";
  scale_Socs1ex = 0.566011; scale_Socs1ex is "PCR_SOCS1";

  // Assignment rules:
  Stat1ex := 3*(Stat1U + Stat1Pd)/4 + (Stat1Un + Stat1Pdn)/4;
  Stat1Pex := (3*Stat1Pd + Stat1Pdn)/4*scale_Stat1Pex;
  Socs1ex := mRNA*scale_Socs1ex;
  RSNCex := (Stat1Un + Stat1Pdn)/(Stat1U + Stat1Pd);
  RSPNCex := Stat1Pdn/max(1e-15, Stat1Pd);

  // Rate rules:
  Ifng' = -(k0*Ifng) - k1*Ifng*Ir + k2*II;
  II' = k1*Ifng*Ir - k2*II;
  d1' = 4*(II - d1)/taud;
  d2' = 4*(d1 - d2)/taud;
  d3' = 4*(d2 - d3)/taud;
  d4' = 4*(d3 - d4)/taud;
  Stat1Pd' = k4*II*Stat1U/(1 + k14*j4) - k6*Stat1Pd;
  Stat1Pdn' = 3*k6*Stat1Pd - k5*Stat1Pdn;
  i1' = 4*(Stat1Pdn - i1)/tau;
  i2' = 4*(i1 - i2)/tau;
  i3' = 4*(i2 - i3)/tau;
  i4' = 4*(i3 - i4)/tau;
  j1' = 4*(mRNA - j1)/tauj;
  j2' = 4*(j1 - j2)/tauj;
  j3' = 4*(j2 - j3)/tauj;
  j4' = 4*(j3 - j4)/tauj;
  Ir' = -(k1*Ifng*Ir) + k2*II;
  Stat1U' = k3*d4 - k11*Stat1U + k12*Stat1Un/3 - k4*II*Stat1U/(1 + k14*j4);
  Stat1Un' = 3*k11*Stat1U - k12*Stat1Un + k5*Stat1Pdn;
  mRNA' = k13 + k9*i4 - k10*mRNA;

  // Unit definitions:
  unit volume = litre;
  unit substance = mole;
  unit area = metre^2;
end
