// SBML level 2 version 4

function Function_for_reaction1("Boehm2014 - isoform-specific dimerization of pSTAT5A and pSTAT5B", Epo_degradation_BaF3, STAT5A, cyt, k_phos)
  1.25e-7*STAT5A^2*k_phos*exp(-Epo_degradation_BaF3*"Boehm2014 - isoform-specific dimerization of pSTAT5A and pSTAT5B")/cyt;
end

function Function_for_reaction3("Boehm2014 - isoform-specific dimerization of pSTAT5A and pSTAT5B", Epo_degradation_BaF3, STAT5B, cyt, k_phos)
  1.25e-7*STAT5B^2*k_phos*exp(-Epo_degradation_BaF3*"Boehm2014 - isoform-specific dimerization of pSTAT5A and pSTAT5B")/cyt;
end

function Function_for_reaction2("Boehm2014 - isoform-specific dimerization of pSTAT5A and pSTAT5B", Epo_degradation_BaF3, STAT5A, STAT5B, cyt, k_phos)
  1.25e-7*STAT5A*STAT5B*k_phos*exp(-Epo_degradation_BaF3*"Boehm2014 - isoform-specific dimerization of pSTAT5A and pSTAT5B")/cyt;
end

model Boehm2014___isoform_specific_dimerization_of_pSTAT5A_and_pSTAT5B()
  // Boehm2014 - isoform-specific dimerization of pSTAT5A and pSTAT5B
  // biomodels.db:MODEL1501220000

  // Compartments:
  compartment cyt = 1.4;
  compartment nuc = 0.45;

  // Species:
  species STAT5A in cyt = 207.6*ratio;
  species STAT5B in cyt = 207.6 - 207.6*ratio;
  species pApB in cyt = 0;
  species pApA in cyt = 0;
  species pBpB in cyt = 0;
  species $pAFull in cyt;
  species $sp in cyt = 0.107;
  species $pBFull in cyt;
  species $rAFull in cyt;
  species $ptotFull in cyt;
  species nucpApA in nuc = 0;
  species nucpApB in nuc = 0;
  species nucpBpB in nuc = 0;

  // Parameters:
  Epo_degradation_BaF3 = 0.02697654;
  k_exp_hetero = 1.000971e-5;
  k_exp_homo = 0.00617238;
  k_imp_hetero = 0.01637016;
  k_imp_homo = 96807.68;
  k_phos = 15767.65;
  ratio = 0.693;

  // Assignment rules:
  pAFull := 100*(2*sp*pApA + pApB)/(2*sp*pApA + sp*STAT5A + pApB);
  pBFull := 100*(2*(1 - sp)*pBpB + pApB)/(2*(1 - sp)*pBpB + (1 - sp)*STAT5B + pApB);
  rAFull := 100*(2*sp*pApA + sp*STAT5A + pApB)/(2*sp*pApA + 2*(1 - sp)*pBpB + 2*pApB + sp*STAT5A + (1 - sp)*STAT5B);
  ptotFull := (rAFull*pAFull + (100 - rAFull)*pBFull)/100;

  // Reactions:
  reaction1: 2 STAT5A => pApA; cyt*Function_for_reaction1(time, Epo_degradation_BaF3, STAT5A, cyt, k_phos);
  reaction2: STAT5A + STAT5B => pApB; cyt*Function_for_reaction2(time, Epo_degradation_BaF3, STAT5A, STAT5B, cyt, k_phos);
  reaction3: 2 STAT5B => pBpB; cyt*Function_for_reaction3(time, Epo_degradation_BaF3, STAT5B, cyt, k_phos);
  reaction4: pApA => nucpApA; k_imp_homo*pApA;
  reaction5: pApB => nucpApB; k_imp_hetero*pApB;
  reaction6: pBpB => nucpBpB; k_imp_homo*pBpB;
  reaction7: nucpApA => 2 STAT5A; k_exp_homo*nucpApA;
  reaction8: nucpApB => STAT5A + STAT5B; k_exp_hetero*nucpApB;
  reaction9: nucpBpB => 2 STAT5B; k_exp_homo*nucpBpB;
end
