// SBML level 2 version 4

model Simple_Hill_with_inhibitor()
  // SBML model Tuesday 08. Mar 2010

  // Compartments:
  compartment default = 1 volume;
  compartment c in default = 2.3 volume; c is "cytoplasm";
  compartment n in default = 1 volume; n is "nucleus";

  // Species:
  species TGFbR in c = 1.01;
  species TGFb_TGFbR in c = 0;
  species TGFb_TGFbR_P in c = 0;
  species I_Smad_TGFb_TGFbR_P in c = 0;
  species Smad in c = 30.6;
  species Smad_P in c = 0;
  species CoSmad in c = 50.8;
  species Smad_P_Smad_P in c = 0;
  species Smad_P_CoSmad in c = 0;
  species Smad_N in n = 30;
  species Smad_P_Smad_P_N in n = 0;
  species Smad_P_N in n = 0;
  species Smad_P_CoSmad_N in n = 0;
  species CoSmad_N in n = 50.8;
  species I_Smad_mRNA1 in n = 0;
  species I_Smad_mRNA2 in c = 0;
  species I_Smad in c = 0;
  species s1 in n = 0;
  species s2 in c = 0;
  species s3 in c = 0;
  species s4 in c = 0;

  // Parameters:
  TGFb = 0.2;
  h = 2;
  k1 = 0.00015;
  k2 = 0.023;
  k3 = 0.01;
  k4 = 0.01;
  k7 = 0.000404;
  k8 = 0.0026;
  k9 = 0.0056;
  k10 = 0.002;
  k11 = 0.016;
  k12 = 5.7;
  k13 = 0.00657;
  k5 = 0.01;
  k6 = 0.1;
  k14 = 0.0017;
  k15 = 1;
  k16 = 0.0008;
  k17 = 0.001;
  k18 = 0.002;
  k19 = 0.001;

  // Reactions:
  r1: TGFb_TGFbR => TGFbR; k1*TGFb_TGFbR;
  r2: TGFbR => TGFb_TGFbR; k2*TGFbR*TGFb;
  r3: TGFb_TGFbR => TGFb_TGFbR_P; k3*TGFb_TGFbR;
  r4: TGFb_TGFbR_P => TGFb_TGFbR; k4*TGFb_TGFbR_P;
  r5: TGFb_TGFbR_P + I_Smad => I_Smad_TGFb_TGFbR_P; k5*TGFb_TGFbR_P*I_Smad;
  r6: I_Smad_TGFb_TGFbR_P => TGFb_TGFbR + I_Smad; k6*I_Smad_TGFb_TGFbR_P;
  r7: Smad => Smad_P; k7*Smad*TGFb_TGFbR_P;  // modifiers: TGFb_TGFbR_P
  r8: Smad => Smad_N; k8*Smad/Vn;
  r9: Smad_N => Smad; k9*Smad_N/Vc;
  r10: Smad_P => Smad_P_Smad_P; k10*Smad_P*Smad_P;
  r11: Smad_P_Smad_P => Smad_P; k11*Smad_P_Smad_P;
  r12: Smad_P + CoSmad => Smad_P_CoSmad; k10*Smad_P*CoSmad;
  r13: Smad_P_CoSmad => Smad_P + CoSmad; k11*Smad_P_CoSmad;
  r14: CoSmad => CoSmad_N; k8*CoSmad/Vn;
  r15: CoSmad_N => CoSmad; k9*CoSmad_N/Vc;
  r16: Smad_P_Smad_P => Smad_P_Smad_P_N; k12*k8*Smad_P_Smad_P/Vn;
  r17: Smad_P => Smad_P_N; k8*Smad_P/Vn;
  r18: Smad_P_N => Smad_P; k9*Smad_P_N/Vc;
  r19: Smad_P_CoSmad => Smad_P_CoSmad_N; k12*k8*Smad_P_CoSmad/Vn;
  r20: Smad_P_N => Smad_N; k13*Smad_P_N;
  r21: Smad_P_N => Smad_P_Smad_P_N; k10*Smad_P_N*Smad_P_N;
  r22: Smad_P_Smad_P_N => Smad_P_N; k11*Smad_P_Smad_P_N;
  r23: Smad_P_N + CoSmad_N => Smad_P_CoSmad_N; k10*Smad_P_N*CoSmad_N;
  r24: Smad_P_CoSmad_N => Smad_P_N + CoSmad_N; k11*Smad_P_CoSmad_N;
  r25: s1 => I_Smad_mRNA1; k14*Smad_P_CoSmad_N^h/(Smad_P_CoSmad_N^h + k15^h);  // modifiers: Smad_P_CoSmad_N
  r26: I_Smad_mRNA1 => I_Smad_mRNA2; k16*I_Smad_mRNA1/Vc;
  r27: I_Smad_mRNA2 => s2; k17*I_Smad_mRNA2;
  r28: s3 => I_Smad; k18*I_Smad_mRNA2;  // modifiers: I_Smad_mRNA2
  r29: I_Smad => s4; k19*I_Smad;

  // Unit definitions:
  unit substance = mole;
  unit volume = litre;
  unit area = metre^2;
  unit length = metre;
  unit time = second;
end
