// SBML level 2 version 4

model MODEL1406180001()
  // Rosas2015 - Caffeine-induced luminal SR calcium changes
  // This SBML model reproduced the calcium release from SR by application of 20 mM or 2mM caffeine, described in the paper.
  // * Ca_i_Total and Ca_SR_Total respectively represent the total calcium concentration in the sarcoplasm and in the sarcoplasmic reticulum.
  // * Ca_i and Ca_SR respectively represent the free calcium concentration in the sarcoplasm and the sarcoplasmic reticulum.
  // * J1 is the calcium flux due to all mechanisms (except SERCA pumps) that remove the excess of calcium from the sarcoplasm.
  // * J2 is the calcium flux from the reticulum to the sarcoplasm via the ryanodine receptors (RyR) present in the reticulum membrane.
  // * J3 is the calcium flux from the sarcoplasm to the reticulum by the SERCA pumps located in the reticulum membrane.
  // *The parameters are a, b, B c, Ca_i_basal, Ca_SR_basal, caff, csq, gamma, KC, kf, KR, Ks, nf, ns and nv.
  // * The value of KC for the model were calculated for J2=J3, after substituting Ca_i=Ca_i_basal, Ca_SR=Ca_SR_basal and caff=0.
  // * Po represents the RyR open probability based on CICR.
  // * Caffeine (caff)** increases the calcium affinity of smooth muscle's RyR so they open even when calcium is at basal level.
  // ** Due to caffeine-induced calcium release, a 5 seconds pulse of caffeine (20 mM) was applied (event called Caff_ON) at 10 seconds after the simulation starts. The event called Caff_OFF starts when
  // the pulse of caffeine finished (caff=0).
  // * PE denotes the concentration of calcium binding sites.
  // * Xi=Ca_SR_Total+PE+KR
  // *In order to reproduce the dynamics of calcium following the application of 2 mM of caffeine, the value of some parameters needs to be change: b=35, Ca_i_basal=9.257e-6, gamma=7.45, caff=0.002 and
  // the initial condition for Ca_i_Total=9.257e-6.
  // *The unit of the calcium concentration is mol/L.
  // * The unit of time is second.
  // *The original SBML code was exported from COPASI 4.12 (Build 81).
  // biomodels.db:MODEL1406180001
  // biomodels.db:BIOMD0000000601
  // isDescribedBy pubmed:26390403
  // isVersionOf GO:0014808
  // occursIn BTO:0001849
  // hasTaxon taxonomy:10141

  // Compartments:
  compartment SR = 0.052;  // GO:0016529
  compartment cytoplasm = 1;  // GO:0005737

  // Species:
  species Ca_SR_Total in SR = 0.00165/SR;  // isVersionOf CHEBI:29108
  species $Ca_SR in SR;  // isVersionOf CHEBI:29108
  species Ca_i_Total in cytoplasm = 7.5e-6/cytoplasm;  // isVersionOf CHEBI:29108
  species $Ca_i in cytoplasm;  // isVersionOf CHEBI:29108
  species caff in cytoplasm = 0;  // isVersionOf CHEBI:27732

  // Parameters:
  // a = 35 [sec^-1]
  a = 35;
  // b = 65 [sec^-1]
  b = 65;
  // c = 11.25 e-6 [M/s]
  c = 1.125e-5;
  // Ca_i_basal = [M]
  Ca_i_basal = 7.5e-6;
  // gamma = 5.2 [dimensionless]
  gamma = 0.052;
  // nv = 1.7 [dimensionless]
  nv = 1.7;
  // Ks= 3 E-7[M]
  Ks = 3e-7;
  // ns = 2 [dimensionless]
  ns = 2;
  // B = 100 [dimensionless]
  B = 100;
  // nf= 1.8 [dimensionless]
  nf = 1.8;
  // kf = 4000 [M^-1]
  kf = 4000;
  // KR=151.5E-6 [M]
  KR = 0.0001515;
  // csq = 10 [dimensionless]
  csq = 10;
  // KC= 0.945 E-6 [M]
  var KC;
  // Po = [dimensionless]
  var Po;
  // PE = 15 E-6 [M]
  var PE;
  // Ca_SR_basal= [M]
  Ca_SR_basal = 0.00015;
  // Xi = [M]
  var Xi;

  // Assignment rules:
  PE := csq*(KR - Ca_SR_basal);
  Xi := Ca_SR_Total + PE + KR;
  Ca_i := Ca_i_Total/B;
  Ca_SR := (Xi - (Xi^2 - 4*Ca_SR_Total*KR)^(1/2))/2;
  KC := (b*gamma^nv*(Ca_i_basal/B)^nf*(Ca_SR_basal - Ca_i_basal/B)*(((Ca_i_basal/B)^ns + Ks^ns)/(c*(Ca_i_basal/B)^ns)) - (Ca_i_basal/B)^nf)^(1/nf);
  Po := (Ca_i*(1 + kf*caff))^nf/(KC^nf + (Ca_i*(1 + kf*caff))^nf);

  // Reactions:
  J3: Ca_i_Total + $Ca_i => Ca_SR_Total + $Ca_i; c*Ca_i^ns/(Ks^ns + Ca_i^ns);  // isVersionOf GO:0070296; isVersionOf GO:0051481
  J2: Ca_SR_Total + $Ca_SR + $Ca_i => Ca_i_Total + $Ca_SR + $Ca_i; b*gamma^nv*Po*(Ca_SR - Ca_i);  // isVersionOf GO:0060316; isVersionOf GO:0006816
  J1: Ca_i_Total + $Ca_i => $Ca_i; cytoplasm*(a*(Ca_i - Ca_i_basal/B)/cytoplasm);  // isVersionOf GO:0006816; isVersionOf GO:0051481

  // Events:
  Caff_ON: at (time > 10): caff = 0.02;
  Caff_OFF: at (time > 15): caff = 0;
end
