// SBML level 2 version 1

function Constant_flux_irreversible(v)
  v;
end
Constant_flux_irreversible is "Constant flux (irreversible)";

function MM_Explicit_Enzyme(kcat, E, S, km)
  kcat*E*S/(km + S);
end

function Menten_Explicit_Enzyme(Kcat, E, S, km)
  Kcat*E*S/(km + S);
end

model Model_1()
  // Orton et al 2009 - Modelling cancerous mutations in the EGFR/ERK pathway - EGF Model

  // Compartments:
  compartment compartment_0 = 1;

  // Species:
  species boundEGFReceptor in compartment_0 = 0;
  species freeEGFReceptor in compartment_0 = 80000;
  species SosActive in compartment_0 = 0;
  species SosInactive in compartment_0 = 120000;
  species RasActive in compartment_0 = 0;
  species RasInactive in compartment_0 = 120000;
  species Raf1Active in compartment_0 = 0;
  species Raf1Inactive in compartment_0 = 120000;
  species MekActive in compartment_0 = 0;
  species MekInactive in compartment_0 = 600000;
  species ErkActive in compartment_0 = 0;
  species ErkInactive in compartment_0 = 600000;
  species P90RskActive in compartment_0 = 0;
  species P90RskInactive in compartment_0 = 120000;
  species PI3KActive in compartment_0 = 0;
  species PI3KInactive in compartment_0 = 120000;
  species AktActive in compartment_0 = 0;
  species AktInactive in compartment_0 = 120000;
  species degradedEGFReceptor in compartment_0 = 0;
  species C3GActive in compartment_0 = 0;
  species C3GInactive in compartment_0 = 120000;
  species Rap1Active in compartment_0 = 0;
  species Rap1Inactive in compartment_0 = 120000;
  species bRafActive in compartment_0 = 0;
  species bRafInactive in compartment_0 = 120000;
  species $EGF in compartment_0 = 10002000;
  species $PP2AActive in compartment_0 = 120000;
  species $Raf1PPtase in compartment_0 = 120000;
  species $RasGapActive in compartment_0 = 120000;
  species $Rap1Gap in compartment_0 = 120000;
  species $proEGFReceptor in compartment_0 = 1;

  // Reactions:
  EGF_Binding_Unbinding: $EGF + freeEGFReceptor -> boundEGFReceptor; compartment_0*(EGF_Binding_Unbinding_k1*EGF*freeEGFReceptor - k2*boundEGFReceptor);
    EGF_Binding_Unbinding_k1 = 2.18503e-5; k2 = 0.121008;
  Sos_Activation: SosInactive => SosActive; compartment_0*Menten_Explicit_Enzyme(Sos_Activation_Kcat, boundEGFReceptor, SosInactive, Sos_Activation_km);  // modifiers: boundEGFReceptor
    Sos_Activation_Kcat = 694.731; Sos_Activation_km = 6086070;
  Sos_Deactivation: SosActive => SosInactive; compartment_0*Sos_Deactivation_k1*SosActive;
    Sos_Deactivation_k1 = 2.5;
  Ras_Activation: RasInactive => RasActive; compartment_0*Menten_Explicit_Enzyme(Ras_Activation_Kcat, SosActive, RasInactive, Ras_Activation_km);  // modifiers: SosActive
    Ras_Activation_Kcat = 32.344; Ras_Activation_km = 35954.3;
  Ras_Deactivation: RasActive => RasInactive; compartment_0*Menten_Explicit_Enzyme(Ras_Deactivation_Kcat, RasGapActive, RasActive, Ras_Deactivation_km);  // modifiers: RasGapActive
    Ras_Deactivation_Kcat = 1509.36; Ras_Deactivation_km = 1432410;
  Raf1_Activation: Raf1Inactive => Raf1Active; compartment_0*Menten_Explicit_Enzyme(Raf1_Activation_Kcat, RasActive, Raf1Inactive, Raf1_Activation_km);  // modifiers: RasActive
    Raf1_Activation_Kcat = 0.884096; Raf1_Activation_km = 62464.6;
  Raf1_Deactivation: Raf1Active => Raf1Inactive; compartment_0*Menten_Explicit_Enzyme(Raf1_Deactivation_Kcat, Raf1PPtase, Raf1Active, Raf1_Deactivation_km);  // modifiers: Raf1PPtase
    Raf1_Deactivation_Kcat = 0.126329; Raf1_Deactivation_km = 1061.71;
  Mek_Activation: MekInactive => MekActive; compartment_0*Menten_Explicit_Enzyme(Mek_Activation_Kcat, Raf1Active, MekInactive, Mek_Activation_km);  // modifiers: Raf1Active
    Mek_Activation_Kcat = 185.759; Mek_Activation_km = 4768350;
  Mek_Deactivation: MekActive => MekInactive; compartment_0*Menten_Explicit_Enzyme(Mek_Deactivation_Kcat, PP2AActive, MekActive, Mek_Deactivation_km);  // modifiers: PP2AActive
    Mek_Deactivation_Kcat = 2.83243; Mek_Deactivation_km = 518753;
  Erk_Activation: ErkInactive => ErkActive; compartment_0*Menten_Explicit_Enzyme(Erk_Activation_Kcat, MekActive, ErkInactive, Erk_Activation_km);  // modifiers: MekActive
    Erk_Activation_Kcat = 9.85367; Erk_Activation_km = 1007340;
  Erk_Deactivation: ErkActive => ErkInactive; compartment_0*Menten_Explicit_Enzyme(Erk_Deactivation_Kcat, PP2AActive, ErkActive, Erk_Deactivation_km);  // modifiers: PP2AActive
    Erk_Deactivation_Kcat = 8.8912; Erk_Deactivation_km = 3496490;
  P90Rsk_Activation: P90RskInactive => P90RskActive; compartment_0*Menten_Explicit_Enzyme(P90Rsk_Activation_Kcat, ErkActive, P90RskInactive, P90Rsk_Activation_km);  // modifiers: ErkActive
    P90Rsk_Activation_Kcat = 0.0213697; P90Rsk_Activation_km = 763523;
  P90Rsk_Deactivation: P90RskActive => P90RskInactive; compartment_0*P90Rsk_Deactivation_k1*P90RskActive;
    P90Rsk_Deactivation_k1 = 0.005;
  Sos_Feedback_Deactivation: SosActive => SosInactive; compartment_0*Menten_Explicit_Enzyme(Sos_Feedback_Deactivation_Kcat, P90RskActive, SosActive, Sos_Feedback_Deactivation_km);  // modifiers: P90RskActive
    Sos_Feedback_Deactivation_Kcat = 1611.97; Sos_Feedback_Deactivation_km = 896896;
  PI3K_Activation_EGFR: PI3KInactive => PI3KActive; compartment_0*Menten_Explicit_Enzyme(PI3K_Activation_EGFR_Kcat, boundEGFReceptor, PI3KInactive, PI3K_Activation_EGFR_km);  // modifiers: boundEGFReceptor
    PI3K_Activation_EGFR_Kcat = 10.6737; PI3K_Activation_EGFR_km = 184912;
  PI3K_Activation_Ras: PI3KInactive => PI3KActive; compartment_0*Menten_Explicit_Enzyme(PI3K_Activation_Ras_Kcat, RasActive, PI3KInactive, PI3K_Activation_Ras_km);  // modifiers: RasActive
    PI3K_Activation_Ras_Kcat = 0.0771067; PI3K_Activation_Ras_km = 272056;
  PI3K_Deactivation: PI3KActive => PI3KInactive; compartment_0*PI3K_Deactivation_k1*PI3KActive;
    PI3K_Deactivation_k1 = 0.005;
  Akt_Activation: AktInactive => AktActive; compartment_0*Menten_Explicit_Enzyme(Akt_Activation_Kcat, PI3KActive, AktInactive, Akt_Activation_km);  // modifiers: PI3KActive
    Akt_Activation_Kcat = 0.0566279; Akt_Activation_km = 653951;
  Akt_Deactivation: AktActive => AktInactive; compartment_0*Akt_Deactivation_k1*AktActive;
    Akt_Deactivation_k1 = 0.005;
  Raf1_Deactivation_Akt: Raf1Active => Raf1Inactive; compartment_0*Menten_Explicit_Enzyme(Raf1_Deactivation_Akt_Kcat, AktActive, Raf1Active, Raf1_Deactivation_Akt_km);  // modifiers: AktActive
    Raf1_Deactivation_Akt_Kcat = 15.1212; Raf1_Deactivation_Akt_km = 119355;
  EGFReceptor_Degradation: boundEGFReceptor => degradedEGFReceptor; compartment_0*EGFReceptor_Degradation_k1*boundEGFReceptor;
    EGFReceptor_Degradation_k1 = 0.2;
  C3G_Activation: C3GInactive => C3GActive; compartment_0*MM_Explicit_Enzyme(C3G_Activation_kcat, boundEGFReceptor, C3GInactive, C3G_Activation_km);  // modifiers: boundEGFReceptor
    C3G_Activation_kcat = 694.731; C3G_Activation_km = 6086070;
  C3G_Deactivation: C3GActive => C3GInactive; compartment_0*C3G_Deactivation_k1*C3GActive;
    C3G_Deactivation_k1 = 2.5;
  Rap1_Activation: Rap1Inactive => Rap1Active; compartment_0*MM_Explicit_Enzyme(Rap1_Activation_kcat, C3GActive, Rap1Inactive, Rap1_Activation_km);  // modifiers: C3GActive
    Rap1_Activation_kcat = 32.344; Rap1_Activation_km = 35954.3;
  Rap1_Deactivation: Rap1Active => Rap1Inactive; compartment_0*MM_Explicit_Enzyme(Rap1_Deactivation_kcat, Rap1Gap, Rap1Active, Rap1_Deactivation_km);  // modifiers: Rap1Gap
    Rap1_Deactivation_kcat = 1509.36; Rap1_Deactivation_km = 1432410;
  bRaf_Activation: bRafInactive => bRafActive; compartment_0*MM_Explicit_Enzyme(bRaf_Activation_kcat, Rap1Active, bRafInactive, bRaf_Activation_km);  // modifiers: Rap1Active
    bRaf_Activation_kcat = 0.884096; bRaf_Activation_km = 62464.6;
  bRaf_Deactivation: bRafActive => bRafInactive; compartment_0*MM_Explicit_Enzyme(bRaf_Deactivation_kcat, Raf1PPtase, bRafActive, bRaf_Deactivation_km);  // modifiers: Raf1PPtase
    bRaf_Deactivation_kcat = 0.126329; bRaf_Deactivation_km = 1061.71;
  Mek_Activation_bRaf: MekInactive => MekActive; compartment_0*MM_Explicit_Enzyme(Mek_Activation_bRaf_kcat, bRafActive, MekInactive, Mek_Activation_bRaf_km);  // modifiers: bRafActive
    Mek_Activation_bRaf_kcat = 185.759; Mek_Activation_bRaf_km = 4768350;
  EGFReceptor_Production: $proEGFReceptor => freeEGFReceptor; compartment_0*Constant_flux_irreversible(v);
    v = 100;
  EGFReceptor_Degradtion_Free: freeEGFReceptor => degradedEGFReceptor; compartment_0*EGFReceptor_Degradtion_Free_k1*freeEGFReceptor;
    EGFReceptor_Degradtion_Free_k1 = 0.00125;
  bRaf_Activation_Ras: bRafInactive => bRafActive; compartment_0*MM_Explicit_Enzyme(bRaf_Activation_Ras_kcat, RasActive, bRafInactive, bRaf_Activation_Ras_km);  // modifiers: RasActive
    bRaf_Activation_Ras_kcat = 0.884096; bRaf_Activation_Ras_km = 62464.6;

  // Unit definitions:
  unit volume = 1e-3 litre;
  unit substance = 1e-3 mole;
end
