// SBML level 2 version 1

model SimulationForMeioticEntryInYeast()
  // meiosis

  // Compartments:
  compartment V = 1; V is "C";

  // Species:
  species Rim11 in V = 0;
  species pUme6 in V = 0;
  species pSok2 in V = 1;
  species Ime1 in V = 0;
  species pIme1 in V = 0;
  species Ime2 in V = 0;

  // Parameters:
  sime1 = 10;
  sime2 = 10;
  sprimeime2 = 3;
  dime1 = 1;
  dprimeime1 = 1;
  dpime1 = 1;
  dime2 = 8;
  prim11 = 0.01;
  urim11 = 0.1;
  pume6 = 0.3;
  uume6 = 0.01;
  psok2 = 0.7;
  usok2 = 1;
  pime1 = 2;
  csok2 = 0.05;
  cime1 = 0.01;
  c1 = 0.01;
  c2 = 1.4;
  c3 = 2;

  // Reactions:
  rim11_1: -> Rim11; V*(urim11*(1 - Rim11) - prim11*Rim11);
  pume6_1: -> pUme6 + Rim11; V*((1 - pUme6)*pume6*Rim11 - uume6*pUme6);
  sok2_1: -> pSok2 + Ime1; V*(csok2/(csok2 + Ime1)*(1 - pSok2)*psok2 - usok2*pSok2);
  ime1_1: => Ime1 + pSok2 + Rim11 + Ime2; V*(cime1/(cime1 + pSok2)*sime1 - (pime1*Ime1*Rim11 + dime1*Ime1 + dprimeime1*Ime2*(Ime1/(c1 + Ime1))));
  pime1_1: => pIme1 + Ime1 + Rim11; V*(pime1*Ime1*Rim11 - dpime1*pIme1);
  ime2_1: -> Ime2 + pUme6 + pIme1; V*(sime2*pUme6*pIme1 + sprimeime2*Ime2^5/(c2^5 + Ime2^5) - dime2*Ime2/(c3 + Ime2));
end
