// SBML level 2 version 3
// dcterms:bibliographicCitation: urn:miriam:doi:10.1177/0271678X17693024
// dcterms:bibliographicCitation: urn:miriam:isbn:978-1-4612-8492-5

function vdHb_in(F_in, O2_a, O2_c)
  F_in*(O2_a - (2*O2_c - O2_a));
end
vdHb_in is "vdHb_in [1]";

function vdHb_out(F_out, dHb, V_v)
  F_out*dHb/V_v;
end

function vATPase(VmaxATPase, ATP, Km_ATP)
  VmaxATPase*(ATP/(ATP + Km_ATP));
end

function vPK(k_PK, PEP, ADP)
  k_PK*PEP*ADP;
end

function vPGK(k_PGK, GAP, ADP, NAD, NADH)
  k_PGK*GAP*ADP*(NAD/NADH);
end

function vPFK(k_PFK, ATP, K_I_ATP, nH, F6P, K_m_F6P)
  k_PFK*ATP*(1 + (ATP/K_I_ATP)^nH)^(-1)*(F6P/(F6P + K_m_F6P));
end

function facilitated_transport__inkl__Volume(Vmax, S, K, P, Volume)
  Vmax*(S/(S + K) - P/(P + K))*Volume;
end
facilitated_transport__inkl__Volume is "facilitated transport (inkl. Volume)";

function vGLU_eg__inkl__Volumes(Vmax_GLU, GLU_e, K_m_GLU, Volume)
  Vmax_GLU*(GLU_e/(GLU_e + K_m_GLU))*Volume;
end
vGLU_eg__inkl__Volumes is "vGLU_eg (inkl. Volumes)";

function vGLU_gn__inkl__Volume(Vmax_GLU, GLU_g, K_m_GLU, ATP_g, K_m_ATP, Volume)
  Vmax_GLU*(GLU_g/(GLU_g + K_m_GLU))*(ATP_g/(ATP_g + K_m_ATP))*Volume;
end
vGLU_gn__inkl__Volume is "vGLU_gn (inkl. Volume)";

function vGLU_ne__inkl__Volume(vSTIM, ratio_Na_GLU, GLU_n, Km_GLU, Volume)
  vSTIM*ratio_Na_GLU*(GLU_n/(GLU_n + Km_GLU))*Volume;
end
vGLU_ne__inkl__Volume is "vGLU_ne (inkl. Volume)";

function vStim__with_volume(vstim, Volume)
  vstim*Volume;
end
vStim__with_volume is "vStim (with volume)";

function modular_rate_law_for_two_substrates__two_products(Vmax, K_S1, K_S2, S1, S2, P1, P2, Keq, K_P1, K_P2)
  Vmax*(1/(K_S1*K_S2))*((S1*S2 - P1*P2/Keq)/((1 + S1/K_S1)*(1 + S2/K_S2) + (1 + P1/K_P1)*(1 + P2/K_P2) - 1));
end
modular_rate_law_for_two_substrates__two_products is "modular rate law for two substrates, two products";

function modular_rate_law_for_one_substrate__one_product(Vmax, K_S1, S1, P1, Keq, K_P1)
  Vmax*(1/K_S1)*((S1 - P1/Keq)/(1 + S1/K_S1 + 1 + P1/K_P1 - 1));
end
modular_rate_law_for_one_substrate__one_product is "modular rate law for one substrate, one product";

function Blood_flow_contribution_inkl__volume(F_in, V_c, Volume, Substrate, Product)
  2*F_in/V_c*(Substrate - Product)*Volume;
end
Blood_flow_contribution_inkl__volume is "Blood flow contribution inkl. volume";

function O2_transport_function_inkl__volume(PScap, Volume, KO2, HbOP, O2_source, nh, O2_destination, Volume1)
  PScap/Volume*(KO2*(HbOP/O2_source - 1)^(-1/nh) - O2_destination)*Volume1;
end
O2_transport_function_inkl__volume is "O2 transport function inkl. volume";

function vLEAK_Na_inkl__Volume(Sm, gNA, Volume, F, RT, Na_e, Na, Vm, Volume1)
  Sm*gNA/(Volume*F)*(RT/F*ln(Na_e/Na) - Vm)*Volume1;
end
vLEAK_Na_inkl__Volume is "vLEAK_Na inkl. Volume";

function vPUMP_volume_dependent(Sm, Volume, k_pump, ATP, Na, Km_pump)
  Sm/Volume*k_pump*ATP*Na*(1 + ATP/Km_pump)^(-1);
end

function vHK__HS(k_HK, ATP, G6P, K_I_G6P)
  k_HK*ATP*(1 + G6P/K_I_G6P)^(-1);
end
vHK__HS is "vHK (HS)";

function facilitated_transport__inkl__Volume____scaled(Vmax, sf, S, K, P, Volume)
  Vmax*sf*(S/(S + K) - P/(P + K))*Volume;
end
facilitated_transport__inkl__Volume____scaled is "facilitated transport (inkl. Volume) (scaled)";

function vMITO2__inkl__Volumes(v_max_mito, PYR, K_m_PYR, ADP, K_m_ADP, O2, K_m_O2, alpha, ATP, beta, Volume)
  v_max_mito*(PYR/(PYR + K_m_PYR))*(ADP/(ADP + K_m_ADP))*(O2/(O2 + K_m_O2))*(1 - 1/(1 + exp(-alpha*(ATP/ADP - beta))))*Volume;
end
vMITO2__inkl__Volumes is "vMITO2 (inkl. Volumes)";

model Brain_Energy_Metabolism_with_PPP()
  // Winter2017 - Brain Energy Metabolism with PPP
  // This model is described in the article:
  // Mathematical analysis of the influence of brain metabolism on the BOLD signal in Alzheimer's disease
  // Felix Winter1,2, Catrin Bludszuweit-Philipp1 and Olaf Wolkenhauer2,3
  // Journal of Cerebral Blood Flow & Metabolism
  // Abstract:
  // Blood oxygen level-dependent functional magnetic resonance imaging (BOLD-fMRI) is a standard clinical tool for the detection of brain activation. In Alzheimer’s disease (AD), task-related and resting state fMRI have been used to detect brain dysfunction. It has been shown that the shape of the BOLD response is affected in early AD. To correctly interpret these changes, the mechanisms responsible for the observed behaviour need to be known. The parameters of the canonical hemodynamic response function (HRF) commonly used in the analysis of fMRI data have no direct biological interpretation and cannot be used to answer this question. We here present a model that allows relating AD-specific changes in the BOLD shape to changes in the underlying energy metabolism. According to our findings, the classic view that differences in the BOLD shape are only attributed to changes in strength and duration of the stimulus does not hold. Instead, peak height, peak timing and full width at half maximum are sensitive to changes in the reaction rate of several metabolic reactions. Our systems-theoretic approach allows the use of patient-specific clinical data to predict dementia- driven changes in the HRF, which can be used to improve the results of fMRI analyses in AD patients.
  // This model is hosted on BioModels Database and identified by: BIOMD0000000627.
  // To cite BioModels Database, please use: BioModels Database: An enhanced, curated and annotated resource for published quantitative kinetic models.
  // To the extent possible under law, all copyright and related or neighbouring rights to this encoded model have been dedicated to the public domain worldwide. Please refer to CC0 Public Domain Dedication for more information.
  // biomodels.db:MODEL1603240000
  // biomodels.db:BIOMD0000000627
  // isDescribedBy doi:10.1177%2F0271678X17693024
  // isDerivedFrom biomodels.db:MODEL1411210000 biomodels.db:BIOMD0000000554 doi:10.1007%2F978-1-4613-1161-4
  // hasProperty DOID:10652
  // hasPart GO:0006098 GO:0006096 GO:0006099 GO:0006119

  // Compartments:
  compartment capillary = 0.0055;  // BTO:0002045
  compartment neurons = 0.45;  // BTO:0000938
  compartment astrocytes = 0.25;  // BTO:0000938
  compartment extracellular_space = 0.2;  // GO:0005615
  compartment venous_balloon = 0.0237;  // FMA:50723
  compartment artery = 0.0055;  // FMA:50720

  // Species:
  substanceOnly species O2_capillary in capillary = 0.04032329;  // CHEBI:15379
  substanceOnly species CO2 in capillary = 0.01214671;  // CHEBI:16526
  substanceOnly species GLC_capillary in capillary = 0.02539038;  // CHEBI:17634
  substanceOnly species LAC_capillary in capillary = 0.00188913;  // CHEBI:422
  substanceOnly species dHb in capillary = 0.000262914;  // CHEBI:5656
  substanceOnly species GLC_neurons in neurons = 0.5131252;  // CHEBI:17634
  substanceOnly species G6P_neurons in neurons = 0.05068673;  // CHEBI:48928
  substanceOnly species ATP_neurons in neurons = 1.017567;  // CHEBI:15422
  substanceOnly species F6P_neurons in neurons = 0.02077181;  // CHEBI:78697
  substanceOnly species GAP_neurons in neurons = 0.0004848569;  // CHEBI:48928
  substanceOnly species NADH_neurons in neurons = 0.007363691;  // CHEBI:16908
  substanceOnly species PEP_neurons in neurons = 0.001371302;  // CHEBI:18021
  substanceOnly species PYR_neurons in neurons = 0.05894678;  // CHEBI:32816
  substanceOnly species LAC_neurons in neurons = 0.6314653;  // CHEBI:422
  substanceOnly species O2_neurons in neurons = 0.01343794;  // CHEBI:15379
  // Phosphocreatine
  substanceOnly species PCr_neurons in neurons = 0.6482852;  // CHEBI:17287
  substanceOnly species Na__neurons in neurons = 6.989056; Na__neurons is "Na+";  // CHEBI:29101
  substanceOnly species GLU_neurons in neurons = 1.35;  // CHEBI:16015
  substanceOnly species ADP_neurons in neurons = 0.05028197;  // CHEBI:16761
  substanceOnly species AMP_neurons in neurons = (ANP - ADP_neurons/neurons - ATP_neurons/neurons)*neurons;  // CHEBI:16027
  substanceOnly species Cr_neurons in neurons = (PCr_total - PCr_neurons/neurons)*neurons;  // CHEBI:16919
  substanceOnly species NAD_neurons in neurons = (NADH_total_neurons - NADH_neurons/neurons)*neurons;  // CHEBI:13389
  substanceOnly species G6L_neurons in neurons = 1.350546e-6;  // CHEBI:16938
  substanceOnly species P6G_neurons in neurons = 0.001297468;  // CHEBI:16938
  substanceOnly species Ru5P_neurons in neurons = 0.0003034703;  // CHEBI:37455
  substanceOnly species X5P_neurons in neurons = 0.009306866;  // CHEBI:27354
  substanceOnly species R5P_neurons in neurons = 1.215278e-5;  // CHEBI:37455
  substanceOnly species S7P_neurons in neurons = 0.5198579;  // CHEBI:15721
  substanceOnly species E4P_neurons in neurons = 0.002930455;  // CHEBI:48153
  substanceOnly species NADPH_neurons in neurons = 0.1310517;  // CHEBI:16474
  substanceOnly species NADP_neurons in neurons = 9.96586e-10;  // CHEBI:25523
  substanceOnly species GLC_astrocytes in astrocytes = 0.2850655;  // CHEBI:17634
  substanceOnly species ATP_astrocytes in astrocytes = 0.4538757;  // CHEBI:15422
  substanceOnly species G6P_astrocytes in astrocytes = 0.01703267;  // CHEBI:48928
  substanceOnly species F6P_astrocytes in astrocytes = 0.006980164;  // CHEBI:78697
  substanceOnly species GAP_astrocytes in astrocytes = 0.0005510394;  // CHEBI:48928
  substanceOnly species NADH_astrocytes in astrocytes = 0.01448472;  // CHEBI:16908
  substanceOnly species PEP_astrocytes in astrocytes = 0.0002311972;  // CHEBI:18021
  substanceOnly species PYR_astrocytes in astrocytes = 0.03916263;  // CHEBI:32816
  substanceOnly species LAC_astrocytes in astrocytes = 0.3412028;  // CHEBI:422
  substanceOnly species O2_astrocytes in astrocytes = 0.01147032;  // CHEBI:15379
  // Phosphocreatine
  substanceOnly species PCr_astrocytes in astrocytes = 0.09430802;  // CHEBI:17287
  substanceOnly species Na__astrocytes in astrocytes = 4.007376; Na__astrocytes is "Na+";  // CHEBI:29101
  substanceOnly species GLU_astrocytes in astrocytes = 0;  // CHEBI:16015
  substanceOnly species ADP_astrocytes in astrocytes = 0.1112399;  // CHEBI:16761
  substanceOnly species AMP_astrocytes in astrocytes = (ANP - ADP_astrocytes/astrocytes - ATP_astrocytes/astrocytes)*astrocytes;  // CHEBI:16027
  substanceOnly species Cr_astrocytes in astrocytes = (PCr_total - PCr_astrocytes/astrocytes)*astrocytes;  // CHEBI:16919
  substanceOnly species NAD_astrocytes in astrocytes = (NADH_total_astrocytes - NADH_astrocytes/astrocytes)*astrocytes;  // CHEBI:13389
  substanceOnly species G6L_astrocytes in astrocytes = 7.4944e-7;  // CHEBI:16938
  substanceOnly species P6G_astrocytes in astrocytes = 0.0004509058;  // CHEBI:16938
  substanceOnly species Ru5P_astrocytes in astrocytes = 0.0001685868;  // CHEBI:37455
  substanceOnly species X5P_astrocytes in astrocytes = 0.005170182;  // CHEBI:27354
  substanceOnly species R5P_astrocytes in astrocytes = 6.502491e-6;  // CHEBI:37455
  substanceOnly species S7P_astrocytes in astrocytes = 0.06917265;  // CHEBI:15721
  substanceOnly species E4P_astrocytes in astrocytes = 0.001424846;  // CHEBI:48153
  substanceOnly species NADP_astrocytes in astrocytes = 6.892481e-10;  // CHEBI:25523
  substanceOnly species NADPH_astrocytes in astrocytes = 0.0728065;  // CHEBI:16474
  substanceOnly species GLC_extracellular_space in extracellular_space = 0.22806;  // CHEBI:17634
  substanceOnly species LAC_extracellular_space in extracellular_space = 0.2695538;  // CHEBI:422
  substanceOnly species GLU_extracellular_space in extracellular_space = 0;  // CHEBI:16015
  substanceOnly species $Na__extracellular_space in extracellular_space = 30; Na__extracellular_space is "Na+";  // CHEBI:29101
  substanceOnly species $O2_artery in artery = 0.04587;  // CHEBI:15379
  substanceOnly species $CO2_artery in artery = 0.0066;  // CHEBI:16526
  substanceOnly species $GLC_artery in artery = 0.0264;  // CHEBI:17634
  substanceOnly species $LAC_artery in artery = 0.0017215;  // CHEBI:422

  // Parameters:
  // Affinity constant for GLC
  K_m_GLC = 0.105;
  // Affinity constant for G6P
  K_m_G6P = 0.5;
  K_m_F6P_PGI = 0.06;
  K_m_F6P_PFK = 0.18;
  // Inhibition constant for ATP
  K_I_ATP = 1;
  // Hill coefficient for ATP
  nH = 4;  // sbo:0000190
  NADH_total_neurons = 0.22;
  NADH_total_astrocytes = 0.22;
  var parameter_9; parameter_9 is "NAD_neurons";
  var parameter_10; parameter_10 is "NAD_astrocytes";
  ANP = 2.379;
  q_AK = 0.92;
  K_m_ATP = 0.01532;
  K_m_ADP = 0.00107;
  K_m_O2 = 0.0029658;
  K_m_PYR = 0.0632;
  PCr_total = 5;
  var parameter_20; parameter_20 is "Cr_neurons";
  var parameter_21; parameter_21 is "Cr_astrocytes";
  Vmax_ATPase_neurons = 0.04889;
  Vmax_ATPase_astrocytes = 0.035657;
  parameter_43 = 0.0325; parameter_43 is "Vmax_ec_LAC (wrt extracellular space)";
  // cerebral blood flow in resting condition
  F_0 = 0.012;
  delta_F = 0.42;
  t_0 = 200;
  t_end = 40;
  t_1 = 2;
  tau_v = 35;
  // O2 concentration with hemoglobin
  Hb_OP = 8.6; Hb_OP is "Hb.OP";
  // characteristic length for Na (astrocytes)
  Sm_g = 10500;
  // characteristic length for Na (neurons)
  Sm_n = 40500;
  // transport rate constant
  k_pump = 3.17e-7;
  K_m_Na_pump = 0.4243; K_m_Na_pump is "K_m,Na-pump";
  K_m_G6P_GLYS = 0.5;
  delta_GLY = 62;
  // affinity constant for GLY
  K_m_GLY = 1;
  // surface resistance neurons
  g_Na_neurons = 0.0039;
  // surface resistance astrocytes
  g_Na_astrocytes = 0.00325;
  // surface potential
  Vm = -70;
  // perfect gas constant and temperature kPa
  RT = 2577340;
  // molecular charge
  F = 96500;
  // base sodium transport rate during stimulation (tail pinch)
  vn_1_tp = 0.041;
  // early stimulation of sodium transport rate (tail pinch)
  vn_2_tp = 1.44;
  // time constant of stimulation (tail pinch)
  t_stim_tp = 2;
  // Glutamate / Na ratio for release of GLU by neurons during stimulation
  R_Na_GLU = 0.075;
  // maximum uptake rate of GLU in astrocytes
  V_eg_max_GLU = 0.0208;
  // Affinity constant for GLU
  K_m_GLU = 0.05;
  // reaction rate constant for glutamine synthase
  V_gn_max_GLU = 0.3;
  delta_HK = 0.6;
  var BOLD_signal;
  K_m_ATP_ATPase = 0.001; K_m_ATP_ATPase is "K_m_ATP(ATPase)";
  NULL = 0;
  Vmax_ne_LAC__wrt_extracellular_space = 0.44505; Vmax_ne_LAC__wrt_extracellular_space is "Vmax_ne_LAC (wrt extracellular space)";
  // O2 mass transfer constant between capillaries and astrocytes
  PS_cap_astrocytes__wrt_capillaries = 11.16182; PS_cap_astrocytes__wrt_capillaries is "PS_cap_astrocytes (wrt capillaries)";
  // O2 mass transfer constant between capillary and neuron
  PS_cap_neuron__wrt_capillaries = 18.01636; PS_cap_neuron__wrt_capillaries is "PS_cap_neuron (wrt capillaries)";
  // reaction rate constant for glutamine synthase
  Vmax_eg_GLU__wrt_extracellular_space = 0.026; Vmax_eg_GLU__wrt_extracellular_space is "Vmax_eg_GLU (wrt extracellular space)";
  K_T_GLC_ce__Aubert = 9; K_T_GLC_ce__Aubert is "K_T_GLC_ce (Aubert)";
  // 0.118 from Aubert 2005 model
  var Vmax_ce_GLC__wrt_capillaries___Aubert; Vmax_ce_GLC__wrt_capillaries___Aubert is "Vmax_ce_GLC (wrt capillaries) (Aubert)";
  // 1020 from model Aubert 2005
  var Vmax_eg_GLC__wrt_astrocytes___Aubert_; Vmax_eg_GLC__wrt_astrocytes___Aubert_ is "Vmax_eg_GLC (wrt astrocytes) (Aubert)";
  K_T_GLC_eg__Aubert = 9; K_T_GLC_eg__Aubert is "K_T_GLC_eg (Aubert)";
  K_T_GLC_en__Aubert = 9; K_T_GLC_en__Aubert is "K_T_GLC_en (Aubert)";
  var Vmax_en_GLC__wrt_neurons___Aubert; Vmax_en_GLC__wrt_neurons___Aubert is "Vmax_en_GLC (wrt neurons) (Aubert)";
  K_T_GLC_cg__Aubert = 9; K_T_GLC_cg__Aubert is "K_T_GLC_cg (Aubert)";
  // 0.0093 from Aubert 2005 model
  var Vmax_cg_GLC__wrt_capillaries___Aubert; Vmax_cg_GLC__wrt_capillaries___Aubert is "Vmax_cg_GLC (wrt capillaries) (Aubert)";
  var Vmax_ec_LAC__wrt_extracellular_space___Aubert; Vmax_ec_LAC__wrt_extracellular_space___Aubert is "Vmax_ec_LAC (wrt extracellular space) (Aubert)";
  var Vmax_gc_LAC__wrt_astrocytes___Aubert; Vmax_gc_LAC__wrt_astrocytes___Aubert is "Vmax_gc_LAC (wrt astrocytes) (Aubert)";
  var Vmax_ge_LAC__wrt_astrocytes___Aubert; Vmax_ge_LAC__wrt_astrocytes___Aubert is "Vmax_ge_LAC (wrt astrocytes) (Aubert)";
  var Vmax_ne_LAC__wrt_neurons___Aubert; Vmax_ne_LAC__wrt_neurons___Aubert is "Vmax_ne_LAC (wrt neurons) (Aubert)";
  K_T_LAC_ne__Aubert = 0.5; K_T_LAC_ne__Aubert is "K_T_LAC_ne (Aubert)";
  K_T_LAC_ge__Aubert = 0.5; K_T_LAC_ge__Aubert is "K_T_LAC_ge (Aubert)";
  K_T_LAC_gc__Aubert = 0.5; K_T_LAC_gc__Aubert is "K_T_LAC_gc (Aubert)";
  K_T_LAC_ec__Aubert = 0.5; K_T_LAC_ec__Aubert is "K_T_LAC_ec (Aubert)";
  // 0.414 from Aubert 2005
  // 0.25 is the astrocytic volume considered in Aubert 2005
  var PS_cap_astrocytes__wrt_capillaries___Aubert; PS_cap_astrocytes__wrt_capillaries___Aubert is "PS_cap_astrocytes (wrt capillaries) (Aubert)";
  // 1.73 from model Aubert 2005
  // 0.45 is the neuronal volume considered in Aubert 2005
  var PS_cap_neuron__wrt_capillaries___Aubert; PS_cap_neuron__wrt_capillaries___Aubert is "PS_cap_neuron (wrt capillaries) (Aubert)";
  // 0.0361 taken from model Aubert 2005
  K_O2__Aubert = 0.0361; K_O2__Aubert is "K_O2 (Aubert)";
  // 2.73 taken from Aubert 2005
  nh_O2__Aubert = 2.73; nh_O2__Aubert is "nh_O2 (Aubert)";
  // from Model Cloutier 2009
  Vmax_f_PGI__Cloutier = 0.5; Vmax_f_PGI__Cloutier is "Vmax_f_PGI (Cloutier)";
  Vmax_r_PGI__Cloutier = 0.45; Vmax_r_PGI__Cloutier is "Vmax_r_PGI (Cloutier)";
  Vmax_ce_GLC__Aubert = 0.118; Vmax_ce_GLC__Aubert is "Vmax_ce_GLC (Aubert)";
  Vmax_cg_GLC___Aubert = 0.0093; Vmax_cg_GLC___Aubert is "Vmax_cg_GLC (Aubert)";
  Vmax_eg_GLC__Aubert_ = 1020; Vmax_eg_GLC__Aubert_ is "Vmax_eg_GLC (Aubert)";
  Vmax_en_GLC___Aubert = 5230; Vmax_en_GLC___Aubert is "Vmax_en_GLC (Aubert)";
  // scaling factor transport
  _sf = 0.75;
  _PScap = 1.1;
  Metabolite_123 = O2_artery; Metabolite_123 is "Initial for O2";
  Metabolite_1 = O2_capillary; Metabolite_1 is "Initial for O2";
  Initial_for_dHb = dHb;
  Initial_for_venous_balloon = venous_balloon;
  Initial_for_E0 = E0;
  ModelValue_7 = NADH_total_astrocytes; ModelValue_7 is "Initial for NADH_total_astrocytes";
  Initial_for_NADH_total_neurons = NADH_total_neurons;
  Initial_for_PCr_total = PCr_total;
  Initial_for_Vmax_ce_GLC_Aubert = Vmax_ce_GLC__Aubert; Initial_for_Vmax_ce_GLC_Aubert is "Initial for Vmax_ce_GLC (Aubert)";
  Initial_for_Vmax_cg_GLC_Aubert = Vmax_cg_GLC___Aubert; Initial_for_Vmax_cg_GLC_Aubert is "Initial for Vmax_cg_GLC (Aubert)";
  Initial_for_Vmax_en_GLC_Aubert = Vmax_en_GLC___Aubert; Initial_for_Vmax_en_GLC_Aubert is "Initial for Vmax_en_GLC (Aubert)";
  Initial_for_vn_1 = vn_1_tp;

  // Assignment rules:
  E0 := 1 - (2*Metabolite_1 - Metabolite_123)/(O2_artery/artery);
  BOLD_signal := Initial_for_venous_balloon*7*(1 - dHb/capillary/Initial_for_dHb) + 2*((1 - dHb/capillary/Initial_for_dHb)/(venous_balloon/Initial_for_venous_balloon)) + (2*Initial_for_E0 - 0.2)*(1 - venous_balloon/Initial_for_venous_balloon);
  Vmax_ce_GLC__wrt_capillaries___Aubert := Initial_for_Vmax_ce_GLC_Aubert*(extracellular_space/capillary);
  Vmax_eg_GLC__wrt_astrocytes___Aubert_ := Vmax_eg_GLC__Aubert_*(astrocytes/extracellular_space);
  Vmax_en_GLC__wrt_neurons___Aubert := Initial_for_Vmax_en_GLC_Aubert*(neurons/extracellular_space);
  Vmax_cg_GLC__wrt_capillaries___Aubert := Initial_for_Vmax_cg_GLC_Aubert*(astrocytes/capillary);
  Vmax_ec_LAC__wrt_extracellular_space___Aubert := 0.00783*_sf;
  Vmax_gc_LAC__wrt_astrocytes___Aubert := 0.0058*_sf;
  Vmax_ge_LAC__wrt_astrocytes___Aubert := 0.076*_sf;
  Vmax_ne_LAC__wrt_neurons___Aubert := 0.29*_sf;
  PS_cap_astrocytes__wrt_capillaries___Aubert := 0.414*0.25*(astrocytes/capillary);
  PS_cap_neuron__wrt_capillaries___Aubert := _PScap*0.45*(neurons/capillary);
  f_CBF_dyn := 1 + delta_F*(1/(1 + exp(-4.59186*(time - (t_0 + t_1 - 3)))) - 1/(1 + exp(-4.59186*(time - (t_0 + t_1 + t_end + 3)))));
  stimulus := Initial_for_vn_1 + vn_2_tp*((time - t_0)/t_stim_tp)*exp(-(time - t_0)/t_stim_tp);
  parameter_9 := Initial_for_NADH_total_neurons - NADH_neurons/neurons;
  parameter_10 := ModelValue_7 - NADH_astrocytes/astrocytes;
  parameter_20 := Initial_for_PCr_total - PCr_neurons/neurons;
  parameter_21 := Initial_for_PCr_total - PCr_astrocytes/astrocytes;
  F_in := F_0*f_CBF_dyn;
  F_out := F_0*(((venous_balloon/Initial_for_venous_balloon)^(1/0.5) + (venous_balloon/Initial_for_venous_balloon)^(-1/2)*(tau_v/Initial_for_venous_balloon)*F_in)/(1 + F_0*(venous_balloon/Initial_for_venous_balloon)^(-1/2)*(tau_v/Initial_for_venous_balloon)));
  is_stimulated := piecewise(0, (time <= 200) || (time >= t_0 + t_end), 1);
  v_stim := is_stimulated*stimulus;

  // Rate rules:
  venous_balloon' = F_in - F_out;

  // Reactions:
  reaction_2: ATP_astrocytes + GLC_astrocytes => G6P_astrocytes + ADP_astrocytes; astrocytes*vHK__HS(reaction_2_k_HK, ATP_astrocytes/astrocytes, G6P_astrocytes/astrocytes, reaction_2_K_I_G6P); reaction_2 is "HK_astrocytes (R01786) (HeinrichSchuster)";  // isDescribedBy isbn:978-1-4612-8492-5; kegg.reaction:R01786
    reaction_2_k_HK = 0.01; reaction_2_K_I_G6P = 0.02;
  PFK_neurons_R04779_R01070_R01015: F6P_neurons + ATP_neurons => 2 GAP_neurons + ADP_neurons; neurons*vPFK(PFK_neurons_R04779_R01070_R01015_k_PFK, ATP_neurons/neurons, K_I_ATP, nH, F6P_neurons/neurons, PFK_neurons_R04779_R01070_R01015_K_m_F6P); PFK_neurons_R04779_R01070_R01015 is "PFK_neurons (R04779, R01070, R01015)";  // hasPart kegg.reaction:R01015; hasPart kegg.reaction:R04779; hasPart kegg.reaction:R01070
    PFK_neurons_R04779_R01070_R01015_k_PFK = 0.44; PFK_neurons_R04779_R01070_R01015_K_m_F6P = 0.18;
  reaction_6: F6P_astrocytes + ATP_astrocytes => 2 GAP_astrocytes + ADP_astrocytes; astrocytes*vPFK(reaction_6_k_PFK, ATP_astrocytes/astrocytes, K_I_ATP, nH, F6P_astrocytes/astrocytes, reaction_6_K_m_F6P); reaction_6 is "PFK_astrocytes (R04779, R01070, R01015)";  // hasPart kegg.reaction:R01070; hasPart kegg.reaction:R04779; hasPart kegg.reaction:R01015
    reaction_6_k_PFK = 0.2; reaction_6_K_m_F6P = 0.18;
  reaction_7: GAP_neurons + ADP_neurons + NAD_neurons => NADH_neurons + PEP_neurons + ATP_neurons; neurons*vPGK(reaction_7_k_PGK, GAP_neurons/neurons, ADP_neurons/neurons, NAD_neurons/neurons, NADH_neurons/neurons); reaction_7 is "PGK_neurons (R01061, R01512, R01518, R00658)";  // hasPart kegg.reaction:R01518; hasPart kegg.reaction:R00658; hasPart kegg.reaction:R01512; hasPart kegg.reaction:R01061
    reaction_7_k_PGK = 10;
  reaction_8: GAP_astrocytes + ADP_astrocytes + NAD_astrocytes => NADH_astrocytes + PEP_astrocytes + ATP_astrocytes; astrocytes*vPGK(reaction_8_k_PGK, GAP_astrocytes/astrocytes, ADP_astrocytes/astrocytes, NAD_astrocytes/astrocytes, NADH_astrocytes/astrocytes); reaction_8 is "PGK_astrocytes (R01061, R01512, R01518, R00658)";  // hasPart kegg.reaction:R01512; hasPart kegg.reaction:R01518; hasPart kegg.reaction:R00658; hasPart kegg.reaction:R01061
    reaction_8_k_PGK = 3;
  PK_neurons_R00200: PEP_neurons + ADP_neurons => ATP_neurons + PYR_neurons; neurons*vPK(PK_neurons_R00200_k_PK, PEP_neurons/neurons, ADP_neurons/neurons); PK_neurons_R00200 is "PK_neurons (R00200)";  // kegg.reaction:R00200
    PK_neurons_R00200_k_PK = 44;
  PK_astrocytes_R00200: PEP_astrocytes + ADP_astrocytes => ATP_astrocytes + PYR_astrocytes; astrocytes*vPK(PK_astrocytes_R00200_k_PK, PEP_astrocytes/astrocytes, ADP_astrocytes/astrocytes); PK_astrocytes_R00200 is "PK_astrocytes (R00200)";  // kegg.reaction:R00200
    PK_astrocytes_R00200_k_PK = 20;
  reaction_13: PYR_neurons + 3 O2_neurons + NADH_neurons + 15 ADP_neurons => 15 ATP_neurons + 3 CO2 + NAD_neurons; vMITO2__inkl__Volumes(reaction_13_v_max_mito, PYR_neurons/neurons, K_m_PYR, ADP_neurons/neurons, K_m_ADP, O2_neurons/neurons, K_m_O2, reaction_13_alpha, ATP_neurons/neurons, reaction_13_beta, neurons); reaction_13 is "mitochondrial_respiration_neurons (n.a.)";  // GO:0009060
    reaction_13_v_max_mito = 0.1; reaction_13_alpha = 5; reaction_13_beta = 20;
  reaction_14: PYR_astrocytes + 15 ADP_astrocytes + 3 O2_astrocytes + NADH_astrocytes => 15 ATP_astrocytes + 3 CO2 + NAD_astrocytes; vMITO2__inkl__Volumes(reaction_14_v_max_mito, PYR_astrocytes/astrocytes, K_m_PYR, ADP_astrocytes/astrocytes, K_m_ADP, O2_astrocytes/astrocytes, K_m_O2, reaction_14_alpha, ATP_astrocytes/astrocytes, reaction_14_beta, astrocytes); reaction_14 is "mitochondrial_respiration_astrocytes (n.a.)";  // GO:0009060
    reaction_14_v_max_mito = 0.01; reaction_14_alpha = 5; reaction_14_beta = 20;
  reaction_17: GLC_extracellular_space => GLC_neurons; facilitated_transport__inkl__Volume____scaled(Vmax_en_GLC__wrt_neurons___Aubert, _sf, GLC_extracellular_space/extracellular_space, K_T_GLC_en__Aubert, GLC_neurons/neurons, extracellular_space); reaction_17 is "GLC_exchange_extracellular_space_neurons (Aubert)";  // GO:0015758
  reaction_18: GLC_extracellular_space => GLC_astrocytes; facilitated_transport__inkl__Volume____scaled(Vmax_eg_GLC__wrt_astrocytes___Aubert_, _sf, GLC_extracellular_space/extracellular_space, K_T_GLC_eg__Aubert, GLC_astrocytes/astrocytes, extracellular_space); reaction_18 is "GLC_exchange_extracellular_space_astrocytes (Aubert)";  // GO:0015758
  GLC_exchange_capillary_ec_Aubert: GLC_capillary => GLC_extracellular_space; facilitated_transport__inkl__Volume____scaled(Vmax_ce_GLC__wrt_capillaries___Aubert, _sf, GLC_capillary/capillary, K_T_GLC_ce__Aubert, GLC_extracellular_space/extracellular_space, capillary); GLC_exchange_capillary_ec_Aubert is "GLC_exchange_capillary_ec (Aubert)";  // GO:0015758
  reaction_20: GLC_capillary => GLC_astrocytes; facilitated_transport__inkl__Volume____scaled(Vmax_cg_GLC__wrt_capillaries___Aubert, _sf, GLC_capillary/capillary, K_T_GLC_cg__Aubert, GLC_astrocytes/astrocytes, capillary); reaction_20 is "GLC_exchange_capillary_astrocytes (Aubert)";  // GO:0015758
  LAC_exchange_ec_capillary: LAC_extracellular_space => LAC_capillary; facilitated_transport__inkl__Volume(Vmax_ec_LAC__wrt_extracellular_space___Aubert, LAC_extracellular_space/extracellular_space, K_T_LAC_ec__Aubert, LAC_capillary/capillary, extracellular_space);  // GO:0015727
  LAC_exchange_neurons_ec: LAC_extracellular_space => LAC_neurons; facilitated_transport__inkl__Volume(Vmax_ne_LAC__wrt_neurons___Aubert, LAC_extracellular_space/extracellular_space, K_T_LAC_ne__Aubert, LAC_neurons/neurons, extracellular_space);  // GO:0015727
  LAC_exchange_astrocytes_ec: LAC_astrocytes => LAC_extracellular_space; facilitated_transport__inkl__Volume(Vmax_ge_LAC__wrt_astrocytes___Aubert, LAC_astrocytes/astrocytes, K_T_LAC_ge__Aubert, LAC_extracellular_space/extracellular_space, astrocytes);  // GO:0015727
  reaction_24: LAC_astrocytes => LAC_capillary; facilitated_transport__inkl__Volume(Vmax_gc_LAC__wrt_astrocytes___Aubert, LAC_astrocytes/astrocytes, K_T_LAC_gc__Aubert, LAC_capillary/capillary, astrocytes); reaction_24 is "LAC_exchange_astrocytes_capillary";  // GO:0015727
  // O2 exchange between capillary and neurons
  O2_exchange_capillary_neurons: O2_capillary => O2_neurons; O2_transport_function_inkl__volume(PS_cap_neuron__wrt_capillaries___Aubert, neurons, K_O2__Aubert, Hb_OP, O2_capillary/capillary, nh_O2__Aubert, O2_neurons/neurons, capillary);  // GO:0015671
  O2_exchange_capillary_astrocytes: O2_capillary => O2_astrocytes; O2_transport_function_inkl__volume(PScap, astrocytes, K_O2__Aubert, Hb_OP, O2_capillary/capillary, nh_O2__Aubert, O2_astrocytes/astrocytes, capillary);  // GO:0015671
    PScap = 10;
  Blood_flow_contribution_to_capillary_O2: $O2_artery => O2_capillary; Blood_flow_contribution_inkl__volume(F_in, capillary, artery, O2_artery/artery, O2_capillary/capillary); Blood_flow_contribution_to_capillary_O2 is "O2_exchange_artery_capillary";  // GO:0015671
  Blood_flow_contribution_to_capillary_GLC: $GLC_artery => GLC_capillary; Blood_flow_contribution_inkl__volume(F_in, capillary, artery, GLC_artery/artery, GLC_capillary/capillary); Blood_flow_contribution_to_capillary_GLC is "GLC_exchange_artery_capillary";  // GO:0015758
  Blood_flow_contribution_to_capillary_LAC: LAC_capillary => $LAC_artery; Blood_flow_contribution_inkl__volume(F_in, capillary, capillary, LAC_capillary/capillary, LAC_artery/artery); Blood_flow_contribution_to_capillary_LAC is "LAC_exchange_capillary_artery";  // GO:0015727
  Flow_of_CO2_between_capillary_and_vessel__artery_: CO2 => $CO2_artery; Blood_flow_contribution_inkl__volume(F_in, capillary, capillary, CO2/capillary, CO2_artery/artery); Flow_of_CO2_between_capillary_and_vessel__artery_ is "CO2_exchange_capillary_artery";  // GO:0006810
  vPUMP_neurons: ATP_neurons + 3 Na__neurons => ADP_neurons; neurons*vPUMP_volume_dependent(Sm_n, neurons, k_pump, ATP_neurons/neurons, Na__neurons/neurons, K_m_Na_pump); vPUMP_neurons is "Na+_exchange_neurons_extracellular_space (n.a.)";  // GO:0036376
  vPUMP_astrocytes: ATP_astrocytes + 3 Na__astrocytes => ADP_astrocytes; astrocytes*vPUMP_volume_dependent(Sm_g, astrocytes, k_pump, ATP_astrocytes/astrocytes, Na__astrocytes/astrocytes, K_m_Na_pump); vPUMP_astrocytes is "Na+_exchange_astrocytes_extracellular_space (n.a.)";  // GO:0036376
  vLEAK_Na_neurons: $Na__extracellular_space => Na__neurons; vLEAK_Na_inkl__Volume(Sm_n, g_Na_neurons, neurons, F, RT, Na__extracellular_space/extracellular_space, Na__neurons/neurons, Vm, neurons); vLEAK_Na_neurons is "LEAK_Na_neurons (n.a.)";  // GO:1990118
  vLEAK_Na_astrocytes: $Na__extracellular_space => Na__astrocytes; vLEAK_Na_inkl__Volume(Sm_g, gNA, astrocytes, F, RT, Na__extracellular_space/extracellular_space, Na__astrocytes/astrocytes, Vm, astrocytes); vLEAK_Na_astrocytes is "LEAK_Na_astrocytes (n.a)";  // GO:1990118
    gNA = 0.0039;
  vSTIM: $Na__extracellular_space => Na__neurons; vStim__with_volume(v_stim, neurons); vSTIM is "Na+_exchange_extracellular_space_neurons (stimulation)";  // GO:1990118
  // Glutamate release by neurons to extracellular space
  vGLU_ne: GLU_neurons => GLU_extracellular_space; vGLU_ne__inkl__Volume(v_stim, R_Na_GLU, GLU_neurons/neurons, K_m_GLU, neurons); vGLU_ne is "GLU_exchange_neurons_extracellular_space";  // GO:0015813
  vGLU_eg: GLU_extracellular_space => GLU_astrocytes + Na__astrocytes; vGLU_eg__inkl__Volumes(Vmax_eg_GLU__wrt_extracellular_space, GLU_extracellular_space/extracellular_space, K_m_GLU, extracellular_space); vGLU_eg is "GLU_exchange_extracellular_space_astrocytes";  // GO:0015813
  vGLU_gn: GLU_astrocytes + ATP_astrocytes => GLU_neurons + ADP_astrocytes; vGLU_gn__inkl__Volume(V_gn_max_GLU, GLU_astrocytes/astrocytes, K_m_GLU, ATP_astrocytes/astrocytes, K_m_ATP, astrocytes); vGLU_gn is "GLU_exchange_astrocytes_neurons";  // GO:0015813
  inflow_of_dHb: => dHb; capillary*vdHb_in(F_in, O2_artery/artery, O2_capillary/capillary);  // modifiers: O2_artery, O2_capillary
  outflow_of_dHb: dHb => ; capillary*vdHb_out(F_out, dHb/capillary, venous_balloon);
  ATPase_neurons: ATP_neurons => ADP_neurons; neurons*vATPase(ATPase_neurons_VmaxATPase, ATP_neurons/neurons, K_m_ATP_ATPase); ATPase_neurons is "ATPase_neurons (n.a.)";
    ATPase_neurons_VmaxATPase = 0.07;
  ATPase_astrocytes: ATP_astrocytes => ADP_astrocytes; astrocytes*vATPase(ATPase_astrocytes_VmaxATPase, ATP_astrocytes/astrocytes, K_m_ATP_ATPase); ATPase_astrocytes is "ATPase_astrocytes (n.a.)";
    ATPase_astrocytes_VmaxATPase = 0.035;
  AK_neurons: 2 ADP_neurons -> ATP_neurons + AMP_neurons; neurons*(AK_neurons_k1*(ADP_neurons/neurons)^2 - AK_neurons_k2*(ATP_neurons/neurons)*(AMP_neurons/neurons)); AK_neurons is "AK_neurons (R00127)";  // kegg.reaction:R00127
    AK_neurons_k1 = 1000; AK_neurons_k2 = 920;
  AK_astrocytes: 2 ADP_astrocytes -> ATP_astrocytes + AMP_astrocytes; astrocytes*(AK_astrocytes_k1*(ADP_astrocytes/astrocytes)^2 - AK_astrocytes_k2*(ATP_astrocytes/astrocytes)*(AMP_astrocytes/astrocytes)); AK_astrocytes is "AK_astrocytes (R00127)";  // kegg.reaction:R00127
    AK_astrocytes_k1 = 1000; AK_astrocytes_k2 = 920;
  CK_astrocytes_forward__R01881: ADP_astrocytes + PCr_astrocytes -> ATP_astrocytes + Cr_astrocytes; astrocytes*(CK_astrocytes_forward__R01881_k1*(ADP_astrocytes/astrocytes)*(PCr_astrocytes/astrocytes) - CK_astrocytes_forward__R01881_k2*(ATP_astrocytes/astrocytes)*(Cr_astrocytes/astrocytes)); CK_astrocytes_forward__R01881 is "CK_astrocytes (R01881)";  // kegg.reaction:R01881
    CK_astrocytes_forward__R01881_k1 = 0.5; CK_astrocytes_forward__R01881_k2 = 0.01;
  CK_neurons_forward__R01881: PCr_neurons + ADP_neurons -> ATP_neurons + Cr_neurons; neurons*(CK_neurons_forward__R01881_k1*(PCr_neurons/neurons)*(ADP_neurons/neurons) - CK_neurons_forward__R01881_k2*(ATP_neurons/neurons)*(Cr_neurons/neurons)); CK_neurons_forward__R01881 is "CK_neurons (R01881)";  // kegg.reaction:R01881
    CK_neurons_forward__R01881_k1 = 0.5; CK_neurons_forward__R01881_k2 = 0.01;
  LDH_astrocytes_forward__R00703: PYR_astrocytes + NADH_astrocytes -> LAC_astrocytes + NAD_astrocytes; astrocytes*(LDH_astrocytes_forward__R00703_k1*(PYR_astrocytes/astrocytes)*(NADH_astrocytes/astrocytes) - LDH_astrocytes_forward__R00703_k2*(LAC_astrocytes/astrocytes)*(NAD_astrocytes/astrocytes)); LDH_astrocytes_forward__R00703 is "LDH_astrocytes (R00703)";  // kegg.reaction:R00703
    LDH_astrocytes_forward__R00703_k1 = 780; LDH_astrocytes_forward__R00703_k2 = 32;
  LDH_neurons_forward__R00703: PYR_neurons + NADH_neurons -> LAC_neurons + NAD_neurons; neurons*(LDH_neurons_forward__R00703_k1*(PYR_neurons/neurons)*(NADH_neurons/neurons) - LDH_neurons_forward__R00703_k2*(LAC_neurons/neurons)*(NAD_neurons/neurons)); LDH_neurons_forward__R00703 is "LDH_neurons (R00703)";  // kegg.reaction:R00703
    LDH_neurons_forward__R00703_k1 = 2000; LDH_neurons_forward__R00703_k2 = 15;
  ZWF_astrocytes__R02736: G6P_astrocytes + NADP_astrocytes => G6L_astrocytes + NADPH_astrocytes; astrocytes*modular_rate_law_for_two_substrates__two_products(ZWF_astrocytes__R02736_Vmax, ZWF_astrocytes__R02736_K_S1, ZWF_astrocytes__R02736_K_S2, G6P_astrocytes/astrocytes, NADP_astrocytes/astrocytes, G6L_astrocytes/astrocytes, NADPH_astrocytes/astrocytes, ZWF_astrocytes__R02736_Keq, ZWF_astrocytes__R02736_K_P1, ZWF_astrocytes__R02736_K_P2); ZWF_astrocytes__R02736 is "ZWF_astrocytes (R02736)";  // kegg.reaction:R02736
    ZWF_astrocytes__R02736_Vmax = 0.29057; ZWF_astrocytes__R02736_K_S1 = 6.91392e-5; ZWF_astrocytes__R02736_K_S2 = 1.31616e-5; ZWF_astrocytes__R02736_Keq = 2.29064e4; ZWF_astrocytes__R02736_K_P1 = 0.0180932; ZWF_astrocytes__R02736_K_P2 = 0.00050314;
  ZWF_neurons__R02736: G6P_neurons + NADP_neurons => G6L_neurons + NADPH_neurons; neurons*modular_rate_law_for_two_substrates__two_products(ZWF_neurons__R02736_Vmax, ZWF_neurons__R02736_K_S1, ZWF_neurons__R02736_K_S2, G6P_neurons/neurons, NADP_neurons/neurons, G6L_neurons/neurons, NADPH_neurons/neurons, ZWF_neurons__R02736_Keq, ZWF_neurons__R02736_K_P1, ZWF_neurons__R02736_K_P2); ZWF_neurons__R02736 is "ZWF_neurons (R02736)";  // kegg.reaction:R02736
    ZWF_neurons__R02736_Vmax = 0.586458; ZWF_neurons__R02736_K_S1 = 6.91392e-5; ZWF_neurons__R02736_K_S2 = 1.31616e-5; ZWF_neurons__R02736_Keq = 2.29064e4; ZWF_neurons__R02736_K_P1 = 0.0180932; ZWF_neurons__R02736_K_P2 = 0.00050314;
  SOL_neurons__R02035: G6L_neurons => P6G_neurons; neurons*modular_rate_law_for_one_substrate__one_product(SOL_neurons__R02035_Vmax, SOL_neurons__R02035_K_S1, G6L_neurons/neurons, P6G_neurons/neurons, SOL_neurons__R02035_Keq, SOL_neurons__R02035_K_P1); SOL_neurons__R02035 is "SOL_neurons (R02035)";  // kegg.reaction:R02035
    SOL_neurons__R02035_Vmax = 0.372782; SOL_neurons__R02035_K_S1 = 0.0180932; SOL_neurons__R02035_Keq = 531174; SOL_neurons__R02035_K_P1 = 2.28618;
  SOL_astrocytes__R02035: G6L_astrocytes => P6G_astrocytes; astrocytes*modular_rate_law_for_one_substrate__one_product(SOL_astrocytes__R02035_Vmax, SOL_astrocytes__R02035_K_S1, G6L_astrocytes/astrocytes, P6G_astrocytes/astrocytes, SOL_astrocytes__R02035_Keq, SOL_astrocytes__R02035_K_P1); SOL_astrocytes__R02035 is "SOL_astrocytes (R02035)";  // kegg.reaction:R02035
    SOL_astrocytes__R02035_Vmax = 0.184701; SOL_astrocytes__R02035_K_S1 = 0.0180932; SOL_astrocytes__R02035_Keq = 531174; SOL_astrocytes__R02035_K_P1 = 2.28618;
  GND_neurons___R01528: P6G_neurons + NADP_neurons -> Ru5P_neurons + NADPH_neurons; neurons*modular_rate_law_for_two_substrates__two_products(GND_neurons___R01528_Vmax, GND_neurons___R01528_K_S1, GND_neurons___R01528_K_S2, P6G_neurons/neurons, NADP_neurons/neurons, Ru5P_neurons/neurons, NADPH_neurons/neurons, GND_neurons___R01528_Keq, GND_neurons___R01528_K_P1, GND_neurons___R01528_K_P2); GND_neurons___R01528 is "GND_neurons (R01528)";  // kegg.reaction:R01528
    GND_neurons___R01528_Vmax = 2.65764; GND_neurons___R01528_K_S1 = 3.23421e-5; GND_neurons___R01528_K_S2 = 3.11043e-6; GND_neurons___R01528_Keq = 40852000; GND_neurons___R01528_K_P1 = 0.0537179; GND_neurons___R01528_K_P2 = 0.00050314;
  GND_astrocytes__R01528: P6G_astrocytes + NADP_astrocytes => Ru5P_astrocytes + NADPH_astrocytes; astrocytes*modular_rate_law_for_two_substrates__two_products(GND_astrocytes__R01528_Vmax, GND_astrocytes__R01528_K_S1, GND_astrocytes__R01528_K_S2, P6G_astrocytes/astrocytes, NADP_astrocytes/astrocytes, Ru5P_astrocytes/astrocytes, NADPH_astrocytes/astrocytes, GND_astrocytes__R01528_Keq, GND_astrocytes__R01528_K_P1, GND_astrocytes__R01528_K_P2); GND_astrocytes__R01528 is "GND_astrocytes (R01528)";  // kegg.reaction:R01528
    GND_astrocytes__R01528_Vmax = 1.31677; GND_astrocytes__R01528_K_S1 = 3.23421e-5; GND_astrocytes__R01528_K_S2 = 3.11043e-6; GND_astrocytes__R01528_Keq = 40852000; GND_astrocytes__R01528_K_P1 = 0.00050314; GND_astrocytes__R01528_K_P2 = 0.0537179;
  RPE_neurons__R01529: Ru5P_neurons -> X5P_neurons; neurons*modular_rate_law_for_one_substrate__one_product(RPE_neurons__R01529_Vmax, RPE_neurons__R01529_K_S1, Ru5P_neurons/neurons, X5P_neurons/neurons, RPE_neurons__R01529_Keq, RPE_neurons__R01529_K_P1); RPE_neurons__R01529 is "RPE_neurons (R01529)";  // kegg.reaction:R01528
    RPE_neurons__R01529_Vmax = 0.0156605; RPE_neurons__R01529_K_S1 = 0.0537179; RPE_neurons__R01529_Keq = 39.2574; RPE_neurons__R01529_K_P1 = 0.603002;
  RPE_astrocytes__R01529: Ru5P_astrocytes -> X5P_astrocytes; astrocytes*modular_rate_law_for_one_substrate__one_product(RPE_astrocytes__R01529_Vmax, RPE_astrocytes__R01529_K_S1, Ru5P_astrocytes/astrocytes, X5P_astrocytes/astrocytes, RPE_astrocytes__R01529_Keq, RPE_astrocytes__R01529_K_P1); RPE_astrocytes__R01529 is "RPE_astrocytes (R01529)";  // kegg.reaction:R01528
    RPE_astrocytes__R01529_Vmax = 0.00775925; RPE_astrocytes__R01529_K_S1 = 0.0537179; RPE_astrocytes__R01529_Keq = 39.2574; RPE_astrocytes__R01529_K_P1 = 0.603002;
  RKI_astrocytes__R01056: Ru5P_astrocytes -> R5P_astrocytes; astrocytes*modular_rate_law_for_one_substrate__one_product(RKI_astrocytes__R01056_Vmax, RKI_astrocytes__R01056_K_S1, Ru5P_astrocytes/astrocytes, R5P_astrocytes/astrocytes, RKI_astrocytes__R01056_Keq, RKI_astrocytes__R01056_K_P1); RKI_astrocytes__R01056 is "RKI_astrocytes (R01056)";  // kegg.reaction:R01056
    RKI_astrocytes__R01056_Vmax = 0.000821984; RKI_astrocytes__R01056_K_S1 = 0.0537179; RKI_astrocytes__R01056_Keq = 35.4534; RKI_astrocytes__R01056_K_P1 = 0.778461;
  RKI_neurons__R01056: Ru5P_neurons -> R5P_neurons; neurons*modular_rate_law_for_one_substrate__one_product(RKI_neurons__R01056_Vmax, RKI_neurons__R01056_K_S1, Ru5P_neurons/neurons, R5P_neurons/neurons, RKI_neurons__R01056_Keq, RKI_neurons__R01056_K_P1); RKI_neurons__R01056 is "RKI_neurons (R01056)";  // kegg.reaction:R01056
    RKI_neurons__R01056_Vmax = 0.00165901; RKI_neurons__R01056_K_S1 = 0.0537179; RKI_neurons__R01056_Keq = 35.4534; RKI_neurons__R01056_K_P1 = 0.778461;
  TKL_1_astrocytes__R01641: X5P_astrocytes + R5P_astrocytes => GAP_astrocytes + S7P_astrocytes; astrocytes*modular_rate_law_for_two_substrates__two_products(TKL_1_astrocytes__R01641_Vmax, TKL_1_astrocytes__R01641_K_S1, TKL_1_astrocytes__R01641_K_S2, X5P_astrocytes/astrocytes, R5P_astrocytes/astrocytes, GAP_astrocytes/astrocytes, S7P_astrocytes/astrocytes, TKL_1_astrocytes__R01641_Keq, TKL_1_astrocytes__R01641_K_P1, TKL_1_astrocytes__R01641_K_P2); TKL_1_astrocytes__R01641 is "TKL-1_astrocytes (R01641)";  // kegg.reaction:R01641
    TKL_1_astrocytes__R01641_Vmax = 0.000244278; TKL_1_astrocytes__R01641_K_S1 = 0.000173625; TKL_1_astrocytes__R01641_K_S2 = 0.000585387; TKL_1_astrocytes__R01641_Keq = 1652870; TKL_1_astrocytes__R01641_K_P1 = 0.168333; TKL_1_astrocytes__R01641_K_P2 = 0.192807;
  TKL_1_neurons__R01641: X5P_neurons + R5P_neurons => GAP_neurons + S7P_neurons; neurons*modular_rate_law_for_two_substrates__two_products(TKL_1_neurons__R01641_Vmax, TKL_1_neurons__R01641_K_S1, TKL_1_neurons__R01641_K_S2, X5P_neurons/neurons, R5P_neurons/neurons, GAP_neurons/neurons, S7P_neurons/neurons, TKL_1_neurons__R01641_Keq, TKL_1_neurons__R01641_K_P1, TKL_1_neurons__R01641_K_P2); TKL_1_neurons__R01641 is "TKL-1_neurons (R01641)";  // kegg.reaction:R01641
    TKL_1_neurons__R01641_Vmax = 0.000493027; TKL_1_neurons__R01641_K_S1 = 0.000173625; TKL_1_neurons__R01641_K_S2 = 0.000585387; TKL_1_neurons__R01641_Keq = 1652870; TKL_1_neurons__R01641_K_P1 = 0.168333; TKL_1_neurons__R01641_K_P2 = 0.192807;
  TAL_astrocytes__R01827: GAP_astrocytes + S7P_astrocytes -> F6P_astrocytes + E4P_astrocytes; astrocytes*modular_rate_law_for_two_substrates__two_products(TAL_astrocytes__R01827_Vmax, TAL_astrocytes__R01827_K_S1, TAL_astrocytes__R01827_K_S2, GAP_astrocytes/astrocytes, S7P_astrocytes/astrocytes, F6P_astrocytes/astrocytes, E4P_astrocytes/astrocytes, TAL_astrocytes__R01827_Keq, TAL_astrocytes__R01827_K_P1, TAL_astrocytes__R01827_K_P2); TAL_astrocytes__R01827 is "TAL_astrocytes (R01827)";  // kegg.reaction:R01827
    TAL_astrocytes__R01827_Vmax = 0.0080394; TAL_astrocytes__R01827_K_S1 = 0.168333; TAL_astrocytes__R01827_K_S2 = 0.192807; TAL_astrocytes__R01827_Keq = 0.323922; TAL_astrocytes__R01827_K_P1 = 0.0799745; TAL_astrocytes__R01827_K_P2 = 0.109681;
  TAL_neurons__R01827: GAP_neurons + S7P_neurons -> F6P_neurons + E4P_neurons; neurons*modular_rate_law_for_two_substrates__two_products(TAL_neurons__R01827_Vmax, TAL_neurons__R01827_K_S1, TAL_neurons__R01827_K_S2, GAP_neurons/neurons, S7P_neurons/neurons, F6P_neurons/neurons, E4P_neurons/neurons, TAL_neurons__R01827_Keq, TAL_neurons__R01827_K_P1, TAL_neurons__R01827_K_P2); TAL_neurons__R01827 is "TAL_neurons (R01827)";  // kegg.reaction:R01827
    TAL_neurons__R01827_Vmax = 0.0162259; TAL_neurons__R01827_K_S1 = 0.168333; TAL_neurons__R01827_K_S2 = 0.192807; TAL_neurons__R01827_Keq = 0.323922; TAL_neurons__R01827_K_P1 = 0.0799745; TAL_neurons__R01827_K_P2 = 0.109681;
  TKL_2_astrocytes__R01830: F6P_astrocytes + GAP_astrocytes => X5P_astrocytes + E4P_astrocytes; astrocytes*modular_rate_law_for_two_substrates__two_products(TKL_2_astrocytes__R01830_Vmax, TKL_2_astrocytes__R01830_K_S1, TKL_2_astrocytes__R01830_K_S2, F6P_astrocytes/astrocytes, GAP_astrocytes/astrocytes, X5P_astrocytes/astrocytes, E4P_astrocytes/astrocytes, TKL_2_astrocytes__R01830_Keq, TKL_2_astrocytes__R01830_K_P1, TKL_2_astrocytes__R01830_K_P2); TKL_2_astrocytes__R01830 is "TKL-2_astrocytes (R01830)";  // kegg.reaction:R01830
    TKL_2_astrocytes__R01830_Vmax = 0.000137124; TKL_2_astrocytes__R01830_K_S1 = 0.0799745; TKL_2_astrocytes__R01830_K_S2 = 0.168333; TKL_2_astrocytes__R01830_Keq = 0.0777764; TKL_2_astrocytes__R01830_K_P1 = 0.603002; TKL_2_astrocytes__R01830_K_P2 = 0.109681;
  TKL_2_neurons__R01830: F6P_neurons + GAP_neurons => X5P_neurons + E4P_neurons; neurons*modular_rate_law_for_two_substrates__two_products(TKL_2_neurons__R01830_Vmax, TKL_2_neurons__R01830_K_S1, TKL_2_neurons__R01830_K_S2, F6P_neurons/neurons, GAP_neurons/neurons, X5P_neurons/neurons, E4P_neurons/neurons, TKL_2_neurons__R01830_Keq, TKL_2_neurons__R01830_K_P1, TKL_2_neurons__R01830_K_P2); TKL_2_neurons__R01830 is "TKL-2_neurons (R01830)";  // kegg.reaction:R01830
    TKL_2_neurons__R01830_Vmax = 0.000276758; TKL_2_neurons__R01830_K_S1 = 0.0799745; TKL_2_neurons__R01830_K_S2 = 0.168333; TKL_2_neurons__R01830_Keq = 0.0777764; TKL_2_neurons__R01830_K_P1 = 0.603002; TKL_2_neurons__R01830_K_P2 = 0.109681;
  NADPH_oxidase_neurons__R07172: NADPH_neurons => NADP_neurons; NADPH_oxidase_neurons__R07172_k1*NADPH_neurons; NADPH_oxidase_neurons__R07172 is "NADPH oxidase neurons (R07172)";
    NADPH_oxidase_neurons__R07172_k1 = 0.000423283;
  NADPH_oxidase_astrocytes__R07172: NADPH_astrocytes => NADP_astrocytes; NADPH_oxidase_astrocytes__R07172_k1*NADPH_astrocytes; NADPH_oxidase_astrocytes__R07172 is "NADPH oxidase astrocytes (R07172)";
    NADPH_oxidase_astrocytes__R07172_k1 = 0.000209722;
  R5P_sink_astrocytes__n_a_: R5P_astrocytes => ; NULL*R5P_astrocytes; R5P_sink_astrocytes__n_a_ is "R5P sink_astrocytes (n.a.)";
  R5P_sink_neurons__n_a_: R5P_neurons => ; R5P_sink_neurons__n_a__k1*R5P_neurons; R5P_sink_neurons__n_a_ is "R5P sink_neurons (n.a.)";
    R5P_sink_neurons__n_a__k1 = 0;
  PGI_astrocytes__R02740___HS: G6P_astrocytes -> F6P_astrocytes; astrocytes*(PGI_astrocytes__R02740___HS_k1*(G6P_astrocytes/astrocytes) - PGI_astrocytes__R02740___HS_k2*(F6P_astrocytes/astrocytes)); PGI_astrocytes__R02740___HS is "PGI_astrocytes (R02740) (HS)";  // kegg.reaction:R02740
    PGI_astrocytes__R02740___HS_k1 = 931.69; PGI_astrocytes__R02740___HS_k2 = 2273.32;
  HK_neurons__R01786___HeinrichSchuster: ATP_neurons + GLC_neurons => G6P_neurons + ADP_neurons; neurons*vHK__HS(HK_neurons__R01786___HeinrichSchuster_k_HK, ATP_neurons/neurons, G6P_neurons/neurons, HK_neurons__R01786___HeinrichSchuster_K_I_G6P); HK_neurons__R01786___HeinrichSchuster is "HK_neurons (R01786) (HeinrichSchuster)";  // kegg.reaction:R01786; isDescribedBy isbn:978-1-4612-8492-5
    HK_neurons__R01786___HeinrichSchuster_k_HK = 0.022; HK_neurons__R01786___HeinrichSchuster_K_I_G6P = 0.02;
  PGI_neurons__R02740___HS: G6P_neurons -> F6P_neurons; neurons*(PGI_neurons__R02740___HS_k1*(G6P_neurons/neurons) - PGI_neurons__R02740___HS_k2*(F6P_neurons/neurons)); PGI_neurons__R02740___HS is "PGI_neurons (R02740) (HS)";  // kegg.reaction:R02740
    PGI_neurons__R02740___HS_k1 = 931.69; PGI_neurons__R02740___HS_k2 = 2273.32;

  // Unit definitions:
  unit volume = 1e-3 litre;
  unit substance = 1e-3 mole;
end
