// SBML level 3 version 1

model MODEL1610220001()
  // Bush2016 - Extended Carrousel model of GPCR-RGS
  // This model is described in the article:
  // Yeast GPCR signaling reflects the fraction of occupied receptors, not the number.
  // Bush A, Vasen G, Constantinou A, Dunayevich P, Patop IL, Blaustein M, Colman-Lerner A.
  // Mol. Syst. Biol. 2016 Dec; 12(12): 898
  // Abstract:
  // According to receptor theory, the effect of a ligand depends on the amount of agonist-receptor complex. Therefore, changes in receptor abundance should have quantitative effects. However, the response to pheromone in Saccharomyces cerevisiae is robust (unaltered) to increases or reductions in the abundance of the G-protein-coupled receptor (GPCR), Ste2, responding instead to the fraction of occupied receptor. We found experimentally that this robustness originates during G-protein activation. We developed a complete mathematical model of this step, which suggested the ability to compute fractional occupancy depends on the physical interaction between the inhibitory regulator of G-protein signaling (RGS), Sst2, and the receptor. Accordingly, replacing Sst2 by the heterologous hsRGS4, incapable of interacting with the receptor, abolished robustness. Conversely, forcing hsRGS4:Ste2 interaction restored robustness. Taken together with other results of our work, we conclude that this GPCR pathway computes fractional occupancy because ligand-bound GPCR-RGS complexes stimulate signaling while unoccupied complexes actively inhibit it. In eukaryotes, many RGSs bind to specific GPCRs, suggesting these complexes with opposing activities also detect fraction occupancy by a ratiometric measurement. Such complexes operate as push-pull devices, which we have recently described.
  // This model is hosted on BioModels Databaseand identified by: BIOMD0000000638.
  // To cite BioModels Database, please use: BioModels Database: An enhanced, curated and annotated resource for published quantitative kinetic models.
  // To the extent possible under law, all copyright and related or neighbouring rights to this encoded model have been dedicated to the public domain worldwide. Please refer to CC0 Public Domain Dedicationfor more information.
  // biomodels.db:MODEL1610220001
  // biomodels.db:BIOMD0000000638
  // isDescribedBy pubmed:28034910
  // hasProperty GO:0000772 GO:0001664 mamo:MAMO_0000003
  // hasTaxon taxonomy:4932
  // model units - substance: substance, time: time, volume: volume, area: area, length: length, extent: substance

  // Compartments:
  // Plasma membrane volume. Defined as the volume contained in h=50nm spanning the membrane, in a spherical cell of Rc=2.5um of radius.
  // V_PM=4*pi*h*Rc^2=3.92 fl
  compartment PM = 3.92 volume;  // hasProperty FMA:63841
  // Cytoplasmic volume accessible to the RGS. Estimated from soft X-ray tomography data from Uchida et al 2011.
  compartment cyt = 36.4 volume;  // hasProperty FMA:66835

  // Species:
  // Free, unoccupied receptor, uncoupled from G protein
  species R in PM = Rtot/PM;  // isVersionOf uniprot:P0CI39
  // Ligand bound receptor, uncoupled from G protein
  species LR in PM = 0;  // hasPart uniprot:P0CI39 uniprot:P01149
  // Heterotrimeric G protein, uncoupled from receptor
  species G in PM = Gtot/PM;  // hasProperty uniprot:P18851 uniprot:P18852
  // free GalphaGTP
  species Gt in PM = 0;  // hasPart CHEBI:17552 uniprot:P18851 uniprot:P18852
  // free GalphaGDP
  species Gd in PM = 0;  // hasPart CHEBI:17552 uniprot:P18852
  // unoccupied receptor - heterotirmeric G protein complex
  species RG in PM = 0;  // hasPart uniprot:P0CI39 uniprot:P18851 uniprot:P18852
  // free G_beta_gamma heterodimer
  species Gbg in PM = 0;  // hasPart uniprot:P18851 uniprot:P18852
  // Ligand bound receptor, coupled to heterotrimeric G protein
  species LRG in PM = 0;  // hasPart uniprot:P18851 uniprot:P18852 uniprot:P0CI39 uniprot:P01149
  // Ligand bound receptor, coupled to GalphaGTP
  species LRGt in PM = 0;  // hasPart CHEBI:15996 uniprot:P0CI39 uniprot:P01149
  // unoccupied receptor - GalphaGDP complex
  species RGd in PM = 0;  // hasPart CHEBI:17552 uniprot:P0CI39 uniprot:P18852
  // unoccupied receptor - GalphaGTP complex
  species RGt in PM = 0;  // hasPart CHEBI:17552 uniprot:P0CI39 uniprot:P18852
  // Ligand bound receptor, coupled to GalphaGDP
  species LRGd in PM = 0;  // hasPart CHEBI:17552 uniprot:P0CI39 uniprot:P01149 uniprot:P18852
  // Ligand bound receptor, uncoupled from G protein, coupled to RGS.
  species LRrgs in PM = 0;  // hasPart uniprot:P0CI39 uniprot:P01149
  // Ligand bound receptor, coupled to heterotrimeric G protein, coupled to RGS.
  species LRrgsG in PM = 0;  // hasPart uniprot:P0CI39 uniprot:P01149
  // Ligand bound receptor, coupled to GalphaGDP, coupled to RGS.
  species LRrgsGd in PM = 0;  // hasPart uniprot:P0CI39 uniprot:P01149
  // Ligand bound receptor, coupled to GalphaGTP, coupled to RGS.
  species LRrgsGt in PM = 0;  // hasPart CHEBI:15996 uniprot:P0CI39 uniprot:P01149 uniprot:P18852
  // Free, unoccupied receptor, uncoupled from G protein, coupled to RGS.
  species Rrgs in PM = 0;  // hasPart uniprot:P0CI39
  // unoccupied receptor - heterotirmeric G protein complex. The receptor is coupled to the RGS.
  species RrgsG in PM = 0;  // hasPart uniprot:P0CI39 uniprot:P18851 uniprot:P18852
  // unoccupied receptor - GalphaGDP complex. The receptor is coupled to the RGS.
  species RrgsGd in PM = 0;  // hasPart CHEBI:17552 uniprot:P0CI39 uniprot:P18852
  // unoccupied receptor - GalphaGTP complex. The receptor is coupled to the RGS.
  species RrgsGt in PM = 0;  // hasPart uniprot:P0CI39 uniprot:P01149 uniprot:P18852
  species rgs in cyt = rgs_tot/cyt;

  // Parameters:
  // Extracelular ligand (alpha-factor) concentrarion in nM.
  L = 0;
  // Kd of alpha-factor with Ste2, expressed in nM.
  // Average of the values in the follwing publications. PMID 15491163, PMID 2839507, PMID 3023832, PMID 9819407, PMID 9182592, PMID 10866688, PMID 8524302, PMID 11495900, PMID 8385135
  K_d_L_R = 5.6; K_d_L_R is "K_d_L·R";  // isDerivedFrom pubmed:11495900+ pubmed:9182592 pubmed:10866688 pubmed:8692892
  // Adimensional parameter used to code the micro-reversibility restrictions.
  // lambda=K_d_L.RG/K_d_L.R
  lambda = 1;
  // Adimensional parameter used to code the micro-reversibility restrictions.
  // lambda_t=K_d_L.RGt/K_d_L.R
  lambda_t = 1;
  // Adimensional parameter used to code the micro-reversibility restrictions.
  // lambda_d=K_d_L.RGd/K_d_L.R
  lambda_d = 1;
  // Dissociation constant (Kd) between Galpha and Ste2, expressed in nM. Geometrical average of values reported in Alves et al. 2005 for transducin (Gt) and rhodopsin, and values reported in Alves et al.
  // 2003 for the human delta-opioid receptor and Galpha_0, Galpha_i1, Galpha_i2, Galpha_i3.
  K_d_R_G = 36; K_d_R_G is "K_d_R·G";  // isDerivedFrom pubmed:15501933
  // Ratio of Kds of receptor binding to GαGTP over heterotrimeric G protein.
  // Assumed to be 1 by symmetry assumptions.
  // Adimensional parameter used to code the micro-reversibility restrictions.
  // eta=K_d_R.Gt/K_d_R.G
  eta = 1;
  // Adimensional parameter used to code the micro-reversibility restrictions.
  // rho=K_d_R.Gd/K_d_R.G
  rho = 1;
  // Hydrolysis rate of GTP in GaGTP uncoupled from receptor.
  // Average of rates reported in Yi et al. 2003 and Apanovitch en el. 1998.
  k_Hf_Gt = 0.002;  // isDerivedFrom pubmed:9537998
  // Nucleotide exchange reaction rate for heterotrimeric G protein coupled to unoccupied receptor.
  // Set to k_Ef_RGd by symmetry assumption.
  k_Ef_RG = 0.00062;
  // Nucleotide exchange reaction rate for heterotrimeric G protein coupled to ligand-occupied receptor.
  // from Biddlecome et al. 1996 and Mukhopadhyay and Ross 1999 (PMID 8626481, PMID 10449728)
  k_Ef_LRG = 1.5;  // isDerivedFrom pubmed:8626481
  // Hydrolysis rate of GTP in GaGTP coupled to unoccupied receptor
  // Rates reported in Yi et al. 2003 for Sst2 (GAP) stimulated hydrolysis of GTP in Gpa1.
  // (Note that Sst2 interacts with Ste2, see main text).
  k_Hf_RGt = 0.002;  // isDerivedFrom pubchem.substance:12960402
  // total amount of receptor molecules
  Rtot = 3308;  // isDerivedFrom pubmed:22114196
  // total amount of heterotrimeric G protein
  Gtot = 2042;  // isDerivedFrom pubmed:22114196
  // on-rate between ligand and uncoupled receptor.
  // Value calculated from the correspondent dissociacion constant (K_d), off-rate (k_off), the extracelular ligand concentration [L] and adimensional parameters denoted by greek letters, used to code the
  // micro-reversibility restrictions.
  var k_on_L_R; k_on_L_R is "k_on_L·R";
  // off-rate between the ligand (alpha-factor mating pheromone) and uncoupled receptor (Ste2). Set to k_off_L.R=0.001 s-1.
  // Reference: Bajaj et al., 2004a; Jenness et al., 1983 (PMID 6360378, PMID 15491163).
  k_off_L_R = 0.001; k_off_L_R is "k_off_L·R";  // isDerivedFrom pubmed:6360378
  // on-rate between ligand and receptor coupled to heterotrimeric G protein.
  // Value calculated from the correspondent dissociacion constant (K_d), off-rate (k_off), the extracelular ligand concentration [L] and adimensional parameters denoted by greek letters, used to code the
  // micro-reversibility restrictions.
  var k_on_L_RG; k_on_L_RG is "k_on_L·RG";
  // off-rate between the ligand (alpha-factor mating pheromone) and receptor (Ste2) coupled to heterotrimeric G protein.
  // Set to k_off_L.R by symmetry assumptions.
  var k_off_L_RG; k_off_L_RG is "k_off_L·RG";
  // on-rate between ligand and receptor coupled to GalphaGTP.
  // Value calculated from the correspondent dissociacion constant (K_d), off-rate (k_off), the extracelular ligand concentration [L] and adimensional parameters denoted by greek letters, used to code the
  // micro-reversibility restrictions.
  var k_on_L_RGt; k_on_L_RGt is "k_on_L·RGt";
  // off-rate between the ligand (alpha-factor mating pheromone) and receptor (Ste2) coupled to GalphaGTP.
  // Set to k_off_L.R by symmetry assumptions.
  var k_off_L_RGt; k_off_L_RGt is "k_off_L·RGt";
  // on-rate between ligand and receptor coupled to GalphaGDP.
  // Value calculated from the correspondent dissociacion constant (K_d), off-rate (k_off), the extracelular ligand concentration [L] and adimensional parameters denoted by greek letters, used to code the
  // micro-reversibility restrictions.
  var k_on_L_RGd; k_on_L_RGd is "k_on_L·RGd";
  // off-rate between the ligand (alpha-factor mating pheromone) and receptor (Ste2) coupled to GalphaGDP.
  // Set to k_off_L.R by symmetry assumptions.
  var k_off_L_RGd; k_off_L_RGd is "k_off_L·RGd";
  // on-rate between the heterotrimeric G protein and unoccupied receptor
  // Value calculated from the correspondent dissociacion constant (K_d), off-rate (k_off) and adimensional paramters denoted by greek letters, used to code the micro-reversibility restrictions.
  var k_on_R_G; k_on_R_G is "k_on_R·G";
  // off-rate of receptor-heterotrimeric G protein interaction.
  // k_off_R.G=0.09 s-1, calculated from the time constants (tau) reported for the A_A2-adenosin and beta1-adrenergic receptors disociation from Galpha_s (Hein et al. 2006).
  k_off_R_G = 0.09; k_off_R_G is "k_off_R·G";  // isDerivedFrom pubmed:16963443+
  // on-rate between the heterotrimeric G protein and ligand-occupied receptor
  // Value calculated from the correspondent dissociacion constant (K_d), off-rate (k_off) and adimensional paramters denoted by greek letters, used to code the micro-reversibility restrictions.
  var k_on_LR_G; k_on_LR_G is "k_on_LR·G";
  // off-rate between the heterotrimeric G protein and ligand-occupied receptor
  // set to k_off_R.G by symmetry assumption
  var k_off_LR_G; k_off_LR_G is "k_off_LR·G";
  // on-rate between GalphaGTP and unoccupied receptor
  // Value calculated from the correspondent dissociacion constant (K_d), off-rate (k_off) and adimensional paramters denoted by greek letters, used to code the micro-reversibility restrictions.
  var k_on_R_Gt; k_on_R_Gt is "k_on_R·Gt";
  // off-rate between the GalphaGTP and unoccupied receptor
  // set to k_off_R.G by symmetry assumption
  var k_off_R_Gt; k_off_R_Gt is "k_off_R·Gt";
  // on-rate between GalphaGTP and ligand-occupied receptor
  // Value calculated from the correspondent dissociacion constant (K_d), off-rate (k_off) and adimensional paramters denoted by greek letters, used to code the micro-reversibility restrictions.
  var k_on_LR_Gt; k_on_LR_Gt is "k_on_LR·Gt";
  // off-rate between the GalphaGTP and ligand-occupied receptor
  // set to k_off_R.G by symmetry assumption
  var k_off_LR_Gt; k_off_LR_Gt is "k_off_LR·Gt";
  // on-rate between GalphaGDP and unoccupied receptor
  // Value calculated from the correspondent dissociacion constant (K_d), off-rate (k_off) and adimensional paramters denoted by greek letters, used to code the micro-reversibility restrictions.
  var k_on_R_Gd; k_on_R_Gd is "k_on_R·Gd";
  // off-rate between the GalphaGDP and unoccupied receptor
  // set to k_off_R.G by symmetry assumption
  var k_off_R_Gd; k_off_R_Gd is "k_off_R·Gd";
  // on-rate between GalphaGDP and ligand-occupied receptor
  // Value calculated from the correspondent dissociacion constant (K_d), off-rate (k_off) and adimensional paramters denoted by greek letters, used to code the micro-reversibility restrictions.
  var k_on_LR_Gd; k_on_LR_Gd is "k_on_LR·Gd";
  // off-rate between the GalphaGDP and ligand-occupied receptor
  // set to k_off_R.G by symmetry assumption
  var k_off_LR_Gd; k_off_LR_Gd is "k_off_LR·Gd";
  // exchange reaction rate for GaGDP (Gpa1) uncoupled from receptor
  // k_Ef_G=0.00062 s-1
  // reference: Apanovitch et al. 1998 (PMID 9537998)
  k_Ef_Gd = 0.00062;
  // Dissociation constante between GaGDP and Gbg, expressed in nM.
  // Estimated based on boundaries defined by the Ste5 - Gbg dissociation constant (Bush and Colman-Lerner 2013) and the lower limit for Kd values of protein-protein interactions (Chen et al 2013). See
  // supplementary materials for details.
  K_d_Gd_Gbg = 0.01; K_d_Gd_Gbg is "K_d_Gd·Gbg";
  // Hydrolysis rate of GTP in GaGTP coupled to unoccupied receptor
  // Rates reported in Yi et al. 2003 for Sst2 (GAP) stimulated hydrolysis of GTP in Gpa1.
  // (Note that Sst2 interacts with Ste2, see main text).
  // #As a particular recepotr is bound to RGS third of the time in wt abundances of R and rgs, in order to maintain the effective (time averaged) activity of the RGS I multiply the rate by 3, to 0.33 s-1
  k_Hf_RrgsGt = 0.28;
  rgs_tot = 6000;
  K_d_R_rgs = 328; K_d_R_rgs is "K_d_R·rgs";
  // off-rate of receptor-heterotrimeric G protein interaction.
  // k_off_R.G=0.09 s-1, calculated from the time constants (tau) reported for the A_A2-adenosin and beta1-adrenergic receptors disociation from Galpha_s (Hein et al. 2006).
  k_off_R_rgs = 3; k_off_R_rgs is "k_off_R·rgs";
  var k_on_R_rgs; k_on_R_rgs is "k_on_R.rgs";
  Initial_for_K_d_R_rgs = K_d_R_rgs; Initial_for_K_d_R_rgs is "Initial for K_d_R·rgs";
  Initial_for_k_Hf_RrgsGt = k_Hf_RrgsGt;
  Initial_for_k_off_R_rgs = k_off_R_rgs; Initial_for_k_off_R_rgs is "Initial for k_off_R·rgs";

  // Assignment rules:
  k_Ef_G := k_Ef_Gd;
  k_off_LR_G := k_off_R_G;
  tot_RG := RG + RGd + RGt + LRG + LRGd + LRGt + RrgsG + RrgsGd + RrgsGt + LRrgsG + LRrgsGd + LRrgsGt;
  k_Af_Gd := 1.66*0.13;
  k_Hf_LRGt := k_Hf_RGt;
  k_Af_LRGd := k_Af_Gd;
  k_Af_RGd := k_Af_Gd;
  k_on_L_R := L*(k_off_L_R/K_d_L_R);
  k_off_L_RG := k_off_L_R;
  k_on_L_RG := L*(k_off_L_RG/(lambda*K_d_L_R));
  k_off_L_RGt := k_off_L_R;
  k_on_L_RGt := L*(k_off_L_RGt/(lambda_t*K_d_L_R));
  k_off_L_RGd := k_off_L_R;
  k_on_L_RGd := L*(k_off_L_RGd/(lambda_d*K_d_L_R));
  k_on_R_G := k_off_R_G/(K_d_R_G/1.66);
  k_on_LR_G := k_off_LR_G/(lambda*(K_d_R_G/1.66));
  k_off_R_Gt := k_off_R_G;
  k_on_R_Gt := k_off_R_Gt/(eta*(K_d_R_G/1.66));
  k_off_LR_Gt := k_off_R_G;
  k_on_LR_Gt := k_off_LR_Gt/(lambda_t*eta*(K_d_R_G/1.66));
  k_off_R_Gd := k_off_R_G;
  k_on_R_Gd := k_off_R_Gd/(rho*(K_d_R_G/1.66));
  k_off_LR_Gd := k_off_R_G;
  k_on_LR_Gd := k_off_LR_Gd/(lambda_d*rho*(K_d_R_G/1.66));
  k_Ar_Gd := k_Af_Gd/1.66*K_d_Gd_Gbg;
  k_Ar_RGd := k_Af_RGd/1.66*K_d_Gd_Gbg/rho;
  k_Ar_LRGd := lambda*(k_Af_LRGd/1.66)*K_d_Gd_Gbg/(lambda_d*rho);
  tot_LR := LRG + LRGd + LRGt + LR + LRrgsG + LRrgsGd + LRrgsGt + LRrgs;
  tot_G := G + LRG + RG + LRrgsG + RrgsG;
  tot_Gd := Gd + LRGd + RGd + LRrgsGd + RrgsGd;
  tot_Gt := Gt + LRGt + RGt + RrgsGt + LRrgsGt;
  k_Ef_RGd := k_Ef_RG;
  k_Ef_LRGd := k_Ef_LRG;
  k_Hf_LRrgsGt := Initial_for_k_Hf_RrgsGt;
  k_on_R_rgs := Initial_for_k_off_R_rgs/(Initial_for_K_d_R_rgs/1.66);
  tot_Rrgs := LRrgs + LRrgsG + LRrgsGd + LRrgsGt + Rrgs + RrgsG + RrgsGd + RrgsGt;

  // Reactions:
  binding_R_G: R + G -> RG; PM*(k_on_R_G*R*G - k_off_R_G*RG); binding_R_G is "binding_R·G";
  binding_L_R: R -> LR; PM*(k_on_L_R*R - k_off_L_R*LR); binding_L_R is "binding_L·R";
  binding_R_Gt: R + Gt -> RGt; PM*(k_on_R_Gt*R*Gt - k_off_R_Gt*RGt); binding_R_Gt is "binding_R·Gt";
  binding_R_Gd: R + Gd -> RGd; PM*(k_on_R_Gd*R*Gd - k_off_R_Gd*RGd); binding_R_Gd is "binding_R·Gd";
  binding_LR_G: LR + G -> LRG; PM*(k_on_LR_G*LR*G - k_off_LR_G*LRG); binding_LR_G is "binding_LR·G";
  binding_LR_Gt: LR + Gt -> LRGt; PM*(k_on_LR_Gt*LR*Gt - k_off_LR_Gt*LRGt); binding_LR_Gt is "binding_LR·Gt";
  binding_LR_Gd: LR + Gd -> LRGd; PM*(k_on_LR_Gd*LR*Gd - k_off_LR_Gd*LRGd); binding_LR_Gd is "binding_LR·Gd";
  binding_L_RG: RG -> LRG; PM*(k_on_L_RG*RG - k_off_L_RG*LRG); binding_L_RG is "binding_L·RG";
  binding_L_RGt: RGt -> LRGt; PM*(k_on_L_RGt*RGt - k_off_L_RGt*LRGt); binding_L_RGt is "binding_L·RGt";
  exchange_G: G => Gt + Gbg; PM*k_Ef_G*G;
  hydrolysis_Gt: Gt => Gd; PM*k_Hf_Gt*Gt;
  association_Gd: Gd + Gbg -> G; PM*(k_Af_Gd*Gd*Gbg - k_Ar_Gd*G);
  exchange_RG: RG => RGt + Gbg; PM*k_Ef_RG*RG;
  exchange_LRG: LRG => LRGt + Gbg; PM*k_Ef_LRG*LRG;
  hydrolysis_RGt: RGt => RGd; PM*k_Hf_RGt*RGt;
  hydrolysis_LRGt: LRGt => LRGd; PM*k_Hf_LRGt*LRGt;
  association_RGd: RGd + Gbg -> RG; PM*(k_Af_RGd*RGd*Gbg - k_Ar_RGd*RG);
  association_LRGd: LRGd + Gbg -> LRG; PM*(k_Af_LRGd*LRGd*Gbg - k_Ar_LRGd*LRG);
  binding_L_RGd: RGd -> LRGd; PM*(k_on_L_RGd*RGd - k_off_L_RGd*LRGd); binding_L_RGd is "binding_L·RGd";
  exchange_Gd: Gd => Gt; PM*k_Ef_Gd*Gd;
  exchange_RGd: RGd => RGt; PM*k_Ef_RGd*RGd;
  exchange_LRGd: LRGd => LRGt; PM*k_Ef_LRGd*LRGd;
  association_LRrgsGd: LRrgsGd + Gbg -> LRrgsG; PM*(k_Af_LRGd*LRrgsGd*Gbg - k_Ar_LRGd*LRrgsG);
  association_RrgsGd: RrgsGd + Gbg -> RrgsG; PM*(k_Af_RGd*RrgsGd*Gbg - k_Ar_RGd*RrgsG);
  binding_LRrgs_G: LRrgs + G -> LRrgsG; PM*(k_on_LR_G*LRrgs*G - k_off_LR_G*LRrgsG); binding_LRrgs_G is "binding_LRrgs·G";
  binding_LRrgs_Gd: LRrgs + Gd -> LRrgsGd; PM*(k_on_R_Gd*LRrgs*Gd - k_off_R_Gd*LRrgsGd); binding_LRrgs_Gd is "binding_LRrgs·Gd";
  binding_LRrgs_Gt: LRrgs + Gt -> LRrgsGt; PM*(k_on_LR_Gt*LRrgs*Gt - k_off_LR_Gt*LRrgsGt); binding_LRrgs_Gt is "binding_LRrgs·Gt";
  binding_L_Rrgs: Rrgs -> LRrgs; PM*(k_on_L_R*Rrgs - k_off_L_R*LRrgs); binding_L_Rrgs is "binding_L·Rrgs";
  binding_L_RrgsG: RG -> LRG; PM*(k_on_L_RG*RG - k_off_L_RG*LRG); binding_L_RrgsG is "binding_L·RrgsG";
  binding_L_RrgsGd: RrgsGd -> LRrgsGd; PM*(k_on_L_RGd*RrgsGd - k_off_L_RGd*LRrgsGd); binding_L_RrgsGd is "binding_L·RrgsGd";
  binding_L_RrgsGt: RrgsGt -> LRrgsGt; PM*(k_on_L_RGt*RrgsGt - k_off_L_RGt*LRrgsGt); binding_L_RrgsGt is "binding_L·RrgsGt";
  binding_Rrgs_G: Rrgs + G -> RrgsG; PM*(k_on_R_G*Rrgs*G - k_off_R_G*RrgsG); binding_Rrgs_G is "binding_Rrgs·G";
  binding_Rrgs_Gd: Rrgs + Gd -> RrgsGd; PM*(k_on_R_Gd*Rrgs*Gd - k_off_R_Gd*RrgsGd); binding_Rrgs_Gd is "binding_Rrgs·Gd";
  binding_Rrgs_Gt: Rrgs + Gt -> RrgsGt; PM*(k_on_R_Gt*Rrgs*Gt - k_off_R_Gt*RrgsGt); binding_Rrgs_Gt is "binding_Rrgs·Gt";
  exchange_LRrgsG: LRrgsG => LRrgsGt + Gbg; PM*k_Ef_LRG*LRrgsG;
  exchange_LRrgsGd: LRrgsGd => LRrgsGt; PM*k_Ef_LRGd*LRrgsGd;
  exchange_RrgsG: RrgsG => RrgsGt + Gbg; PM*k_Ef_RG*RrgsG;
  exchange_RrgsGd: RrgsGd => RrgsGt; PM*k_Ef_RGd*RrgsGd;
  binding_R_rgs: R + rgs -> Rrgs; k_on_R_rgs*R*rgs - k_off_R_rgs*Rrgs; binding_R_rgs is "binding_R·rgs";
  binding_LR_rgs: LR + rgs -> LRrgs; k_on_R_rgs*LR*rgs - k_off_R_rgs*LRrgs; binding_LR_rgs is "binding_LR·rgs";
  binding_RG_rgs: RG + rgs -> RrgsG; k_on_R_rgs*RG*rgs - k_off_R_rgs*RrgsG; binding_RG_rgs is "binding_RG·rgs";
  binding_LRG_rgs: LRG + rgs -> LRrgsG; k_on_R_rgs*LRG*rgs - k_off_R_rgs*LRrgsG; binding_LRG_rgs is "binding_LRG·rgs";
  binding_RGt_rgs: RGt + rgs -> RrgsGt; k_on_R_rgs*RGt*rgs - k_off_R_rgs*RrgsGt; binding_RGt_rgs is "binding_RGt·rgs";
  binding_LRGt_rgs: LRGt + rgs -> LRrgsGt; k_on_R_rgs*LRGt*rgs - k_off_R_rgs*LRrgsGt; binding_LRGt_rgs is "binding_LRGt·rgs";
  binding_RGd_rgs: RGd + rgs -> RrgsGd; k_on_R_rgs*RGd*rgs - k_off_R_rgs*RrgsGd; binding_RGd_rgs is "binding_RGd·rgs";
  binding_LRGd_rgs: LRGd + rgs -> LRrgsGd; k_on_R_rgs*LRGd*rgs - k_off_R_rgs*LRrgsGd; binding_LRGd_rgs is "binding_LRGd·rgs";
  hydrolysis_LRrgsGt: LRrgsGt => LRrgsGd; PM*k_Hf_LRrgsGt*LRrgsGt;
  hydrolysis_RrgsGt: RrgsGt => RrgsGd; PM*k_Hf_RrgsGt*RrgsGt;

  // Unit definitions:
  unit length = metre;
  unit area = metre^2;
  unit volume = 1e-15 litre;
  unit time = second;
  unit substance = item;
end
