// SBML level 2 version 4
// dcterms:bibliographicCitation: urn:miriam:pubmed:21391741

function Function_for_EGFR_dephosphorylation(V1, Cell)
  V1/Cell;
end

function Function_for_Raf1_dephosphorylation__RafPPtase_modifier(Kcat10a, Km10a, RafPPtase, Cell, pRaf1)
  Kcat10a*RafPPtase*pRaf1/(pRaf1 + Km10a)/Cell;
end
Function_for_Raf1_dephosphorylation__RafPPtase_modifier is "Function for Raf1 dephosphorylation (RafPPtase modifier)";

function Function_for_Raf1_dephosphorylation__pAkt_modifier(Kcat10b, Km10b, Cell, pAkt, pRaf1)
  Kcat10b*pAkt*pRaf1/(pRaf1 + Km10b)/Cell;
end
Function_for_Raf1_dephosphorylation__pAkt_modifier is "Function for Raf1 dephosphorylation (pAkt modifier)";

function Function_for_MEK_phosphorylation__pbRaf_modifier(Kcat11a, Km11a, MEK, Cell, pBRaf)
  Kcat11a*pBRaf*MEK/(MEK + Km11a)/Cell;
end
Function_for_MEK_phosphorylation__pbRaf_modifier is "Function for MEK phosphorylation (pbRaf modifier)";

function Function_for_MEK_phosphorylation__pRaf1__pRKIP_and_RKIP_modifiers(MEK, RKIP, Cell, k11b1, k11b2, pRKIP, pRaf1)
  k11b1*pRaf1*MEK/(1 + ((RKIP - pRKIP)/k11b2)^2)/Cell;
end
Function_for_MEK_phosphorylation__pRaf1__pRKIP_and_RKIP_modifiers is "Function for MEK phosphorylation (pRaf1, pRKIP and RKIP modifiers)";

function Function_for_MEK_dephosphorylation__PP2A_modifer(Kcat12, Km12, PP2A, Cell, pMEK)
  Kcat12*PP2A*pMEK/(pMEK + Km12)/Cell;
end
Function_for_MEK_dephosphorylation__PP2A_modifer is "Function for MEK dephosphorylation (PP2A modifer)";

function Function_for_ERK_phosphorylation__pMEK_modifier(ERK, Kcat13, Km13, Cell, pMEK)
  Kcat13*pMEK*ERK/(ERK + Km13)/Cell;
end
Function_for_ERK_phosphorylation__pMEK_modifier is "Function for ERK phosphorylation (pMEK modifier)";

function Function_for_ERK_dephosphorylation__PP2A_modifer(Kcat14, Km14, PP2A, Cell, pERK)
  Kcat14*PP2A*pERK/(pERK + Km14)/Cell;
end
Function_for_ERK_dephosphorylation__PP2A_modifer is "Function for ERK dephosphorylation (PP2A modifer)";

function Function_for_RKIP_phosphorylation__pERK_modifier(RKIP, Cell, k15a, pERK, pRKIP)
  k15a*pERK*(RKIP - pRKIP)/Cell;
end
Function_for_RKIP_phosphorylation__pERK_modifier is "Function for RKIP phosphorylation (pERK modifier)";

function Function_for_RKIP_dephosphorylation(V15b, Cell, pRKIP)
  V15b*pRKIP/Cell;
end

function Function_for_RKIP_degradation(RKIP, Cell, k15c)
  k15c*RKIP/Cell;
end

function Function_for_bRaf_phosphorylation__pRas_modifier(BRaf, Kcat16a, Km16a, Cell, pRas)
  Kcat16a*pRas*BRaf/(BRaf + Km16a)/Cell;
end
Function_for_bRaf_phosphorylation__pRas_modifier is "Function for bRaf phosphorylation (pRas modifier)";

function Function_for_bRaf_phosphorylation__pRap1_modifier(BRaf, Kcat16b, Km16b, Cell, pRap1)
  Kcat16b*pRap1*BRaf/(BRaf + Km16b)/Cell;
end
Function_for_bRaf_phosphorylation__pRap1_modifier is "Function for bRaf phosphorylation (pRap1 modifier)";

function Function_for_P90Rsk_dephosphorylation(Cell, k18a, pP90Rsk)
  k18a*pP90Rsk/Cell;
end

function Function_for_P90Rsk_phosphorylation__pERK_modifier(Kcat18b, Km18b, P90Rsk, Cell, pERK)
  Kcat18b*pERK*P90Rsk/(P90Rsk + Km18b)/Cell;
end
Function_for_P90Rsk_phosphorylation__pERK_modifier is "Function for P90Rsk phosphorylation (pERK modifier)";

function Function_for_PI3K_phosphorylation__boundEGFR_modifier(Kcat19a, Km19a, PI3K, bEGFR, Cell)
  Kcat19a*bEGFR*PI3K/(PI3K + Km19a)/Cell;
end
Function_for_PI3K_phosphorylation__boundEGFR_modifier is "Function for PI3K phosphorylation (boundEGFR modifier)";

function Function_for_PI3K_phosphorylation__pRas_modifier(Kcat19b, Km19b, PI3K, Cell, pRas)
  Kcat19b*pRas*PI3K/(PI3K + Km19b)/Cell;
end
Function_for_PI3K_phosphorylation__pRas_modifier is "Function for PI3K phosphorylation (pRas modifier)";

function Function_for_PI3K_dephosphorylation(Cell, k19c, pPI3K)
  k19c*pPI3K/Cell;
end

function Function_for_EGFR_binding(EGF, bEGFR, Cell, fEGFR, k21, k22)
  (k21*EGF*fEGFR - k22*bEGFR)/Cell;
end

function Function_for_PIP2_phosphorylated_to_PIP3(Kcat20, Km20, PIP2, Cell, pPI3K)
  Kcat20*pPI3K*PIP2/(PIP2 + Km20)/Cell;
end

function Function_for_PIP3_dephosphorylated_to_PIP2(Kcat21, Km21, PIP3, PTEN, Cell)
  Kcat21*PTEN*PIP3/(PIP3 + Km21)/Cell;
end

function Function_for_Akt_phosphorylation__PIP3_modifier(Akt, Kcat22a, Km22a, PIP3, Cell)
  Kcat22a*PIP3*Akt/(Akt + Km22a)/Cell;
end
Function_for_Akt_phosphorylation__PIP3_modifier is "Function for Akt phosphorylation (PIP3 modifier)";

function Function_for_Akt_dephosphorylation(Kcat22b, Km22b, Cell, pAkt)
  Kcat22b*pAkt/(Km22b + pAkt)/Cell;
end

function Function_for_C3G_phosphorylation__boundEGFR_modifier(C3G, Kcat23a, Km23a, bEGFR, Cell)
  Kcat23a*bEGFR*C3G/(C3G + Km23a)/Cell;
end
Function_for_C3G_phosphorylation__boundEGFR_modifier is "Function for C3G phosphorylation (boundEGFR modifier)";

function Function_for_C3G_dephosphorylation(Cell, k23b, pC3G)
  k23b*pC3G/Cell;
end

function Function_for_Rap1_phosphorylation__pC3G_modifier(Kcat24, Km24, Rap1, Cell, pC3G)
  Kcat24*pC3G*Rap1/(Rap1 + Km24)/Cell;
end
Function_for_Rap1_phosphorylation__pC3G_modifier is "Function for Rap1 phosphorylation (pC3G modifier)";

function Function_for_Rap1_dephosphorylation__Rap1_GAP_modifer(Kcat25, Km25, Rap1Gap, Cell, pRap1)
  Kcat25*Rap1Gap*pRap1/(pRap1 + Km25)/Cell;
end
Function_for_Rap1_dephosphorylation__Rap1_GAP_modifer is "Function for Rap1 dephosphorylation (Rap1_GAP modifer)";

function Function_for_PKCD_synthesis(GSK3B, V26a, Cell, k26a)
  V26a/(1 + (GSK3B/k26a)^2.5)/Cell;
end

function Function_for_PKCD_degradation(PKCD, Cell, k26b)
  k26b*PKCD/Cell;
end

function Function_for_GSK3b_phosphorylation__pERK_modifier(GSK3B, Kcat27a, Cell, pERK)
  Kcat27a*GSK3B*pERK/Cell;
end
Function_for_GSK3b_phosphorylation__pERK_modifier is "Function for GSK3b phosphorylation (pERK modifier)";

function Function_for_GSK3b_phosphorylation__pAkt_modifier(GSK3B, Kcat27b, Cell, pAkt)
  Kcat27b*GSK3B*pAkt/Cell;
end
Function_for_GSK3b_phosphorylation__pAkt_modifier is "Function for GSK3b phosphorylation (pAkt modifier)";

function Function_for_GSK3b_synthesis(RKIP, Cell, k27c)
  k27c*RKIP/Cell;
end

function Function_for_GSK3b_dephosphorylation(Kcat27d, Cell, pGSK3B)
  Kcat27d*pGSK3B/Cell;
end

function Function_for_Dsh_activation(Dshi, W, Cell, k28)
  k28*Dshi*W/Cell;
end

function Function_for_Dsh_deactivation(Dsha, Cell, k29)
  k29*Dsha/Cell;
end

function Function_for_freeEGFR_degradation(Cell, fEGFR, k3)
  k3*fEGFR/Cell;
end

function Function_for_APC_Axin_GSK3b_complex_disassembly__Dsha_modifier(APCAxinGSK3B, Dsha, Cell, k30)
  k30*Dsha*APCAxinGSK3B/Cell;
end
Function_for_APC_Axin_GSK3b_complex_disassembly__Dsha_modifier is "Function for APC_Axin_GSK3b complex disassembly (Dsha modifier)";

function Function_for_APC_Axin_GSK3b_complex_formation(APCAxin, APCAxinGSK3B, GSK3B, Cell, k311, k312)
  (k311*GSK3B*APCAxin - k312*APCAxinGSK3B)/Cell;
end

function Function_for_APC_and_Axin_phosphorylation__in_compound(APCAxinGSK3B, Cell, k32a)
  k32a*APCAxinGSK3B/Cell;
end
Function_for_APC_and_Axin_phosphorylation__in_compound is "Function for APC and Axin phosphorylation (in compound)";

function Function_for_APC_and_Axin_dephosphorylation__in_compound(Cell, k32b, pAPCpAxinGSK3B)
  k32b*pAPCpAxinGSK3B/Cell;
end
Function_for_APC_and_Axin_dephosphorylation__in_compound is "Function for APC and Axin dephosphorylation (in compound)";

function APC_Axin_complex_formation(APC, APCAxin, Axin, Cell, k33a1, k33a2)
  (k33a1*Axin*APC - k33a2*APCAxin)/Cell;
end

function Function_for_Axin_degradation(Axin, Cell, k33b)
  k33b*Axin/Cell;
end

function Function_for_Axin_synthesis(BCatenin, TCFBCatenin, Cell, k33c1, k33c2)
  (k33c1 + k33c2*(TCFBCatenin + BCatenin))/Cell;
end

function Function_for_pAPC_pAxin_GSK3b_bCatenin_complex_formation(BCatenin, Cell, k341, k342, pAPCpAxinGSK3B, pAPCpAxinGSK3BBCatenin)
  (k341*pAPCpAxinGSK3B*BCatenin - k342*pAPCpAxinGSK3BBCatenin)/Cell;
end

function Function_for_bCatenin_phosphorylation__in_compound(Cell, k35, pAPCpAxinGSK3BBCatenin)
  k35*pAPCpAxinGSK3BBCatenin/Cell;
end
Function_for_bCatenin_phosphorylation__in_compound is "Function for bCatenin phosphorylation (in compound)";

function Function_for_pAPC_pAxin_GSK3b_pbCatenin_complex_disassembly(Cell, k36, pAPCpAxinGSK3BpBCatenin)
  k36*pAPCpAxinGSK3BpBCatenin/Cell;
end

function Function_for_APC_bCatenin_complex_formation(APC, APCBCatenin, BCatenin, Cell, k37a1, k37a2)
  (k37a1*APC*BCatenin - k37a2*APCBCatenin)/Cell;
end

function Function_for_bCatenin_synthesis(V37b, Cell)
  V37b/Cell;
end

function Function_for_bCatenin_degradation(BCatenin, Cell, k37c)
  k37c*BCatenin/Cell;
end

function Function_for_bCatenin_TCF_complex_binding(BCatenin, TCF, TCFBCatenin, Cell, k381, k382)
  (k381*BCatenin*TCF - k382*TCFBCatenin)/Cell;
end

function Function_for_X_synthesis(Km39, TCFBCatenin, Cell, k39)
  k39*TCFBCatenin^2/(Km39^2 + TCFBCatenin^2)/Cell;
end

function Function_for_boundEGFR_degradation(bEGFR, Cell, k4)
  k4*bEGFR/Cell;
end

function Function_for_X_degradation(X, Cell, k40)
  k40*X/Cell;
end

function Function_for_pbCatenin_degradation(Cell, k41, pBCatenin)
  k41*pBCatenin/Cell;
end

function Function_for_SOS_phosphorylation__PKCD__pERK_and_boundEGFR_modifiers_(PKCD, bEGFR, Cell, k51, k52, k53, k54, pERK)
  (k51*bEGFR + k52 + k53*PKCD)/(1 + pERK/k54)/Cell;
end
Function_for_SOS_phosphorylation__PKCD__pERK_and_boundEGFR_modifiers_ is "Function for SOS phosphorylation (PKCD. pERK and boundEGFR modifiers)";

function Function_for_SOS_dephosphorylation(Cell, k6a, pSOS)
  k6a*pSOS/Cell;
end

function Function_for_SOS_dephosphorylation__pP90Rsk_modifier(Kcat6b, Km6b, Cell, pP90Rsk, pSOS)
  Kcat6b*pP90Rsk*pSOS/(pSOS + Km6b)/Cell;
end
Function_for_SOS_dephosphorylation__pP90Rsk_modifier is "Function for SOS dephosphorylation (pP90Rsk modifier)";

function Function_for_Ras_phosphorylation__pSOS_modifier(Kcat7, Km7, Ras, Cell, pSOS)
  Kcat7*pSOS*Ras/(Ras + Km7)/Cell;
end
Function_for_Ras_phosphorylation__pSOS_modifier is "Function for Ras phosphorylation (pSOS modifier)";

function Function_for_Ras_synthesis(V8a, Cell)
  V8a/Cell;
end

function Function_for_Ras_dephosphorylation__Ras_Gap_modifier(Kcat8b, Km8b, RasGap, Cell, pRas)
  Kcat8b*RasGap*pRas/(pRas + Km8b)/Cell;
end
Function_for_Ras_dephosphorylation__Ras_Gap_modifier is "Function for Ras dephosphorylation (Ras_Gap modifier)";

function Function_for_Raf1_phosphorylation__pRas_modifier(Kcat9a, Km9a, Raf1, Cell, pRas)
  Kcat9a*pRas*Raf1/(Raf1 + Km9a)/Cell;
end
Function_for_Raf1_phosphorylation__pRas_modifier is "Function for Raf1 phosphorylation (pRas modifier)";

function Function_for_Raf1_phosphorylation__X_modifier(Km9b, Raf1, W, X, Cell, k9b)
  k9b*W*X*Raf1/(Km9b + Raf1)/Cell;
end
Function_for_Raf1_phosphorylation__X_modifier is "Function for Raf1 phosphorylation (X modifier)";

function function_for_bRaf_dephosphorylation(Kcat17a, pbRaf, RafPPase, Km17a, volume)
  Kcat17a*pbRaf*RafPPase/(Km17a + pbRaf)/volume;
end

model Padala2017__ERK__PI3K_Akt_and_Wnt_signalling_network__normal()
  // Padala2017- ERK, PI3K/Akt and Wnt signalling network (normal)
  // Crosstalk model of the ERK, Wnt and Akt signalling pathways under normal condition.
  // This model is described in the article:
  // Cancerous perturbations within the ERK, PI3K/Akt, and Wnt/?-catenin signaling network constitutively activate inter-pathway positive feedback loops.
  // Padala RR, Karnawat R, Viswanathan SB, Thakkar AV, Das AB.
  // Mol Biosyst 2017 May; 13(5): 830-840
  // Abstract:
  // Perturbations in molecular signaling pathways are a result of genetic or epigenetic alterations, which may lead to malignant transformation of cells. Despite cellular robustness, specific genetic or epigenetic changes of any gene can trigger a cascade of failures, which result in the malfunctioning of cell signaling pathways and lead to cancer phenotypes. The extent of cellular robustness has a link with the architecture of the network such as feedback and feedforward loops. Perturbation in components within feedback loops causes a transition from a regulated to a persistently activated state and results in uncontrolled cell growth. This work represents the mathematical and quantitative modeling of ERK, PI3K/Akt, and Wnt/?-catenin signaling crosstalk to show the dynamics of signaling responses during genetic and epigenetic changes in cancer. ERK, PI3K/Akt, and Wnt/?-catenin signaling crosstalk networks include both intra and inter-pathway feedback loops which function in a controlled fashion in a healthy cell. Our results show that cancerous perturbations of components such as EGFR, Ras, B-Raf, PTEN, and components of the destruction complex cause extreme fragility in the network and constitutively activate inter-pathway positive feedback loops. We observed that the aberrant signaling response due to the failure of specific network components is transmitted throughout the network via crosstalk, generating an additive effect on cancer growth and proliferation.
  // This model is hosted on BioModels Databaseand identified by: BIOMD0000000648.
  // To cite BioModels Database, please use: Chelliah V et al. BioModels: ten-year anniversary. Nucl. Acids Res. 2015, 43(Database issue):D542-8.
  // To the extent possible under law, all copyright and related or neighbouring rights to this encoded model have been dedicated to the public domain worldwide. Please refer to CC0 Public Domain Dedicationfor more information.
  // biomodels.db:MODEL1708290005
  // biomodels.db:BIOMD0000000648
  // isDescribedBy pubmed:28367561
  // isDerivedFrom biomodels.db:BIOMD0000000149 biomodels.db:BIOMD0000000033 biomodels.db:BIOMD0000000623
  // unknownQualifier mamo:MAMO_0000046
  // isDescribedBy pubmed:21391741

  // Compartments:
  compartment Cell = 1;  // isVersionOf GO:0005623

  // Species:
  species APC in Cell = 96.602;  // isVersionOf uniprot:P25054
  species APCAxin in Cell = 0.0015; APCAxin is "APC_Axin";  // hasPart uniprot:P25054 uniprot:O15169
  species APCAxinGSK3B in Cell = 0.0076; APCAxinGSK3B is "APC_Axin_GSK3b";  // hasPart uniprot:P49841 uniprot:P25054 uniprot:O15169
  species APCBCatenin in Cell = 3.4392; APCBCatenin is "APC_bCatenin";  // hasPart uniprot:P25054 uniprot:P35222
  species Akt in Cell = 200;  // isVersionOf uniprot:P31749
  species Axin in Cell = 0.0008;  // isVersionOf uniprot:O15169
  species BCatenin in Cell = 42.722; BCatenin is "bCatenin";  // isVersionOf uniprot:P35222
  species BRaf in Cell = 200; BRaf is "bRaf";  // isVersionOf uniprot:P15056
  species C3G in Cell = 500;  // isVersionOf uniprot:Q13905
  species Dsha in Cell = 0;  // hasProperty bao:0002007; isVersionOf uniprot:O14640
  species Dshi in Cell = 100;  // isVersionOf uniprot:O14640
  species EGF in Cell = 600;  // isVersionOf uniprot:P01133
  species ERK in Cell = 260;  // isVersionOf uniprot:P27361
  species GSK3B in Cell = 49.137; GSK3B is "GSK3b";  // isVersionOf uniprot:P49841
  species MEK in Cell = 680;  // isVersionOf uniprot:Q02750
  species P90Rsk in Cell = 60;  // isVersionOf uniprot:Q15418
  species PI3K in Cell = 100;  // isVersionOf omit:0027264
  species PIP2 in Cell = 700;  // isVersionOf chebi:0018348
  species PIP3 in Cell = 0;  // isVersionOf chebi:0016618
  species PKCD in Cell = 0;  // isVersionOf uniprot:Q05655
  species PP2A in Cell = 240;  // isVersionOf uniprot:P67775
  species PTEN in Cell = 270;  // isVersionOf uniprot:P60484
  species RKIP in Cell = 20.909;  // isVersionOf uniprot:P30086
  species Raf1 in Cell = 100;  // isVersionOf uniprot:P04049
  species RafPPtase in Cell = 60;  // isVersionOf uniprot:P67775
  species Rap1 in Cell = 200;  // isVersionOf uniprot:P62834
  species Rap1Gap in Cell = 12; Rap1Gap is "Rap1_Gap";  // isVersionOf uniprot:P47736
  species Ras in Cell = 100;  // isVersionOf uniprot:P01112
  species RasGap in Cell = 100; RasGap is "Ras_Gap";  // isVersionOf uniprot:P20936
  species SOS in Cell = 100;  // isVersionOf uniprot:Q07889
  species TCF in Cell = 6.1879;  // isVersionOf uniprot:Q9UJU2
  species TCFBCatenin in Cell = 8.8121; TCFBCatenin is "bCatenin_TCF";  // hasPart uniprot:P35222 uniprot:Q9UJU2
  species X in Cell = 10.263;
  species bEGFR in Cell = 0; bEGFR is "boundEGFR";  // hasPart uniprot:P01133 uniprot:P00533
  species fEGFR in Cell = 300; fEGFR is "freeEGFR";  // isVersionOf uniprot:P00533
  species pAPCpAxinGSK3B in Cell = 0.0153; pAPCpAxinGSK3B is "pAPC_pAxin_GSK3b";  // hasProperty bao:0002007; hasPart uniprot:P49841 uniprot:O15169 uniprot:P25054
  species pAPCpAxinGSK3BBCatenin in Cell = 0.002; pAPCpAxinGSK3BBCatenin is "pAPC_pAxin_GSK3b_bCatenin";  // hasProperty bao:0002007; hasPart uniprot:P25054 uniprot:P49841 uniprot:P35222 uniprot:O15169
  species pAPCpAxinGSK3BpBCatenin in Cell = 0.002; pAPCpAxinGSK3BpBCatenin is "pAPC_pAxin_GSK3b_pbCatenin";  // hasProperty bao:0002007; hasPart uniprot:P25054 uniprot:P49841 uniprot:O15169 uniprot:P35222
  species pAkt in Cell = 0;  // hasProperty bao:0002007; isVersionOf uniprot:P31749
  species pBCatenin in Cell = 0.9881; pBCatenin is "pbCatenin";  // hasProperty bao:0002007; isVersionOf uniprot:P35222
  species pBRaf in Cell = 0; pBRaf is "pbRaf";  // hasProperty bao:0002007; isVersionOf uniprot:P15056
  species pC3G in Cell = 0;  // hasProperty bao:0002007; isVersionOf uniprot:P01024
  species $pEGFR in Cell = 0.05;  // hasProperty bao:0002007; isVersionOf uniprot:P00533
  species pERK in Cell = 0;  // hasProperty bao:0002007; isVersionOf uniprot:P28482
  species pGSK3B in Cell = 0.85544; pGSK3B is "pGSK3b";  // hasProperty bao:0002007; isVersionOf uniprot:P49841
  species pMEK in Cell = 0;  // hasProperty bao:0002007; isVersionOf uniprot:Q02750
  species pP90Rsk in Cell = 0;  // hasProperty bao:0002007; isVersionOf uniprot:Q15418
  species pPI3K in Cell = 0;  // hasProperty bao:0002007; isVersionOf omit:0027264
  species pRKIP in Cell = 0.8619;  // hasProperty bao:0002007; isVersionOf uniprot:P30086
  species pRaf1 in Cell = 0;  // hasProperty bao:0002007; isVersionOf uniprot:P04049
  species pRap1 in Cell = 0;  // hasProperty bao:0002007; isVersionOf uniprot:P62834
  species pRas in Cell = 0;  // hasProperty bao:0002007; isVersionOf uniprot:P62070
  species pSOS in Cell = 0;  // hasProperty bao:0002007; isVersionOf uniprot:Q07889
  species null in Cell = 1;

  // Parameters:
  Kcat10a = 0.12633;
  Kcat10b = 15.1212;
  Kcat11a = 185.76;
  Kcat12 = 2.8324;
  Kcat13 = 9.8537;
  Kcat14 = 8.8912;
  Kcat16a = 0.8841;
  Kcat16b = 0.8841;
  Kcat17a = 0.12633;
  Kcat17b = 15.1212;
  Kcat18b = 0.02137;
  Kcat19a = 10.6737;
  Kcat19b = 0.07711;
  Kcat20 = 4;
  Kcat21 = 5.5;
  Kcat22a = 0.33;
  Kcat22b = 48.667;
  Kcat23a = 694.73;
  Kcat24 = 32.344;
  Kcat25 = 1509.4;
  Kcat27a = 0.002;
  Kcat27b = 0.04596;
  Kcat27d = 0.01541;
  Kcat6b = 1611.97;
  Kcat7 = 32.644;
  Kcat8b = 1509.36;
  Kcat9a = 0.884096;
  Km10a = 1061.7;
  Km10b = 119355;
  Km11a = 4768400;
  Km12 = 518750;
  Km13 = 1007300;
  Km14 = 3496500;
  Km16a = 62645;
  Km16b = 6.24646e4;
  Km17a = 1061.71;
  Km17b = 119355;
  Km18b = 763523;
  Km19a = 184912;
  Km19b = 272056;
  Km20 = 4;
  Km21 = 0.08;
  Km22a = 100;
  Km22b = 100;
  Km23a = 6086100;
  Km24 = 3.59543e4;
  Km25 = 1432400;
  Km39 = 15;
  Km6b = 896896;
  Km7 = 3.59543e4;
  Km8b = 1432410;
  Km9a = 6.24646e4;
  Km9b = 15;
  V1 = 100;
  V15b = 4;
  V26a = 0.00154;
  V37b = 0.00705;
  V8a = 0.0717;
  W = 0;
  k11b1 = 1.1167e-5;
  k11b2 = 120;
  k15a = 1.3;
  k15c = 0.00193;
  k18a = 0.005;
  k19c = 0.005;
  k21 = 2.18503e-5;
  k22 = 0.121008;
  k23b = 2.5;
  k26a = 20;
  k26b = 0.000385;
  k27c = 0.00015;
  k28 = 0.003;
  k29 = 0.003;
  k3 = 0.00125;
  k30 = 0.000833;
  k311 = 0.001515;
  k312 = 0.01515;
  k32a = 0.00445;
  k32b = 0.002217;
  k33a1 = 0.01667;
  k33a2 = 0.8333;
  k33b = 0.002783;
  k33c1 = 1.37e-6;
  k33c2 = 1.667e-8;
  k341 = 0.01667;
  k342 = 2;
  k35 = 3.433;
  k36 = 3.433;
  k37a1 = 0.01667;
  k37a2 = 20;
  k37c = 4.283e-6;
  k381 = 0.01667;
  k382 = 0.5;
  k39 = 0.01;
  k4 = 0.2;
  k40 = 0.00025;
  k41 = 0.00695;
  k51 = 0.003465;
  k52 = 3.85e-5;
  k53 = 0.00028833;
  k54 = 1.5;
  k6a = 2.5;
  k9b = 0.025;

  // Reactions:
  EGFR_dephosphorylation: $pEGFR -> fEGFR; Cell*Function_for_EGFR_dephosphorylation(V1, Cell);  // isVersionOf GO:0038004
  v10a: RafPPtase + pRaf1 -> RafPPtase + Raf1; Cell*Function_for_Raf1_dephosphorylation__RafPPtase_modifier(Kcat10a, Km10a, RafPPtase, Cell, pRaf1); v10a is "Raf1 dephosphorylation (RafPPtase modifier)";  // isVersionOf GO:0000185
  v10b: pAkt + pRaf1 -> pAkt + Raf1; Cell*Function_for_Raf1_dephosphorylation__pAkt_modifier(Kcat10b, Km10b, Cell, pAkt, pRaf1); v10b is "Raf1 dephosphorylation (pAkt modifier)";  // isVersionOf GO:0051390
  v11a: pBRaf + MEK -> pBRaf + pMEK; Cell*Function_for_MEK_phosphorylation__pbRaf_modifier(Kcat11a, Km11a, MEK, Cell, pBRaf); v11a is "MEK phosphorylation (pbRaf modifier)";  // ec-code:2.7.11.1; isVersionOf GI:0004709; isVersionOf GO:0000186
  v11b: pRKIP + pRaf1 + MEK -> pRKIP + pRaf1 + pMEK; Cell*Function_for_MEK_phosphorylation__pRaf1__pRKIP_and_RKIP_modifiers(MEK, RKIP, Cell, k11b1, k11b2, pRKIP, pRaf1); v11b is "MEK phosphorylation (pRaf1, pRKIP and RKIP modifiers)";  // modifiers: RKIP; isVersionOf GO:0000186; ec-code:2.7.11.1; isVersionOf GO:0004709
  v12: pMEK + PP2A -> MEK + PP2A; Cell*Function_for_MEK_dephosphorylation__PP2A_modifer(Kcat12, Km12, PP2A, Cell, pMEK); v12 is "MEK dephosphorylation (PP2A modifer)";  // isVersionOf GO:0051389
  v13: pMEK + ERK -> pMEK + pERK; Cell*Function_for_ERK_phosphorylation__pMEK_modifier(ERK, Kcat13, Km13, Cell, pMEK); v13 is "ERK phosphorylation (pMEK modifier)";  // isVersionOf GO:0004708; ec-code:2.7.12.2; isVersionOf GO:0000187
  v14: pERK + PP2A -> ERK + PP2A; Cell*Function_for_ERK_dephosphorylation__PP2A_modifer(Kcat14, Km14, PP2A, Cell, pERK); v14 is "ERK dephosphorylation (PP2A modifer)";  // isVersionOf GO:0000188
  v15a: pERK + RKIP -> pERK + pRKIP; Cell*Function_for_RKIP_phosphorylation__pERK_modifier(RKIP, Cell, k15a, pERK, pRKIP); v15a is "RKIP phosphorylation (pERK modifier)";  // isVersionOf GO:0016310
  v15b: pRKIP -> RKIP; Cell*Function_for_RKIP_dephosphorylation(V15b, Cell, pRKIP); v15b is "RKIP dephosphorylation";  // isVersionOf GO:0016311
  v15c: RKIP -> null; Cell*Function_for_RKIP_degradation(RKIP, Cell, k15c); v15c is "RKIP degradation";  // isVersionOf GO:0030163
  v16a: pRas + BRaf -> pRas + pBRaf; Cell*Function_for_bRaf_phosphorylation__pRas_modifier(BRaf, Kcat16a, Km16a, Cell, pRas); v16a is "bRaf phosphorylation (pRas modifier)";  // isVersionOf GO:0016310
  v16b: pRap1 + BRaf -> pRap1 + pBRaf; Cell*Function_for_bRaf_phosphorylation__pRap1_modifier(BRaf, Kcat16b, Km16b, Cell, pRap1); v16b is "bRaf phosphorylation (pRap1 modifier)";  // isVersionOf GO:0016310
  v18a: pP90Rsk -> P90Rsk; Cell*Function_for_P90Rsk_dephosphorylation(Cell, k18a, pP90Rsk); v18a is "P90Rsk dephosphorylation";  // isVersionOf GO:0016311
  v18b: pERK + P90Rsk -> pERK + pP90Rsk; Cell*Function_for_P90Rsk_phosphorylation__pERK_modifier(Kcat18b, Km18b, P90Rsk, Cell, pERK); v18b is "P90Rsk phosphorylation (pERK modifier)";  // isVersionOf GO:0016311
  v19a: bEGFR + PI3K -> bEGFR + pPI3K; Cell*Function_for_PI3K_phosphorylation__boundEGFR_modifier(Kcat19a, Km19a, PI3K, bEGFR, Cell); v19a is "PI3K phosphorylation (boundEGFR modifier)";  // isVersionOf GO:0016310
  v19b: PI3K -> pPI3K; Cell*Function_for_PI3K_phosphorylation__pRas_modifier(Kcat19b, Km19b, PI3K, Cell, pRas); v19b is "PI3K phosphorylation (pRas modifier)";  // modifiers: pRas; isVersionOf GO:0016310
  v19c: pPI3K -> PI3K; Cell*Function_for_PI3K_dephosphorylation(Cell, k19c, pPI3K); v19c is "PI3K dephosphorylation";  // isVersionOf GO:0016311
  EGFR_binding: fEGFR + EGF -> bEGFR; Cell*Function_for_EGFR_binding(EGF, bEGFR, Cell, fEGFR, k21, k22);  // isVersionOf GO:0070851
  PIP2_phosphorylated_to_PIP3: pPI3K + PIP2 -> pPI3K + PIP3; Cell*Function_for_PIP2_phosphorylated_to_PIP3(Kcat20, Km20, PIP2, Cell, pPI3K);  // isVersionOf GO:0016310
  PIP3_dephosphorylated_to_PIP2: PTEN + PIP3 -> PTEN + PIP2; Cell*Function_for_PIP3_dephosphorylated_to_PIP2(Kcat21, Km21, PIP3, PTEN, Cell);  // isVersionOf GO:0016311
  v22a: PIP3 + Akt -> PIP3 + pAkt; Cell*Function_for_Akt_phosphorylation__PIP3_modifier(Akt, Kcat22a, Km22a, PIP3, Cell); v22a is "Akt phosphorylation (PIP3 modifier)";  // isVersionOf GO:0016310
  v22b: pAkt -> Akt; Cell*Function_for_Akt_dephosphorylation(Kcat22b, Km22b, Cell, pAkt); v22b is "Akt dephosphorylation";  // isVersionOf GO:0016311
  v23a: bEGFR + C3G -> bEGFR + pC3G; Cell*Function_for_C3G_phosphorylation__boundEGFR_modifier(C3G, Kcat23a, Km23a, bEGFR, Cell); v23a is "C3G phosphorylation (boundEGFR modifier)";  // isVersionOf GO:0016310
  v23b: pC3G -> C3G; Cell*Function_for_C3G_dephosphorylation(Cell, k23b, pC3G); v23b is "C3G dephosphorylation";  // isVersionOf GO:0016311
  v24: pC3G + Rap1 -> pC3G + pRap1; Cell*Function_for_Rap1_phosphorylation__pC3G_modifier(Kcat24, Km24, Rap1, Cell, pC3G); v24 is "Rap1 phosphorylation (pC3G modifier)";  // isVersionOf GO:0016310
  v25: Rap1Gap + pRap1 -> Rap1Gap + Rap1; Cell*Function_for_Rap1_dephosphorylation__Rap1_GAP_modifer(Kcat25, Km25, Rap1Gap, Cell, pRap1); v25 is "Rap1 dephosphorylation (Rap1_GAP modifer)";  // isVersionOf GO:0016311
  v26a: GSK3B -> GSK3B + PKCD; Cell*Function_for_PKCD_synthesis(GSK3B, V26a, Cell, k26a); v26a is "PKCD synthesis";  // isVersionOf GO:0009058
  v26b: PKCD -> null; Cell*Function_for_PKCD_degradation(PKCD, Cell, k26b); v26b is "PKCD degradation";  // isVersionOf GO:0030163
  v27a: pERK + GSK3B -> pERK + pGSK3B; Cell*Function_for_GSK3b_phosphorylation__pERK_modifier(GSK3B, Kcat27a, Cell, pERK); v27a is "GSK3b phosphorylation (pERK modifier)";  // isVersionOf GO:0016310
  v27b: pAkt + GSK3B -> pAkt + pGSK3B; Cell*Function_for_GSK3b_phosphorylation__pAkt_modifier(GSK3B, Kcat27b, Cell, pAkt); v27b is "GSK3b phosphorylation (pAkt modifier)";  // isVersionOf GO:0016310
  v27c: RKIP -> RKIP + GSK3B; Cell*Function_for_GSK3b_synthesis(RKIP, Cell, k27c); v27c is "GSK3b synthesis";  // isVersionOf GO:0009058
  v27d: pGSK3B -> GSK3B; Cell*Function_for_GSK3b_dephosphorylation(Kcat27d, Cell, pGSK3B); v27d is "GSK3b dephosphorylation";  // isVersionOf GO:0016311
  Dsh_activation: Dshi -> Dsha; Cell*Function_for_Dsh_activation(Dshi, W, Cell, k28);  // isVersionOf GO:0072376
  Dsh_deactivation: Dsha -> Dshi; Cell*Function_for_Dsh_deactivation(Dsha, Cell, k29);  // isVersionOf GO:2000257
  freeEGFR_degradation: fEGFR -> null; Cell*Function_for_freeEGFR_degradation(Cell, fEGFR, k3);  // isVersionOf GO:0030163
  v30: Dsha + APCAxinGSK3B -> GSK3B + APCAxin + Dsha; Cell*Function_for_APC_Axin_GSK3b_complex_disassembly__Dsha_modifier(APCAxinGSK3B, Dsha, Cell, k30); v30 is "APC_Axin_GSK3b complex disassembly (Dsha modifier)";  // isVersionOf GO:0043624
  APC_Axin_GSK3b_complex_formation: APCAxin + GSK3B -> APCAxinGSK3B; Cell*Function_for_APC_Axin_GSK3b_complex_formation(APCAxin, APCAxinGSK3B, GSK3B, Cell, k311, k312);  // isVersionOf GO:0005515
  v32a: APCAxinGSK3B -> pAPCpAxinGSK3B; Cell*Function_for_APC_and_Axin_phosphorylation__in_compound(APCAxinGSK3B, Cell, k32a); v32a is "APC and Axin phosphorylation (in compound)";  // isVersionOf GO:0016310
  v32b: pAPCpAxinGSK3B -> APCAxinGSK3B; Cell*Function_for_APC_and_Axin_dephosphorylation__in_compound(Cell, k32b, pAPCpAxinGSK3B); v32b is "APC and Axin dephosphorylation (in compound)";  // isVersionOf GO:0016311
  v33a: APC + Axin -> APCAxin; Cell*APC_Axin_complex_formation(APC, APCAxin, Axin, Cell, k33a1, k33a2); v33a is "APC_Axin complex formation";  // isVersionOf GO:0005515
  v33b: Axin -> null; Cell*Function_for_Axin_degradation(Axin, Cell, k33b); v33b is "Axin degradation";  // isVersionOf GO:0030163
  v33c: BCatenin + TCFBCatenin -> BCatenin + TCFBCatenin + Axin; Cell*Function_for_Axin_synthesis(BCatenin, TCFBCatenin, Cell, k33c1, k33c2); v33c is "Axin synthesis";  // isVersionOf GO:0045727
  v34: BCatenin + pAPCpAxinGSK3B -> pAPCpAxinGSK3BBCatenin; Cell*Function_for_pAPC_pAxin_GSK3b_bCatenin_complex_formation(BCatenin, Cell, k341, k342, pAPCpAxinGSK3B, pAPCpAxinGSK3BBCatenin); v34 is "pAPC_pAxin_GSK3b_bCatenin complex formation";  // isVersionOf GO:0005515
  v35: pAPCpAxinGSK3BBCatenin -> pAPCpAxinGSK3BpBCatenin; Cell*Function_for_bCatenin_phosphorylation__in_compound(Cell, k35, pAPCpAxinGSK3BBCatenin); v35 is "bCatenin phosphorylation (in compond)";  // isVersionOf GO:0016310
  v36: pAPCpAxinGSK3BpBCatenin -> pBCatenin + pAPCpAxinGSK3B; Cell*Function_for_pAPC_pAxin_GSK3b_pbCatenin_complex_disassembly(Cell, k36, pAPCpAxinGSK3BpBCatenin); v36 is "pAPC_pAxin_GSK3b_pbCatenin complex disassembly";  // isVersionOf GO:0043624
  v37a: BCatenin + APC -> APCBCatenin; Cell*Function_for_APC_bCatenin_complex_formation(APC, APCBCatenin, BCatenin, Cell, k37a1, k37a2); v37a is "APC_bCatenin complex formation";  // isVersionOf GO:0043624
  v37b: null -> BCatenin; Cell*Function_for_bCatenin_synthesis(V37b, Cell); v37b is "bCatenin synthesis";  // isVersionOf GO:0045727
  v37c: BCatenin -> null; Cell*Function_for_bCatenin_degradation(BCatenin, Cell, k37c); v37c is "bCatenin degradation";  // isVersionOf GO:0030163
  bCatenin_TCF_complex_binding: TCF + BCatenin -> TCFBCatenin; Cell*Function_for_bCatenin_TCF_complex_binding(BCatenin, TCF, TCFBCatenin, Cell, k381, k382);  // isVersionOf GO:0005515
  X_synthesis: TCFBCatenin -> X + TCFBCatenin; Cell*Function_for_X_synthesis(Km39, TCFBCatenin, Cell, k39);  // isVersionOf GO:0009058
  boundEGFR_degradation: bEGFR -> null; Cell*Function_for_boundEGFR_degradation(bEGFR, Cell, k4);  // isVersionOf GO:0030163
  X_degradation: X -> null; Cell*Function_for_X_degradation(X, Cell, k40);  // isVersionOf GO:0030163
  pbCatenin_degradation: pBCatenin -> null; Cell*Function_for_pbCatenin_degradation(Cell, k41, pBCatenin);  // isVersionOf GO:0030163
  v5: PKCD + pERK + bEGFR + SOS -> PKCD + pERK + bEGFR + pSOS; Cell*Function_for_SOS_phosphorylation__PKCD__pERK_and_boundEGFR_modifiers_(PKCD, bEGFR, Cell, k51, k52, k53, k54, pERK); v5 is "SOS phosphorylation (PKCD. pERK and boundEGFR modifiers)";  // isVersionOf GO:0016310
  v6a: pSOS -> SOS; Cell*Function_for_SOS_dephosphorylation(Cell, k6a, pSOS); v6a is "SOS dephosphorylation";  // isVersionOf GO:0016311
  v6b: pP90Rsk + pSOS -> pP90Rsk + SOS; Cell*Function_for_SOS_dephosphorylation__pP90Rsk_modifier(Kcat6b, Km6b, Cell, pP90Rsk, pSOS); v6b is "SOS dephosphorylation (pP90Rsk modifier)";  // isVersionOf GO:0016311
  v7: pSOS + Ras -> pSOS + pRas; Cell*Function_for_Ras_phosphorylation__pSOS_modifier(Kcat7, Km7, Ras, Cell, pSOS); v7 is "Ras phosphorylation (pSOS modifier)";  // isVersionOf GO:0016310
  v8a: null -> Ras; Cell*Function_for_Ras_synthesis(V8a, Cell); v8a is "Ras synthesis";  // isVersionOf GO:0045727
  v8b: RasGap + pRas -> RasGap + Ras; Cell*Function_for_Ras_dephosphorylation__Ras_Gap_modifier(Kcat8b, Km8b, RasGap, Cell, pRas); v8b is "Ras dephosphorylation (Ras_Gap modifier)";  // isVersionOf GO:0016311
  v9a: pRas + Raf1 -> pRas + pRaf1; Cell*Function_for_Raf1_phosphorylation__pRas_modifier(Kcat9a, Km9a, Raf1, Cell, pRas); v9a is "Raf1 phosphorylation (pRas modifier)";  // isVersionOf GO:0016310
  v9b: X + Raf1 -> X + pRaf1; Cell*Function_for_Raf1_phosphorylation__X_modifier(Km9b, Raf1, W, X, Cell, k9b); v9b is "Raf1 phosphorylation (X modifier)";  // isVersionOf GO:0016310
  bRaf_dephosphorylation__RafPPtase_modifier: RafPPtase + pBRaf -> RafPPtase + BRaf; Cell*function_for_bRaf_dephosphorylation(Kcat17a, RafPPtase, pBRaf, Km17a, Cell); bRaf_dephosphorylation__RafPPtase_modifier is "bRaf dephosphorylation (RafPPtase modifier)";
  bRaf_dephosphorylation__pAkt_modifier: pAkt + pBRaf -> pAkt + BRaf; Cell*function_for_bRaf_dephosphorylation(Kcat17b, pBRaf, pAkt, Km17b, Cell); bRaf_dephosphorylation__pAkt_modifier is "bRaf dephosphorylation (pAkt modifier)";
end
