// SBML level 2 version 4
// dcterms:bibliographicCitation: http://identifiers.org/pubmed/15038986
// dcterms:bibliographicCitation: urn:miriam:isbn:081533642X
// dcterms:bibliographicCitation: urn:miriam:pubmed:8186756
// dcterms:bibliographicCitation: urn:miriam:pubmed:10812720
// dcterms:bibliographicCitation: urn:miriam:pubmed:5239861
// dcterms:bibliographicCitation: urn:miriam:doi:10.1006/jtbi.1994.1199

function function_for_naive_activation(naive, CML, eta, k)
  k*naive*(CML/(CML + eta));
end

function function_for_T_cell_effector_death_by_CML(param, CML, effector)
  param*CML*effector;
end

function function_for_CML_growth(r, C, Cmax)
  r*C*ln(Cmax/C);
end

function function_for_CML_death_by_T_cell_effector(param, mod, substrate)
  param*mod*substrate;
end

function function_for_T_cell_effector_production_from_T_cell_naive_activation(alpha, k, naive, CML, eta)
  alpha*k*naive*(CML/(CML + eta));
end

function function_for_T_cell_effector_recruitment(alpha, effector, CML, eta)
  alpha*effector*(CML/(CML + eta));
end

model Moore2004_CML_TcellInteration()
  // Moore2004 - Chronic Myeloid Leukemic cells and T-lymphocyte interaction
  // Moore2004 - Chronic Myeloid Leukemic cells and T-lymphocytes interaction
  // A mathematical model for the interaction of between cancer cells and immune system, involving CML cancer cells, naive and effector T-lymphocytes.
  // This model is described in the article:
  // A mathematical model for chronic myelogenous leukemia (CML) and T cell interaction.
  // Moore H, Li NK.
  // J. Theor. Biol. 2004 Apr; 227(4): 513-523
  // Abstract:
  // In this paper, we propose and analyse a mathematical model for chronic myelogenous leukemia (CML), a cancer of the blood. We model the interaction between naive T cells, effector T cells, and CML cancer cells in the body, using a system of ordinary differential equations which gives rates of change of the three cell populations. One of the difficulties in modeling CML is the scarcity of experimental data which can be used to estimate parameters values. To compensate for the resulting uncertainties, we use Latin hypercube sampling (LHS) on large ranges of possible parameter values in our analysis. A major goal of this work is the determination of parameters which play a critical role in remission or clearance of the cancer in the model. Our analysis examines 12 parameters, and identifies two of these, the growth and death rates of CML, as critical to the outcome of the system. Our results indicate that the most promising research avenues for treatments of CML should be those that affect these two significant parameters (CML growth and death rates), while altering the other parameters should have little effect on the outcome.
  // This model is hosted on BioModels Databaseand identified by: BIOMD0000000662.
  // To cite BioModels Database, please use: Chelliah V et al. BioModels: ten-year anniversary. Nucl. Acids Res. 2015, 43(Database issue):D542-8.
  // To the extent possible under law, all copyright and related or neighbouring rights to this encoded model have been dedicated to the public domain worldwide. Please refer to CC0 Public Domain Dedicationfor more information.
  // biomodels.db:MODEL1006230057
  // unknownQualifier mamo:MAMO_0000046
  // isDescribedBy pubmed:15038986
  // biomodels.db:BIOMD0000000662
  // isVersionOf efo:0000339
  // hasProperty GO:0002262

  // Compartments:
  compartment COMpartment = 1; COMpartment is "Blood";  // isVersionOf BTO:0001102

  // Species:
  species CML in COMpartment = 10000;  // isVersionOf BTO:0001271
  species T_cell_naive in COMpartment = 1510;  // isVersionOf ncit:C104081
  species T_cell_effector in COMpartment = 20;  // isVersionOf ncit:C104083
  species $Source in COMpartment = 1;
  species $Sink in COMpartment = 1;

  // Parameters:
  // value obtained from: Mohri, H., Perelson, A., Tung, K., Ribeiro, R., Ramratnam, B., Markowitz, M., Kost, R., Hurley, A., Weinberger, L., Cesar, D., Hellerstein, M., Ho, D., 2001. Increased turnover
  // of T lymphocytes in HIV-1 infection and its reduction by antiretroviral therapy. J. Exp. Med. 194 (9) (November 5), 1277–1287.
  sn = 0.071 unit_0;
  // Value obtained from: Mohri, H., Perelson, A., Tung, K., Ribeiro, R., Ramratnam, B., Markowitz, M., Kost, R., Hurley, A., Weinberger, L., Cesar, D., Hellerstein, M., Ho, D., 2001. Increased turnover
  // of T lymphocytes in HIV-1 infection and its reduction by antiretroviral therapy. J. Exp. Med. 194 (9) (November 5), 1277–1287.
  dn = 0.05 unit_1;
  // Value obtained from: C.A. Janeway, P. Travers, M. Walport, M. Shlomchik. Immunobiology: The Immune System in Health and Disease, Garland Publishing, New York (2001)
  alpha_n = 0.56 unit_2;  // isDescribedBy isbn:081533642X
  alpha_e = 0.53 unit_1;
  de = 0.12 unit_1;  // isDescribedBy pubmed:8186756
  gamma_e = 0.0077 unit_3;
  Cmax = 190000 unit_4;
  rc = 0.23 unit_1;  // isDescribedBy pubmed:10812720
  dc = 0.68 unit_1;  // isDescribedBy pubmed:5239861
  gamma_c = 0.047 unit_3;  // isDescribedBy doi:10.1006/jtbi.1994.1199
  kn = 0.063 unit_1;  // isDescribedBy doi:10.1006/jtbi.1994.1199
  eta = 43 unit_4;

  // Reactions:
  T_cell_naive_Source: $Source => T_cell_naive; COMpartment*sn*Source;  // isVersionOf ncit:C25683
  T_cell_naive_Natural_Death: T_cell_naive => $Sink; COMpartment*dn*T_cell_naive;  // isVersionOf GO:0008219
  T_cell_naive_Activation: T_cell_naive => $Sink; COMpartment*function_for_naive_activation(T_cell_naive, CML, eta, kn);  // modifiers: CML; isVersionOf GO:0042110
  T_cell_effector_Recruitment: $Source => T_cell_effector; COMpartment*function_for_T_cell_effector_recruitment(alpha_e, T_cell_effector, CML, eta);  // modifiers: CML; isVersionOf GO:0050778
  T_cell_effector_Natural_Death: T_cell_effector => $Sink; COMpartment*de*T_cell_effector;  // isVersionOf GO:0008219
  T_cell_effector_Death_by_CML: T_cell_effector => $Sink; COMpartment*function_for_T_cell_effector_death_by_CML(gamma_e, CML, T_cell_effector);  // modifiers: CML; isVersionOf GO:0070241
  CML_Growth: $Source => CML; COMpartment*function_for_CML_growth(rc, CML, Cmax);  // isVersionOf ncit:C19387
  CML_death_by_T_cell_effector: CML => $Sink; COMpartment*function_for_CML_death_by_T_cell_effector(gamma_c, T_cell_effector, CML);  // modifiers: T_cell_effector; isVersionOf GO:0008219
  CML_natural_death: CML => $Sink; COMpartment*dc*CML;  // isVersionOf GO:0008219
  T_cell_effector_Production_from_T_cell_Naive_activation: $Source => T_cell_effector; COMpartment*function_for_T_cell_effector_production_from_T_cell_naive_activation(alpha_n, kn, T_cell_naive, CML, eta);  // modifiers: T_cell_naive, CML; isVersionOf GO:0042110

  // Unit definitions:
  unit time = 86400 second;
  unit substance = item;
  unit unit_0 = 1 / (11.5741 litre * second); unit_0 is "1/(11.5741*l*s)";
  unit unit_1 = 1 / (1.15741e-5 second); unit_1 is "1/(0.0115741*ms)";
  unit unit_2 = dimensionless^0; unit_2 is "1";
  unit unit_3 = 0.0864 litre / second; unit_3 is "0.0864*l/s";
  unit unit_4 = 1 / (1000000 litre); unit_4 is "1/Ml";
end
