// SBML level 2 version 4
// dcterms:bibliographicCitation: urn:miriam:pubmed:26252969

model Zhu2015___combined_gemcitabine_and_birinapant_in_pancreatic_cancer_cells___mechanistic_PD_model()
  // Zhu2015 - Combined gemcitabine and birinapant in pancreatic cancer cells - mechanistic PD model
  // Zhu2015 - combined gemcitabine and birinapant in pancreatic cancer cells - mechanistic PD model
  // Mechanistic mathematical model to illustrate the effectiveness of combination chemotherapy involving gemcitabine and birinapant against pancreatic cancer.
  // This model is described in the article:
  // Mechanism-based mathematical modeling of combined gemcitabine and birinapant in pancreatic cancer cells.
  // Zhu X, Straubinger RM, Jusko WJ.
  // J Pharmacokinet Pharmacodyn 2015 Oct; 42(5): 477-496
  // Abstract:
  // Combination chemotherapy is standard treatment for pancreatic cancer. However, current drugs lack efficacy for most patients, and selection and evaluation of new combination regimens is empirical and time-consuming. The efficacy of gemcitabine, a standard-of-care agent, combined with birinapant, a pro-apoptotic antagonist of Inhibitor of Apoptosis Proteins (IAPs), was investigated in pancreatic cancer cells. PANC-1 cells were treated with vehicle, gemcitabine (6, 10, 20 nM), birinapant (50, 200, 500 nM), and combinations of the two drugs. Temporal changes in cell numbers, cell cycle distribution, and apoptosis were measured. A basic pharmacodynamic (PD) model based on cell numbers, and a mechanism-based PD model integrating all measurements, were developed. The basic PD model indicated that synergistic effects occurred in both cell proliferation and death processes. The mechanism-based model captured key features of drug action: temporary cell cycle arrest in S phase induced by gemcitabine alone, apoptosis induced by birinapant alone, and prolonged cell cycle arrest and enhanced apoptosis induced by the combination. A drug interaction term Ψ was employed in the models to signify interactions of the combination when data were limited. When more experimental information was utilized, Ψ values approaching 1 indicated that specific mechanisms of interactions were captured better. PD modeling identified the potential benefit of combining gemcitabine and birinapant, and characterized the key interaction pathways. An optimal treatment schedule of pretreatment with gemcitabine for 24-48 h was suggested based on model predictions and was verified experimentally. This approach provides a generalizable modeling platform for exploring combinations of cytostatic and cytotoxic agents in cancer cell culture studies.
  // This model is hosted on BioModels Database and identified by: BIOMD0000000669.
  // To cite BioModels Database, please use: Chelliah V et al. BioModels: ten-year anniversary. Nucl. Acids Res. 2015, 43(Database issue):D542-8.
  // To the extent possible under law, all copyright and related or neighbouring rights to this encoded model have been dedicated to the public domain worldwide. Please refer to CC0 Public Domain Dedication for more information.
  // biomodels.db:MODEL1604270001
  // isInstanceOf kegg.drug:D02368 kegg.drug:D10417 biomodels.db:MODEL1604270001 BTO:0000988 ncit:C49662
  // isInstanceOf ncit:C191
  // isDescribedBy pubmed:26252969
  // biomodels.db:BIOMD0000000669
  // hasPart kegg.drug:D02368

  // Compartments:
  compartment Pancreas = 1;  // isVersionOf BTO:0000988

  // Species:
  species $G1 in Pancreas = f_G1__0*R_0/100;  // isVersionOf BTO:0000304; hasProperty ncit:C17355; hasProperty GO:0051318
  species $S in Pancreas = f_S__0*R_0/100;  // isVersionOf BTO:0000304; hasProperty ncit:C17395; hasProperty GO:0051320
  species $G2 in Pancreas = f_G2__0*R_0/100;  // hasPart GO:0000279; hasPart GO:0051319; isVersionOf BTO:0000304; hasProperty ncit:C17356
  species $R_apo in Pancreas = f_apo__0*R_0/100;  // isVersionOf BTO:0000304; hasProperty ncit:C17557
  species $R_other in Pancreas = f_other__0*R_0/100;  // isVersionOf BTO:0000304
  species $R_total in Pancreas;  // isVersionOf OBI:0002076
  species $R_live in Pancreas;  // isVersionOf OBI:0002076; hasProperty ncit:C18081

  // Parameters:
  IR50 = 123000;  // OBI:0001191
  Imax_3 = 0.753;
  k3 = 0.222;  // encodes GO:0044770
  k1 = 0.357;  // encodes ncit:C25868; encodes GO:0044843
  k_apo = 0.00394;  // encodes ncit:C17557
  k2 = 0.114;  // encodes GO:0044770
  Imax_g = 0.878;
  C_g = 20;  // isVersionOf kegg.drug:D02368; isVersionOf ncit:C66876; isVersionOf CHEBI:175901
  C_b = 500;  // isVersionOf ncit:C88295; isVersionOf kegg.drug:D10417
  Hi_g = 4.34;  // ncit:C48923
  Hs_b = 1.24;  // ncit:C48923
  Hi_b = 1;  // ncit:C48923
  Hs_g = 3;  // ncit:C48923
  Tlag_sg = 38.7;
  Hother_g = 0.1;  // ncit:C48923
  Smax_b = 3.72;
  Psi_i = piecewise(0.949, (C_b != 0) && (C_g != 0), 1);  // encodes ncit:C54708; encodes GO:0071156
  Psi_s = piecewise(1.26, (C_b != 0) && (C_g != 0), 1);  // encodes ncit:C19928; encodes ncit:C54708
  Smax_g = 2.74;
  SC50_g = 23.6;  // OBI:0001180
  SC50_b = 50.1;  // OBI:0001180
  k_comb2 = 0.000775;
  k_comb1 = 0.000919;
  k_repair = 0.0495;  // encodes GO:0071156
  k_delay = 18.6;
  R_0 = 236000;  // isVersionOf ncit:C85644
  f_G1__0 = 48.1; f_G1__0 is "f(G1)_0";  // isVersionOf ncit:C85644
  f_S__0 = 10.8; f_S__0 is "f(S)_0";  // isVersionOf ncit:C85644
  f_apo__0 = 5; f_apo__0 is "f(apo)_0";  // isVersionOf ncit:C85644
  f_other__0 = 1.5; f_other__0 is "f(other)_0";  // isVersionOf ncit:C85644
  f1 = 0.467;  // encodes ncit:C17557
  Imax_b = 0.177;
  IC50_g = 6;  // OBI:0001191
  IC50_b = 154;  // OBI:0001191
  k_tau = 0.376;
  Kother_g = 1e-5;  // encodes GO:0008219
  Kother_b = 0.0055;  // encodes GO:0008219
  Hother_b = 1;  // ncit:C48923
  // Value???
  Sti_apo_g = 0;  // isInstanceOf ncit:C40715 ncit:C15632; isVersionOf ncit:C40715
  // Value???
  Sti_apo_b = 0;  // isInstanceOf ncit:C40715 ncit:C15632; isVersionOf ncit:C40715
  f_G2__0 = 100 - f_apo__0 - f_G1__0 - f_S__0 - f_other__0; f_G2__0 is "f(G2)_0";  // isVersionOf ncit:C85644
  var CURVE_FIGURE_7a_d_g; CURVE_FIGURE_7a_d_g is "CURVE_FIGURE_7a/d/g";
  var CURVE_FIGURE_7b_r_h; CURVE_FIGURE_7b_r_h is "CURVE_FIGURE_7b/r/h";
  CURVE_FIGURE_7c_f_i = 0; CURVE_FIGURE_7c_f_i is "CURVE_FIGURE_7c/f/i";

  // Assignment rules:
  R_total := G1 + S + G2 + R_apo + R_other;
  R_live := G1 + S + G2;
  Inh_1 := R_live/(IR50 + R_live);
  Inh_3 := Imax_3*R_live/(IR50 + R_live);
  k_other := piecewise(0.000297, (C_b != 0) && (C_g != 0), 0);
  Tlag_r := piecewise(0, C_g == 0, k_delay*ln(C_g));
  Tlag_re := (1 + k_comb1*C_b)*Tlag_r;
  Inh_g := piecewise(Imax_g*C_g^Hi_g/(IC50_g^Hi_g + C_g^Hi_g), (C_b == 0) && (time <= Tlag_r), piecewise(Imax_g*C_g^Hi_g/(IC50_g^Hi_g + C_g^Hi_g)*exp(-1*k_repair*(time - Tlag_r)), (C_b == 0) && (time > Tlag_r), piecewise(Imax_g*C_g^Hi_g/((Psi_i*IC50_g)^Hi_g + C_g^Hi_g), (C_b != 0) && (time <= Tlag_re), piecewise(Imax_g*C_g^Hi_g/((Psi_i*IC50_g)^Hi_g + C_g^Hi_g)*exp(-1*(1 - k_comb2*C_b)*k_repair*(time - Tlag_re)), (C_b != 0) && (time > Tlag_re), 0))));
  Inh_b := Imax_b*C_b^Hi_b/(IC50_b^Hi_b + C_b^Hi_b);
  Sti_g := piecewise(0, time <= Tlag_sg, Smax_g*C_g^Hs_g/(SC50_g^Hs_g + C_g^Hs_g));
  Sti_other_g := Kother_g*C_g^Hother_g;
  Sti_other_b := Kother_b*C_b^Hother_b;
  Sti_b := Smax_b*C_b^Hs_b/((Psi_s*SC50_b)^Hs_b + C_b^Hs_b);
  CURVE_G1 := G1/R_total;
  CURVE_S := S/R_total;
  CURVE_G2 := G2/R_total;
  CURVE_FIGURE_7a_d_g := R_live/R_total;
  CURVE_FIGURE_7b_r_h := R_apo/R_total;

  // Rate rules:
  G1' = 2*(1 - Inh_3)*(1 - Inh_b)*k3*G2 - (1 - Inh_1)*(1 - Inh_b)*k1*G1 - (1 + Sti_apo_g)*(1 + Sti_apo_b)*k_apo*G1 - (1 + Sti_other_g)*(1 + Sti_other_b)*k_other*G1;
  S' = (1 - Inh_1)*(1 - Inh_b)*k1*G1 - (1 - Inh_g)*k2*S - (1 + Sti_apo_g)*(1 + Sti_apo_b)*k_apo*S - (1 + Sti_other_g)*(1 + Sti_other_b)*k_other*S;
  G2' = (1 - Inh_g)*k2*S - (1 - Inh_3)*(1 - Inh_b)*k3*G2 - (1 + Sti_apo_g)*(1 + Sti_apo_b)*k_apo*G2 - (1 + Sti_other_g)*(1 + Sti_other_b)*k_other*G2;
  R_apo' = (1 + Sti_apo_g)*(1 + Sti_apo_b)*k_apo*(G1 + S + G2) - (1 + Sti_apo_g)*(1 + Sti_apo_b)*f1*k_apo*R_apo;
  R_other' = (1 + Sti_other_g)*(1 + Sti_other_b)*k_other*(G1 + S + G2) - k_other*R_other;

  // Unit definitions:
  unit volume = 1e-3 litre;
  unit substance = 1e-3 mole;
end
