// SBML level 2 version 4
// dcterms:bibliographicCitation: urn:miriam:pubmed:10098216
// dcterms:bibliographicCitation: urn:miriam:pubmed:9552349
// dcterms:bibliographicCitation: http://identifiers.org/pubmed/10637314

model Chen2000_CellCycle()
  // This a model from the article:
  // Kinetic analysis of a molecular model of the budding yeast cell cycle.
  // Chen KC, Csikasz-Nagy A, Gyorffy B, Val J, Novak B, Tyson JJ. Mol Biol Cell2000 Jan;11(1):369-91 10637314,
  // Abstract:
  // The molecular machinery of cell cycle control is known in more detail for budding yeast, Saccharomyces cerevisiae, than for any other eukaryotic organism. In recent years, many elegant experiments on budding yeast have dissected the roles of cyclin molecules (Cln1-3 and Clb1-6) in coordinating the events of DNA synthesis, bud emergence, spindle formation, nuclear division, and cell separation. These experimental clues suggest a mechanism for the principal molecular interactions controlling cyclin synthesis and degradation. Using standard techniques of biochemical kinetics, we convert the mechanism into a set of differential equations, which describe the time courses of three major classes of cyclin-dependent kinase activities. Model in hand, we examine the molecular events controlling "Start" (the commitment step to a new round of chromosome replication, bud formation, and mitosis) and "Finish" (the transition from metaphase to anaphase, when sister chromatids are pulled apart and the bud separates from the mother cell) in wild-type cells and 50 mutants. The model accounts for many details of the physiology, biochemistry, and genetics of cell cycle control in budding yeast.
  // This model was taken from the CellML repositoryand automatically converted to SBML.
  // The original model was: Chen KC, Csikasz-Nagy A, Gyorffy B, Val J, Novak B, Tyson JJ. (2000) - version=1.0
  // The original CellML model was created by:
  // Catherine Lloyd
  // c.lloyd@auckland.ac.nz
  // The University of Auckland
  // This model originates from BioModels Database: A Database of Annotated Published Models (http://www.ebi.ac.uk/biomodels/). It is copyright (c) 2005-2011 The BioModels.net Team.
  // To the extent possible under law, all copyright and related or neighbouring rights to this encoded model have been dedicated to the public domain worldwide. Please refer to CC0 Public Domain Dedicationfor more information.
  // In summary, you are entitled to use this encoded model in absolutely any manner you deem suitable, verbatim, or with modification, alone or embedded it in a larger context, redistribute it, commercially or not, in a restricted way or not..
  // To cite BioModels Database, please use: Li C, Donizelli M, Rodriguez N, Dharuri H, Endler L, Chelliah V, Li L, He E, Henry A, Stefan MI, Snoep JL, Hucka M, Le Novère N, Laibe C (2010) BioModels Database: An enhanced, curated and annotated resource for published quantitative kinetic models. BMC Syst Biol., 4:92.
  // biomodels.db:MODEL1006230004 biomodels.db:BIOMD0000000675
  // biomodels.db:MODEL1006230004
  // isVersionOf GO:0000075
  // hasTaxon taxonomy:4932
  // isDescribedBy pubmed:10637314
  // isDescribedBy pubmed:10098216

  // Compartments:
  compartment COMpartment = 1; COMpartment is "Yeast Cell";  // isVersionOf ncit:C14271; hasProperty GO:0007114

  // Species:
  species $Cln2 in COMpartment = 0.0078;  // isVersionOf uniprot:P20438
  species $SBF in COMpartment;  // isVersionOf uniprot:P11938; isVersionOf GO:0033309
  species $Cdc20 in COMpartment = 0.6848;  // isVersionOf uniprot:P26309
  species $Clb2 in COMpartment;  // isVersionOf uniprot:P24869
  species $Cdc20_T in COMpartment = 0.8332;  // isVersionOf uniprot:P26309
  species $Hct1 in COMpartment = 0.9946;  // isVersionOf uniprot:P53197
  species $Hct1_T in COMpartment = 1;  // isVersionOf uniprot:P53197
  species $Mcm1 in COMpartment;  // isVersionOf uniprot:P11746
  species $Clb2_Sic1 in COMpartment = 0.079;  // hasPart uniprot:P38634; hasPart uniprot:P24869
  species $Sic1 in COMpartment;  // isVersionOf uniprot:P38634
  species $Swi5 in COMpartment;  // isVersionOf uniprot:P08153
  species $Sic1_T in COMpartment = 0.1231;  // isVersionOf uniprot:P38634
  species $Clb5 in COMpartment;  // isVersionOf uniprot.isoform:P30283
  species $Cln3 in COMpartment;  // isVersionOf uniprot:P13365
  species $MBF in COMpartment;  // isVersionOf uniprot:O14467
  species $Clb5_Sic1 in COMpartment = 0.0207;  // hasPart uniprot:P30283; hasPart uniprot:P38634
  species $Bck2 in COMpartment;  // isVersionOf uniprot:P33306
  species $Bck2_0 in COMpartment = 0.0027;  // ncit:C85644
  species $Cln3_max in COMpartment = 0.02;
  species $Clb5_T in COMpartment = 0.0614;  // isVersionOf uniprot:P30283
  species $Clb2_T in COMpartment = 0.2342;  // isVersionOf uniprot:P24869

  // Parameters:
  ks_n2 = 0; ks_n2 is "ks_n2_prime";  // isVersionOf ncit:C94967
  ks_n2_ = 0.05; ks_n2_ is "ks_n2_2prime";  // isVersionOf ncit:C94967
  kd_n2 = 0.1;  // isVersionOf ncit:C94967
  ks_b2 = 0.002; ks_b2 is "ks_b2_prime";  // isVersionOf ncit:C94967
  ks_b2_ = 0.05; ks_b2_ is "ks_b2_2prime";  // isVersionOf ncit:C94967
  kd_b2 = 0.01; kd_b2 is "kd_b2_prime";  // isVersionOf ncit:C94967
  kd_b2_ = 2; kd_b2_ is "kd_b2_2prime";  // isVersionOf ncit:C94967
  kd_b2__ = 0.05; kd_b2__ is "kd_b2_3prime";  // isVersionOf ncit:C94967
  ks_b5 = 0.006; ks_b5 is "ks_b5_prime";  // isVersionOf ncit:C94967
  ks_b5_ = 0.02; ks_b5_ is "ks_b5_2prime";  // isVersionOf ncit:C94967
  kd_b5 = 0.1; kd_b5 is "kd_b5_prime";  // isVersionOf ncit:C94967
  kd_b5_ = 0.25; kd_b5_ is "kd_b5_2prime";  // isVersionOf ncit:C94967
  Jn3 = 6;  // encodes OBI:0001180
  Dn3 = 1;
  ks_c1 = 0.02;  // isVersionOf ncit:C94967
  ks_c1_ = 0.1; ks_c1_ is "ks_c1_2prime";  // isVersionOf ncit:C94967
  kas_b2 = 50;  // isVersionOf ncit:C94967
  kdi_b2 = 0.05;  // isVersionOf ncit:C94967
  kas_b5 = 50;  // isVersionOf ncit:C94967
  kdi_b5 = 0.05;  // isVersionOf ncit:C94967
  kd2_c1 = 0.3;  // isVersionOf ncit:C94967
  epsilonc1_n3 = 20;
  epsilonc1_k2 = 2;
  epsilonc1_b5 = 1;
  epsilonc1_b2 = 0.067;
  ks_20 = 0.005; ks_20 is "ks_20_prime";  // isVersionOf ncit:C94967
  ks_20_ = 0.06; ks_20_ is "ks_20_2prime";  // isVersionOf ncit:C94967
  ka_20 = 1;  // isVersionOf ncit:C94967
  ki_20 = 0.1; ki_20 is "ki_20_prime";  // isVersionOf ncit:C94967
  ki_20_ = 10; ki_20_ is "ki_20_2prime";  // isVersionOf ncit:C94967
  ka_t1 = 0.04; ka_t1 is "ka_t1_prime";  // isVersionOf ncit:C94967
  ka_t1_ = 2; ka_t1_ is "ka_t1_2prime";  // isVersionOf ncit:C94967
  ki_t1 = 0; ki_t1 is "ki_t1_prime";  // isVersionOf ncit:C94967
  ki_t1_ = 0.64; ki_t1_ is "ki_t1_2prime";  // isVersionOf ncit:C94967
  Ji_t1 = 0.05;  // encodes OBI:0001180
  Ja_t1 = 0.05;  // encodes OBI:0001180
  epsiloni_t1_n2 = 1;
  epsiloni_t1_b5 = 0.5;
  epsiloni_t1_b2 = 1;
  mass = 0.6608;  // isVersionOf ncit:C43246
  mu = 0.005776;  // encodes MP:0003904
  ORI = 0;  // isVersionOf uniprot:Q35811
  ks_ori = 2;  // isVersionOf ncit:C94967
  kd_ori = 0.06;  // isVersionOf ncit:C94967
  epsilonori_b2 = 0.4;
  BUD = 0;  // isVersionOf GO:0007114
  ks_bud = 0.3;  // isVersionOf ncit:C94967
  kd_bud = 0.06;  // isVersionOf ncit:C94967
  epsilonbud_b5 = 1;
  SPN = 0;  // isVersionOf uniprot:Q06505
  ks_spn = 0.08;  // isVersionOf ncit:C94967
  kd_spn = 0.06;  // isVersionOf ncit:C94967
  J_spn = 0.2;  // encodes OBI:0001180
  ka_sbf = 1;  // isVersionOf ncit:C94967
  ki_sbf = 0.5; ki_sbf is "ki_sbf_prime";  // isVersionOf ncit:C94967
  ki_sbf_ = 6; ki_sbf_ is "ki_sbf_2prime";  // isVersionOf ncit:C94967
  Ji_sbf = 0.01;  // encodes OBI:0001180
  Ja_sbf = 0.01;  // encodes OBI:0001180
  epsilonsbf_n3 = 75;
  epsilonsbf_b5 = 0.5;
  ka_mcm = 1;  // isVersionOf ncit:C94967
  ki_mcm = 0.15;  // isVersionOf ncit:C94967
  Ji_mcm = 1;  // encodes OBI:0001180
  Ja_mcm = 1;  // encodes OBI:0001180
  ka_swi = 1;  // isVersionOf ncit:C94967
  ki_swi = 0.3; ki_swi is "ki_swi_prime";  // isVersionOf ncit:C94967
  ki_swi_ = 0.2; ki_swi_ is "ki_swi_2prime";  // isVersionOf ncit:C94967
  Ji_swi = 0.1;  // encodes OBI:0001180
  Ja_swi = 0.1;  // encodes OBI:0001180
  kd1_c1 = 0.01;  // isVersionOf ncit:C94967
  kd_20 = 0.08;  // isVersionOf ncit:C94967
  Jd2_c1 = 0.05;  // encodes OBI:0001180
  END_M = 2000;  // isVersionOf ncit:C82574
  START_S = 1000;  // isVersionOf ncit:C82575

  // Assignment rules:
  Vi_20 := piecewise(10, (time >= START_S) && (time < END_M), piecewise(10 - 9.9*((time - END_M)/12), (time >= END_M) && (time < END_M + 12), 0.1));
  Clb2 := Clb2_T - Clb2_Sic1;
  Mcm1 := 2*ka_mcm*Clb2*Ji_mcm/(ki_mcm + ka_mcm*Clb2*Ji_mcm + ki_mcm*Ja_mcm - ka_mcm*Clb2 + ((ki_mcm + ka_mcm*Clb2*Ji_mcm + ki_mcm*Ja_mcm - ka_mcm*Clb2)^2 - 4*(ki_mcm - ka_mcm*Clb2)*ka_mcm*Clb2*Ji_mcm)^(1/2));
  Sic1 := Sic1_T - (Clb2_Sic1 + Clb5_Sic1);
  Swi5 := 2*ka_swi*Cdc20*Ji_swi/(ki_swi + ki_swi_*Clb2 + ka_swi*Cdc20*Ji_swi + (ki_swi + ki_swi_*Clb2)*Ja_swi - ka_swi*Cdc20 + ((ki_swi + ki_swi_*Clb2 + ka_swi*Cdc20*Ji_swi + (ki_swi + ki_swi_*Clb2)*Ja_swi - ka_swi*Cdc20)^2 - 4*(ki_swi + ki_swi_*Clb2 - ka_swi*Cdc20)*ka_swi*Cdc20*Ji_swi)^(1/2));
  Clb5 := Clb5_T - Clb5_Sic1;
  Cln3 := Cln3_max*Dn3*mass/(Jn3 + Dn3*mass);
  Vi_t1 := ki_t1 + ki_t1_*(Cln3 + epsiloni_t1_n2*Cln2 + epsiloni_t1_b5*Clb5 + epsiloni_t1_b2*Clb2);
  Bck2 := Bck2_0*mass;
  Vd_b2 := kd_b2*(Hct1_T - Hct1) + kd_b2_*Hct1 + kd_b2__*Cdc20;
  Vd_b5 := kd_b5 + kd_b5_*Cdc20;
  Vd2_c1 := kd2_c1*(epsilonc1_n3*Cln3 + epsilonc1_k2*Bck2 + Cln2 + epsilonc1_b5*Clb5 + epsilonc1_b2*Clb2);
  Va_sbf := ka_sbf*(Cln2 + epsilonsbf_n3*(Cln3 + Bck2) + epsilonsbf_b5*Clb5);
  SBF := 2*Va_sbf*Ji_sbf/(ki_sbf + ki_sbf_*Clb2 + Va_sbf*Ji_sbf + (ki_sbf + ki_sbf_*Clb2)*Ja_sbf - Va_sbf + ((ki_sbf + ki_sbf_*Clb2 + Va_sbf*Ji_sbf + (ki_sbf + ki_sbf_*Clb2)*Ja_sbf - Va_sbf)^2 - 4*Va_sbf*Ji_sbf*(ki_sbf + ki_sbf_*Clb2 - Va_sbf))^(1/2));
  MBF := SBF;
  D := 1.026/mu - 32;

  // Rate rules:
  Cln2' = mass*(ks_n2 + ks_n2_*SBF) - kd_n2*Cln2;
  Cdc20' = ka_20*(Cdc20_T - Cdc20) - Cdc20*(Vi_20 + kd_20);
  Cdc20_T' = ks_20 + ks_20_*Clb2 - kd_20*Cdc20_T;
  Hct1' = (ka_t1 + ka_t1_*Cdc20)*(Hct1_T - Hct1)/(Ja_t1 + Hct1_T - Hct1) - Vi_t1*Hct1/(Ji_t1 + Hct1);
  Clb2_Sic1' = kas_b2*Clb2*Sic1 - Clb2_Sic1*(kdi_b2 + Vd_b2 + kd1_c1 + Vd2_c1/(Jd2_c1 + Sic1_T));
  Sic1_T' = ks_c1 + ks_c1_*Swi5 - Sic1_T*(kd1_c1 + Vd2_c1/(Jd2_c1 + Sic1_T));
  Clb5_Sic1' = kas_b5*Clb5*Sic1 - Clb5_Sic1*(kdi_b5 + Vd_b5 + kd1_c1 + Vd2_c1/(Jd2_c1 + Sic1_T));
  Clb5_T' = mass*(ks_b5 + ks_b5_*MBF) - Vd_b5*Clb5_T;
  Clb2_T' = mass*(ks_b2 + ks_b2_*Mcm1) - Vd_b2*Clb2_T;
  mass' = mu*mass;
  ORI' = ks_ori*(Clb5 + epsilonori_b2*Clb2) - kd_ori*ORI;
  BUD' = ks_bud*(Cln2 + Cln3 + epsilonbud_b5*Clb5) - kd_bud*BUD;
  SPN' = ks_spn*Clb2/(J_spn + Clb2) - kd_spn*SPN;

  // Events:
  Event_detection_for_END_M: at (SPN >= 1): END_M = time;
  Event_detection_for_Cell_Division_and_BUD_SPN_reset: at (Clb2 < 0.3): mass = exp(-1*mu*D)*mass, BUD = 0, SPN = 0; Event_detection_for_Cell_Division_and_BUD_SPN_reset is "Event detection for Cell Division and BUD/SPN reset";
  Event_detection_for_START_S: at (ORI > 1): START_S = time, END_M = time + 1000;
  Event_detection_for_ORI_reset: at (Clb2 + Clb5 < 0.2): ORI = 0;

  // Unit definitions:
  unit time = 60 second;
end
