// SBML level 2 version 4
// dcterms:bibliographicCitation: http://identifiers.org/pubmed/10588728

function Constant_flux__irreversible(v)
  v;
end
Constant_flux__irreversible is "Constant flux (irreversible)";

function Differentiate_into_effectors_0(c, y, q, w)
  c*q*y*w;
end

function Killed_by_CTL_effectors_0(p, y, z)
  p*y*z;
end

function Proliferation_of_CTLp_0(c, x, y, w)
  c*x*y*w;
end

function Drug_therapy_during_primary_phase_of_infection(s, beta, x, y)
  s*beta*x*y;
end

model Wodarz1999_CTL_memory_response_HIV()
  // This a model from the article:
  // Specific therapy regimes could lead to long-term immunological control of HIV.
  // Wodarz D, Nowak MA. Proc Natl Acad Sci U S A 1999 Dec 7;96(25):14464-9 10588728 ,
  // Abstract:
  // We use mathematical models to study the relationship between HIV and the immune system during the natural course of infection and in the context of different antiviral treatment regimes. The models suggest that an efficient cytotoxic T lymphocyte (CTL) memory response is required to control the virus. We define CTL memory as long-term persistence of CTL precursors in the absence of antigen. Infection and depletion of CD4(+) T helper cells interfere with CTL memory generation, resulting in persistent viral replication and disease progression. We find that antiviral drug therapy during primary infection can enable the development of CTL memory. In chronically infected patients, specific treatment schedules, either including deliberate drug holidays or antigenic boosts of the immune system, can lead to a re-establishment of CTL memory. Whether such treatment regimes would lead to long-term immunologic control deserves investigation under carefully controlled conditions.
  // This model was taken from the CellML repository and automatically converted to SBML.
  // The original model was: Wodarz D, Nowak MA. (1999) - version=1.0
  // The original CellML model was created by:
  // Catherine Lloyd
  // c.lloyd@auckland.ac.nz
  // The University of Auckland
  // This model originates from BioModels Database: A Database of Annotated Published Models (http://www.ebi.ac.uk/biomodels/). It is copyright (c) 2005-2011 The BioModels.net Team.
  // To the extent possible under law, all copyright and related or neighbouring rights to this encoded model have been dedicated to the public domain worldwide. Please refer to CC0 Public Domain Dedication for more information.
  // In summary, you are entitled to use this encoded model in absolutely any manner you deem suitable, verbatim, or with modification, alone or embedded it in a larger context, redistribute it, commercially or not, in a restricted way or not..
  // To cite BioModels Database, please use: Li C, Donizelli M, Rodriguez N, Dharuri H, Endler L, Chelliah V, Li L, He E, Henry A, Stefan MI, Snoep JL, Hucka M, Le Novère N, Laibe C (2010) BioModels Database: An enhanced, curated and annotated resource for published quantitative kinetic models. BMC Syst Biol., 4:92.
  // isVersionOf efo:0000764
  // isVersionOf GO:0046718
  // occursIn BTO:0002417
  // hasTaxon taxonomy:9606
  // isDescribedBy pubmed:10588728
  // biomodels.db:MODEL1006230062 biomodels.db:BIOMD0000000683

  // Compartments:
  compartment COMpartment = 1; COMpartment is "Patient";

  // Species:
  species w in COMpartment = 0.001;  // isVersionOf BTO:0000289; hasProperty efo:0001651
  species x in COMpartment = 10;  // isVersionOf ncit:C12537; hasProperty efo:0001460
  species y in COMpartment = 0.1;  // isVersionOf ncit:C12537; hasProperty efo:0000764
  species z in COMpartment = 0;  // isVersionOf CL:0000911; isVersionOf BTO:0000289

  // Parameters:
  lamda = 1;
  d = 0.1;  // encodes GO:0008219
  a = 0.2;
  b = 0.01;  // encodes GO:0008219
  h = 0.1;  // encodes GO:0008219
  beta = 1.5;  // encodes efo:0000544
  p = 1;  // encodes GO:0001909
  q = 0.5;  // encodes GO:0045065
  c = 0.1;  // encodes GO:0046651

  // Assignment rules:
  log_y := log10(y);
  log_w := log10(w);
  s := piecewise(1, time < 1, piecewise(1, time > 15, 0.0042));

  // Reactions:
  Degradation_of_w: w => ; COMpartment*b*w;
  Degradation_of_x: x => ; COMpartment*d*x;
  Degradation_of_y: y => ; COMpartment*a*y;
  Degradation_of_z: z => ; COMpartment*h*z;
  Differentiate_into_effectors: w => z; COMpartment*Differentiate_into_effectors_0(c, y, q, w);  // modifiers: y
  Infection_of_x: x => y; COMpartment*Drug_therapy_during_primary_phase_of_infection(s, beta, x, y);
  Killed_by_CTL_effectors: y => ; COMpartment*Killed_by_CTL_effectors_0(p, y, z);  // modifiers: z
  Production_of_x: => x; COMpartment*Constant_flux__irreversible(lamda);
  Proliferation_of_CTLp: => w; COMpartment*Proliferation_of_CTLp_0(c, x, y, w);  // modifiers: x, y

  // Unit definitions:
  unit time = 86400 second;
end
