// SBML level 3 version 2
// dcterms:bibliographicCitation: urn:miriam:pubmed:26968941

function Constant_flux__irreversible(v)
  v;
end
Constant_flux__irreversible is "Constant flux (irreversible)";

function function_for_r014___C_translation(KmCCgC, x4, Beta1, gamma4, x6, Beta2, gamma5, gamma2, gamma3)
  KmCCgC*((x4 + Beta1*gamma4*x6 + Beta2*gamma5*x4*x6)/(gamma2 + gamma3*x4 + gamma4*x6 + gamma5*x4*x6));
end
function_for_r014___C_translation is "function for r014 - C_translation";

function function_for_r020___AI2_dim_4(k3, M)
  k3*M*M;
end
function_for_r020___AI2_dim_4 is "function for r020 - AI2_dim_4";

function function_for_r019___AI2_dim_3(k_2r, M)
  k_2r*M;
end
function_for_r019___AI2_dim_3 is "function for r019 - AI2_dim_3";

function function_for_r006d(Kcells, kd, x3)
  Kcells*kd*x3;
end

function function_for_r010___x5_transcription(K_mbC_gB, x4, gamma1)
  K_mbC_gB*(x4/(gamma1 + x4));
end
function_for_r010___x5_transcription is "function for r010 - x5 transcription";

function function_for_r006c(Kcells, kd, x9)
  Kcells*kd*x9;
end

model Boada2016___Incoherent_type_1_feed_forward_loop__I1_FFL()
  // Boada2016 - Incoherent type 1 feed-forward loop (I1-FFL)
  // A synthetic-biology mathematical modelling framework that was constructed to provide guidelines for experimental implementation and parameter optimisation resulted in a biological device demonstrating desired behaviour.
  // This model is described in the article:
  // Multi-objective optimization framework to obtain model-based guidelines for tuning biological synthetic devices: an adaptive network case.
  // Boada Y, Reynoso-Meza G, Picó J, Vignoni A.
  // BMC Syst Biol 2016 Mar; 10: 27
  // Abstract:
  // Model based design plays a fundamental role in synthetic biology. Exploiting modularity, i.e. using biological parts and interconnecting them to build new and more complex biological circuits is one of the key issues. In this context, mathematical models have been used to generate predictions of the behavior of the designed device. Designers not only want the ability to predict the circuit behavior once all its components have been determined, but also to help on the design and selection of its biological parts, i.e. to provide guidelines for the experimental implementation. This is tantamount to obtaining proper values of the model parameters, for the circuit behavior results from the interplay between model structure and parameters tuning. However, determining crisp values for parameters of the involved parts is not a realistic approach. Uncertainty is ubiquitous to biology, and the characterization of biological parts is not exempt from it. Moreover, the desired dynamical behavior for the designed circuit usually results from a trade-off among several goals to be optimized.We propose the use of a multi-objective optimization tuning framework to get a model-based set of guidelines for the selection of the kinetic parameters required to build a biological device with desired behavior. The design criteria are encoded in the formulation of the objectives and optimization problem itself. As a result, on the one hand the designer obtains qualitative regions/intervals of values of the circuit parameters giving rise to the predefined circuit behavior; on the other hand, he obtains useful information for its guidance in the implementation process. These parameters are chosen so that they can effectively be tuned at the wet-lab, i.e. they are effective biological tuning knobs. To show the proposed approach, the methodology is applied to the design of a well known biological circuit: a genetic incoherent feed-forward circuit showing adaptive behavior.The proposed multi-objective optimization design framework is able to provide effective guidelines to tune biological parameters so as to achieve a desired circuit behavior. Moreover, it is easy to analyze the impact of the context on the synthetic device to be designed. That is, one can analyze how the presence of a downstream load influences the performance of the designed circuit, and take it into account.
  // This model is hosted on BioModels Database and identified by: BIOMD0000000696.
  // To cite BioModels Database, please use: Chelliah V et al. BioModels: ten-year anniversary. Nucl. Acids Res. 2015, 43(Database issue):D542-8.
  // To the extent possible under law, all copyright and related or neighbouring rights to this encoded model have been dedicated to the public domain worldwide. Please refer to CC0 Public Domain Dedication for more information.
  // biomodels.db:MODEL1511290000
  // biomodels.db:BIOMD0000000696
  // isDescribedBy pubmed:26968941
  // biomodels.db:MODEL1511290000
  // isDescribedBy pubmed:26968941
  // isVersionOf ncit:C19061
  // model units - substance: substance, time: second, volume: volume, area: area, length: metre, extent: substance

  // Compartments:
  // Original encoded model had volume set to 0.0432 ul
  compartment Cell = 1 volume;  // isVersionOf CL:0000000
  // Original encoded model had volume set to 180 ul
  compartment Extracellular = 1 volume;  // isVersionOf GO:0005576

  // Species:
  // Original encoded model had simulation type set to 'fixed' and not 'reactions'
  species x1 in Cell = 0.0432*104/0.3624;  // isVersionOf SO:0000234
  species x2 in Cell = 0.0432*104*80/(0.3624*0.035);  // isVersionOf PR:000000001
  species x3 in Cell = 0;  // isVersionOf ncit:C120268
  species x4 in Cell = 0;
  species x5 in Cell = 0;  // isVersionOf SO:0000234
  species x6 in Cell = 0;  // isVersionOf PR:000000001
  species x7 in Cell = 0;  // isVersionOf SO:0000234
  species x8 in Cell = 0;  // isVersionOf PR:000000001
  species x9 in Extracellular = 50*180;  // isVersionOf ncit:C120268

  // Parameters:
  k_mA_C_gA = 104; k_mA_C_gA is "k_mA*C_gA";  // encodes ncit:C49142
  k_mB_C_gB = 1; k_mB_C_gB is "k_mB*C_gB";  // encodes ncit:C49142
  k_mC_C_gC = 1; k_mC_C_gC is "k_mC*C_gC";  // encodes ncit:C49142
  d_mA = 0.3624;
  d_mB = 0.3624;
  d_mC = 0.3624;
  k_pA = 80;  // encodes GO:0006412
  k_pB = 1;  // encodes GO:0006412
  k_pC = 11.42;  // encodes GO:0006412
  d_A = 0.035;
  d_B = 0.016;
  d_C = 0.2784;
  k_d = 0.06;  // encodes ncit:C82333
  k_2f = 0.1;
  k_3f = 0.1;
  k_2r = 20;
  k_3r = 1;
  gamma_1 = 107.4;  // encodes OBI:0001180
  gamma_2 = 0.2;
  gamma_3 = 0.01;
  gamma_4 = 1.15;
  gamma_5 = 8.56;
  Beta_1 = 0.05;
  Beta_2 = 0.05;
  d_I = 0.0164;
  d_Ie = 0.0164;
  d_AI = 0.035;
  d_AI2 = 0.035;
  V_cell = 1e-15;
  N_cells = 240000000;  // isVersionOf OBI:0100060
  V_medium = 180;
  sum_abs_dx8 = 1e-15; sum_abs_dx8 is "sum(abs_dx8)";  // encodes ncit:C94928
  P_theta = 0;  // encodes ncit:C48918
  Initial_for_x8 = x8;
  Initial_for_x9 = x9;

  // Assignment rules:
  J1 := 2*abs(x9 - Initial_for_x9)/sum_abs_dx8;
  Sensitivity := 1/max(1e-15, J1);
  J2 := abs(x8 - Initial_for_x8)/max(1e-15, abs(x9 - Initial_for_x9));
  Precision := 1/max(1e-15, J2);
  M := -((d_AI + k_2r)/(4*k_3f)) + 1/(4*k_3f)*sqrt((d_AI + k_2r)^2 + 8*k_3f*(k_2f*x2*x3 + 2*k_3r*x4));
  K_cells := V_cell*N_cells/V_medium;

  // Rate rules:
  sum_abs_dx8' = abs(rateOf(x8));
  P_theta' = abs(rateOf(x6));

  // Reactions:
  r001___mA_transcription: => x1; Cell*Constant_flux__irreversible(k_mA_C_gA); r001___mA_transcription is "r001 - mA_transcription";
  r002___A_translation: x1 => x1 + x2; Cell*k_pA*x1; r002___A_translation is "r002 - A_translation";  // isVersionOf GO:0006412
  r003___mA_degradation: x1 => ; Cell*d_mA*x1; r003___mA_degradation is "r003 - mA_degradation";
  r004___A_degradation: x2 => ; Cell*d_A*x2; r004___A_degradation is "r004 - A_degradation";
  r005___AI2_dim_1: x2 + x3 => ; Cell*k_2f*x2*x3; r005___AI2_dim_1 is "r005 - AI2_dim_1";  // isVersionOf ncit:C97201
  r006a___I_transport: x3 => ; Cell*k_d*x3; r006a___I_transport is "r006a - I_transport";  // isVersionOf GO:0006810
  r007___I_degradation: x3 => ; Cell*d_I*x3; r007___I_degradation is "r007 - I_degradation";
  r008___Ie_degradation: x9 => ; Extracellular*d_Ie*x9; r008___Ie_degradation is "r008 - Ie_degradation";
  r009___AI2_degradation: x4 => ; Cell*d_AI2*x4; r009___AI2_degradation is "r009 - AI2_degradation";
  r010___mB_transcription: => x5; Cell*function_for_r010___x5_transcription(k_mB_C_gB, x4, gamma_1); r010___mB_transcription is "r010 - mB_transcription";  // modifiers: x4
  r011___B_translation: x5 => x5 + x6; Cell*k_pB*x5; r011___B_translation is "r011 - B_translation";  // isVersionOf GO:0006412
  r012___B_degradation: x6 => ; Cell*d_B*x6; r012___B_degradation is "r012 - B_degradation";
  r013___mB_degradation: x5 => ; Cell*d_mB*x5; r013___mB_degradation is "r013 - mB_degradation";
  r014___mC_transcription: => x7; Cell*function_for_r014___C_translation(k_mC_C_gC, x4, Beta_1, gamma_4, x6, Beta_2, gamma_5, gamma_2, gamma_3); r014___mC_transcription is "r014 - mC_transcription";  // modifiers: x4, x6
  r015___C_translation: x7 => x7 + x8; Cell*k_pC*x7; r015___C_translation is "r015 - C_translation";  // isVersionOf GO:0006412
  r016___C_degradation: x8 => ; Cell*d_C*x8; r016___C_degradation is "r016 - C_degradation";
  r017___mC_degradation: x7 => ; Cell*d_mC*x7; r017___mC_degradation is "r017 - mC_degradation";
  r018___AI2_dim_2: x4 => ; Cell*k_3r*x4; r018___AI2_dim_2 is "r018 - AI2_dim_2";
  r019___AI2_dim_3: => x2 + x3; Cell*function_for_r019___AI2_dim_3(k_2r, M); r019___AI2_dim_3 is "r019 - AI2_dim_3";
  r020___AI2_dim_4: => x4; Cell*function_for_r020___AI2_dim_4(k_3f, M); r020___AI2_dim_4 is "r020 - AI2_dim_4";  // isVersionOf ncit:C97201
  r006b___I_transport: x9 => x9 + x3; k_d*x9; r006b___I_transport is "r006b - I_transport";  // isVersionOf GO:0006810
  r006c___I_transport: x9 => ; Extracellular*function_for_r006c(K_cells, k_d, x9); r006c___I_transport is "r006c - I_transport";  // isVersionOf GO:0006810
  r006d___I_transport: => x9; function_for_r006d(K_cells, k_d, x3); r006d___I_transport is "r006d - I_transport";  // modifiers: x3; isVersionOf GO:0006810

  // Unit definitions:
  unit volume = 1e-6 litre;
  unit substance = 1e-9 mole;
  unit area = metre^2;
end
