// SBML level 2 version 4
// dcterms:bibliographicCitation: http://identifiers.org/doi/doi:10.1038/msb.2012.15

function Function_for_R21__Rev__association_of_Tem1GDP_with_Cdc5_phosphorylated_Bfa1(Bfa1P5, Bfa1P5_Tem1GDP, Tem1GDP, alpha, koffBT, konB5T)
  alpha*konB5T*Bfa1P5*Tem1GDP - koffBT*Bfa1P5_Tem1GDP;
end
Function_for_R21__Rev__association_of_Tem1GDP_with_Cdc5_phosphorylated_Bfa1 is "Function for R21: Rev. association of Tem1GDP with Cdc5-phosphorylated Bfa1";

function Function_for_R22__Rev__SPB_association_of_Tem1GTP(SPB_T, T_Tem1GTP, Tem1GTP, SPB, koffT, konT)
  SPB*(konT*SPB_T*Tem1GTP - koffT*T_Tem1GTP);
end
Function_for_R22__Rev__SPB_association_of_Tem1GTP is "Function for R22: Rev. SPB-association of Tem1GTP";

function Function_for_R23__Rev__SPB_association_of_Tem1GDP(SPB_T, T_Tem1GDP, Tem1GDP, SPB, koffT, konT)
  SPB*(konT*SPB_T*Tem1GDP - koffT*T_Tem1GDP);
end
Function_for_R23__Rev__SPB_association_of_Tem1GDP is "Function for R23: Rev. SPB-association of Tem1GDP";

function Function_for_R24__Phosphorylation_of_SPB_bound_Bfa1_by_Kin4(B_Bfa1, kfKin4, u)
  u*kfKin4*B_Bfa1;
end
Function_for_R24__Phosphorylation_of_SPB_bound_Bfa1_by_Kin4 is "Function for R24: Phosphorylation of SPB-bound Bfa1 by Kin4";

function Function_for_R25__Phosphorylation_of_SPB_bound_Bfa1_Tem1GTP_by_Kin4(B_Bfa1_Tem1GTP, kfKin4, u)
  u*kfKin4*B_Bfa1_Tem1GTP;
end
Function_for_R25__Phosphorylation_of_SPB_bound_Bfa1_Tem1GTP_by_Kin4 is "Function for R25: Phosphorylation of SPB-bound Bfa1:Tem1GTP by Kin4";

function Function_for_R26__Phosphorylation_of_SPB_bound_Bfa1_Tem1GDP_by_Kin4(B_Bfa1_Tem1GDP, kfKin4, u)
  u*kfKin4*B_Bfa1_Tem1GDP;
end
Function_for_R26__Phosphorylation_of_SPB_bound_Bfa1_Tem1GDP_by_Kin4 is "Function for R26: Phosphorylation of SPB-bound Bfa1:Tem1GDP by Kin4";

function Function_for_R30__Phosphorylation_of_Bfa1_by_cytosolic_Kin4(Bfa1, kfKin4Cyto, u)
  u*kfKin4Cyto*Bfa1;
end
Function_for_R30__Phosphorylation_of_Bfa1_by_cytosolic_Kin4 is "Function for R30: Phosphorylation of Bfa1 by cytosolic Kin4";

function Function_for_R36__Dephosphorylation_of_Cdc5_phosphorylated_Bfa1_presumably_by_PP2A(Bfa1P5, krCdc5, u)
  u*krCdc5*Bfa1P5;
end
Function_for_R36__Dephosphorylation_of_Cdc5_phosphorylated_Bfa1_presumably_by_PP2A is "Function for R36: Dephosphorylation of Cdc5-phosphorylated Bfa1 presumably by PP2A";

function Function_for_R37__Dephosphorylation_of_Cdc5_phosphorylated_Bfa1_presumably_by_PP2A(Bfa1P5_Tem1GTP, krCdc5, u)
  u*krCdc5*Bfa1P5_Tem1GTP;
end
Function_for_R37__Dephosphorylation_of_Cdc5_phosphorylated_Bfa1_presumably_by_PP2A is "Function for R37: Dephosphorylation of Cdc5-phosphorylated Bfa1 presumably by PP2A";

function Function_for_R31__Phosphorylation_of_Bfa1_Tem1GTP_by_cytosolic_Kin4(Bfa1_Tem1GTP, kfKin4Cyto, u)
  u*kfKin4Cyto*Bfa1_Tem1GTP;
end
Function_for_R31__Phosphorylation_of_Bfa1_Tem1GTP_by_cytosolic_Kin4 is "Function for R31: Phosphorylation of Bfa1:Tem1GTP by cytosolic Kin4";

function Function_for_R38__Dephosphorylation_of_Cdc5_phosphorylated_Bfa1_presumably_by_PP2A(Bfa1P5_Tem1GDP, krCdc5, u)
  u*krCdc5*Bfa1P5_Tem1GDP;
end
Function_for_R38__Dephosphorylation_of_Cdc5_phosphorylated_Bfa1_presumably_by_PP2A is "Function for R38: Dephosphorylation of Cdc5-phosphorylated Bfa1 presumably by PP2A";

function Function_for_R32__Phosphorylation_of_Bfa1_Tem1GDP_by_cytosolic_Kin4(Bfa1_Tem1GDP, kfKin4Cyto, u)
  u*kfKin4Cyto*Bfa1_Tem1GDP;
end
Function_for_R32__Phosphorylation_of_Bfa1_Tem1GDP_by_cytosolic_Kin4 is "Function for R32: Phosphorylation of Bfa1:Tem1GDP by cytosolic Kin4";

function Function_for_R18__Rev__association_of_Tem1GTP_with_Cdc5_phosphorylated_Bfa1(Bfa1P5, Bfa1P5_Tem1GTP, Tem1GTP, alpha, koffBT, konB5T)
  alpha*konB5T*Bfa1P5*Tem1GTP - koffBT*Bfa1P5_Tem1GTP;
end
Function_for_R18__Rev__association_of_Tem1GTP_with_Cdc5_phosphorylated_Bfa1 is "Function for R18: Rev. association of Tem1GTP with Cdc5-phosphorylated Bfa1";

function Function_for_R19__Rev__association_of_Tem1GDP_with_Bfa1(Bfa1, Bfa1_Tem1GDP, Tem1GDP, alpha, koffBT, konBT)
  alpha*konBT*Bfa1*Tem1GDP - koffBT*Bfa1_Tem1GDP;
end
Function_for_R19__Rev__association_of_Tem1GDP_with_Bfa1 is "Function for R19: Rev. association of Tem1GDP with Bfa1";

function Function_for_R20__Rev__association_of_Tem1GDP_with_Kin4_phosphorylated_Bfa1(Bfa1P4, Bfa1P4_Tem1GDP, Tem1GDP, alpha, koffBT, konB4T)
  alpha*konB4T*Bfa1P4*Tem1GDP - koffBT*Bfa1P4_Tem1GDP;
end
Function_for_R20__Rev__association_of_Tem1GDP_with_Kin4_phosphorylated_Bfa1 is "Function for R20: Rev. association of Tem1GDP with Kin4-phosphorylated Bfa1";

function Function_for_R16__Rev__association_of_Tem1GTP_with_Bfa1(Bfa1, Bfa1_Tem1GTP, Tem1GTP, alpha, koffBT, konBT)
  alpha*konBT*Bfa1*Tem1GTP - koffBT*Bfa1_Tem1GTP;
end
Function_for_R16__Rev__association_of_Tem1GTP_with_Bfa1 is "Function for R16: Rev. association of Tem1GTP with Bfa1";

function Function_for_R17__Rev__association_of_Tem1GTP_with_Kin4_phosphorylated_Bfa1(Bfa1P4, Bfa1P4_Tem1GTP, Tem1GTP, alpha, koffBT, konB4T)
  alpha*konB4T*Bfa1P4*Tem1GTP - koffBT*Bfa1P4_Tem1GTP;
end
Function_for_R17__Rev__association_of_Tem1GTP_with_Kin4_phosphorylated_Bfa1 is "Function for R17: Rev. association of Tem1GTP with Kin4-phosphorylated Bfa1";

function Function_for_R6__Rev__SPB_association_of_Cdc5_phosphorylated_Bfa1_Tem1GTP_complex(B_Bfa1P5_Tem1GTP, Bfa1P5_Tem1GTP, SPB_B, SPB, koffB, konB)
  SPB*(konB*SPB_B*Bfa1P5_Tem1GTP - koffB*B_Bfa1P5_Tem1GTP);
end
Function_for_R6__Rev__SPB_association_of_Cdc5_phosphorylated_Bfa1_Tem1GTP_complex is "Function for R6: Rev. SPB-association of Cdc5-phosphorylated Bfa1-Tem1GTP complex";

function Function_for_R2__Rev__SPB_association_of_Kin4_phosphorylated_Bfa1(B_Bfa1P4, Bfa1P4, SPB_B, SPB, koffB4, konB4)
  SPB*(konB4*SPB_B*Bfa1P4 - koffB4*B_Bfa1P4);
end
Function_for_R2__Rev__SPB_association_of_Kin4_phosphorylated_Bfa1 is "Function for R2: Rev. SPB-association of Kin4-phosphorylated Bfa1";

function Function_for_R1__Rev__SPB_association_of_Bfa1(B_Bfa1, Bfa1, SPB_B, SPB, koffB, konB)
  SPB*(konB*SPB_B*Bfa1 - koffB*B_Bfa1);
end
Function_for_R1__Rev__SPB_association_of_Bfa1 is "Function for R1: Rev. SPB-association of Bfa1";

function Function_for_R3__Rev__SPB_association_of_Cdc5_phosphorylated_Bfa1(B_Bfa1P5, Bfa1P5, SPB_B, SPB, koffB, konB)
  SPB*(konB*SPB_B*Bfa1P5 - koffB*B_Bfa1P5);
end
Function_for_R3__Rev__SPB_association_of_Cdc5_phosphorylated_Bfa1 is "Function for R3: Rev. SPB-association of Cdc5-phosphorylated Bfa1";

function Function_for_R4__Rev__SPB_association_of_Bfa1_Tem1GTP_complex(B_Bfa1_Tem1GTP, Bfa1_Tem1GTP, SPB_B, SPB, koffB, konB)
  SPB*(konB*SPB_B*Bfa1_Tem1GTP - koffB*B_Bfa1_Tem1GTP);
end
Function_for_R4__Rev__SPB_association_of_Bfa1_Tem1GTP_complex is "Function for R4: Rev. SPB-association of Bfa1-Tem1GTP complex";

function Function_for_R5__Rev__SPB_association_of_Kin4_phosphorylated_Bfa1_Tem1GTP_complex(B_Bfa1P4_Tem1GTP, Bfa1P4_Tem1GTP, SPB_B, SPB, koffB4, konB4)
  SPB*(konB4*Bfa1P4_Tem1GTP*SPB_B - koffB4*B_Bfa1P4_Tem1GTP);
end
Function_for_R5__Rev__SPB_association_of_Kin4_phosphorylated_Bfa1_Tem1GTP_complex is "Function for R5: Rev. SPB-association of Kin4-phosphorylated Bfa1-Tem1GTP complex";

function Function_for_R7__Rev__SPB_association_of_Bfa1_Tem1GDP_complex(B_Bfa1_Tem1GDP, Bfa1_Tem1GDP, SPB_B, SPB, koffB, konB)
  SPB*(konB*SPB_B*Bfa1_Tem1GDP - koffB*B_Bfa1_Tem1GDP);
end
Function_for_R7__Rev__SPB_association_of_Bfa1_Tem1GDP_complex is "Function for R7: Rev. SPB-association of Bfa1-Tem1GDP complex";

function Function_for_R8__Rev___SPB_association_of_Kin4_phosphorylated_Bfa1_Tem1GDP_complex(B_Bfa1P4_Tem1GDP, Bfa1P4_Tem1GDP, SPB_B, SPB, koffB4, konB4)
  SPB*(konB4*SPB_B*Bfa1P4_Tem1GDP - koffB4*B_Bfa1P4_Tem1GDP);
end
Function_for_R8__Rev___SPB_association_of_Kin4_phosphorylated_Bfa1_Tem1GDP_complex is "Function for R8: Rev. SPB-association of Kin4 phosphorylated Bfa1-Tem1GDP complex";

function Function_for_R9__Rev__SPB_association_of_Cdc5_phosphorylated_Bfa1_Tem1GDP_complex(B_Bfa1P5_Tem1GDP, Bfa1P5_Tem1GDP, SPB_B, SPB, koffB, konB)
  SPB*(konB*SPB_B*Bfa1P5_Tem1GDP - koffB*B_Bfa1P5_Tem1GDP);
end
Function_for_R9__Rev__SPB_association_of_Cdc5_phosphorylated_Bfa1_Tem1GDP_complex is "Function for R9: Rev. SPB-association of Cdc5-phosphorylated Bfa1-Tem1GDP complex";

function Function_for_R10__Rev__association_of_Tem1GTP_with_SPB_bound_Bfa1(B_Bfa1, B_Bfa1_Tem1GTP, Tem1GTP, SPB, koffBT, konBT)
  SPB*(konBT*B_Bfa1*Tem1GTP - koffBT*B_Bfa1_Tem1GTP);
end
Function_for_R10__Rev__association_of_Tem1GTP_with_SPB_bound_Bfa1 is "Function for R10: Rev. association of Tem1GTP with SPB-bound Bfa1";

function Function_for_R11__Rev__association_of_Tem1GTP_with_SPB_bound_Kin4_phosphorylated_Bfa1(B_Bfa1P4, B_Bfa1P4_Tem1GTP, Tem1GTP, SPB, koffBT, konB4T)
  SPB*(konB4T*B_Bfa1P4*Tem1GTP - koffBT*B_Bfa1P4_Tem1GTP);
end
Function_for_R11__Rev__association_of_Tem1GTP_with_SPB_bound_Kin4_phosphorylated_Bfa1 is "Function for R11: Rev. association of Tem1GTP with SPB-bound Kin4-phosphorylated Bfa1";

function Function_for_R12__Rev__association_of_Tem1GTP_with_SPB_bound_Cdc5_phosphorylated_Bfa1(B_Bfa1P5, B_Bfa1P5_Tem1GTP, Tem1GTP, SPB, koffBT, konB5T)
  SPB*(konB5T*B_Bfa1P5*Tem1GTP - koffBT*B_Bfa1P5_Tem1GTP);
end
Function_for_R12__Rev__association_of_Tem1GTP_with_SPB_bound_Cdc5_phosphorylated_Bfa1 is "Function for R12: Rev. association of Tem1GTP with SPB-bound Cdc5-phosphorylated Bfa1";

function Function_for_R13__Rev__association_of_Tem1GDP_with_SPB_bound_Bfa1(B_Bfa1, B_Bfa1_Tem1GDP, Tem1GDP, SPB, koffBT, konBT)
  SPB*(konBT*B_Bfa1*Tem1GDP - koffBT*B_Bfa1_Tem1GDP);
end
Function_for_R13__Rev__association_of_Tem1GDP_with_SPB_bound_Bfa1 is "Function for R13: Rev. association of Tem1GDP with SPB-bound Bfa1";

function Function_for_R14__Rev__association_of_Tem1GDP_with_SPB_bound_Kin4_phosphorylated_Bfa1(B_Bfa1P4, B_Bfa1P4_Tem1GDP, Tem1GDP, SPB, koffBT, konB4T)
  SPB*(konB4T*B_Bfa1P4*Tem1GDP - koffBT*B_Bfa1P4_Tem1GDP);
end
Function_for_R14__Rev__association_of_Tem1GDP_with_SPB_bound_Kin4_phosphorylated_Bfa1 is "Function for R14: Rev. association of Tem1GDP with SPB-bound Kin4-phosphorylated Bfa1";

function Function_for_R15__Rev__association_of_Tem1GDP_with_SPB_bound_Cdc5_phosphorylated_Bfa1(B_Bfa1P5, B_Bfa1P5_Tem1GDP, Tem1GDP, SPB, koffBT, konB5T)
  SPB*(konB5T*B_Bfa1P5*Tem1GDP - koffBT*B_Bfa1P5_Tem1GDP);
end
Function_for_R15__Rev__association_of_Tem1GDP_with_SPB_bound_Cdc5_phosphorylated_Bfa1 is "Function for R15: Rev. association of Tem1GDP with SPB-bound Cdc5-phosphorylated Bfa1";

model Caydasi2012___Inhibition_of_Tem1_by_the_GAP_complex_in_Spindle_Position_Checkpoint()
  // Caydasi2012 - Regulation of Tem1 by the GAP complex in spindle position cell cycle checkpoint - Ubiquitous association model
  // This model is described in the article:
  // A dynamical model of the spindle position checkpoint.
  // Caydasi AK, Lohel M, Grünert G, Dittrich P, Pereira G, Ibrahim B.
  // Mol. Syst. Biol. 2012; 8: 582
  // Abstract:
  // The orientation of the mitotic spindle with respect to the polarity axis is crucial for the accuracy of asymmetric cell division. In budding yeast, a surveillance mechanism called the spindle position checkpoint (SPOC) prevents exit from mitosis when the mitotic spindle fails to align along the mother-to-daughter polarity axis. SPOC arrest relies upon inhibition of the GTPase Tem1 by the GTPase-activating protein (GAP) complex Bfa1-Bub2. Importantly, reactions signaling mitotic exit take place at yeast centrosomes (named spindle pole bodies, SPBs) and the GAP complex also promotes SPB localization of Tem1. Yet, whether the regulation of Tem1 by Bfa1-Bub2 takes place only at the SPBs remains elusive. Here, we present a quantitative analysis of Bfa1-Bub2 and Tem1 localization at the SPBs. Based on the measured SPB-bound protein levels, we introduce a dynamical model of the SPOC that describes the regulation of Bfa1 and Tem1. Our model suggests that Bfa1 interacts with Tem1 in the cytoplasm as well as at the SPBs to provide efficient Tem1 inhibition.
  // This model is hosted on BioModels Database and identified by: BIOMD0000000699.
  // To cite BioModels Database, please use: Chelliah V et al. BioModels: ten-year anniversary. Nucl. Acids Res. 2015, 43(Database issue):D542-8.
  // To the extent possible under law, all copyright and related or neighbouring rights to this encoded model have been dedicated to the public domain worldwide. Please refer to CC0 Public Domain Dedication for more information.
  // biomodels.db:MODEL1202090002
  // isDescribedBy pubmed:22580890
  // biomodels.db:BIOMD0000000699
  // hasProperty GO:0051726
  // hasProperty mamo:MAMO_0000046
  // hasProperty GO:0031578

  // Compartments:
  compartment Cytosol = 1e-13;  // isVersionOf GO:0005829
  compartment SPB = 3e-18;  // GO:0005816

  // Species:
  // Binding site for Bfa1 in SPB
  species SPB_B in SPB = 8.33e-5;
  // Binding site for Tem1 in SPB
  species SPB_T in SPB = 0.000166;
  species Bfa1 in Cytosol = 2.03e-8;  // isVersionOf uniprot:P47113
  species Bfa1P4 in Cytosol = 0;  // isVersionOf uniprot:P47113; hasProperty PATO:0002220; hasProperty PATO:0002220
  species Bfa1P5 in Cytosol = 0;  // isVersionOf uniprot:P47113; hasProperty PATO:0002221; hasProperty PATO:0002221
  species Tem1GTP in Cytosol = 4.91e-8;  // hasPart uniprot:P38987; hasPart CHEBI:15996
  species Tem1GDP in Cytosol = 7.99e-9;  // hasPart CHEBI:17552; hasPart uniprot:P38987
  species B_Bfa1 in SPB = 8.33e-5; B_Bfa1 is "B-Bfa1";  // hasPart uniprot:P47113
  species B_Bfa1P4 in SPB = 0; B_Bfa1P4 is "B-Bfa1P4";  // hasPart uniprot:P47113; hasProperty PATO:0002220; hasProperty PATO:0002220
  species B_Bfa1P5 in SPB = 0; B_Bfa1P5 is "B-Bfa1P5";  // hasPart uniprot:P47113; hasProperty PATO:0002220; hasProperty PATO:0002220
  species T_Tem1GTP in SPB = 0; T_Tem1GTP is "T-Tem1GTP";  // hasPart uniprot:P38987; hasPart CHEBI:15996
  species T_Tem1GDP in SPB = 0; T_Tem1GDP is "T-Tem1GDP";  // hasPart uniprot:P38987; hasPart CHEBI:17552
  species B_Bfa1_Tem1GTP in SPB = 0; B_Bfa1_Tem1GTP is "B-Bfa1-Tem1GTP";  // hasPart CHEBI:15996; hasPart uniprot:P38987; hasPart uniprot:P47113
  species B_Bfa1P4_Tem1GTP in SPB = 0; B_Bfa1P4_Tem1GTP is "B-Bfa1P4-Tem1GTP";  // hasPart uniprot:P38987; hasPart CHEBI:15996; hasPart uniprot:P47113; hasProperty PATO:0002220
  species B_Bfa1P5_Tem1GTP in SPB = 0; B_Bfa1P5_Tem1GTP is "B-Bfa1P5-Tem1GTP";  // hasPart CHEBI:15996; hasPart uniprot:P47113; hasPart uniprot:P38987; hasProperty PATO:0002220
  species B_Bfa1_Tem1GDP in SPB = 0; B_Bfa1_Tem1GDP is "B-Bfa1-Tem1GDP";  // hasPart uniprot:P47113; hasPart uniprot:P38987; hasPart CHEBI:17552
  species B_Bfa1P4_Tem1GDP in SPB = 0; B_Bfa1P4_Tem1GDP is "B-Bfa1P4-Tem1GDP";  // hasPart CHEBI:17552; hasPart uniprot:P38987; hasPart uniprot:P47113; hasProperty PATO:0002220
  species B_Bfa1P5_Tem1GDP in SPB = 0; B_Bfa1P5_Tem1GDP is "B-Bfa1P5-Tem1GDP";  // hasPart uniprot:P47113; hasPart CHEBI:17552; hasPart uniprot:P38987; hasProperty PATO:0002220
  species Bfa1_Tem1GTP in Cytosol = 0; Bfa1_Tem1GTP is "Bfa1-Tem1GTP";  // hasPart CHEBI:15996; hasPart uniprot:P47113; hasPart uniprot:P38987
  species Bfa1P4_Tem1GTP in Cytosol = 0; Bfa1P4_Tem1GTP is "Bfa1P4-Tem1GTP";  // hasPart uniprot:P47113; hasPart CHEBI:15996; hasPart uniprot:P38987; hasProperty PATO:0002220
  species Bfa1P5_Tem1GTP in Cytosol = 0; Bfa1P5_Tem1GTP is "Bfa1P5-Tem1GTP";  // hasPart uniprot:P47113; hasPart CHEBI:15996; hasPart uniprot:P38987; hasProperty PATO:0002221
  species Bfa1_Tem1GDP in Cytosol = 0; Bfa1_Tem1GDP is "Bfa1-Tem1GDP";  // hasPart uniprot:P38987; hasPart CHEBI:17552; hasPart uniprot:P47113
  species Bfa1P4_Tem1GDP in Cytosol = 0; Bfa1P4_Tem1GDP is "Bfa1P4-Tem1GDP";  // hasPart uniprot:P38987; hasPart uniprot:P47113; hasPart CHEBI:17552; hasProperty PATO:0002220
  species Bfa1P5_Tem1GDP in Cytosol = 0; Bfa1P5_Tem1GDP is "Bfa1P5-Tem1GDP";  // hasPart CHEBI:17552; hasPart uniprot:P47113; hasPart uniprot:P38987; hasProperty PATO:0002221
  species $Active_Bfa1_at_the_SPB in SPB;  // isVersionOf uniprot:P47113; hasProperty PATO:0002354; hasProperty PATO:0002354
  species $Active_Bfa1_at_the_Cytosol in Cytosol;  // isVersionOf uniprot:P47113; hasProperty PATO:0002354; hasProperty PATO:0002354
  species $Active_Tem1_at_the_SPB in SPB;  // isVersionOf uniprot:P38987; hasProperty PATO:0002354; hasProperty PATO:0002354
  species $Active_Tem1_in_the_Cytosol in Cytosol;  // isVersionOf uniprot:P38987; hasProperty PATO:0002354; hasProperty PATO:0002354
  species $Inactive_Bfa1_at_the_SPB in SPB;  // isVersionOf uniprot:P47113; hasProperty PATO:0002355; hasProperty PATO:0002355
  species $Inactive_Bfa1_in_the_cytosol in Cytosol;  // isVersionOf uniprot:P47113; hasProperty PATO:0002355; hasProperty PATO:0002355
  species $Inactive_Tem1_at_the_SPB in SPB;  // isVersionOf uniprot:P38987; hasProperty PATO:0002355; hasProperty PATO:0002355
  species $Inactive_Tem1_in_the_cytosol in Cytosol;  // isVersionOf uniprot:P38987; hasProperty PATO:0002355; hasProperty PATO:0002355
  species $Total_Bfa1_at_the_SPB in SPB;  // isVersionOf uniprot:P47113
  species $Total_Bfa1_in_the_Cytosol in Cytosol;  // isVersionOf uniprot:P47113
  species $Total_Tem1_at_the_SPB in SPB;  // isVersionOf uniprot:P38987
  species $Total_Tem1_in_the_Cytosol in Cytosol;  // isVersionOf uniprot:P38987

  // Parameters:
  konB = 1250000 unit_0;
  koffB = 0.0012 unit_1;
  konB4 = 20000 unit_0;
  koffB4 = 0.0365 unit_1;
  konBT = 36500000 unit_0;
  konB4T = 36500000 unit_0;
  konB5T = 7000000 unit_0;
  koffBT = 0.183 unit_1;
  konT = 1900000 unit_0;
  koffT = 0.183 unit_1;
  kfKin4 = 1000 unit_1;
  kfKin4Cyto = 0.09 unit_1;
  krKin4 = 0.0251 unit_1;
  kfCdc5 = 1 unit_1;
  krCdc5 = 0.01 unit_1;
  khyd = 0.00224 unit_1;
  knex = 0.0136 unit_1;
  khydBT = 2 unit_1;
  khydB4T = 2 unit_1;
  u = 1 unit_2;
  alpha = 1 unit_2;
  q = 1 unit_2;
  avogadro = 6.0221415e23;

  // Assignment rules:
  Active_Bfa1_at_the_Cytosol := (q*(Bfa1 + Bfa1_Tem1GTP + Bfa1_Tem1GDP) + Bfa1P4 + Bfa1P4_Tem1GTP + Bfa1P4_Tem1GDP)*Cytosol*avogadro;
  Active_Tem1_at_the_SPB := (T_Tem1GTP + B_Bfa1_Tem1GTP + B_Bfa1P4_Tem1GTP + B_Bfa1P5_Tem1GTP)*SPB*avogadro;
  Active_Tem1_in_the_Cytosol := (Tem1GTP + Bfa1_Tem1GTP + Bfa1P4_Tem1GTP + Bfa1P5_Tem1GTP)*Cytosol*avogadro;
  Active_Bfa1_at_the_SPB := (q*(B_Bfa1 + B_Bfa1_Tem1GTP + B_Bfa1_Tem1GDP) + B_Bfa1P4 + B_Bfa1P4_Tem1GTP + B_Bfa1P4_Tem1GDP)*SPB*avogadro;
  Inactive_Bfa1_at_the_SPB := ((1 - q)*(B_Bfa1 + B_Bfa1_Tem1GTP + B_Bfa1_Tem1GDP) + B_Bfa1P5 + B_Bfa1P5_Tem1GTP + B_Bfa1P5_Tem1GDP)*SPB*avogadro;
  Inactive_Bfa1_in_the_cytosol := ((1 - q)*(Bfa1 + Bfa1_Tem1GDP + Bfa1_Tem1GTP) + Bfa1P5 + Bfa1P5_Tem1GTP + Bfa1P5_Tem1GDP)*Cytosol*avogadro;
  Inactive_Tem1_at_the_SPB := (T_Tem1GDP + B_Bfa1_Tem1GDP + B_Bfa1P4_Tem1GDP + B_Bfa1P5_Tem1GDP)*SPB*avogadro;
  Inactive_Tem1_in_the_cytosol := (Tem1GDP + Bfa1_Tem1GDP + Bfa1P4_Tem1GDP + Bfa1P5_Tem1GDP)*Cytosol*avogadro;
  Total_Tem1_at_the_SPB := Active_Tem1_at_the_SPB + Inactive_Tem1_at_the_SPB;
  Total_Bfa1_in_the_Cytosol := Active_Bfa1_at_the_Cytosol + Inactive_Bfa1_in_the_cytosol;
  Total_Bfa1_at_the_SPB := Active_Bfa1_at_the_SPB + Inactive_Bfa1_at_the_SPB;
  Total_Tem1_in_the_Cytosol := Active_Tem1_in_the_Cytosol + Inactive_Tem1_in_the_cytosol;

  // Reactions:
  R1_Rev_SPB_association_of_Bfa1: SPB_B + Bfa1 -> B_Bfa1; Function_for_R1__Rev__SPB_association_of_Bfa1(B_Bfa1, Bfa1, SPB_B, SPB, koffB, konB); R1_Rev_SPB_association_of_Bfa1 is "R1: Rev. SPB-association of Bfa1";  // isVersionOf GO:0005515
  R2: Bfa1P4 + SPB_B -> B_Bfa1P4; Function_for_R2__Rev__SPB_association_of_Kin4_phosphorylated_Bfa1(B_Bfa1P4, Bfa1P4, SPB_B, SPB, koffB4, konB4); R2 is "R2: Rev. SPB-association of Kin4-phosphorylated Bfa1";  // isVersionOf GO:0005488
  R3: Bfa1P5 + SPB_B -> B_Bfa1P5; Function_for_R3__Rev__SPB_association_of_Cdc5_phosphorylated_Bfa1(B_Bfa1P5, Bfa1P5, SPB_B, SPB, koffB, konB); R3 is "R3: Rev. SPB-association of Cdc5-phosphorylated Bfa1";  // isVersionOf GO:0005488
  R4: Bfa1_Tem1GTP + SPB_B -> B_Bfa1_Tem1GTP; Function_for_R4__Rev__SPB_association_of_Bfa1_Tem1GTP_complex(B_Bfa1_Tem1GTP, Bfa1_Tem1GTP, SPB_B, SPB, koffB, konB); R4 is "R4: Rev. SPB-association of Bfa1-Tem1GTP complex";  // isVersionOf GO:0005515
  R5: Bfa1P4_Tem1GTP + SPB_B -> B_Bfa1P4_Tem1GTP; Function_for_R5__Rev__SPB_association_of_Kin4_phosphorylated_Bfa1_Tem1GTP_complex(B_Bfa1P4_Tem1GTP, Bfa1P4_Tem1GTP, SPB_B, SPB, koffB4, konB4); R5 is "R5: Rev. SPB-association of Kin4-phosphorylated Bfa1-Tem1GTP complex";  // isVersionOf GO:0005488
  R6: Bfa1P5_Tem1GTP + SPB_B -> B_Bfa1P5_Tem1GTP; Function_for_R6__Rev__SPB_association_of_Cdc5_phosphorylated_Bfa1_Tem1GTP_complex(B_Bfa1P5_Tem1GTP, Bfa1P5_Tem1GTP, SPB_B, SPB, koffB, konB); R6 is "R6: Rev. SPB-association of Cdc5-phosphorylated Bfa1-Tem1GTP complex";  // isVersionOf GO:0005515
  R7: Bfa1_Tem1GDP + SPB_B -> B_Bfa1_Tem1GDP; Function_for_R7__Rev__SPB_association_of_Bfa1_Tem1GDP_complex(B_Bfa1_Tem1GDP, Bfa1_Tem1GDP, SPB_B, SPB, koffB, konB); R7 is "R7: Rev. SPB-association of Bfa1-Tem1GDP complex";  // isVersionOf GO:0005515
  R8: Bfa1P4_Tem1GDP + SPB_B -> B_Bfa1P4_Tem1GDP; Function_for_R8__Rev___SPB_association_of_Kin4_phosphorylated_Bfa1_Tem1GDP_complex(B_Bfa1P4_Tem1GDP, Bfa1P4_Tem1GDP, SPB_B, SPB, koffB4, konB4); R8 is "R8: Rev. SPB-association of Kin4 phosphorylated Bfa1-Tem1GDP complex";  // isVersionOf GO:0005515
  R9: Bfa1P5_Tem1GDP + SPB_B -> B_Bfa1P5_Tem1GDP; Function_for_R9__Rev__SPB_association_of_Cdc5_phosphorylated_Bfa1_Tem1GDP_complex(B_Bfa1P5_Tem1GDP, Bfa1P5_Tem1GDP, SPB_B, SPB, koffB, konB); R9 is "R9: Rev. SPB-association of Cdc5-phosphorylated Bfa1-Tem1GDP complex";  // isVersionOf GO:0005515
  R10: Tem1GTP + B_Bfa1 -> B_Bfa1_Tem1GTP; Function_for_R10__Rev__association_of_Tem1GTP_with_SPB_bound_Bfa1(B_Bfa1, B_Bfa1_Tem1GTP, Tem1GTP, SPB, koffBT, konBT); R10 is "R10: Rev. association of Tem1GTP with SPB-bound Bfa1";  // isVersionOf GO:0005515
  R11: Tem1GTP + B_Bfa1P4 -> B_Bfa1P4_Tem1GTP; Function_for_R11__Rev__association_of_Tem1GTP_with_SPB_bound_Kin4_phosphorylated_Bfa1(B_Bfa1P4, B_Bfa1P4_Tem1GTP, Tem1GTP, SPB, koffBT, konB4T); R11 is "R11: Rev. association of Tem1GTP with SPB-bound Kin4-phosphorylated Bfa1";  // isVersionOf GO:0005515
  R12: Tem1GTP + B_Bfa1P5 -> B_Bfa1P5_Tem1GTP; Function_for_R12__Rev__association_of_Tem1GTP_with_SPB_bound_Cdc5_phosphorylated_Bfa1(B_Bfa1P5, B_Bfa1P5_Tem1GTP, Tem1GTP, SPB, koffBT, konB5T); R12 is "R12: Rev. association of Tem1GTP with SPB-bound Cdc5-phosphorylated Bfa1";  // isVersionOf GO:0005515
  R13: Tem1GDP + B_Bfa1 -> B_Bfa1_Tem1GDP; Function_for_R13__Rev__association_of_Tem1GDP_with_SPB_bound_Bfa1(B_Bfa1, B_Bfa1_Tem1GDP, Tem1GDP, SPB, koffBT, konBT); R13 is "R13: Rev. association of Tem1GDP with SPB-bound Bfa1";  // isVersionOf GO:0005515
  R14: Tem1GDP + B_Bfa1P4 -> B_Bfa1P4_Tem1GDP; Function_for_R14__Rev__association_of_Tem1GDP_with_SPB_bound_Kin4_phosphorylated_Bfa1(B_Bfa1P4, B_Bfa1P4_Tem1GDP, Tem1GDP, SPB, koffBT, konB4T); R14 is "R14: Rev. association of Tem1GDP with SPB-bound Kin4-phosphorylated Bfa1";  // isVersionOf GO:0005515
  R15: Tem1GDP + B_Bfa1P5 -> B_Bfa1P5_Tem1GDP; Function_for_R15__Rev__association_of_Tem1GDP_with_SPB_bound_Cdc5_phosphorylated_Bfa1(B_Bfa1P5, B_Bfa1P5_Tem1GDP, Tem1GDP, SPB, koffBT, konB5T); R15 is "R15: Rev. association of Tem1GDP with SPB-bound Cdc5-phosphorylated Bfa1";  // isVersionOf GO:0005515
  R16: Bfa1 + Tem1GTP -> Bfa1_Tem1GTP; Cytosol*Function_for_R16__Rev__association_of_Tem1GTP_with_Bfa1(Bfa1, Bfa1_Tem1GTP, Tem1GTP, alpha, koffBT, konBT); R16 is "R16: Rev. association of Tem1GTP with Bfa1";  // isVersionOf GO:0005515
  R17: Bfa1P4 + Tem1GTP -> Bfa1P4_Tem1GTP; Cytosol*Function_for_R17__Rev__association_of_Tem1GTP_with_Kin4_phosphorylated_Bfa1(Bfa1P4, Bfa1P4_Tem1GTP, Tem1GTP, alpha, koffBT, konB4T); R17 is "R17: Rev. association of Tem1GTP with Kin4-phosphorylated Bfa1";  // isVersionOf GO:0005515
  R18: Bfa1P5 + Tem1GTP -> Bfa1P5_Tem1GTP; Cytosol*Function_for_R18__Rev__association_of_Tem1GTP_with_Cdc5_phosphorylated_Bfa1(Bfa1P5, Bfa1P5_Tem1GTP, Tem1GTP, alpha, koffBT, konB5T); R18 is "R18: Rev. association of Tem1GTP with Cdc5-phosphorylated Bfa1";  // isVersionOf GO:0005515
  R19: Bfa1 + Tem1GDP -> Bfa1_Tem1GDP; Cytosol*Function_for_R19__Rev__association_of_Tem1GDP_with_Bfa1(Bfa1, Bfa1_Tem1GDP, Tem1GDP, alpha, koffBT, konBT); R19 is "R19: Rev. association of Tem1GDP with Bfa1";  // isVersionOf GO:0005515
  R20: Bfa1P4 + Tem1GDP -> Bfa1P4_Tem1GDP; Cytosol*Function_for_R20__Rev__association_of_Tem1GDP_with_Kin4_phosphorylated_Bfa1(Bfa1P4, Bfa1P4_Tem1GDP, Tem1GDP, alpha, koffBT, konB4T); R20 is "R20: Rev. association of Tem1GDP with Kin4-phosphorylated Bfa1";  // isVersionOf GO:0005515
  R21: Bfa1P5 + Tem1GDP -> Bfa1P5_Tem1GDP; Cytosol*Function_for_R21__Rev__association_of_Tem1GDP_with_Cdc5_phosphorylated_Bfa1(Bfa1P5, Bfa1P5_Tem1GDP, Tem1GDP, alpha, koffBT, konB5T); R21 is "R21: Rev. association of Tem1GDP with Cdc5-phosphorylated Bfa1";  // isVersionOf GO:0005515
  R22: Tem1GTP + SPB_T -> T_Tem1GTP; Function_for_R22__Rev__SPB_association_of_Tem1GTP(SPB_T, T_Tem1GTP, Tem1GTP, SPB, koffT, konT); R22 is "R22: Rev. SPB-association of Tem1GTP";  // isVersionOf GO:0005488
  R23: Tem1GDP + SPB_T -> T_Tem1GDP; Function_for_R23__Rev__SPB_association_of_Tem1GDP(SPB_T, T_Tem1GDP, Tem1GDP, SPB, koffT, konT); R23 is "R23: Rev. SPB-association of Tem1GDP";  // isVersionOf GO:0005488
  R24: B_Bfa1 => B_Bfa1P4; SPB*Function_for_R24__Phosphorylation_of_SPB_bound_Bfa1_by_Kin4(B_Bfa1, kfKin4, u); R24 is "R24: Phosphorylation of SPB-bound Bfa1 by Kin4";  // isVersionOf GO:0006468
  R25: B_Bfa1_Tem1GTP => B_Bfa1P4_Tem1GTP; SPB*Function_for_R25__Phosphorylation_of_SPB_bound_Bfa1_Tem1GTP_by_Kin4(B_Bfa1_Tem1GTP, kfKin4, u); R25 is "R25: Phosphorylation of SPB-bound Bfa1:Tem1GTP by Kin4";  // isVersionOf GO:0006468
  R26: B_Bfa1_Tem1GDP => B_Bfa1P4_Tem1GDP; SPB*Function_for_R26__Phosphorylation_of_SPB_bound_Bfa1_Tem1GDP_by_Kin4(B_Bfa1_Tem1GDP, kfKin4, u); R26 is "R26: Phosphorylation of SPB-bound Bfa1:Tem1GDP by Kin4";  // isVersionOf GO:0006468
  R27: B_Bfa1 => B_Bfa1P5; SPB*kfCdc5*B_Bfa1; R27 is "R27: Phosphorylation of SPB-bound Bfa1 by Cdc5";  // isVersionOf GO:0006468
  R28: B_Bfa1_Tem1GTP => B_Bfa1P5_Tem1GTP; SPB*kfCdc5*B_Bfa1_Tem1GTP; R28 is "R28: Phosphorylation of SPB-bound Bfa1:Tem1GTP by Cdc5";  // isVersionOf GO:0006468
  R29: B_Bfa1_Tem1GDP => B_Bfa1P5_Tem1GDP; SPB*kfCdc5*B_Bfa1_Tem1GDP; R29 is "R29: Phosphorylation of SPB-bound Bfa1:Tem1GDP by Cdc5";  // isVersionOf GO:0006468
  R47: B_Bfa1P4_Tem1GTP => B_Bfa1P4_Tem1GDP; SPB*khydB4T*B_Bfa1P4_Tem1GTP; R47 is "R47: GAP-accelerated GTP-hydrolysis";  // isVersionOf GO:0003924; isVersionOf ncit:C16702
  R46: B_Bfa1_Tem1GTP => B_Bfa1_Tem1GDP; SPB*khydBT*B_Bfa1_Tem1GTP; R46 is "R46: GAP-accelerated GTP-hydrolysis";  // isVersionOf GO:0003924; isVersionOf ncit:C16702
  R48: B_Bfa1P5_Tem1GTP => B_Bfa1P5_Tem1GDP; SPB*khyd*B_Bfa1P5_Tem1GTP; R48 is "R48: GTP-hydrolysis with intrinisc GTPase activity";  // isVersionOf GO:0003924; isVersionOf ncit:C16702
  R30: Bfa1 => Bfa1P4; Cytosol*Function_for_R30__Phosphorylation_of_Bfa1_by_cytosolic_Kin4(Bfa1, kfKin4Cyto, u); R30 is "R30: Phosphorylation of Bfa1 by cytosolic Kin4";  // isVersionOf GO:0006468
  R33: Bfa1P4 => Bfa1; Cytosol*krKin4*Bfa1P4; R33 is "R33: Dephosphorylation of Bfa1 by a yet unidentified phosphatase counteracting Kin4";  // isVersionOf GO:0006470
  R36: Bfa1P5 => Bfa1; Cytosol*Function_for_R36__Dephosphorylation_of_Cdc5_phosphorylated_Bfa1_presumably_by_PP2A(Bfa1P5, krCdc5, u); R36 is "R36: Dephosphorylation of Cdc5-phosphorylated Bfa1 presumably by PP2A";  // isVersionOf GO:0006470
  R40: Tem1GDP => Tem1GTP; Cytosol*knex*Tem1GDP; R40 is "R40: GDP- for GTP nucleotide exchange";  // isVersionOf GO:0005085
  R39: Tem1GTP => Tem1GDP; Cytosol*khyd*Tem1GTP; R39 is "R39: GTP-hydrolysis with intrinisc GTPase activity";  // isVersionOf ncit:C16702
  R42: T_Tem1GDP => T_Tem1GTP; SPB*knex*T_Tem1GDP; R42 is "R42: GDP- for GTP nucleotide exchange";  // isVersionOf GO:0005085
  R41: T_Tem1GTP => T_Tem1GDP; SPB*khyd*T_Tem1GTP; R41 is "R41: GTP-hydrolysis with intrinisc GTPase activity";  // isVersionOf GO:0003924; isVersionOf ncit:C16702
  R44: Bfa1P4_Tem1GTP => Bfa1P4_Tem1GDP; Cytosol*khydB4T*Bfa1P4_Tem1GTP; R44 is "R44: GAP-accelerated GTP-hydrolysis";  // isVersionOf ncit:C16702; isVersionOf GO:0003924
  R43: Bfa1_Tem1GTP => Bfa1_Tem1GDP; Cytosol*khydBT*Bfa1_Tem1GTP; R43 is "R43: GAP-accelerated GTP-hydrolysis";  // isVersionOf GO:0003924; isVersionOf ncit:C16702
  R45: Bfa1P5_Tem1GTP => Bfa1P5_Tem1GDP; Cytosol*khyd*Bfa1P5_Tem1GTP; R45 is "R45: GTP-hydrolysis with intrinisc GTPase activity";  // isVersionOf ncit:C16702; isVersionOf GO:0003924
  R34: Bfa1P4_Tem1GTP => Bfa1_Tem1GTP; Cytosol*krKin4*Bfa1P4_Tem1GTP; R34 is "R34: Dephosphorylation of Bfa1 by a yet unidentified phosphatase counteracting Kin4";  // isVersionOf GO:0006470
  R37: Bfa1P5_Tem1GTP => Bfa1_Tem1GTP; Cytosol*Function_for_R37__Dephosphorylation_of_Cdc5_phosphorylated_Bfa1_presumably_by_PP2A(Bfa1P5_Tem1GTP, krCdc5, u); R37 is "R37: Dephosphorylation of Cdc5-phosphorylated Bfa1 presumably by PP2A";  // isVersionOf GO:0006470
  R31: Bfa1_Tem1GTP => Bfa1P4_Tem1GTP; Cytosol*Function_for_R31__Phosphorylation_of_Bfa1_Tem1GTP_by_cytosolic_Kin4(Bfa1_Tem1GTP, kfKin4Cyto, u); R31 is "R31: Phosphorylation of Bfa1:Tem1GTP by cytosolic Kin4";  // isVersionOf GO:0006468
  R35: Bfa1P4_Tem1GDP => Bfa1_Tem1GDP; Cytosol*krKin4*Bfa1P4_Tem1GDP; R35 is "R35: Dephosphorylation of Bfa1 by a yet unidentified phosphatase counteracting Kin4";  // isVersionOf GO:0006470
  R38: Bfa1P5_Tem1GDP => Bfa1_Tem1GDP; Cytosol*Function_for_R38__Dephosphorylation_of_Cdc5_phosphorylated_Bfa1_presumably_by_PP2A(Bfa1P5_Tem1GDP, krCdc5, u); R38 is "R38: Dephosphorylation of Cdc5-phosphorylated Bfa1 presumably by PP2A";  // isVersionOf GO:0006470
  R32: Bfa1_Tem1GDP => Bfa1P4_Tem1GDP; Cytosol*Function_for_R32__Phosphorylation_of_Bfa1_Tem1GDP_by_cytosolic_Kin4(Bfa1_Tem1GDP, kfKin4Cyto, u); R32 is "R32: Phosphorylation of Bfa1:Tem1GDP by cytosolic Kin4";  // isVersionOf GO:0006468

  // Events:
  SPOC_deactivation_upon_correct_spindle_alignment: at (time >= 1800): u = 0;

  // Unit definitions:
  unit time = 60 second;
  unit unit_0 = litre / (mole * second); unit_0 is "l/(mol*s)";
  unit unit_1 = 1 / second; unit_1 is "1/s";
  unit unit_2 = dimensionless^0; unit_2 is "1";
end
