// SBML level 2 version 4
// dcterms:bibliographicCitation: urn:miriam:pubmed:29668363

function Rate_Law_for_b_syn_1(A4, A4_star, A6, A6_star, Ip, Ip_star, KA4, KA6, KX, Kb4, Kb6, Kth4, Kth6, alphaA4, alphaA6, alphaI, alphaX, b_star, betaI, kdb, nA, nA4, nA6, x, x_star)
  kdb*((1 + alphaI*(Ip - Ip_star))/(1 + betaI*(Ip - Ip_star)))*b_star + alphaA6*(1 + Kb6*A4)*((A6 - A6_star)^nA6/((A6 - A6_star)^nA6 + KA6^nA6*(1 + Kth6*A4^nA))) + alphaA4*(1 + Kb4*A6)*((A4 - A4_star)^nA4/((A4 - A4_star)^nA4 + KA4^nA4*(1 + Kth4*A6)^nA4)) + alphaX*((x - x_star)/(x - x_star + KX));
end

function Rate_Law_for_b_degr_1(Ip, Ip_star, alphaI, b, betaI, kdb)
  kdb*((1 + alphaI*(Ip - Ip_star))/(1 + betaI*(Ip - Ip_star)))*b;
end

function Rate_Law_for_A6_syn_1(A6, A6_star, A6tot_norm, B, KBA6, U, U_star, kcl, kdA6)
  kdA6*A6_star + kcl*(U - U_star)*((A6tot_norm - A6)/(1 + B/KBA6));
end

function Rate_Law_for_U_degr_1(B, Ip, Ip_star, KII, U, delta)
  delta*(U/(1 + KII*(Ip - Ip_star)))*B;
end

function Rate_Law_for_A4_syn_1(A4_star, Ep, U, U_star, gamma, kdA4)
  kdA4*A4_star + gamma*(U - U_star)*Ep;
end

function Rate_Law_for_c_syn_1(A4, A4_star, A6, KA4c, Kc4, Kth4c, c_star, kdc, muA4, n)
  kdc*c_star + muA4*(1 + Kc4*A6)*((A4 - A4_star)^n/((A4 - A4_star)^n + KA4c^n*(1 + Kth4c*A6)^n));
end

function Rate_Law_for_C_syn_1(C_star, Ep, Ep_star, c, c_star, kdC, ktC)
  (kdC*C_star/c_star + ktC*(Ep - Ep_star))*c;
end

function Rate_Law_for_g_syn_1(A4, A4_star, C, C_star, KA4g, KC, Kth4g, etaC, g_star, kdg)
  kdg*g_star + etaC*((A4 - A4_star + KA4g*(A4 - A4_star)*(C - C_star))/(A4 - A4_star + Kth4g*(A4 - A4_star)*(C - C_star) + KC));
end

function Rate_Law_for_G_syn_1(Ep, Ep_star, G_star, g, g_star, kdG, ktG)
  (kdG*G_star/g_star + ktG*(Ep - Ep_star))*g;
end

function Rate_Law_for_Ep_degr_1(Ep, G, G_star, Kdeph, kdeph1, kdeph2)
  (kdeph1 + kdeph2*(G - G_star))*(Ep/(Kdeph + Ep));
end

function Rate_Law_for_U_syn_1(Ep, Ip, Ip_star, KE, KUI, KUU, Stress, U, ksU, n)
  (ksU/(1 + KUI*(Ip - Ip_star)) + Stress)/(1 + Ep/KE + (U/KUU)^n);
end

function Rate_Law_for_Btot_syn_1(Btot_star, b, b_star, kdB)
  kdB*Btot_star/b_star*b;
end

function Rate_Law_for_Ep_syn_1(Ep, Etot_norm, Kph, Pp, kph)
  kph*((Etot_norm - Ep)*Pp/(Kph + (Etot_norm - Ep)));
end

function Rate_Law_for_x_syn_1(Ip, Kx, ksp, x, xtot_norm)
  ksp*Ip*((xtot_norm - x)/(Kx + xtot_norm - x));
end

model Diedrichs2018___A_data_entrained_computational_model_for_testing_the_regulatory_logic_of_the_vertebrate_unfolded_protein_response()
  // Diedrichs2018 - A data-entrained computational model for testing the regulatory logic of the vertebrate unfolded protein response
  // A data-entrained computational model for testing the regulatory logic of the vertebrate unfolded protein response
  // This model is described in the article:
  // A data-entrained computational model for testing the regulatory logic of the vertebrate unfolded protein response.
  // Diedrichs DR, Gomez JA, Huang CS, Rutkowski DT, Curtu R.
  // Mol. Biol. Cell 2018 Apr; : mbcE17090565
  // Abstract:
  // The vertebrate unfolded protein response (UPR) is characterized by multiple interacting nodes among its three pathways, yet the logic underlying this regulatory complexity is unclear. To begin to address this issue, we created a computational model of the vertebrate UPR that was entrained upon and then validated against experimental data. As part of this validation, the model successfully predicted the phenotypes of cells with lesions in UPR signaling, including a surprising and previously unreported differential role for the eIF2? phosphatase GADD34 in exacerbating severe stress but ameliorating mild stress. We then used the model to test the functional importance of a feed-forward circuit within the PERK/CHOP axis, and of cross-regulatory control of BiP and CHOP expression. We found that the wiring structure of the UPR appears to balance the ability of the response to remain sensitive to ER stress yet also to be rapidly deactivated by improved protein folding conditions. This model should serve as a valuable resource for further exploring the regulatory logic of the UPR.
  // This model is hosted on BioModels Databaseand identified by: MODEL1803300000.
  // To cite BioModels Database, please use: Chelliah V et al. BioModels: ten-year anniversary. Nucl. Acids Res. 2015, 43(Database issue):D542-8.
  // To the extent possible under law, all copyright and related or neighbouring rights to this encoded model have been dedicated to the public domain worldwide. Please refer to CC0 Public Domain Dedicationfor more information.
  // biomodels.db:MODEL1803300000
  // isDescribedBy pubmed:29668363
  // biomodels.db:BIOMD0000000703
  // hasPart reactome:R-HSA-381130
  // isVersionOf GO:0006986
  // isVersionOf reactome:R-HSA-381119

  // Compartments:
  compartment ER = 1;  // isVersionOf GO:0005783

  // Species:
  species U in ER = U_star;  // isVersionOf reactome:R-HSA-381130
  species A6 in ER = A6_star;  // isVersionOf uniprot:P18850; isVersionOf uniprot:Q99941
  species b in ER = b_star;  // encodes ncit:C21160; isVersionOf SO:0000234
  species Btot in ER = Btot_star;  // isVersionOf ncit:C21160
  species A4 in ER = A4_star;  // isVersionOf uniprot:P18848
  species c in ER = c_star;  // encodes uniprot:P35638; isVersionOf SO:0000234
  species C in ER = C_star;  // isVersionOf uniprot:P35638
  species g in ER = g_star;  // encodes uniprot:O75807; isVersionOf SO:0000234
  species G in ER = G_star;  // isVersionOf uniprot:O75807
  species Ep in ER = Ep_star;  // isVersionOf uniprot:P05198; hasProperty GO:0016310
  species x in ER = x_star;  // isVersionOf uniprot:P17861

  // Parameters:
  B has unit_0;  // isVersionOf uniprot:C21160
  KBU = 0.8 unit_0;
  KBP = 0.01 unit_0;
  KBA6 = 1.6e-5 unit_0;
  A6tot_norm = 15 unit_0;
  CHOP_BiP_ratio has unit_0; CHOP_BiP_ratio is "CHOP/BiP ratio";
  G_star = 1 unit_0;
  C_star = 1 unit_0;
  A4_star = 1 unit_0;
  U_star = 1 unit_0;
  A6_star = 1 unit_0;
  b_star = 1 unit_0;
  c_star = 1 unit_0;
  g_star = 1 unit_0;
  Btot_star = 1 unit_0;
  kdB = 0.0002514 unit_1;
  kdb = 0.001284 unit_1;
  kdA4 = 0.00384 unit_1;
  kdA6 = 0.00384 unit_1;
  kdc = 0.00393 unit_1;
  kdC = 0.005478 unit_1;
  kdg = 0.003468 unit_1;
  kdG = 0.003852 unit_1;
  Ep_star = 1 unit_0;
  Stress = 2 unit_1;
  Etot_norm = 20 unit_0;
  f = 0.02 unit_0;
  x_star = 1 unit_0;
  xtot_norm = 16 unit_0;
  kdx = 0.006546 unit_1;
  KUP has unit_0;
  KBI = 0.01 unit_0;
  KUI has unit_0;
  Pp has unit_0;  // isVersionOf uniprot:Q9NZJ5; hasProperty GO:0016310
  Ip has unit_0;  // isVersionOf uniprot:O75460; hasProperty GO:0016310
  KOperk = 1 unit_0;
  KOire1 = 1 unit_0;
  fi = 0.01 unit_0;
  alphaI = 0.2 unit_0;
  Ip_star = 1 unit_0;
  betaI = 0.1 unit_0;

  // Assignment rules:
  B := Btot/(1 + U/KBU);
  CHOP_BiP_ratio := C/Btot;
  KUP := (1/f - 1)*(U_star/(1 + Btot_star/KBP*(1/(1 + U_star/KBU))));
  KUI := (1/fi - 1)*(U_star/(1 + Btot_star/KBI*(1/(1 + U_star/KBU))));
  Pp := KOperk*(1/f)*(U/(KUP + KUP/KBP*B + U));
  Ip := KOire1*(1/fi)*(U/(KUI + KUI/KBI*B + U));

  // Reactions:
  Btot_degr: Btot => ; ER*kdB*Btot;
  b_syn: => b; ER*Rate_Law_for_b_syn_1(A4, A4_star, A6, A6_star, Ip, Ip_star, KA4, KA6, KX, Kb4, Kb6, Kth4, Kth6, alphaA4, alphaA6, alphaI, alphaX, b_star, betaI, kdb, nA, nA4, nA6, x, x_star);  // modifiers: A4, A6, x
    KA4 = 3; KA6 = 3; KX = 8; Kb4 = 0.5; Kb6 = 0.56; Kth4 = 0.167; Kth6 = 1e-5; alphaA4 = 0.007; alphaA6 = 0.012; alphaX = 0.002; nA = 7; nA4 = 2; nA6 = 2;
  b_degr: b => ; ER*Rate_Law_for_b_degr_1(Ip, Ip_star, alphaI, b, betaI, kdb);  // modifiers: A4, A6
  A6_degr: A6 => ; ER*kdA6*A6;
  A6_syn: => A6; ER*Rate_Law_for_A6_syn_1(A6, A6_star, A6tot_norm, B, KBA6, U, U_star, kcl, kdA6);  // modifiers: U
    kcl = 4;
  U_degr: U => ; ER*Rate_Law_for_U_degr_1(B, Ip, Ip_star, KII, U, delta);  // modifiers: x
    KII = 0.01; delta = 1.5;
  A4_syn: => A4; ER*Rate_Law_for_A4_syn_1(A4_star, Ep, U, U_star, gamma, kdA4);  // modifiers: U, Ep
    gamma = 0.001;
  A4_degr: A4 => ; ER*kdA4*A4;
  c_syn: => c; ER*Rate_Law_for_c_syn_1(A4, A4_star, A6, KA4c, Kc4, Kth4c, c_star, kdc, muA4, c_syn_n);  // modifiers: A6, A4, C
    KA4c = 2; Kc4 = 0.56; Kth4c = 0.25; muA4 = 0.1; c_syn_n = 2;
  c_degr: c => ; ER*kdc*c;  // modifiers: C
  C_syn: => C; ER*Rate_Law_for_C_syn_1(C_star, Ep, Ep_star, c, c_star, kdC, ktC);  // modifiers: Ep, c
    ktC = 0.0001;
  C_degr: C => ; ER*kdC*C;
  g_syn: => g; ER*Rate_Law_for_g_syn_1(A4, A4_star, C, C_star, KA4g, KC, Kth4g, etaC, g_star, kdg);  // modifiers: A4, C
    KA4g = 0.75; KC = 5; Kth4g = 0.1; etaC = 0.012;
  g_degr: g => ; ER*kdg*g;  // modifiers: C
  G_syn: => G; ER*Rate_Law_for_G_syn_1(Ep, Ep_star, G_star, g, g_star, kdG, ktG);  // modifiers: Ep, g
    ktG = 0.0015;
  G_degr: G => ; ER*kdG*G;
  Ep_degr: Ep => ; ER*Rate_Law_for_Ep_degr_1(Ep, G, G_star, Kdeph, kdeph1, kdeph2);  // modifiers: G
    Kdeph = 7; kdeph1 = 0.03; kdeph2 = 0.08;
  U_syn: => U; ER*Rate_Law_for_U_syn_1(Ep, Ip, Ip_star, KE, U_syn_KUI, KUU, Stress, U, ksU, U_syn_n);  // modifiers: Ep
    KE = 3; U_syn_KUI = 0.01; KUU = 6; ksU = 0.89; U_syn_n = 4;
  Btot_syn: => Btot; ER*Rate_Law_for_Btot_syn_1(Btot_star, b, b_star, kdB);  // modifiers: b
  Ep_syn: => Ep; ER*Rate_Law_for_Ep_syn_1(Ep, Etot_norm, Kph, Pp, kph);
    Kph = 14; kph = 0.00651;
  x_degr: x => ; ER*kdx*x;  // modifiers: A6
  x_syn: => x; ER*Rate_Law_for_x_syn_1(Ip, Kx, ksp, x, xtot_norm);
    Kx = 3; ksp = 0.00785;

  // Unit definitions:
  unit volume = 1e-3 litre;
  unit time = 60 second;
  unit substance = item;
  unit unit_0 = dimensionless^0; unit_0 is "1";
  unit unit_1 = 1 / (16.6667 second); unit_1 is "1/(16.6667*s)";
end
