// SBML level 2 version 4
// dcterms:bibliographicCitation: urn:miriam:doi:doi:10.1371/journal.pone.0011092

function Constant_flux__irreversible(v)
  v;
end
Constant_flux__irreversible is "Constant flux (irreversible)";

function Function_for_Synthesis(E2F1, cytoplasm, ksynth)
  E2F1*cytoplasm*ksynth/cytoplasm;
end

function Function_for_transport_cytoplasm_Foxo1_Pa0_pUb0_to_nucleus_Foxo1_Pa0_pUb0(cytoplasm, cytoplasm_Foxo1_Pa0_pUb0, ktr)
  cytoplasm_Foxo1_Pa0_pUb0*cytoplasm*ktr;
end

function Function_for_transport_nucleus_Foxo1_Pa0_pUb0_to_cytoplasm_Foxo1_Pa0_pUb0(ktr, nucleus, nucleus_Foxo1_Pa0_pUb0)
  nucleus_Foxo1_Pa0_pUb0*nucleus*ktr;
end

function Function_for_transport_nucleus_Foxo1_Pa0_pUb0_to_dnabound_Foxo1_Pa0_pUb0(ktr, nucleus, nucleus_Foxo1_Pa0_pUb0)
  nucleus_Foxo1_Pa0_pUb0*nucleus*ktr;
end

function Function_for_transport_dnabound_Foxo1_Pa0_pUb0_to_nucleus_Foxo1_Pa0_pUb0(dnabound, dnabound_Foxo1_Pa0_pUb0, ktr)
  dnabound_Foxo1_Pa0_pUb0*dnabound*ktr;
end

function Function_for_transport_cytoplasm_Foxo1_Pa0_pUb1_to_nucleus_Foxo1_Pa0_pUb1(cytoplasm, cytoplasm_Foxo1_Pa0_pUb1, ktr)
  cytoplasm_Foxo1_Pa0_pUb1*cytoplasm*ktr;
end

function Function_for_transport_nucleus_Foxo1_Pa0_pUb1_to_cytoplasm_Foxo1_Pa0_pUb1(ktr, nucleus, nucleus_Foxo1_Pa0_pUb1)
  nucleus_Foxo1_Pa0_pUb1*nucleus*ktr;
end

function Function_for_transport_nucleus_Foxo1_Pa0_pUb1_to_dnabound_Foxo1_Pa0_pUb1(ktr, nucleus, nucleus_Foxo1_Pa0_pUb1)
  nucleus_Foxo1_Pa0_pUb1*nucleus*ktr;
end

function Function_for_transport_dnabound_Foxo1_Pa0_pUb1_to_nucleus_Foxo1_Pa0_pUb1(dnabound, dnabound_Foxo1_Pa0_pUb1, ktr)
  dnabound_Foxo1_Pa0_pUb1*dnabound*ktr;
end

function Function_for_transport_cytoplasm_Foxo1_Pa1_pUb0_to_nucleus_Foxo1_Pa1_pUb0(cytoplasm, cytoplasm_Foxo1_Pa1_pUb0, ktr)
  cytoplasm_Foxo1_Pa1_pUb0*cytoplasm*ktr;
end

function Function_for_transport_nucleus_Foxo1_Pa1_pUb0_to_cytoplasm_Foxo1_Pa1_pUb0(ktr, nucleus, nucleus_Foxo1_Pa1_pUb0)
  nucleus_Foxo1_Pa1_pUb0*nucleus*ktr;
end

function Function_for_transport_nucleus_Foxo1_Pa1_pUb0_to_dnabound_Foxo1_Pa1_pUb0(ktr, nucleus, nucleus_Foxo1_Pa1_pUb0)
  nucleus_Foxo1_Pa1_pUb0*nucleus*ktr;
end

function Function_for_transport_dnabound_Foxo1_Pa1_pUb0_to_nucleus_Foxo1_Pa1_pUb0(dnabound, dnabound_Foxo1_Pa1_pUb0, ktr)
  dnabound_Foxo1_Pa1_pUb0*dnabound*ktr;
end

function Function_for_transport_cytoplasm_Foxo1_Pa1_pUb1_to_nucleus_Foxo1_Pa1_pUb1(cytoplasm, cytoplasm_Foxo1_Pa1_pUb1, ktr)
  cytoplasm_Foxo1_Pa1_pUb1*cytoplasm*ktr;
end

function Function_for_transport_nucleus_Foxo1_Pa1_pUb1_to_cytoplasm_Foxo1_Pa1_pUb1(ktr, nucleus, nucleus_Foxo1_Pa1_pUb1)
  nucleus_Foxo1_Pa1_pUb1*nucleus*ktr;
end

function Function_for_transport_nucleus_Foxo1_Pa1_pUb1_to_dnabound_Foxo1_Pa1_pUb1(ktr, nucleus, nucleus_Foxo1_Pa1_pUb1)
  nucleus_Foxo1_Pa1_pUb1*nucleus*ktr;
end

function Function_for_transport_dnabound_Foxo1_Pa1_pUb1_to_nucleus_Foxo1_Pa1_pUb1(dnabound, dnabound_Foxo1_Pa1_pUb1, ktr)
  dnabound_Foxo1_Pa1_pUb1*dnabound*ktr;
end

function Function_for_conversion_of_cytoplasm_Foxo1_Pa0_pUb0_to_cytoplasm_Foxo1_Pa1_pUb0_by_Akt(Akt, cytoplasm, cytoplasm_Foxo1_Pa0_pUb0, kkin)
  cytoplasm_Foxo1_Pa0_pUb0*cytoplasm*Akt*cytoplasm*kkin/cytoplasm;
end

function Function_for_conversion_of_nucleus_Foxo1_Pa0_pUb0_to_nucleus_Foxo1_Pa1_pUb0_by_Akt(Akt, cytoplasm, kkin, nucleus, nucleus_Foxo1_Pa0_pUb0)
  nucleus_Foxo1_Pa0_pUb0*nucleus*Akt*cytoplasm*kkin;
end

function Function_for_conversion_of_dnabound_Foxo1_Pa0_pUb0_to_dnabound_Foxo1_Pa1_pUb0_by_Akt(Akt, cytoplasm, dnabound, dnabound_Foxo1_Pa0_pUb0, kkin)
  dnabound_Foxo1_Pa0_pUb0*dnabound*Akt*cytoplasm*kkin;
end

function Function_for_conversion_of_cytoplasm_Foxo1_Pa0_pUb1_to_cytoplasm_Foxo1_Pa1_pUb1_by_Akt(Akt, cytoplasm, cytoplasm_Foxo1_Pa0_pUb1, kkin)
  cytoplasm_Foxo1_Pa0_pUb1*cytoplasm*Akt*cytoplasm*kkin/cytoplasm;
end

function Function_for_conversion_of_nucleus_Foxo1_Pa0_pUb1_to_nucleus_Foxo1_Pa1_pUb1_by_Akt(Akt, cytoplasm, kkin, nucleus, nucleus_Foxo1_Pa0_pUb1)
  nucleus_Foxo1_Pa0_pUb1*nucleus*Akt*cytoplasm*kkin;
end

function Function_for_conversion_of_dnabound_Foxo1_Pa0_pUb1_to_dnabound_Foxo1_Pa1_pUb1_by_Akt(Akt, cytoplasm, dnabound, dnabound_Foxo1_Pa0_pUb1, kkin)
  dnabound_Foxo1_Pa0_pUb1*dnabound*Akt*cytoplasm*kkin;
end

function Function_for_conversion_of_cytoplasm_Foxo1_Pa0_pUb0_to_cytoplasm_Foxo1_Pa1_pUb0_by_SGK(SGK, cytoplasm, cytoplasm_Foxo1_Pa0_pUb0, kkin)
  cytoplasm_Foxo1_Pa0_pUb0*cytoplasm*SGK*cytoplasm*kkin/cytoplasm;
end

function Function_for_conversion_of_nucleus_Foxo1_Pa0_pUb0_to_nucleus_Foxo1_Pa1_pUb0_by_SGK(SGK, cytoplasm, kkin, nucleus, nucleus_Foxo1_Pa0_pUb0)
  nucleus_Foxo1_Pa0_pUb0*nucleus*SGK*cytoplasm*kkin;
end

function Function_for_conversion_of_dnabound_Foxo1_Pa0_pUb0_to_dnabound_Foxo1_Pa1_pUb0_by_SGK(SGK, cytoplasm, dnabound, dnabound_Foxo1_Pa0_pUb0, kkin)
  dnabound_Foxo1_Pa0_pUb0*dnabound*SGK*cytoplasm*kkin;
end

function Function_for_conversion_of_cytoplasm_Foxo1_Pa0_pUb1_to_cytoplasm_Foxo1_Pa1_pUb1_by_SGK(SGK, cytoplasm, cytoplasm_Foxo1_Pa0_pUb1, kkin)
  cytoplasm_Foxo1_Pa0_pUb1*cytoplasm*SGK*cytoplasm*kkin/cytoplasm;
end

function Function_for_conversion_of_nucleus_Foxo1_Pa0_pUb1_to_nucleus_Foxo1_Pa1_pUb1_by_SGK(SGK, cytoplasm, kkin, nucleus, nucleus_Foxo1_Pa0_pUb1)
  nucleus_Foxo1_Pa0_pUb1*nucleus*SGK*cytoplasm*kkin;
end

function Function_for_conversion_of_dnabound_Foxo1_Pa0_pUb1_to_dnabound_Foxo1_Pa1_pUb1_by_SGK(SGK, cytoplasm, dnabound, dnabound_Foxo1_Pa0_pUb1, kkin)
  dnabound_Foxo1_Pa0_pUb1*dnabound*SGK*cytoplasm*kkin;
end

function Function_for_conversion_of_cytoplasm_Foxo1_Pa1_pUb0_to_cytoplasm_Foxo1_Pa0_pUb0_by_PP2A(PP2A, cytoplasm, cytoplasm_Foxo1_Pa1_pUb0, kdephos)
  cytoplasm_Foxo1_Pa1_pUb0*cytoplasm*PP2A*cytoplasm*kdephos/cytoplasm;
end

function Function_for_conversion_of_nucleus_Foxo1_Pa1_pUb0_to_nucleus_Foxo1_Pa0_pUb0_by_PP2A(PP2A, cytoplasm, kdephos, nucleus, nucleus_Foxo1_Pa1_pUb0)
  nucleus_Foxo1_Pa1_pUb0*nucleus*PP2A*cytoplasm*kdephos;
end

function Function_for_conversion_of_dnabound_Foxo1_Pa1_pUb0_to_dnabound_Foxo1_Pa0_pUb0_by_PP2A(PP2A, cytoplasm, dnabound, dnabound_Foxo1_Pa1_pUb0, kdephos)
  dnabound_Foxo1_Pa1_pUb0*dnabound*PP2A*cytoplasm*kdephos;
end

function Function_for_conversion_of_cytoplasm_Foxo1_Pa1_pUb1_to_cytoplasm_Foxo1_Pa0_pUb1_by_PP2A(PP2A, cytoplasm, cytoplasm_Foxo1_Pa1_pUb1, kdephos)
  cytoplasm_Foxo1_Pa1_pUb1*cytoplasm*PP2A*cytoplasm*kdephos/cytoplasm;
end

function Function_for_conversion_of_nucleus_Foxo1_Pa1_pUb1_to_nucleus_Foxo1_Pa0_pUb1_by_PP2A(PP2A, cytoplasm, kdephos, nucleus, nucleus_Foxo1_Pa1_pUb1)
  nucleus_Foxo1_Pa1_pUb1*nucleus*PP2A*cytoplasm*kdephos;
end

function Function_for_conversion_of_dnabound_Foxo1_Pa1_pUb1_to_dnabound_Foxo1_Pa0_pUb1_by_PP2A(PP2A, cytoplasm, dnabound, dnabound_Foxo1_Pa1_pUb1, kdephos)
  dnabound_Foxo1_Pa1_pUb1*dnabound*PP2A*cytoplasm*kdephos;
end

function Function_for_conversion_of_cytoplasm_Foxo1_Pa0_pUb0_to_cytoplasm_Foxo1_Pa0_pUb1_by_SCF(SCF, cytoplasm, cytoplasm_Foxo1_Pa0_pUb0, kub)
  cytoplasm_Foxo1_Pa0_pUb0*cytoplasm*SCF*cytoplasm*kub/cytoplasm;
end

function Function_for_conversion_of_nucleus_Foxo1_Pa0_pUb0_to_nucleus_Foxo1_Pa0_pUb1_by_SCF(SCF, cytoplasm, kub, nucleus, nucleus_Foxo1_Pa0_pUb0)
  nucleus_Foxo1_Pa0_pUb0*nucleus*SCF*cytoplasm*kub;
end

function Function_for_conversion_of_dnabound_Foxo1_Pa0_pUb0_to_dnabound_Foxo1_Pa0_pUb1_by_SCF(SCF, cytoplasm, dnabound, dnabound_Foxo1_Pa0_pUb0, kub)
  dnabound_Foxo1_Pa0_pUb0*dnabound*SCF*cytoplasm*kub;
end

function Function_for_conversion_of_cytoplasm_Foxo1_Pa1_pUb0_to_cytoplasm_Foxo1_Pa1_pUb1_by_SCF(SCF, cytoplasm, cytoplasm_Foxo1_Pa1_pUb0, kub)
  cytoplasm_Foxo1_Pa1_pUb0*cytoplasm*SCF*cytoplasm*kub/cytoplasm;
end

function Function_for_conversion_of_nucleus_Foxo1_Pa1_pUb0_to_nucleus_Foxo1_Pa1_pUb1_by_SCF(SCF, cytoplasm, kub, nucleus, nucleus_Foxo1_Pa1_pUb0)
  nucleus_Foxo1_Pa1_pUb0*nucleus*SCF*cytoplasm*kub;
end

function Function_for_conversion_of_dnabound_Foxo1_Pa1_pUb0_to_dnabound_Foxo1_Pa1_pUb1_by_SCF(SCF, cytoplasm, dnabound, dnabound_Foxo1_Pa1_pUb0, kub)
  dnabound_Foxo1_Pa1_pUb0*dnabound*SCF*cytoplasm*kub;
end

function Function_for_degradation_of_cytoplasm_Foxo1_Pa0_pUb1(Proteasome, cytoplasm, cytoplasm_Foxo1_Pa0_pUb1, kdeg)
  cytoplasm_Foxo1_Pa0_pUb1*cytoplasm*Proteasome*cytoplasm*kdeg/cytoplasm;
end

function Function_for_degradation_of_cytoplasm_Foxo1_Pa1_pUb1(Proteasome, cytoplasm, cytoplasm_Foxo1_Pa1_pUb1, kdeg)
  cytoplasm_Foxo1_Pa1_pUb1*cytoplasm*Proteasome*cytoplasm*kdeg/cytoplasm;
end

function Function_for_transcription_of_inr_by_dnabound_Foxo1_Pa0_pUb0(dnabound, dnabound_Foxo1_Pa0_pUb0, ktranscr)
  dnabound_Foxo1_Pa0_pUb0*dnabound*ktranscr;
end

function Function_for_transcription_of_sod2_by_dnabound_Foxo1_Pa0_pUb0(dnabound, dnabound_Foxo1_Pa0_pUb0, ktranscr)
  dnabound_Foxo1_Pa0_pUb0*dnabound*ktranscr;
end

function Function_for_transcription_of_inr_by_dnabound_Foxo1_Pa0_pUb1(dnabound, dnabound_Foxo1_Pa0_pUb1, ktranscr)
  dnabound_Foxo1_Pa0_pUb1*dnabound*ktranscr;
end

function Function_for_transcription_of_sod2_by_dnabound_Foxo1_Pa0_pUb1(dnabound, dnabound_Foxo1_Pa0_pUb1, ktranscr)
  dnabound_Foxo1_Pa0_pUb1*dnabound*ktranscr;
end

function Function_for_transcription_of_inr_by_dnabound_Foxo1_Pa1_pUb0(dnabound, dnabound_Foxo1_Pa1_pUb0, ktranscr)
  dnabound_Foxo1_Pa1_pUb0*dnabound*ktranscr;
end

function Function_for_transcription_of_sod2_by_dnabound_Foxo1_Pa1_pUb0(dnabound, dnabound_Foxo1_Pa1_pUb0, ktranscr)
  dnabound_Foxo1_Pa1_pUb0*dnabound*ktranscr;
end

function Function_for_transcription_of_inr_by_dnabound_Foxo1_Pa1_pUb1(dnabound, dnabound_Foxo1_Pa1_pUb1, ktranscr)
  dnabound_Foxo1_Pa1_pUb1*dnabound*ktranscr;
end

function Function_for_transcription_of_sod2_by_dnabound_Foxo1_Pa1_pUb1(dnabound, dnabound_Foxo1_Pa1_pUb1, ktranscr)
  dnabound_Foxo1_Pa1_pUb1*dnabound*ktranscr;
end

function Function_for_export_of_inr_RNA(kexp, nucleus, nucleus_RNA_Inr)
  nucleus_RNA_Inr*nucleus*kexp;
end

function Function_for_cyto_degr_of_inr_RNA(cytoplasm, cytoplasm_RNA_Inr, kmdeg)
  cytoplasm_RNA_Inr*cytoplasm*kmdeg/cytoplasm;
end

function Function_for_translation_of_inr(cytoplasm, cytoplasm_RNA_Inr, ktransl)
  cytoplasm_RNA_Inr*cytoplasm*ktransl/cytoplasm;
end

function Function_for_degradation_of_Inr_protein(cytoplasm, cytoplasm_Inr, kpdeg)
  cytoplasm_Inr*cytoplasm*kpdeg/cytoplasm;
end

function Function_for_export_of_sod2_RNA(kexp, nucleus, nucleus_RNA_Sod2)
  nucleus_RNA_Sod2*nucleus*kexp;
end

function Function_for_cyto_degr_of_sod2_RNA(cytoplasm, cytoplasm_RNA_Sod2, kmdeg)
  cytoplasm_RNA_Sod2*cytoplasm*kmdeg/cytoplasm;
end

function Function_for_translation_of_sod2(cytoplasm, cytoplasm_RNA_Sod2, ktransl)
  cytoplasm_RNA_Sod2*cytoplasm*ktransl/cytoplasm;
end

function Function_for_degradation_of_Sod2_protein(cytoplasm, cytoplasm_Sod2, kpdeg)
  cytoplasm_Sod2*cytoplasm*kpdeg/cytoplasm;
end

model Smith2010___Response_of_FOXO_Transcription_Factors_to_Post_Translational_Modifications_Made_by_Ageing_Related_Signalling_Pathways()
  // Smith2010 - Response of FOXO Transcription Factors to Post-Translational Modifications Made by Ageing-Related Signalling Pathways
  // biomodels.db:MODEL1112260000
  // isDescribedBy pubmed:20567500
  // biomodels.db:BIOMD0000000705
  // hasPart ncit:C17557
  // hasPart GO:0051726
  // hasPart GO:0008152

  // Compartments:
  compartment extracellular = 8.3e-12;  // isVersionOf GO:0005576
  compartment cellsurface = 6.4e-14;  // isVersionOf GO:0009986
  compartment cytoplasm = 1.65e-11;  // isVersionOf GO:0005737
  compartment nucleus = 5e-13;  // isVersionOf GO:0005634
  // Contains all species bound to dna
  compartment dnabound = 1e-13;  // hasProperty GO:0003677

  // Species:
  species $null in cytoplasm = 0;
  species $degr_Foxo1 in cytoplasm = 0;  // isHomologTo uniprot:Q9R1E0; hasProperty ncit:C25650
  species cytoplasm_Foxo1_Pa0_pUb0 in cytoplasm = 6.060606e13; cytoplasm_Foxo1_Pa0_pUb0 is "cytoplasm_Foxo1_unpolyubiquitinated_unphosphorylated";  // isHomologTo uniprot:Q9R1E0
  species nucleus_Foxo1_Pa0_pUb0 in nucleus = 0; nucleus_Foxo1_Pa0_pUb0 is "nucleus_Foxo1_unpolyubiquitinated_unphosphorylated";  // isHomologTo uniprot:Q9R1E0
  species dnabound_Foxo1_Pa0_pUb0 in dnabound = 0; dnabound_Foxo1_Pa0_pUb0 is "dnabound_Foxo1_unpolyubiquitinated_unphosphorylated";  // isHomologTo uniprot:Q9R1E0
  species cytoplasm_Foxo1_Pa0_pUb1 in cytoplasm = 0; cytoplasm_Foxo1_Pa0_pUb1 is "cytoplasm_Foxo1_polyubiquitinated";  // isHomologTo uniprot:Q9R1E0; hasProperty PR:000037077
  species nucleus_Foxo1_Pa0_pUb1 in nucleus = 0; nucleus_Foxo1_Pa0_pUb1 is "nucleus_Foxo1_polyubiquitinated";  // isHomologTo uniprot:Q9R1E0; hasProperty PR:000037077
  species dnabound_Foxo1_Pa0_pUb1 in dnabound = 0; dnabound_Foxo1_Pa0_pUb1 is "dnabound_Foxo1_polyubiquitinated";  // isHomologTo uniprot:Q9R1E0; hasProperty PR:000037077
  species cytoplasm_Foxo1_Pa1_pUb0 in cytoplasm = 0; cytoplasm_Foxo1_Pa1_pUb0 is "cytoplasm_Foxo1_phosphorylated";  // isHomologTo uniprot:Q9R1E0; hasProperty PATO:0002220
  species nucleus_Foxo1_Pa1_pUb0 in nucleus = 0; nucleus_Foxo1_Pa1_pUb0 is "nucleus_Foxo1_phosphorylated";  // isHomologTo uniprot:Q9R1E0; hasProperty PATO:0002220
  species dnabound_Foxo1_Pa1_pUb0 in dnabound = 0; dnabound_Foxo1_Pa1_pUb0 is "dnabound_Foxo1_phosphorylated";  // isHomologTo uniprot:Q9R1E0; hasProperty PATO:0002220
  species cytoplasm_Foxo1_Pa1_pUb1 in cytoplasm = 0; cytoplasm_Foxo1_Pa1_pUb1 is "cytoplasm_Foxo1_polyubiquitinated_phosphorylated";  // isHomologTo uniprot:Q9R1E0; hasProperty PATO:0002220; hasProperty PR:000037077
  species nucleus_Foxo1_Pa1_pUb1 in nucleus = 0; nucleus_Foxo1_Pa1_pUb1 is "nucleus_Foxo1_polyubiquitinated_phosphorylated";  // isHomologTo uniprot:Q9R1E0; hasProperty PATO:0002220; hasProperty PR:000037077
  species dnabound_Foxo1_Pa1_pUb1 in dnabound = 0; dnabound_Foxo1_Pa1_pUb1 is "dnabound_Foxo1_polyubiquitinated_phosphorylated";  // isHomologTo uniprot:Q9R1E0; hasProperty PATO:0002220; hasProperty PR:000037077
  species $Foxo1_Pa0_tot in extracellular; Foxo1_Pa0_tot is "Foxo1_unphosphorylated_total";  // isHomologTo uniprot:Q9R1E0
  species $Foxo1_Pa1_tot in extracellular; Foxo1_Pa1_tot is "Foxo1_phosphorylated_total";  // isHomologTo uniprot:Q9R1E0; hasProperty PATO:0002220
  species $Foxo1_pUb0_tot in extracellular; Foxo1_pUb0_tot is "Foxo1_unpolyubiquitinated_total";  // isHomologTo uniprot:Q9R1E0
  species $Foxo1_pUb1_tot in extracellular; Foxo1_pUb1_tot is "Foxo1_polyubiquitinated_total";  // isHomologTo uniprot:Q9R1E0; hasProperty PR:000037077
  species $cytoplasm_Foxo1_tot in extracellular; cytoplasm_Foxo1_tot is "cytoplasm_Foxo1_total";  // isHomologTo uniprot:Q9R1E0
  species $nucleus_Foxo1_tot in extracellular; nucleus_Foxo1_tot is "nucleus_Foxo1_total";  // isHomologTo uniprot:Q9R1E0
  species $dnabound_Foxo1_tot in extracellular; dnabound_Foxo1_tot is "dnabound_Foxo1_total";  // isHomologTo uniprot:Q9R1E0
  species $Foxo1_all in extracellular; Foxo1_all is "Foxo1_total";  // isHomologTo uniprot:Q9R1E0
  species nucleus_RNA_Inr in nucleus = 0;  // CHEBI:33697
  species cytoplasm_RNA_Inr in cytoplasm = 0;  // CHEBI:33697
  species cytoplasm_Inr in cytoplasm = 0;  // ncit:C17021; hasProperty ncit:C25447
  species nucleus_RNA_Sod2 in nucleus = 0;  // encodes uniprot:P09671; CHEBI:33697
  species cytoplasm_RNA_Sod2 in cytoplasm = 0;  // encodes uniprot:P09671; CHEBI:33697
  species cytoplasm_Sod2 in cytoplasm = 0;  // isHomologTo uniprot:P09671
  species E2F1 in cytoplasm = 6.060606e12;  // isHomologTo uniprot:Q61501
  species Akt in cytoplasm = 1.515152e15;  // isHomologTo uniprot:P31750
  species SGK in cytoplasm = 0;  // isHomologTo uniprot:Q9WVC6
  species CDK2 in cytoplasm = 0;  // isHomologTo uniprot:P97377
  species AMPK in cytoplasm = 0;  // hasPart uniprot:Q91WG5
  species IKKb in cytoplasm = 0;  // isHomologTo uniprot:Q9R0T8
  species JNK in cytoplasm = 0;  // isHomologTo uniprot:Q9ESN9
  species PP2A in cytoplasm = 6.060606e14;  // hasPart uniprot:Q76MZ3
  species CBPP300 in cytoplasm = 0;  // isHomologTo uniprot:P97769
  species SIRT1 in cytoplasm = 0;  // isHomologTo uniprot:Q923E4
  species E3 in cytoplasm = 0;  // isHomologTo uniprot:P62878
  species USP7 in cytoplasm = 6.060606e13;  // isHomologTo uniprot:Q6A4J8
  species SCF in cytoplasm = 6.060606e13;  // isVersionOf GO:0019005
  species Proteasome in cytoplasm = 0;  // isVersionOf GO:0000502
  species $Foxo1_total_rate in extracellular;

  // Parameters:
  transcription_rate = 3;
  kmdeg = 5.622;
  kpdeg = 0.0019;
  kdeg = 0.0001;
  kdephos = 5e-5;
  kexp = 0.22;
  kkin = 5e-5;
  kub1 = 1e-6;
  kub2 = 3e-6;
  ksynth = 0.0055;
  ktranscr = 0.3;
  ktransl = 1.23;
  ktr1_181818 = 0.181818;
  ktr2_0181818 = 0.0181818;
  ktr3_125 = 0.125;
  ktr4_055 = 0.055;
  ktr5_25 = 0.25;
  ktr4_55 = 0.55;
  Initial_for_Foxo1_total = Foxo1_all;

  // Assignment rules:
  Foxo1_pUb1_tot := (cytoplasm_Foxo1_Pa0_pUb1*cytoplasm + nucleus_Foxo1_Pa0_pUb1*nucleus + dnabound_Foxo1_Pa0_pUb1*dnabound + cytoplasm_Foxo1_Pa1_pUb1*cytoplasm + nucleus_Foxo1_Pa1_pUb1*nucleus + dnabound_Foxo1_Pa1_pUb1*dnabound)/extracellular;
  cytoplasm_Foxo1_tot := (cytoplasm_Foxo1_Pa0_pUb0*cytoplasm + cytoplasm_Foxo1_Pa0_pUb1*cytoplasm + cytoplasm_Foxo1_Pa1_pUb0*cytoplasm + cytoplasm_Foxo1_Pa1_pUb1*cytoplasm)/extracellular;
  Foxo1_Pa0_tot := (cytoplasm_Foxo1_Pa0_pUb0*cytoplasm + nucleus_Foxo1_Pa0_pUb0*nucleus + dnabound_Foxo1_Pa0_pUb0*dnabound + cytoplasm_Foxo1_Pa0_pUb1*cytoplasm + nucleus_Foxo1_Pa0_pUb1*nucleus + dnabound_Foxo1_Pa0_pUb1*dnabound)/extracellular;
  Foxo1_Pa1_tot := (cytoplasm_Foxo1_Pa1_pUb0*cytoplasm + nucleus_Foxo1_Pa1_pUb0*nucleus + dnabound_Foxo1_Pa1_pUb0*dnabound + cytoplasm_Foxo1_Pa1_pUb1*cytoplasm + nucleus_Foxo1_Pa1_pUb1*nucleus + dnabound_Foxo1_Pa1_pUb1*dnabound)/extracellular;
  Foxo1_pUb0_tot := (cytoplasm_Foxo1_Pa0_pUb0*cytoplasm + nucleus_Foxo1_Pa0_pUb0*nucleus + dnabound_Foxo1_Pa0_pUb0*dnabound + cytoplasm_Foxo1_Pa1_pUb0*cytoplasm + nucleus_Foxo1_Pa1_pUb0*nucleus + dnabound_Foxo1_Pa1_pUb0*dnabound)/extracellular;
  nucleus_Foxo1_tot := (nucleus_Foxo1_Pa0_pUb0*nucleus + nucleus_Foxo1_Pa0_pUb1*nucleus + nucleus_Foxo1_Pa1_pUb0*nucleus + nucleus_Foxo1_Pa1_pUb1*nucleus)/extracellular;
  dnabound_Foxo1_tot := (dnabound_Foxo1_Pa0_pUb0*dnabound + dnabound_Foxo1_Pa0_pUb1*dnabound + dnabound_Foxo1_Pa1_pUb0*dnabound + dnabound_Foxo1_Pa1_pUb1*dnabound)/extracellular;
  Foxo1_all := (cytoplasm_Foxo1_tot*extracellular + nucleus_Foxo1_tot*extracellular + dnabound_Foxo1_tot*extracellular)/extracellular;
  Foxo1_total_rate := Foxo1_all/Initial_for_Foxo1_total;

  // Reactions:
  Synthesis: $null => cytoplasm_Foxo1_Pa0_pUb0; cytoplasm*Function_for_Synthesis(E2F1, cytoplasm, ksynth);  // modifiers: E2F1; isVersionOf ncit:C61408
  R2: cytoplasm_Foxo1_Pa0_pUb0 => nucleus_Foxo1_Pa0_pUb0; Function_for_transport_cytoplasm_Foxo1_Pa0_pUb0_to_nucleus_Foxo1_Pa0_pUb0(cytoplasm, cytoplasm_Foxo1_Pa0_pUb0, ktr1_181818); R2 is "transport cytoplasm_Foxo1 to nucleus_Foxo1";  // isVersionOf GO:0051170
  R3: nucleus_Foxo1_Pa0_pUb0 => cytoplasm_Foxo1_Pa0_pUb0; Function_for_transport_nucleus_Foxo1_Pa0_pUb0_to_cytoplasm_Foxo1_Pa0_pUb0(ktr4_055, nucleus, nucleus_Foxo1_Pa0_pUb0); R3 is "transport nucleus_Foxo1 to cytoplasm_Foxo1";  // isVersionOf GO:0016310
  R4: nucleus_Foxo1_Pa0_pUb0 => dnabound_Foxo1_Pa0_pUb0; Function_for_transport_nucleus_Foxo1_Pa0_pUb0_to_dnabound_Foxo1_Pa0_pUb0(ktr5_25, nucleus, nucleus_Foxo1_Pa0_pUb0); R4 is "transport nucleus_Foxo1 to dnabound_Foxo1_";  // isVersionOf ncit:C89777
  R5: dnabound_Foxo1_Pa0_pUb0 => nucleus_Foxo1_Pa0_pUb0; Function_for_transport_dnabound_Foxo1_Pa0_pUb0_to_nucleus_Foxo1_Pa0_pUb0(dnabound, dnabound_Foxo1_Pa0_pUb0, ktr3_125); R5 is "transport dnabound_Foxo1 to nucleus_Foxo1";  // isVersionOf ncit:C89777
  R6: cytoplasm_Foxo1_Pa0_pUb1 => nucleus_Foxo1_Pa0_pUb1; Function_for_transport_cytoplasm_Foxo1_Pa0_pUb1_to_nucleus_Foxo1_Pa0_pUb1(cytoplasm, cytoplasm_Foxo1_Pa0_pUb1, ktr1_181818); R6 is "transport cytoplasm_Foxo1_polyubiquitinated to nucleus_Foxo1_polyubiquitinated";  // isVersionOf GO:0051170
  R7: nucleus_Foxo1_Pa0_pUb1 => cytoplasm_Foxo1_Pa0_pUb1; Function_for_transport_nucleus_Foxo1_Pa0_pUb1_to_cytoplasm_Foxo1_Pa0_pUb1(ktr4_055, nucleus, nucleus_Foxo1_Pa0_pUb1); R7 is "transport nucleus_Foxo1_polyubiquitinated to cytoplasm_Foxo1_polyubiquitinated";  // isVersionOf ncit:C89777
  R8: nucleus_Foxo1_Pa0_pUb1 => dnabound_Foxo1_Pa0_pUb1; Function_for_transport_nucleus_Foxo1_Pa0_pUb1_to_dnabound_Foxo1_Pa0_pUb1(ktr5_25, nucleus, nucleus_Foxo1_Pa0_pUb1); R8 is "transport nucleus_Foxo1_polyubiquitinated to dnabound_Foxo1_polyubiquitinated";  // isVersionOf ncit:C89777
  R9: dnabound_Foxo1_Pa0_pUb1 => nucleus_Foxo1_Pa0_pUb1; Function_for_transport_dnabound_Foxo1_Pa0_pUb1_to_nucleus_Foxo1_Pa0_pUb1(dnabound, dnabound_Foxo1_Pa0_pUb1, ktr3_125); R9 is "transport dnabound_Foxo1_polyubiquitinated to nucleus_Foxo1_polyubiquitinated";  // isVersionOf ncit:C89777
  R10: cytoplasm_Foxo1_Pa1_pUb0 => nucleus_Foxo1_Pa1_pUb0; Function_for_transport_cytoplasm_Foxo1_Pa1_pUb0_to_nucleus_Foxo1_Pa1_pUb0(cytoplasm, cytoplasm_Foxo1_Pa1_pUb0, ktr2_0181818); R10 is "transport cytoplasm_Foxo1_phosphorylated to nucleus_Foxo1_phosphorylated";  // isVersionOf GO:0051170
  R11: nucleus_Foxo1_Pa1_pUb0 => cytoplasm_Foxo1_Pa1_pUb0; Function_for_transport_nucleus_Foxo1_Pa1_pUb0_to_cytoplasm_Foxo1_Pa1_pUb0(ktr4_55, nucleus, nucleus_Foxo1_Pa1_pUb0); R11 is "transport nucleus_Foxo1_phosphorylated to cytoplasm_Foxo1_phosphorylated";  // isVersionOf ncit:C89777
  R12: nucleus_Foxo1_Pa1_pUb0 => dnabound_Foxo1_Pa1_pUb0; Function_for_transport_nucleus_Foxo1_Pa1_pUb0_to_dnabound_Foxo1_Pa1_pUb0(ktr3_125, nucleus, nucleus_Foxo1_Pa1_pUb0); R12 is "transport nucleus_Foxo1_phosphorylated to dnabound_Foxo1_phosphorylated";  // isVersionOf ncit:C89777
  R13: dnabound_Foxo1_Pa1_pUb0 => nucleus_Foxo1_Pa1_pUb0; Function_for_transport_dnabound_Foxo1_Pa1_pUb0_to_nucleus_Foxo1_Pa1_pUb0(dnabound, dnabound_Foxo1_Pa1_pUb0, ktr3_125); R13 is "transport dnabound_Foxo1_phosphorylated to nucleus_Foxo1_phosphorylated";  // isVersionOf ncit:C89777
  R14: cytoplasm_Foxo1_Pa1_pUb1 => nucleus_Foxo1_Pa1_pUb1; Function_for_transport_cytoplasm_Foxo1_Pa1_pUb1_to_nucleus_Foxo1_Pa1_pUb1(cytoplasm, cytoplasm_Foxo1_Pa1_pUb1, ktr2_0181818); R14 is "transport cytoplasm_Foxo1_phosphorylated_polyubiquitinated to nucleus_Foxo1_phosphorylated_polyubiquitinated";  // isVersionOf GO:0051170
  R15: nucleus_Foxo1_Pa1_pUb1 => cytoplasm_Foxo1_Pa1_pUb1; Function_for_transport_nucleus_Foxo1_Pa1_pUb1_to_cytoplasm_Foxo1_Pa1_pUb1(ktr4_55, nucleus, nucleus_Foxo1_Pa1_pUb1); R15 is "transport nucleus_Foxo1_phosphorylated_polyubiquitinated to cytoplasm_Foxo1_phosphorylated_polyubiquitinated";  // isVersionOf ncit:C89777
  R16: nucleus_Foxo1_Pa1_pUb1 => dnabound_Foxo1_Pa1_pUb1; Function_for_transport_nucleus_Foxo1_Pa1_pUb1_to_dnabound_Foxo1_Pa1_pUb1(ktr3_125, nucleus, nucleus_Foxo1_Pa1_pUb1); R16 is "transport nucleus_Foxo1_phosphorylated_polyubiquitinated to dnabound_Foxo1_phosphorylated_polyubiquitinated";  // isVersionOf ncit:C89777
  R17: dnabound_Foxo1_Pa1_pUb1 => nucleus_Foxo1_Pa1_pUb1; Function_for_transport_dnabound_Foxo1_Pa1_pUb1_to_nucleus_Foxo1_Pa1_pUb1(dnabound, dnabound_Foxo1_Pa1_pUb1, ktr3_125); R17 is "transport dnabound_Foxo1_phosphorylated_polyubiquitinated to nucleus_Foxo1_phosphorylated_polyubiquitinated";  // isVersionOf ncit:C89777
  R18: cytoplasm_Foxo1_Pa0_pUb0 => cytoplasm_Foxo1_Pa1_pUb0; cytoplasm*Function_for_conversion_of_cytoplasm_Foxo1_Pa0_pUb0_to_cytoplasm_Foxo1_Pa1_pUb0_by_Akt(Akt, cytoplasm, cytoplasm_Foxo1_Pa0_pUb0, kkin); R18 is "phosphorylation of cytoplasm_Foxo1_not_polyubiquitinated Akt";  // modifiers: Akt; isVersionOf GO:0016310
  R19: nucleus_Foxo1_Pa0_pUb0 => nucleus_Foxo1_Pa1_pUb0; Function_for_conversion_of_nucleus_Foxo1_Pa0_pUb0_to_nucleus_Foxo1_Pa1_pUb0_by_Akt(Akt, cytoplasm, kkin, nucleus, nucleus_Foxo1_Pa0_pUb0); R19 is "phosphorylation of nucleus_Foxo1_not_polyubiquitinated by Akt";  // modifiers: Akt; isVersionOf GO:0016310
  R20: dnabound_Foxo1_Pa0_pUb0 => dnabound_Foxo1_Pa1_pUb0; Function_for_conversion_of_dnabound_Foxo1_Pa0_pUb0_to_dnabound_Foxo1_Pa1_pUb0_by_Akt(Akt, cytoplasm, dnabound, dnabound_Foxo1_Pa0_pUb0, kkin); R20 is "phosphorylation of dnabound_Foxo1_phosphorylated";  // modifiers: Akt; isVersionOf GO:0016310
  R21: cytoplasm_Foxo1_Pa0_pUb1 => cytoplasm_Foxo1_Pa1_pUb1; cytoplasm*Function_for_conversion_of_cytoplasm_Foxo1_Pa0_pUb1_to_cytoplasm_Foxo1_Pa1_pUb1_by_Akt(Akt, cytoplasm, cytoplasm_Foxo1_Pa0_pUb1, kkin); R21 is "phosphorylation of cytoplasm_Foxo1_polyubiquitinated";  // modifiers: Akt; isVersionOf GO:0016310
  R22: nucleus_Foxo1_Pa0_pUb1 => nucleus_Foxo1_Pa1_pUb1; Function_for_conversion_of_nucleus_Foxo1_Pa0_pUb1_to_nucleus_Foxo1_Pa1_pUb1_by_Akt(Akt, cytoplasm, kkin, nucleus, nucleus_Foxo1_Pa0_pUb1); R22 is "phosphorylation of nucleus_Foxo1_polyubiquitinated";  // modifiers: Akt; isVersionOf GO:0016310
  R23: dnabound_Foxo1_Pa0_pUb1 => dnabound_Foxo1_Pa1_pUb1; Function_for_conversion_of_dnabound_Foxo1_Pa0_pUb1_to_dnabound_Foxo1_Pa1_pUb1_by_Akt(Akt, cytoplasm, dnabound, dnabound_Foxo1_Pa0_pUb1, kkin); R23 is "phosphorylation of dnabound_Foxo1_polyubiquitinated";  // modifiers: Akt; isVersionOf GO:0016310
  R24: cytoplasm_Foxo1_Pa0_pUb0 => cytoplasm_Foxo1_Pa1_pUb0; cytoplasm*Function_for_conversion_of_cytoplasm_Foxo1_Pa0_pUb0_to_cytoplasm_Foxo1_Pa1_pUb0_by_SGK(SGK, cytoplasm, cytoplasm_Foxo1_Pa0_pUb0, kkin); R24 is "phosphorylation of cytoplasm_Foxo1 to cytoplasm_Foxo1_phosphorylated by SGK";  // modifiers: SGK; isVersionOf GO:0016310
  R25: nucleus_Foxo1_Pa0_pUb0 => nucleus_Foxo1_Pa1_pUb0; Function_for_conversion_of_nucleus_Foxo1_Pa0_pUb0_to_nucleus_Foxo1_Pa1_pUb0_by_SGK(SGK, cytoplasm, kkin, nucleus, nucleus_Foxo1_Pa0_pUb0); R25 is "phosphorylation of nucleus_Foxo1 to nucleus_Foxo1_phosphorylated by SGK";  // modifiers: SGK; isVersionOf GO:0016310
  R26: dnabound_Foxo1_Pa0_pUb0 => dnabound_Foxo1_Pa1_pUb0; Function_for_conversion_of_dnabound_Foxo1_Pa0_pUb0_to_dnabound_Foxo1_Pa1_pUb0_by_SGK(SGK, cytoplasm, dnabound, dnabound_Foxo1_Pa0_pUb0, kkin); R26 is "phosphorylation of dnabound_Foxo1 to dnabound_Foxo1_phosphorylated by SGK";  // modifiers: SGK; isVersionOf GO:0016310
  R27: cytoplasm_Foxo1_Pa0_pUb1 => cytoplasm_Foxo1_Pa1_pUb1; cytoplasm*Function_for_conversion_of_cytoplasm_Foxo1_Pa0_pUb1_to_cytoplasm_Foxo1_Pa1_pUb1_by_SGK(SGK, cytoplasm, cytoplasm_Foxo1_Pa0_pUb1, kkin); R27 is "phosphorylation of cytoplasm_Foxo1_polyubiquitinated to cytoplasm_Foxo1_phosphorylated_polyubiquitinated by SGK";  // modifiers: SGK; isVersionOf GO:0016310
  R28: nucleus_Foxo1_Pa0_pUb1 => nucleus_Foxo1_Pa1_pUb1; Function_for_conversion_of_nucleus_Foxo1_Pa0_pUb1_to_nucleus_Foxo1_Pa1_pUb1_by_SGK(SGK, cytoplasm, kkin, nucleus, nucleus_Foxo1_Pa0_pUb1); R28 is "phosphorylation of nucleus_Foxo1_polyubiquitinated to nucleus_Foxo1_phosphorylated_polyubiquitinatedby SGK";  // modifiers: SGK; isVersionOf GO:0016310
  R29: dnabound_Foxo1_Pa0_pUb1 => dnabound_Foxo1_Pa1_pUb1; Function_for_conversion_of_dnabound_Foxo1_Pa0_pUb1_to_dnabound_Foxo1_Pa1_pUb1_by_SGK(SGK, cytoplasm, dnabound, dnabound_Foxo1_Pa0_pUb1, kkin); R29 is "phosphorylation of dnabound_Foxo1_polyubiquitinated to dnabound_Foxo1_phosphorylated_polyubiquitinated by SGK";  // modifiers: SGK; isVersionOf GO:0016310
  R30: cytoplasm_Foxo1_Pa1_pUb0 => cytoplasm_Foxo1_Pa0_pUb0; cytoplasm*Function_for_conversion_of_cytoplasm_Foxo1_Pa1_pUb0_to_cytoplasm_Foxo1_Pa0_pUb0_by_PP2A(PP2A, cytoplasm, cytoplasm_Foxo1_Pa1_pUb0, kdephos); R30 is "dephosphorylation of cytoplasm_Foxo1_phosphorylated";  // modifiers: PP2A; isVersionOf GO:0016311
  R31: nucleus_Foxo1_Pa1_pUb0 => nucleus_Foxo1_Pa0_pUb0; Function_for_conversion_of_nucleus_Foxo1_Pa1_pUb0_to_nucleus_Foxo1_Pa0_pUb0_by_PP2A(PP2A, cytoplasm, kdephos, nucleus, nucleus_Foxo1_Pa1_pUb0); R31 is "dephosphorylation of nucleus_Foxo1_phosphorylated";  // modifiers: PP2A; isVersionOf GO:0016311
  R32: dnabound_Foxo1_Pa1_pUb0 => dnabound_Foxo1_Pa0_pUb0; Function_for_conversion_of_dnabound_Foxo1_Pa1_pUb0_to_dnabound_Foxo1_Pa0_pUb0_by_PP2A(PP2A, cytoplasm, dnabound, dnabound_Foxo1_Pa1_pUb0, kdephos); R32 is "dephosphorylation of dnabound_Foxo1_phosphorylated";  // modifiers: PP2A; isVersionOf GO:0016311
  R33: cytoplasm_Foxo1_Pa1_pUb1 => cytoplasm_Foxo1_Pa0_pUb1; cytoplasm*Function_for_conversion_of_cytoplasm_Foxo1_Pa1_pUb1_to_cytoplasm_Foxo1_Pa0_pUb1_by_PP2A(PP2A, cytoplasm, cytoplasm_Foxo1_Pa1_pUb1, kdephos); R33 is "dephosphorylation of cytoplasm_Foxo1_phosphorylated_polyubiquitinated";  // modifiers: PP2A; isVersionOf GO:0016311
  R34: nucleus_Foxo1_Pa1_pUb1 => nucleus_Foxo1_Pa0_pUb1; Function_for_conversion_of_nucleus_Foxo1_Pa1_pUb1_to_nucleus_Foxo1_Pa0_pUb1_by_PP2A(PP2A, cytoplasm, kdephos, nucleus, nucleus_Foxo1_Pa1_pUb1); R34 is "dephosphorylation of nucleus_Foxo1_phosphorylated_polyubiquitinated";  // modifiers: PP2A; isVersionOf GO:0016311
  R35: dnabound_Foxo1_Pa1_pUb1 => dnabound_Foxo1_Pa0_pUb1; Function_for_conversion_of_dnabound_Foxo1_Pa1_pUb1_to_dnabound_Foxo1_Pa0_pUb1_by_PP2A(PP2A, cytoplasm, dnabound, dnabound_Foxo1_Pa1_pUb1, kdephos); R35 is "dephosphorylation of dnabound_Foxo1_phosphorylated_polyubiquitinated";  // modifiers: PP2A; isVersionOf GO:0016311
  R36: cytoplasm_Foxo1_Pa0_pUb0 => cytoplasm_Foxo1_Pa0_pUb1; cytoplasm*Function_for_conversion_of_cytoplasm_Foxo1_Pa0_pUb0_to_cytoplasm_Foxo1_Pa0_pUb1_by_SCF(SCF, cytoplasm, cytoplasm_Foxo1_Pa0_pUb0, kub1); R36 is "polyubiquination of cytoplasm_Foxo1";  // modifiers: SCF; isVersionOf GO:0000209
  R37: nucleus_Foxo1_Pa0_pUb0 => nucleus_Foxo1_Pa0_pUb1; Function_for_conversion_of_nucleus_Foxo1_Pa0_pUb0_to_nucleus_Foxo1_Pa0_pUb1_by_SCF(SCF, cytoplasm, kub1, nucleus, nucleus_Foxo1_Pa0_pUb0); R37 is "polyubiquination of nucleus_Foxo1";  // modifiers: SCF; isVersionOf GO:0000209
  R38: dnabound_Foxo1_Pa0_pUb0 => dnabound_Foxo1_Pa0_pUb1; Function_for_conversion_of_dnabound_Foxo1_Pa0_pUb0_to_dnabound_Foxo1_Pa0_pUb1_by_SCF(SCF, cytoplasm, dnabound, dnabound_Foxo1_Pa0_pUb0, kub1); R38 is "polyubiquination of dnabound_Foxo1";  // modifiers: SCF; isVersionOf GO:0000209
  R39: cytoplasm_Foxo1_Pa1_pUb0 => cytoplasm_Foxo1_Pa1_pUb1; cytoplasm*Function_for_conversion_of_cytoplasm_Foxo1_Pa1_pUb0_to_cytoplasm_Foxo1_Pa1_pUb1_by_SCF(SCF, cytoplasm, cytoplasm_Foxo1_Pa1_pUb0, kub2); R39 is "polyubiquination of cytoplasm_Foxo1_phosphorylated";  // modifiers: SCF; isVersionOf GO:0000209
  R40: nucleus_Foxo1_Pa1_pUb0 => nucleus_Foxo1_Pa1_pUb1; Function_for_conversion_of_nucleus_Foxo1_Pa1_pUb0_to_nucleus_Foxo1_Pa1_pUb1_by_SCF(SCF, cytoplasm, kub2, nucleus, nucleus_Foxo1_Pa1_pUb0); R40 is "polyubiquination of nucleus_Foxo1_phosphorylated";  // modifiers: SCF; isVersionOf GO:0000209
  R41: dnabound_Foxo1_Pa1_pUb0 => dnabound_Foxo1_Pa1_pUb1; Function_for_conversion_of_dnabound_Foxo1_Pa1_pUb0_to_dnabound_Foxo1_Pa1_pUb1_by_SCF(SCF, cytoplasm, dnabound, dnabound_Foxo1_Pa1_pUb0, kub2); R41 is "polyubiquination of dnabound_Foxo1_phosphorylated";  // modifiers: SCF; isVersionOf GO:0000209
  R42: cytoplasm_Foxo1_Pa0_pUb1 => $degr_Foxo1; cytoplasm*Function_for_degradation_of_cytoplasm_Foxo1_Pa0_pUb1(Proteasome, cytoplasm, cytoplasm_Foxo1_Pa0_pUb1, kdeg); R42 is "degradation of cytoplasm_Foxo1_polyubiquitinated";  // modifiers: Proteasome
  R43: cytoplasm_Foxo1_Pa1_pUb1 => $degr_Foxo1; cytoplasm*Function_for_degradation_of_cytoplasm_Foxo1_Pa1_pUb1(Proteasome, cytoplasm, cytoplasm_Foxo1_Pa1_pUb1, kdeg); R43 is "degradation of cytoplasm_Foxo1_Pa1_polyubiquitinated";  // modifiers: Proteasome
  R44: $null => nucleus_RNA_Inr; Function_for_transcription_of_inr_by_dnabound_Foxo1_Pa0_pUb0(dnabound, dnabound_Foxo1_Pa0_pUb0, ktranscr); R44 is "transcription of inr by dnabound_Foxo1";  // modifiers: dnabound_Foxo1_Pa0_pUb0
  R45: $null => nucleus_RNA_Sod2; Function_for_transcription_of_sod2_by_dnabound_Foxo1_Pa0_pUb0(dnabound, dnabound_Foxo1_Pa0_pUb0, ktranscr); R45 is "transcription of sod2 by dnabound_Foxo1";  // modifiers: dnabound_Foxo1_Pa0_pUb0
  R46: $null => nucleus_RNA_Inr; Function_for_transcription_of_inr_by_dnabound_Foxo1_Pa0_pUb1(dnabound, dnabound_Foxo1_Pa0_pUb1, ktranscr); R46 is "transcription of inr by dnabound_Foxo1_polyubiquitinated";  // modifiers: dnabound_Foxo1_Pa0_pUb1
  R47: $null => nucleus_RNA_Sod2; Function_for_transcription_of_sod2_by_dnabound_Foxo1_Pa0_pUb1(dnabound, dnabound_Foxo1_Pa0_pUb1, ktranscr); R47 is "transcription of sod2 by dnabound_Foxo1_polyubiquitinated";  // modifiers: dnabound_Foxo1_Pa0_pUb1
  R48: $null => nucleus_RNA_Inr; Function_for_transcription_of_inr_by_dnabound_Foxo1_Pa1_pUb0(dnabound, dnabound_Foxo1_Pa1_pUb0, ktranscr); R48 is "transcription of inr by dnabound_Foxo1_phosphorylated";  // modifiers: dnabound_Foxo1_Pa1_pUb0
  R49: $null => nucleus_RNA_Sod2; Function_for_transcription_of_sod2_by_dnabound_Foxo1_Pa1_pUb0(dnabound, dnabound_Foxo1_Pa1_pUb0, ktranscr); R49 is "transcription of sod2 by dnabound_Foxo1_phosphorylated";  // modifiers: dnabound_Foxo1_Pa1_pUb0
  R50: $null => nucleus_RNA_Inr; Function_for_transcription_of_inr_by_dnabound_Foxo1_Pa1_pUb1(dnabound, dnabound_Foxo1_Pa1_pUb1, ktranscr); R50 is "transcription of inr by dnabound_Foxo1_Pa1_polyubiquitinated";  // modifiers: dnabound_Foxo1_Pa1_pUb1
  R51: $null => nucleus_RNA_Sod2; Function_for_transcription_of_sod2_by_dnabound_Foxo1_Pa1_pUb1(dnabound, dnabound_Foxo1_Pa1_pUb1, ktranscr); R51 is "transcription of sod2 by dnabound_Foxo1_Pa1_polyubiquitinated";  // modifiers: dnabound_Foxo1_Pa1_pUb1
  basal_transcription_of_inr: $null => nucleus_RNA_Inr; Constant_flux__irreversible(transcription_rate);  // isVersionOf GO:0006351
  export_of_inr_RNA: nucleus_RNA_Inr => cytoplasm_RNA_Inr; Function_for_export_of_inr_RNA(kexp, nucleus, nucleus_RNA_Inr);  // isVersionOf GO:0051168
  cyto_degradation_of_inr_RNA: cytoplasm_RNA_Inr => $null; cytoplasm*Function_for_cyto_degr_of_inr_RNA(cytoplasm, cytoplasm_RNA_Inr, kmdeg);
  translation_of_inr: $null => cytoplasm_Inr; cytoplasm*Function_for_translation_of_inr(cytoplasm, cytoplasm_RNA_Inr, ktransl);  // modifiers: cytoplasm_RNA_Inr; isVersionOf GO:0006412
  degradation_of_Inr_protein: cytoplasm_Inr => $null; cytoplasm*Function_for_degradation_of_Inr_protein(cytoplasm, cytoplasm_Inr, kpdeg);
  basal_transcription_of_sod2: $null => nucleus_RNA_Sod2; Constant_flux__irreversible(transcription_rate);  // isVersionOf GO:0006351
  export_of_sod2_RNA: nucleus_RNA_Sod2 => cytoplasm_RNA_Sod2; Function_for_export_of_sod2_RNA(kexp, nucleus, nucleus_RNA_Sod2);  // isVersionOf GO:0051168
  cyto_degradation_of_sod2_RNA: cytoplasm_RNA_Sod2 => $null; cytoplasm*Function_for_cyto_degr_of_sod2_RNA(cytoplasm, cytoplasm_RNA_Sod2, kmdeg);
  translation_of_sod2: $null => cytoplasm_Sod2; cytoplasm*Function_for_translation_of_sod2(cytoplasm, cytoplasm_RNA_Sod2, ktransl);  // modifiers: cytoplasm_RNA_Sod2; isVersionOf GO:0006412
  degradation_of_Sod2_protein: cytoplasm_Sod2 => $null; cytoplasm*Function_for_degradation_of_Sod2_protein(cytoplasm, cytoplasm_Sod2, kpdeg);

  // Unit definitions:
  unit volume = 1e-3 litre;
  unit time = 60 second;
  unit substance = item;
end
