// SBML level 2 version 4
// dcterms:bibliographicCitation: urn:miriam:doi:doi:10.1371/journal.pone.0011092

function Constant_flux__irreversible(v)
  v;
end
Constant_flux__irreversible is "Constant flux (irreversible)";

function Function_for_conversion_of_cytoplasm_Foxo1_Pa0_Ac0_pUb0_to_cytoplasm_Foxo1_Pa0_Ac0_pUb1_by_SCF(SCF, cytoplasm, cytoplasm_Foxo1_Pa0_Ac0_pUb0, kub)
  cytoplasm_Foxo1_Pa0_Ac0_pUb0*cytoplasm*SCF*cytoplasm*kub/cytoplasm;
end

function Function_for_conversion_of_nucleus_Foxo1_Pa0_Ac0_pUb0_to_nucleus_Foxo1_Pa0_Ac0_pUb1_by_SCF(SCF, cytoplasm, kub, nucleus, nucleus_Foxo1_Pa0_Ac0_pUb0)
  nucleus_Foxo1_Pa0_Ac0_pUb0*nucleus*SCF*cytoplasm*kub;
end

function Function_for_conversion_of_cytoplasm_Foxo1_Pa0_Ac1_pUb0_to_cytoplasm_Foxo1_Pa0_Ac1_pUb1_by_SCF(SCF, cytoplasm, cytoplasm_Foxo1_Pa0_Ac1_pUb0, kub)
  cytoplasm_Foxo1_Pa0_Ac1_pUb0*cytoplasm*SCF*cytoplasm*kub/cytoplasm;
end

function Function_for_conversion_of_dnabound_Foxo1_Pa0_Ac0_pUb0_to_dnabound_Foxo1_Pa0_Ac0_pUb1_by_SCF(SCF, cytoplasm, dnabound, dnabound_Foxo1_Pa0_Ac0_pUb0, kub)
  dnabound_Foxo1_Pa0_Ac0_pUb0*dnabound*SCF*cytoplasm*kub;
end

function Function_for_Synthesis(E2F1, cytoplasm, ksynth)
  E2F1*cytoplasm*ksynth/cytoplasm;
end

function Function_for_transport_cytoplasm_Foxo1_Pa0_Ac0_pUb0_to_nucleus_Foxo1_Pa0_Ac0_pUb0(cytoplasm, cytoplasm_Foxo1_Pa0_Ac0_pUb0, ktr)
  cytoplasm_Foxo1_Pa0_Ac0_pUb0*cytoplasm*ktr;
end

function Function_for_transport_nucleus_Foxo1_Pa0_Ac0_pUb0_to_cytoplasm_Foxo1_Pa0_Ac0_pUb0(ktr, nucleus, nucleus_Foxo1_Pa0_Ac0_pUb0)
  nucleus_Foxo1_Pa0_Ac0_pUb0*nucleus*ktr;
end

function Function_for_transport_nucleus_Foxo1_Pa0_Ac0_pUb0_to_dnabound_Foxo1_Pa0_Ac0_pUb0(ktr, nucleus, nucleus_Foxo1_Pa0_Ac0_pUb0)
  nucleus_Foxo1_Pa0_Ac0_pUb0*nucleus*ktr;
end

function Function_for_transport_dnabound_Foxo1_Pa0_Ac0_pUb0_to_nucleus_Foxo1_Pa0_Ac0_pUb0(dnabound, dnabound_Foxo1_Pa0_Ac0_pUb0, ktr)
  dnabound_Foxo1_Pa0_Ac0_pUb0*dnabound*ktr;
end

function Function_for_transport_cytoplasm_Foxo1_Pa0_Ac0_pUb1_to_nucleus_Foxo1_Pa0_Ac0_pUb1(cytoplasm, cytoplasm_Foxo1_Pa0_Ac0_pUb1, ktr)
  cytoplasm_Foxo1_Pa0_Ac0_pUb1*cytoplasm*ktr;
end

function Function_for_transport_nucleus_Foxo1_Pa0_Ac0_pUb1_to_cytoplasm_Foxo1_Pa0_Ac0_pUb1(ktr, nucleus, nucleus_Foxo1_Pa0_Ac0_pUb1)
  nucleus_Foxo1_Pa0_Ac0_pUb1*nucleus*ktr;
end

function Function_for_transport_nucleus_Foxo1_Pa0_Ac0_pUb1_to_dnabound_Foxo1_Pa0_Ac0_pUb1(ktr, nucleus, nucleus_Foxo1_Pa0_Ac0_pUb1)
  nucleus_Foxo1_Pa0_Ac0_pUb1*nucleus*ktr;
end

function Function_for_transport_dnabound_Foxo1_Pa0_Ac0_pUb1_to_nucleus_Foxo1_Pa0_Ac0_pUb1(dnabound, dnabound_Foxo1_Pa0_Ac0_pUb1, ktr)
  dnabound_Foxo1_Pa0_Ac0_pUb1*dnabound*ktr;
end

function Function_for_transport_cytoplasm_Foxo1_Pa0_Ac1_pUb0_to_nucleus_Foxo1_Pa0_Ac1_pUb0(cytoplasm, cytoplasm_Foxo1_Pa0_Ac1_pUb0, ktr)
  cytoplasm_Foxo1_Pa0_Ac1_pUb0*cytoplasm*ktr;
end

function Function_for_transport_nucleus_Foxo1_Pa0_Ac1_pUb0_to_cytoplasm_Foxo1_Pa0_Ac1_pUb0(ktr, nucleus, nucleus_Foxo1_Pa0_Ac1_pUb0)
  nucleus_Foxo1_Pa0_Ac1_pUb0*nucleus*ktr;
end

function Function_for_transport_nucleus_Foxo1_Pa0_Ac1_pUb0_to_dnabound_Foxo1_Pa0_Ac1_pUb0(ktr, nucleus, nucleus_Foxo1_Pa0_Ac1_pUb0)
  nucleus_Foxo1_Pa0_Ac1_pUb0*nucleus*ktr;
end

function Function_for_transport_dnabound_Foxo1_Pa0_Ac1_pUb0_to_nucleus_Foxo1_Pa0_Ac1_pUb0(dnabound, dnabound_Foxo1_Pa0_Ac1_pUb0, ktr)
  dnabound_Foxo1_Pa0_Ac1_pUb0*dnabound*ktr;
end

function Function_for_transport_cytoplasm_Foxo1_Pa0_Ac1_pUb1_to_nucleus_Foxo1_Pa0_Ac1_pUb1(cytoplasm, cytoplasm_Foxo1_Pa0_Ac1_pUb1, ktr)
  cytoplasm_Foxo1_Pa0_Ac1_pUb1*cytoplasm*ktr;
end

function Function_for_transport_nucleus_Foxo1_Pa0_Ac1_pUb1_to_cytoplasm_Foxo1_Pa0_Ac1_pUb1(ktr, nucleus, nucleus_Foxo1_Pa0_Ac1_pUb1)
  nucleus_Foxo1_Pa0_Ac1_pUb1*nucleus*ktr;
end

function Function_for_transport_nucleus_Foxo1_Pa0_Ac1_pUb1_to_dnabound_Foxo1_Pa0_Ac1_pUb1(ktr, nucleus, nucleus_Foxo1_Pa0_Ac1_pUb1)
  nucleus_Foxo1_Pa0_Ac1_pUb1*nucleus*ktr;
end

function Function_for_transport_dnabound_Foxo1_Pa0_Ac1_pUb1_to_nucleus_Foxo1_Pa0_Ac1_pUb1(dnabound, dnabound_Foxo1_Pa0_Ac1_pUb1, ktr)
  dnabound_Foxo1_Pa0_Ac1_pUb1*dnabound*ktr;
end

function Function_for_transport_cytoplasm_Foxo1_Pa1_Ac0_pUb0_to_nucleus_Foxo1_Pa1_Ac0_pUb0(cytoplasm, cytoplasm_Foxo1_Pa1_Ac0_pUb0, ktr)
  cytoplasm_Foxo1_Pa1_Ac0_pUb0*cytoplasm*ktr;
end

function Function_for_transport_nucleus_Foxo1_Pa1_Ac0_pUb0_to_cytoplasm_Foxo1_Pa1_Ac0_pUb0(ktr, nucleus, nucleus_Foxo1_Pa1_Ac0_pUb0)
  nucleus_Foxo1_Pa1_Ac0_pUb0*nucleus*ktr;
end

function Function_for_transport_nucleus_Foxo1_Pa1_Ac0_pUb0_to_dnabound_Foxo1_Pa1_Ac0_pUb0(ktr, nucleus, nucleus_Foxo1_Pa1_Ac0_pUb0)
  nucleus_Foxo1_Pa1_Ac0_pUb0*nucleus*ktr;
end

function Function_for_transport_dnabound_Foxo1_Pa1_Ac0_pUb0_to_nucleus_Foxo1_Pa1_Ac0_pUb0(dnabound, dnabound_Foxo1_Pa1_Ac0_pUb0, ktr)
  dnabound_Foxo1_Pa1_Ac0_pUb0*dnabound*ktr;
end

function Function_for_transport_cytoplasm_Foxo1_Pa1_Ac0_pUb1_to_nucleus_Foxo1_Pa1_Ac0_pUb1(cytoplasm, cytoplasm_Foxo1_Pa1_Ac0_pUb1, ktr)
  cytoplasm_Foxo1_Pa1_Ac0_pUb1*cytoplasm*ktr;
end

function Function_for_transport_nucleus_Foxo1_Pa1_Ac0_pUb1_to_cytoplasm_Foxo1_Pa1_Ac0_pUb1(ktr, nucleus, nucleus_Foxo1_Pa1_Ac0_pUb1)
  nucleus_Foxo1_Pa1_Ac0_pUb1*nucleus*ktr;
end

function Function_for_transport_nucleus_Foxo1_Pa1_Ac0_pUb1_to_dnabound_Foxo1_Pa1_Ac0_pUb1(ktr, nucleus, nucleus_Foxo1_Pa1_Ac0_pUb1)
  nucleus_Foxo1_Pa1_Ac0_pUb1*nucleus*ktr;
end

function Function_for_transport_dnabound_Foxo1_Pa1_Ac0_pUb1_to_nucleus_Foxo1_Pa1_Ac0_pUb1(dnabound, dnabound_Foxo1_Pa1_Ac0_pUb1, ktr)
  dnabound_Foxo1_Pa1_Ac0_pUb1*dnabound*ktr;
end

function Function_for_transport_cytoplasm_Foxo1_Pa1_Ac1_pUb0_to_nucleus_Foxo1_Pa1_Ac1_pUb0(cytoplasm, cytoplasm_Foxo1_Pa1_Ac1_pUb0, ktr)
  cytoplasm_Foxo1_Pa1_Ac1_pUb0*cytoplasm*ktr;
end

function Function_for_transport_nucleus_Foxo1_Pa1_Ac1_pUb0_to_cytoplasm_Foxo1_Pa1_Ac1_pUb0(ktr, nucleus, nucleus_Foxo1_Pa1_Ac1_pUb0)
  nucleus_Foxo1_Pa1_Ac1_pUb0*nucleus*ktr;
end

function Function_for_transport_nucleus_Foxo1_Pa1_Ac1_pUb0_to_dnabound_Foxo1_Pa1_Ac1_pUb0(ktr, nucleus, nucleus_Foxo1_Pa1_Ac1_pUb0)
  nucleus_Foxo1_Pa1_Ac1_pUb0*nucleus*ktr;
end

function Function_for_transport_dnabound_Foxo1_Pa1_Ac1_pUb0_to_nucleus_Foxo1_Pa1_Ac1_pUb0(dnabound, dnabound_Foxo1_Pa1_Ac1_pUb0, ktr)
  dnabound_Foxo1_Pa1_Ac1_pUb0*dnabound*ktr;
end

function Function_for_transport_cytoplasm_Foxo1_Pa1_Ac1_pUb1_to_nucleus_Foxo1_Pa1_Ac1_pUb1(cytoplasm, cytoplasm_Foxo1_Pa1_Ac1_pUb1, ktr)
  cytoplasm_Foxo1_Pa1_Ac1_pUb1*cytoplasm*ktr;
end

function Function_for_transport_nucleus_Foxo1_Pa1_Ac1_pUb1_to_cytoplasm_Foxo1_Pa1_Ac1_pUb1(ktr, nucleus, nucleus_Foxo1_Pa1_Ac1_pUb1)
  nucleus_Foxo1_Pa1_Ac1_pUb1*nucleus*ktr;
end

function Function_for_transport_nucleus_Foxo1_Pa1_Ac1_pUb1_to_dnabound_Foxo1_Pa1_Ac1_pUb1(ktr, nucleus, nucleus_Foxo1_Pa1_Ac1_pUb1)
  nucleus_Foxo1_Pa1_Ac1_pUb1*nucleus*ktr;
end

function Function_for_transport_dnabound_Foxo1_Pa1_Ac1_pUb1_to_nucleus_Foxo1_Pa1_Ac1_pUb1(dnabound, dnabound_Foxo1_Pa1_Ac1_pUb1, ktr)
  dnabound_Foxo1_Pa1_Ac1_pUb1*dnabound*ktr;
end

function Function_for_conversion_of_cytoplasm_Foxo1_Pa0_Ac0_pUb0_to_cytoplasm_Foxo1_Pa1_Ac0_pUb0_by_Akt(Akt, cytoplasm, cytoplasm_Foxo1_Pa0_Ac0_pUb0, kkin)
  cytoplasm_Foxo1_Pa0_Ac0_pUb0*cytoplasm*Akt*cytoplasm*kkin/cytoplasm;
end

function Function_for_conversion_of_nucleus_Foxo1_Pa0_Ac0_pUb0_to_nucleus_Foxo1_Pa1_Ac0_pUb0_by_Akt(Akt, cytoplasm, kkin, nucleus, nucleus_Foxo1_Pa0_Ac0_pUb0)
  nucleus_Foxo1_Pa0_Ac0_pUb0*nucleus*Akt*cytoplasm*kkin;
end

function Function_for_conversion_of_dnabound_Foxo1_Pa0_Ac0_pUb0_to_dnabound_Foxo1_Pa1_Ac0_pUb0_by_Akt(Akt, cytoplasm, dnabound, dnabound_Foxo1_Pa0_Ac0_pUb0, kkin)
  dnabound_Foxo1_Pa0_Ac0_pUb0*dnabound*Akt*cytoplasm*kkin;
end

function Function_for_conversion_of_cytoplasm_Foxo1_Pa0_Ac0_pUb1_to_cytoplasm_Foxo1_Pa1_Ac0_pUb1_by_Akt(Akt, cytoplasm, cytoplasm_Foxo1_Pa0_Ac0_pUb1, kkin)
  cytoplasm_Foxo1_Pa0_Ac0_pUb1*cytoplasm*Akt*cytoplasm*kkin/cytoplasm;
end

function Function_for_conversion_of_nucleus_Foxo1_Pa0_Ac0_pUb1_to_nucleus_Foxo1_Pa1_Ac0_pUb1_by_Akt(Akt, cytoplasm, kkin, nucleus, nucleus_Foxo1_Pa0_Ac0_pUb1)
  nucleus_Foxo1_Pa0_Ac0_pUb1*nucleus*Akt*cytoplasm*kkin;
end

function Function_for_conversion_of_dnabound_Foxo1_Pa0_Ac0_pUb1_to_dnabound_Foxo1_Pa1_Ac0_pUb1_by_Akt(Akt, cytoplasm, dnabound, dnabound_Foxo1_Pa0_Ac0_pUb1, kkin)
  dnabound_Foxo1_Pa0_Ac0_pUb1*dnabound*Akt*cytoplasm*kkin;
end

function Function_for_conversion_of_cytoplasm_Foxo1_Pa0_Ac1_pUb0_to_cytoplasm_Foxo1_Pa1_Ac1_pUb0_by_Akt(Akt, cytoplasm, cytoplasm_Foxo1_Pa0_Ac1_pUb0, kkin)
  cytoplasm_Foxo1_Pa0_Ac1_pUb0*cytoplasm*Akt*cytoplasm*kkin/cytoplasm;
end

function Function_for_conversion_of_nucleus_Foxo1_Pa0_Ac1_pUb0_to_nucleus_Foxo1_Pa1_Ac1_pUb0_by_Akt(Akt, cytoplasm, kkin, nucleus, nucleus_Foxo1_Pa0_Ac1_pUb0)
  nucleus_Foxo1_Pa0_Ac1_pUb0*nucleus*Akt*cytoplasm*kkin;
end

function Function_for_conversion_of_dnabound_Foxo1_Pa0_Ac1_pUb0_to_dnabound_Foxo1_Pa1_Ac1_pUb0_by_Akt(Akt, cytoplasm, dnabound, dnabound_Foxo1_Pa0_Ac1_pUb0, kkin)
  dnabound_Foxo1_Pa0_Ac1_pUb0*dnabound*Akt*cytoplasm*kkin;
end

function Function_for_conversion_of_cytoplasm_Foxo1_Pa0_Ac1_pUb1_to_cytoplasm_Foxo1_Pa1_Ac1_pUb1_by_Akt(Akt, cytoplasm, cytoplasm_Foxo1_Pa0_Ac1_pUb1, kkin)
  cytoplasm_Foxo1_Pa0_Ac1_pUb1*cytoplasm*Akt*cytoplasm*kkin/cytoplasm;
end

function Function_for_conversion_of_nucleus_Foxo1_Pa0_Ac1_pUb1_to_nucleus_Foxo1_Pa1_Ac1_pUb1_by_Akt(Akt, cytoplasm, kkin, nucleus, nucleus_Foxo1_Pa0_Ac1_pUb1)
  nucleus_Foxo1_Pa0_Ac1_pUb1*nucleus*Akt*cytoplasm*kkin;
end

function Function_for_conversion_of_dnabound_Foxo1_Pa0_Ac1_pUb1_to_dnabound_Foxo1_Pa1_Ac1_pUb1_by_Akt(Akt, cytoplasm, dnabound, dnabound_Foxo1_Pa0_Ac1_pUb1, kkin)
  dnabound_Foxo1_Pa0_Ac1_pUb1*dnabound*Akt*cytoplasm*kkin;
end

function Function_for_conversion_of_cytoplasm_Foxo1_Pa0_Ac0_pUb0_to_cytoplasm_Foxo1_Pa1_Ac0_pUb0_by_SGK(SGK, cytoplasm, cytoplasm_Foxo1_Pa0_Ac0_pUb0, kkin)
  cytoplasm_Foxo1_Pa0_Ac0_pUb0*cytoplasm*SGK*cytoplasm*kkin/cytoplasm;
end

function Function_for_conversion_of_nucleus_Foxo1_Pa0_Ac0_pUb0_to_nucleus_Foxo1_Pa1_Ac0_pUb0_by_SGK(SGK, cytoplasm, kkin, nucleus, nucleus_Foxo1_Pa0_Ac0_pUb0)
  nucleus_Foxo1_Pa0_Ac0_pUb0*nucleus*SGK*cytoplasm*kkin;
end

function Function_for_conversion_of_dnabound_Foxo1_Pa0_Ac0_pUb0_to_dnabound_Foxo1_Pa1_Ac0_pUb0_by_SGK(SGK, cytoplasm, dnabound, dnabound_Foxo1_Pa0_Ac0_pUb0, kkin)
  dnabound_Foxo1_Pa0_Ac0_pUb0*dnabound*SGK*cytoplasm*kkin;
end

function Function_for_conversion_of_cytoplasm_Foxo1_Pa0_Ac0_pUb1_to_cytoplasm_Foxo1_Pa1_Ac0_pUb1_by_SGK(SGK, cytoplasm, cytoplasm_Foxo1_Pa0_Ac0_pUb1, kkin)
  cytoplasm_Foxo1_Pa0_Ac0_pUb1*cytoplasm*SGK*cytoplasm*kkin/cytoplasm;
end

function Function_for_conversion_of_nucleus_Foxo1_Pa0_Ac0_pUb1_to_nucleus_Foxo1_Pa1_Ac0_pUb1_by_SGK(SGK, cytoplasm, kkin, nucleus, nucleus_Foxo1_Pa0_Ac0_pUb1)
  nucleus_Foxo1_Pa0_Ac0_pUb1*nucleus*SGK*cytoplasm*kkin;
end

function Function_for_conversion_of_dnabound_Foxo1_Pa0_Ac0_pUb1_to_dnabound_Foxo1_Pa1_Ac0_pUb1_by_SGK(SGK, cytoplasm, dnabound, dnabound_Foxo1_Pa0_Ac0_pUb1, kkin)
  dnabound_Foxo1_Pa0_Ac0_pUb1*dnabound*SGK*cytoplasm*kkin;
end

function Function_for_conversion_of_cytoplasm_Foxo1_Pa0_Ac1_pUb0_to_cytoplasm_Foxo1_Pa1_Ac1_pUb0_by_SGK(SGK, cytoplasm, cytoplasm_Foxo1_Pa0_Ac1_pUb0, kkin)
  cytoplasm_Foxo1_Pa0_Ac1_pUb0*cytoplasm*SGK*cytoplasm*kkin/cytoplasm;
end

function Function_for_conversion_of_nucleus_Foxo1_Pa0_Ac1_pUb0_to_nucleus_Foxo1_Pa1_Ac1_pUb0_by_SGK(SGK, cytoplasm, kkin, nucleus, nucleus_Foxo1_Pa0_Ac1_pUb0)
  nucleus_Foxo1_Pa0_Ac1_pUb0*nucleus*SGK*cytoplasm*kkin;
end

function Function_for_conversion_of_dnabound_Foxo1_Pa0_Ac1_pUb0_to_dnabound_Foxo1_Pa1_Ac1_pUb0_by_SGK(SGK, cytoplasm, dnabound, dnabound_Foxo1_Pa0_Ac1_pUb0, kkin)
  dnabound_Foxo1_Pa0_Ac1_pUb0*dnabound*SGK*cytoplasm*kkin;
end

function Function_for_conversion_of_cytoplasm_Foxo1_Pa0_Ac1_pUb1_to_cytoplasm_Foxo1_Pa1_Ac1_pUb1_by_SGK(SGK, cytoplasm, cytoplasm_Foxo1_Pa0_Ac1_pUb1, kkin)
  cytoplasm_Foxo1_Pa0_Ac1_pUb1*cytoplasm*SGK*cytoplasm*kkin/cytoplasm;
end

function Function_for_conversion_of_nucleus_Foxo1_Pa0_Ac1_pUb1_to_nucleus_Foxo1_Pa1_Ac1_pUb1_by_SGK(SGK, cytoplasm, kkin, nucleus, nucleus_Foxo1_Pa0_Ac1_pUb1)
  nucleus_Foxo1_Pa0_Ac1_pUb1*nucleus*SGK*cytoplasm*kkin;
end

function Function_for_conversion_of_dnabound_Foxo1_Pa0_Ac1_pUb1_to_dnabound_Foxo1_Pa1_Ac1_pUb1_by_SGK(SGK, cytoplasm, dnabound, dnabound_Foxo1_Pa0_Ac1_pUb1, kkin)
  dnabound_Foxo1_Pa0_Ac1_pUb1*dnabound*SGK*cytoplasm*kkin;
end

function Function_for_conversion_of_cytoplasm_Foxo1_Pa1_Ac0_pUb0_to_cytoplasm_Foxo1_Pa0_Ac0_pUb0_by_PP2A(PP2A, cytoplasm, cytoplasm_Foxo1_Pa1_Ac0_pUb0, kdephos)
  cytoplasm_Foxo1_Pa1_Ac0_pUb0*cytoplasm*PP2A*cytoplasm*kdephos/cytoplasm;
end

function Function_for_conversion_of_nucleus_Foxo1_Pa1_Ac0_pUb0_to_nucleus_Foxo1_Pa0_Ac0_pUb0_by_PP2A(PP2A, cytoplasm, kdephos, nucleus, nucleus_Foxo1_Pa1_Ac0_pUb0)
  nucleus_Foxo1_Pa1_Ac0_pUb0*nucleus*PP2A*cytoplasm*kdephos;
end

function Function_for_conversion_of_dnabound_Foxo1_Pa1_Ac0_pUb0_to_dnabound_Foxo1_Pa0_Ac0_pUb0_by_PP2A(PP2A, cytoplasm, dnabound, dnabound_Foxo1_Pa1_Ac0_pUb0, kdephos)
  dnabound_Foxo1_Pa1_Ac0_pUb0*dnabound*PP2A*cytoplasm*kdephos;
end

function Function_for_conversion_of_cytoplasm_Foxo1_Pa1_Ac0_pUb1_to_cytoplasm_Foxo1_Pa0_Ac0_pUb1_by_PP2A(PP2A, cytoplasm, cytoplasm_Foxo1_Pa1_Ac0_pUb1, kdephos)
  cytoplasm_Foxo1_Pa1_Ac0_pUb1*cytoplasm*PP2A*cytoplasm*kdephos/cytoplasm;
end

function Function_for_conversion_of_nucleus_Foxo1_Pa1_Ac0_pUb1_to_nucleus_Foxo1_Pa0_Ac0_pUb1_by_PP2A(PP2A, cytoplasm, kdephos, nucleus, nucleus_Foxo1_Pa1_Ac0_pUb1)
  nucleus_Foxo1_Pa1_Ac0_pUb1*nucleus*PP2A*cytoplasm*kdephos;
end

function Function_for_conversion_of_dnabound_Foxo1_Pa1_Ac0_pUb1_to_dnabound_Foxo1_Pa0_Ac0_pUb1_by_PP2A(PP2A, cytoplasm, dnabound, dnabound_Foxo1_Pa1_Ac0_pUb1, kdephos)
  dnabound_Foxo1_Pa1_Ac0_pUb1*dnabound*PP2A*cytoplasm*kdephos;
end

function Function_for_conversion_of_cytoplasm_Foxo1_Pa1_Ac1_pUb0_to_cytoplasm_Foxo1_Pa0_Ac1_pUb0_by_PP2A(PP2A, cytoplasm, cytoplasm_Foxo1_Pa1_Ac1_pUb0, kdephos)
  cytoplasm_Foxo1_Pa1_Ac1_pUb0*cytoplasm*PP2A*cytoplasm*kdephos/cytoplasm;
end

function Function_for_conversion_of_nucleus_Foxo1_Pa1_Ac1_pUb0_to_nucleus_Foxo1_Pa0_Ac1_pUb0_by_PP2A(PP2A, cytoplasm, kdephos, nucleus, nucleus_Foxo1_Pa1_Ac1_pUb0)
  nucleus_Foxo1_Pa1_Ac1_pUb0*nucleus*PP2A*cytoplasm*kdephos;
end

function Function_for_conversion_of_dnabound_Foxo1_Pa1_Ac1_pUb0_to_dnabound_Foxo1_Pa0_Ac1_pUb0_by_PP2A(PP2A, cytoplasm, dnabound, dnabound_Foxo1_Pa1_Ac1_pUb0, kdephos)
  dnabound_Foxo1_Pa1_Ac1_pUb0*dnabound*PP2A*cytoplasm*kdephos;
end

function Function_for_conversion_of_cytoplasm_Foxo1_Pa1_Ac1_pUb1_to_cytoplasm_Foxo1_Pa0_Ac1_pUb1_by_PP2A(PP2A, cytoplasm, cytoplasm_Foxo1_Pa1_Ac1_pUb1, kdephos)
  cytoplasm_Foxo1_Pa1_Ac1_pUb1*cytoplasm*PP2A*cytoplasm*kdephos/cytoplasm;
end

function Function_for_conversion_of_nucleus_Foxo1_Pa1_Ac1_pUb1_to_nucleus_Foxo1_Pa0_Ac1_pUb1_by_PP2A(PP2A, cytoplasm, kdephos, nucleus, nucleus_Foxo1_Pa1_Ac1_pUb1)
  nucleus_Foxo1_Pa1_Ac1_pUb1*nucleus*PP2A*cytoplasm*kdephos;
end

function Function_for_conversion_of_dnabound_Foxo1_Pa1_Ac1_pUb1_to_dnabound_Foxo1_Pa0_Ac1_pUb1_by_PP2A(PP2A, cytoplasm, dnabound, dnabound_Foxo1_Pa1_Ac1_pUb1, kdephos)
  dnabound_Foxo1_Pa1_Ac1_pUb1*dnabound*PP2A*cytoplasm*kdephos;
end

function Function_for_conversion_of_nucleus_Foxo1_Pa0_Ac0_pUb0_to_nucleus_Foxo1_Pa0_Ac1_pUb0_by_CBPP300(CBPP300, cytoplasm, kacet, nucleus, nucleus_Foxo1_Pa0_Ac0_pUb0)
  nucleus_Foxo1_Pa0_Ac0_pUb0*nucleus*CBPP300*cytoplasm*kacet;
end

function Function_for_conversion_of_dnabound_Foxo1_Pa0_Ac0_pUb0_to_dnabound_Foxo1_Pa0_Ac1_pUb0_by_CBPP300(CBPP300, cytoplasm, dnabound, dnabound_Foxo1_Pa0_Ac0_pUb0, kacet)
  dnabound_Foxo1_Pa0_Ac0_pUb0*dnabound*CBPP300*cytoplasm*kacet;
end

function Function_for_conversion_of_nucleus_Foxo1_Pa0_Ac0_pUb1_to_nucleus_Foxo1_Pa0_Ac1_pUb1_by_CBPP300(CBPP300, cytoplasm, kacet, nucleus, nucleus_Foxo1_Pa0_Ac0_pUb1)
  nucleus_Foxo1_Pa0_Ac0_pUb1*nucleus*CBPP300*cytoplasm*kacet;
end

function Function_for_conversion_of_dnabound_Foxo1_Pa0_Ac0_pUb1_to_dnabound_Foxo1_Pa0_Ac1_pUb1_by_CBPP300(CBPP300, cytoplasm, dnabound, dnabound_Foxo1_Pa0_Ac0_pUb1, kacet)
  dnabound_Foxo1_Pa0_Ac0_pUb1*dnabound*CBPP300*cytoplasm*kacet;
end

function Function_for_conversion_of_nucleus_Foxo1_Pa0_Ac1_pUb0_to_nucleus_Foxo1_Pa0_Ac0_pUb0_by_SIRT1(SIRT1, cytoplasm, kdeac, nucleus, nucleus_Foxo1_Pa0_Ac1_pUb0)
  nucleus_Foxo1_Pa0_Ac1_pUb0*nucleus*SIRT1*cytoplasm*kdeac;
end

function Function_for_conversion_of_dnabound_Foxo1_Pa0_Ac1_pUb0_to_dnabound_Foxo1_Pa0_Ac0_pUb0_by_SIRT1(SIRT1, cytoplasm, dnabound, dnabound_Foxo1_Pa0_Ac1_pUb0, kdeac)
  dnabound_Foxo1_Pa0_Ac1_pUb0*dnabound*SIRT1*cytoplasm*kdeac;
end

function Function_for_conversion_of_nucleus_Foxo1_Pa0_Ac1_pUb1_to_nucleus_Foxo1_Pa0_Ac0_pUb1_by_SIRT1(SIRT1, cytoplasm, kdeac, nucleus, nucleus_Foxo1_Pa0_Ac1_pUb1)
  nucleus_Foxo1_Pa0_Ac1_pUb1*nucleus*SIRT1*cytoplasm*kdeac;
end

function Function_for_conversion_of_dnabound_Foxo1_Pa0_Ac1_pUb1_to_dnabound_Foxo1_Pa0_Ac0_pUb1_by_SIRT1(SIRT1, cytoplasm, dnabound, dnabound_Foxo1_Pa0_Ac1_pUb1, kdeac)
  dnabound_Foxo1_Pa0_Ac1_pUb1*dnabound*SIRT1*cytoplasm*kdeac;
end

function Function_for_conversion_of_nucleus_Foxo1_Pa1_Ac0_pUb0_to_nucleus_Foxo1_Pa1_Ac1_pUb0_by_CBPP300(CBPP300, cytoplasm, kacet, nucleus, nucleus_Foxo1_Pa1_Ac0_pUb0)
  nucleus_Foxo1_Pa1_Ac0_pUb0*nucleus*CBPP300*cytoplasm*kacet;
end

function Function_for_conversion_of_dnabound_Foxo1_Pa1_Ac0_pUb0_to_dnabound_Foxo1_Pa1_Ac1_pUb0_by_CBPP300(CBPP300, cytoplasm, dnabound, dnabound_Foxo1_Pa1_Ac0_pUb0, kacet)
  dnabound_Foxo1_Pa1_Ac0_pUb0*dnabound*CBPP300*cytoplasm*kacet;
end

function Function_for_conversion_of_nucleus_Foxo1_Pa1_Ac0_pUb1_to_nucleus_Foxo1_Pa1_Ac1_pUb1_by_CBPP300(CBPP300, cytoplasm, kacet, nucleus, nucleus_Foxo1_Pa1_Ac0_pUb1)
  nucleus_Foxo1_Pa1_Ac0_pUb1*nucleus*CBPP300*cytoplasm*kacet;
end

function Function_for_conversion_of_dnabound_Foxo1_Pa1_Ac0_pUb1_to_dnabound_Foxo1_Pa1_Ac1_pUb1_by_CBPP300(CBPP300, cytoplasm, dnabound, dnabound_Foxo1_Pa1_Ac0_pUb1, kacet)
  dnabound_Foxo1_Pa1_Ac0_pUb1*dnabound*CBPP300*cytoplasm*kacet;
end

function Function_for_conversion_of_nucleus_Foxo1_Pa1_Ac1_pUb0_to_nucleus_Foxo1_Pa1_Ac0_pUb0_by_SIRT1(SIRT1, cytoplasm, kdeac, nucleus, nucleus_Foxo1_Pa1_Ac1_pUb0)
  nucleus_Foxo1_Pa1_Ac1_pUb0*nucleus*SIRT1*cytoplasm*kdeac;
end

function Function_for_conversion_of_dnabound_Foxo1_Pa1_Ac1_pUb0_to_dnabound_Foxo1_Pa1_Ac0_pUb0_by_SIRT1(SIRT1, cytoplasm, dnabound, dnabound_Foxo1_Pa1_Ac1_pUb0, kdeac)
  dnabound_Foxo1_Pa1_Ac1_pUb0*dnabound*SIRT1*cytoplasm*kdeac;
end

function Function_for_conversion_of_nucleus_Foxo1_Pa1_Ac1_pUb1_to_nucleus_Foxo1_Pa1_Ac0_pUb1_by_SIRT1(SIRT1, cytoplasm, kdeac, nucleus, nucleus_Foxo1_Pa1_Ac1_pUb1)
  nucleus_Foxo1_Pa1_Ac1_pUb1*nucleus*SIRT1*cytoplasm*kdeac;
end

function Function_for_conversion_of_dnabound_Foxo1_Pa1_Ac1_pUb1_to_dnabound_Foxo1_Pa1_Ac0_pUb1_by_SIRT1(SIRT1, cytoplasm, dnabound, dnabound_Foxo1_Pa1_Ac1_pUb1, kdeac)
  dnabound_Foxo1_Pa1_Ac1_pUb1*dnabound*SIRT1*cytoplasm*kdeac;
end

function Function_for_conversion_of_nucleus_Foxo1_Pa0_Ac1_pUb0_to_nucleus_Foxo1_Pa0_Ac1_pUb1_by_SCF(SCF, cytoplasm, kub, nucleus, nucleus_Foxo1_Pa0_Ac1_pUb0)
  nucleus_Foxo1_Pa0_Ac1_pUb0*nucleus*SCF*cytoplasm*kub;
end

function Function_for_conversion_of_dnabound_Foxo1_Pa0_Ac1_pUb0_to_dnabound_Foxo1_Pa0_Ac1_pUb1_by_SCF(SCF, cytoplasm, dnabound, dnabound_Foxo1_Pa0_Ac1_pUb0, kub)
  dnabound_Foxo1_Pa0_Ac1_pUb0*dnabound*SCF*cytoplasm*kub;
end

function Function_for_conversion_of_cytoplasm_Foxo1_Pa1_Ac0_pUb0_to_cytoplasm_Foxo1_Pa1_Ac0_pUb1_by_SCF(SCF, cytoplasm, cytoplasm_Foxo1_Pa1_Ac0_pUb0, kub)
  cytoplasm_Foxo1_Pa1_Ac0_pUb0*cytoplasm*SCF*cytoplasm*kub/cytoplasm;
end

function Function_for_conversion_of_nucleus_Foxo1_Pa1_Ac0_pUb0_to_nucleus_Foxo1_Pa1_Ac0_pUb1_by_SCF(SCF, cytoplasm, kub, nucleus, nucleus_Foxo1_Pa1_Ac0_pUb0)
  nucleus_Foxo1_Pa1_Ac0_pUb0*nucleus*SCF*cytoplasm*kub;
end

function Function_for_conversion_of_dnabound_Foxo1_Pa1_Ac0_pUb0_to_dnabound_Foxo1_Pa1_Ac0_pUb1_by_SCF(SCF, cytoplasm, dnabound, dnabound_Foxo1_Pa1_Ac0_pUb0, kub)
  dnabound_Foxo1_Pa1_Ac0_pUb0*dnabound*SCF*cytoplasm*kub;
end

function Function_for_conversion_of_cytoplasm_Foxo1_Pa1_Ac1_pUb0_to_cytoplasm_Foxo1_Pa1_Ac1_pUb1_by_SCF(SCF, cytoplasm, cytoplasm_Foxo1_Pa1_Ac1_pUb0, kub)
  cytoplasm_Foxo1_Pa1_Ac1_pUb0*cytoplasm*SCF*cytoplasm*kub/cytoplasm;
end

function Function_for_conversion_of_nucleus_Foxo1_Pa1_Ac1_pUb0_to_nucleus_Foxo1_Pa1_Ac1_pUb1_by_SCF(SCF, cytoplasm, kub, nucleus, nucleus_Foxo1_Pa1_Ac1_pUb0)
  nucleus_Foxo1_Pa1_Ac1_pUb0*nucleus*SCF*cytoplasm*kub;
end

function Function_for_conversion_of_dnabound_Foxo1_Pa1_Ac1_pUb0_to_dnabound_Foxo1_Pa1_Ac1_pUb1_by_SCF(SCF, cytoplasm, dnabound, dnabound_Foxo1_Pa1_Ac1_pUb0, kub)
  dnabound_Foxo1_Pa1_Ac1_pUb0*dnabound*SCF*cytoplasm*kub;
end

function Function_for_degradation_of_cytoplasm_Foxo1_Pa0_Ac0_pUb1(Proteasome, cytoplasm, cytoplasm_Foxo1_Pa0_Ac0_pUb1, kdeg)
  cytoplasm_Foxo1_Pa0_Ac0_pUb1*cytoplasm*Proteasome*cytoplasm*kdeg/cytoplasm;
end

function Function_for_degradation_of_cytoplasm_Foxo1_Pa0_Ac1_pUb1(Proteasome, cytoplasm, cytoplasm_Foxo1_Pa0_Ac1_pUb1, kdeg)
  cytoplasm_Foxo1_Pa0_Ac1_pUb1*cytoplasm*Proteasome*cytoplasm*kdeg/cytoplasm;
end

function Function_for_degradation_of_cytoplasm_Foxo1_Pa1_Ac0_pUb1(Proteasome, cytoplasm, cytoplasm_Foxo1_Pa1_Ac0_pUb1, kdeg)
  cytoplasm_Foxo1_Pa1_Ac0_pUb1*cytoplasm*Proteasome*cytoplasm*kdeg/cytoplasm;
end

function Function_for_degradation_of_cytoplasm_Foxo1_Pa1_Ac1_pUb1(Proteasome, cytoplasm, cytoplasm_Foxo1_Pa1_Ac1_pUb1, kdeg)
  cytoplasm_Foxo1_Pa1_Ac1_pUb1*cytoplasm*Proteasome*cytoplasm*kdeg/cytoplasm;
end

function Function_for_transcription_of_inr_by_dnabound_Foxo1_Pa0_Ac0_pUb0(dnabound, dnabound_Foxo1_Pa0_Ac0_pUb0, ktranscr)
  dnabound_Foxo1_Pa0_Ac0_pUb0*dnabound*ktranscr;
end

function Function_for_transcription_of_sod2_by_dnabound_Foxo1_Pa0_Ac0_pUb0(dnabound, dnabound_Foxo1_Pa0_Ac0_pUb0, ktranscr)
  dnabound_Foxo1_Pa0_Ac0_pUb0*dnabound*ktranscr;
end

function Function_for_transcription_of_inr_by_dnabound_Foxo1_Pa0_Ac0_pUb1(dnabound, dnabound_Foxo1_Pa0_Ac0_pUb1, ktranscr)
  dnabound_Foxo1_Pa0_Ac0_pUb1*dnabound*ktranscr;
end

function Function_for_transcription_of_sod2_by_dnabound_Foxo1_Pa0_Ac0_pUb1(dnabound, dnabound_Foxo1_Pa0_Ac0_pUb1, ktranscr)
  dnabound_Foxo1_Pa0_Ac0_pUb1*dnabound*ktranscr;
end

function Function_for_transcription_of_inr_by_dnabound_Foxo1_Pa0_Ac1_pUb0(dnabound, dnabound_Foxo1_Pa0_Ac1_pUb0, ktranscr)
  dnabound_Foxo1_Pa0_Ac1_pUb0*dnabound*ktranscr;
end

function Function_for_transcription_of_sod2_by_dnabound_Foxo1_Pa0_Ac1_pUb0(dnabound, dnabound_Foxo1_Pa0_Ac1_pUb0, ktranscr)
  dnabound_Foxo1_Pa0_Ac1_pUb0*dnabound*ktranscr;
end

function Function_for_transcription_of_inr_by_dnabound_Foxo1_Pa0_Ac1_pUb1(dnabound, dnabound_Foxo1_Pa0_Ac1_pUb1, ktranscr)
  dnabound_Foxo1_Pa0_Ac1_pUb1*dnabound*ktranscr;
end

function Function_for_transcription_of_sod2_by_dnabound_Foxo1_Pa0_Ac1_pUb1(dnabound, dnabound_Foxo1_Pa0_Ac1_pUb1, ktranscr)
  dnabound_Foxo1_Pa0_Ac1_pUb1*dnabound*ktranscr;
end

function Function_for_transcription_of_inr_by_dnabound_Foxo1_Pa1_Ac0_pUb0(dnabound, dnabound_Foxo1_Pa1_Ac0_pUb0, ktranscr)
  dnabound_Foxo1_Pa1_Ac0_pUb0*dnabound*ktranscr;
end

function Function_for_transcription_of_sod2_by_dnabound_Foxo1_Pa1_Ac0_pUb0(dnabound, dnabound_Foxo1_Pa1_Ac0_pUb0, ktranscr)
  dnabound_Foxo1_Pa1_Ac0_pUb0*dnabound*ktranscr;
end

function Function_for_transcription_of_inr_by_dnabound_Foxo1_Pa1_Ac0_pUb1(dnabound, dnabound_Foxo1_Pa1_Ac0_pUb1, ktranscr)
  dnabound_Foxo1_Pa1_Ac0_pUb1*dnabound*ktranscr;
end

function Function_for_transcription_of_sod2_by_dnabound_Foxo1_Pa1_Ac0_pUb1(dnabound, dnabound_Foxo1_Pa1_Ac0_pUb1, ktranscr)
  dnabound_Foxo1_Pa1_Ac0_pUb1*dnabound*ktranscr;
end

function Function_for_transcription_of_inr_by_dnabound_Foxo1_Pa1_Ac1_pUb0(dnabound, dnabound_Foxo1_Pa1_Ac1_pUb0, ktranscr)
  dnabound_Foxo1_Pa1_Ac1_pUb0*dnabound*ktranscr;
end

function Function_for_transcription_of_sod2_by_dnabound_Foxo1_Pa1_Ac1_pUb0(dnabound, dnabound_Foxo1_Pa1_Ac1_pUb0, ktranscr)
  dnabound_Foxo1_Pa1_Ac1_pUb0*dnabound*ktranscr;
end

function Function_for_transcription_of_inr_by_dnabound_Foxo1_Pa1_Ac1_pUb1(dnabound, dnabound_Foxo1_Pa1_Ac1_pUb1, ktranscr)
  dnabound_Foxo1_Pa1_Ac1_pUb1*dnabound*ktranscr;
end

function Function_for_transcription_of_sod2_by_dnabound_Foxo1_Pa1_Ac1_pUb1(dnabound, dnabound_Foxo1_Pa1_Ac1_pUb1, ktranscr)
  dnabound_Foxo1_Pa1_Ac1_pUb1*dnabound*ktranscr;
end

function Function_for_export_of_inr_RNA(kexp, nucleus, nucleus_RNA_Inr)
  nucleus_RNA_Inr*nucleus*kexp;
end

function Function_for_cyto_degr_of_inr_RNA(cytoplasm, cytoplasm_RNA_Inr, kmdeg)
  cytoplasm_RNA_Inr*cytoplasm*kmdeg/cytoplasm;
end

function Function_for_translation_of_inr(cytoplasm, cytoplasm_RNA_Inr, ktransl)
  cytoplasm_RNA_Inr*cytoplasm*ktransl/cytoplasm;
end

function Function_for_degradation_of_Inr_protein(cytoplasm, cytoplasm_Inr, kpdeg)
  cytoplasm_Inr*cytoplasm*kpdeg/cytoplasm;
end

function Function_for_export_of_sod2_RNA(kexp, nucleus, nucleus_RNA_Sod2)
  nucleus_RNA_Sod2*nucleus*kexp;
end

function Function_for_cyto_degr_of_sod2_RNA(cytoplasm, cytoplasm_RNA_Sod2, kmdeg)
  cytoplasm_RNA_Sod2*cytoplasm*kmdeg/cytoplasm;
end

function Function_for_translation_of_sod2(cytoplasm, cytoplasm_RNA_Sod2, ktransl)
  cytoplasm_RNA_Sod2*cytoplasm*ktransl/cytoplasm;
end

function Function_for_degradation_of_Sod2_protein(cytoplasm, cytoplasm_Sod2, kpdeg)
  cytoplasm_Sod2*cytoplasm*kpdeg/cytoplasm;
end

model Smith2010___Response_of_FOXO_Transcription_Factors_to_Post_Translational_Modifications_Made_by_Ageing_Related_Signalling_Pathways()
  // Smith2010 - Response of FOXO Transcription Factors to Post-Translational Modifications (with acetylation pathway)
  // biomodels.db:MODEL1112260001
  // isDescribedBy pubmed:20567500
  // hasPart GO:0043687
  // hasProperty mamo:MAMO_0000046
  // hasTaxon taxonomy:2759
  // isDescribedBy doi:10.1371/journal.pone.0011092

  // Compartments:
  compartment extracellular = 8.3e-12;  // isVersionOf GO:0005576
  compartment cellsurface = 6.4e-14;  // isVersionOf GO:0009986
  compartment cytoplasm = 1.65e-11;  // isVersionOf GO:0005737
  compartment nucleus = 5e-13;  // isVersionOf GO:0005634
  compartment dnabound = 1e-13;  // isVersionOf GO:0003677

  // Species:
  species $null in cytoplasm = 0;
  species degr_Foxo1 in cytoplasm = 0;  // isHomologTo uniprot:Q9R1E0; hasProperty ncit:C25650
  species cytoplasm_Foxo1_Pa0_Ac0_pUb0 in cytoplasm = 6.060606e13; cytoplasm_Foxo1_Pa0_Ac0_pUb0 is "cytoplasm_Foxo1_unphosphorylated_unacetylated_notpolyubiquitinated";  // isHomologTo uniprot:Q9R1E0
  species nucleus_Foxo1_Pa0_Ac0_pUb0 in nucleus = 0; nucleus_Foxo1_Pa0_Ac0_pUb0 is "nucleus_Foxo1_unphosphorylated_unacetylated_notpolyubiquitinated";  // isHomologTo uniprot:Q9R1E0
  species dnabound_Foxo1_Pa0_Ac0_pUb0 in dnabound = 0; dnabound_Foxo1_Pa0_Ac0_pUb0 is "dnabound_Foxo1_unphosphorylated_unacetylated_notpolyubiquitinated";  // isHomologTo uniprot:Q9R1E0
  species cytoplasm_Foxo1_Pa0_Ac0_pUb1 in cytoplasm = 0; cytoplasm_Foxo1_Pa0_Ac0_pUb1 is "cytoplasm_Foxo1_unphosphorylated_unacetylated_polyubiquitinated";  // isHomologTo uniprot:Q9R1E0; hasProperty PR:000037077
  species nucleus_Foxo1_Pa0_Ac0_pUb1 in nucleus = 0; nucleus_Foxo1_Pa0_Ac0_pUb1 is "nucleus_Foxo1_unphosphorylated_unacetylated_polyubiquitinated";  // isHomologTo uniprot:Q9R1E0; hasProperty PR:000037077
  species dnabound_Foxo1_Pa0_Ac0_pUb1 in dnabound = 0; dnabound_Foxo1_Pa0_Ac0_pUb1 is "dnabound_Foxo1_unphosphorylated_unacetylated_polyubiquitinated";  // isHomologTo uniprot:Q9R1E0; hasProperty PR:000037077
  species cytoplasm_Foxo1_Pa0_Ac1_pUb0 in cytoplasm = 0; cytoplasm_Foxo1_Pa0_Ac1_pUb0 is "cytoplasm_Foxo1_unphosphorylated_acetylated_notpolyubiquitinated";  // isHomologTo uniprot:Q9R1E0; hasProperty PR:000037073
  species nucleus_Foxo1_Pa0_Ac1_pUb0 in nucleus = 0; nucleus_Foxo1_Pa0_Ac1_pUb0 is "nucleus_Foxo1_unphosphorylated_acetylated_notpolyubiquitinated";  // isHomologTo uniprot:Q9R1E0; hasProperty PR:000037073
  species dnabound_Foxo1_Pa0_Ac1_pUb0 in dnabound = 0; dnabound_Foxo1_Pa0_Ac1_pUb0 is "dnabound_Foxo1_unphosphorylated_acetylated_notpolyubiquitinated";  // isHomologTo uniprot:Q9R1E0; hasProperty PR:000037073
  species cytoplasm_Foxo1_Pa0_Ac1_pUb1 in cytoplasm = 0; cytoplasm_Foxo1_Pa0_Ac1_pUb1 is "cytoplasm_Foxo1_unphosphorylated_acetylated_polyubiquitinated";  // isHomologTo uniprot:Q9R1E0; hasProperty PR:000037077; hasProperty PR:000037073
  species nucleus_Foxo1_Pa0_Ac1_pUb1 in nucleus = 0; nucleus_Foxo1_Pa0_Ac1_pUb1 is "nucleus_Foxo1_unphosphorylated_acetylated_polyubiquitinated";  // isHomologTo uniprot:Q9R1E0; hasProperty PR:000037073; hasProperty PR:000037077
  species dnabound_Foxo1_Pa0_Ac1_pUb1 in dnabound = 0; dnabound_Foxo1_Pa0_Ac1_pUb1 is "dnabound_Foxo1_unphosphorylated_acetylated_polyubiquitinated";  // isHomologTo uniprot:Q9R1E0; hasProperty PR:000037077; hasProperty PR:000037073
  species cytoplasm_Foxo1_Pa1_Ac0_pUb0 in cytoplasm = 0; cytoplasm_Foxo1_Pa1_Ac0_pUb0 is "cytoplasm_Foxo1_phosphorylated_unacetylated_notpolyubiquitinated";  // isHomologTo uniprot:Q9R1E0; hasProperty PATO:0002220
  species nucleus_Foxo1_Pa1_Ac0_pUb0 in nucleus = 0; nucleus_Foxo1_Pa1_Ac0_pUb0 is "nucleus_Foxo1_phosphorylated_unacetylated_notpolyubiquitinated";  // isHomologTo uniprot:Q9R1E0; hasProperty PATO:0002220
  species dnabound_Foxo1_Pa1_Ac0_pUb0 in dnabound = 0; dnabound_Foxo1_Pa1_Ac0_pUb0 is "dnabound_Foxo1_phosphorylated_unacetylated_notpolyubiquitinated";  // isHomologTo uniprot:Q9R1E0; hasProperty PATO:0002220
  species cytoplasm_Foxo1_Pa1_Ac0_pUb1 in cytoplasm = 0; cytoplasm_Foxo1_Pa1_Ac0_pUb1 is "cytoplasm_Foxo1_phosphorylated_unacetylated_polyubiquitinated";  // isHomologTo uniprot:Q9R1E0; hasProperty PATO:0002220; hasProperty PR:000037077
  species nucleus_Foxo1_Pa1_Ac0_pUb1 in nucleus = 0; nucleus_Foxo1_Pa1_Ac0_pUb1 is "nucleus_Foxo1_phosphorylated_unacetylated_polyubiquitinated";  // isHomologTo uniprot:Q9R1E0; hasProperty PATO:0002220; hasProperty PR:000037077
  species dnabound_Foxo1_Pa1_Ac0_pUb1 in dnabound = 0; dnabound_Foxo1_Pa1_Ac0_pUb1 is "dnabound_Foxo1_phosphorylated_unacetylated_polyubiquitinated";  // isHomologTo uniprot:Q9R1E0; hasProperty PR:000037077; hasProperty PATO:0002220
  species cytoplasm_Foxo1_Pa1_Ac1_pUb0 in cytoplasm = 0; cytoplasm_Foxo1_Pa1_Ac1_pUb0 is "cytoplasm_Foxo1_phosphorylated_acetylated_notpolyubiquitinated";  // isHomologTo uniprot:Q9R1E0; hasProperty PR:000037073; hasProperty PATO:0002220
  species nucleus_Foxo1_Pa1_Ac1_pUb0 in nucleus = 0; nucleus_Foxo1_Pa1_Ac1_pUb0 is "nucleus_Foxo1_phosphorylated_acetylated_notpolyubiquitinated";  // isHomologTo uniprot:Q9R1E0; hasProperty PATO:0002220; hasProperty PR:000037073
  species dnabound_Foxo1_Pa1_Ac1_pUb0 in dnabound = 0; dnabound_Foxo1_Pa1_Ac1_pUb0 is "dnabound_Foxo1_phosphorylated_acetylated_notpolyubiquitinated";  // isHomologTo uniprot:Q9R1E0; hasProperty PATO:0002220; hasProperty PR:000037073
  species cytoplasm_Foxo1_Pa1_Ac1_pUb1 in cytoplasm = 0; cytoplasm_Foxo1_Pa1_Ac1_pUb1 is "cytoplasm_Foxo1_phosphorylated_acetylated_polyubiquitinated";  // isHomologTo uniprot:Q9R1E0; hasProperty PR:000037077; hasProperty PATO:0002220; hasProperty PR:000037073
  species nucleus_Foxo1_Pa1_Ac1_pUb1 in nucleus = 0; nucleus_Foxo1_Pa1_Ac1_pUb1 is "nucleus_Foxo1_phosphorylated_acetylated_polyubiquitinated";  // isHomologTo uniprot:Q9R1E0; hasProperty PR:000037077; hasProperty PR:000037073; hasProperty PATO:0002220
  species dnabound_Foxo1_Pa1_Ac1_pUb1 in dnabound = 0; dnabound_Foxo1_Pa1_Ac1_pUb1 is "dnabound_Foxo1_phosphorylated_acetylated_polyubiquitinated";  // isHomologTo uniprot:Q9R1E0; hasProperty PATO:0002220; hasProperty PR:000037077; hasProperty PR:000037073
  species $Foxo1_Pa0_tot in extracellular; Foxo1_Pa0_tot is "Foxo1_unphosphorylated_tot";  // isHomologTo uniprot:Q9R1E0
  species $Foxo1_Pa1_tot in extracellular; Foxo1_Pa1_tot is "Foxo1_phosphorylated_tot";  // isHomologTo uniprot:Q9R1E0; hasProperty PATO:0002220
  species $Foxo1_Ac0_tot in extracellular; Foxo1_Ac0_tot is "Foxo1_unacetylated_tot";  // isHomologTo uniprot:Q9R1E0
  species $Foxo1_Ac1_tot in extracellular; Foxo1_Ac1_tot is "Foxo1_acetylated_tot";  // isHomologTo uniprot:Q9R1E0; hasProperty PR:000037073
  species $Foxo1_pUb0_tot in extracellular; Foxo1_pUb0_tot is "Foxo1_unpolyubiquitinated_tot";  // isHomologTo uniprot:Q9R1E0
  species $Foxo1_pUb1_tot in extracellular; Foxo1_pUb1_tot is "Foxo1_polyubiquitinated_tot";  // isHomologTo uniprot:Q9R1E0; hasProperty PR:000037077
  species $cytoplasm_Foxo1_tot in extracellular;  // isHomologTo uniprot:Q9R1E0
  species $nucleus_Foxo1_tot in extracellular;  // isHomologTo uniprot:Q9R1E0
  species $dnabound_Foxo1_tot in extracellular;  // isHomologTo uniprot:Q9R1E0
  species $Foxo1_all in extracellular;  // isHomologTo uniprot:Q9R1E0
  species nucleus_RNA_Inr in nucleus = 0;
  species cytoplasm_RNA_Inr in cytoplasm = 0;
  species cytoplasm_Inr in cytoplasm = 0;
  species nucleus_RNA_Sod2 in nucleus = 0;
  species cytoplasm_RNA_Sod2 in cytoplasm = 0;
  species cytoplasm_Sod2 in cytoplasm = 0;
  species E2F1 in cytoplasm = 0;  // isHomologTo uniprot:Q61501
  species Akt in cytoplasm = 6.060606e12;  // isHomologTo uniprot:P31750
  species SGK in cytoplasm = 0;  // isVersionOf uniprot:Q9WVC6
  species CDK2 in cytoplasm = 0;  // isHomologTo uniprot:P97377
  species AMPK in cytoplasm = 0;  // hasPart uniprot:Q91WG5
  species IKKb in cytoplasm = 0;  // isHomologTo uniprot:Q9R0T8
  species JNK in cytoplasm = 0;  // isHomologTo uniprot:Q9ESN9
  species PP2A in cytoplasm = 6.060606e14;  // hasPart uniprot:Q76MZ3
  species CBPP300 in cytoplasm = 6.060606e13;  // isHomologTo uniprot:P97769
  species SIRT1 in cytoplasm = 6.060606e11;  // isHomologTo uniprot:Q923E4
  species E3 in cytoplasm = 0;  // isHomologTo uniprot:P62878
  species USP7 in cytoplasm = 6.060606e13;  // isHomologTo uniprot:Q6A4J8
  species SCF in cytoplasm = 6.060606e13;  // isVersionOf GO:0019005
  species Proteasome in cytoplasm = 6.060606e13;  // isVersionOf GO:0000502
  species $Foxo1_all_rate in extracellular;  // isHomologTo uniprot:Q9R1E0

  // Parameters:
  Initial_for_Foxo1_all = Foxo1_all;

  // Assignment rules:
  Foxo1_Pa0_tot := (cytoplasm_Foxo1_Pa0_Ac0_pUb0*cytoplasm + nucleus_Foxo1_Pa0_Ac0_pUb0*nucleus + dnabound_Foxo1_Pa0_Ac0_pUb0*dnabound + cytoplasm_Foxo1_Pa0_Ac0_pUb1*cytoplasm + nucleus_Foxo1_Pa0_Ac0_pUb1*nucleus + dnabound_Foxo1_Pa0_Ac0_pUb1*dnabound + cytoplasm_Foxo1_Pa0_Ac1_pUb0*cytoplasm + nucleus_Foxo1_Pa0_Ac1_pUb0*nucleus + dnabound_Foxo1_Pa0_Ac1_pUb0*dnabound + cytoplasm_Foxo1_Pa0_Ac1_pUb1*cytoplasm + nucleus_Foxo1_Pa0_Ac1_pUb1*nucleus + dnabound_Foxo1_Pa0_Ac1_pUb1*dnabound)/extracellular;
  Foxo1_Pa1_tot := (cytoplasm_Foxo1_Pa1_Ac0_pUb0*cytoplasm + nucleus_Foxo1_Pa1_Ac0_pUb0*nucleus + dnabound_Foxo1_Pa1_Ac0_pUb0*dnabound + cytoplasm_Foxo1_Pa1_Ac0_pUb1*cytoplasm + nucleus_Foxo1_Pa1_Ac0_pUb1*nucleus + dnabound_Foxo1_Pa1_Ac0_pUb1*dnabound + cytoplasm_Foxo1_Pa1_Ac1_pUb0*cytoplasm + nucleus_Foxo1_Pa1_Ac1_pUb0*nucleus + dnabound_Foxo1_Pa1_Ac1_pUb0*dnabound + cytoplasm_Foxo1_Pa1_Ac1_pUb1*cytoplasm + nucleus_Foxo1_Pa1_Ac1_pUb1*nucleus + dnabound_Foxo1_Pa1_Ac1_pUb1*dnabound)/extracellular;
  Foxo1_Ac0_tot := (cytoplasm_Foxo1_Pa0_Ac0_pUb0*cytoplasm + nucleus_Foxo1_Pa0_Ac0_pUb0*nucleus + dnabound_Foxo1_Pa0_Ac0_pUb0*dnabound + cytoplasm_Foxo1_Pa0_Ac0_pUb1*cytoplasm + nucleus_Foxo1_Pa0_Ac0_pUb1*nucleus + dnabound_Foxo1_Pa0_Ac0_pUb1*dnabound + cytoplasm_Foxo1_Pa1_Ac0_pUb0*cytoplasm + nucleus_Foxo1_Pa1_Ac0_pUb0*nucleus + dnabound_Foxo1_Pa1_Ac0_pUb0*dnabound + cytoplasm_Foxo1_Pa1_Ac0_pUb1*cytoplasm + nucleus_Foxo1_Pa1_Ac0_pUb1*nucleus + dnabound_Foxo1_Pa1_Ac0_pUb1*dnabound)/extracellular;
  Foxo1_Ac1_tot := (cytoplasm_Foxo1_Pa0_Ac1_pUb0*cytoplasm + nucleus_Foxo1_Pa0_Ac1_pUb0*nucleus + dnabound_Foxo1_Pa0_Ac1_pUb0*dnabound + cytoplasm_Foxo1_Pa0_Ac1_pUb1*cytoplasm + nucleus_Foxo1_Pa0_Ac1_pUb1*nucleus + dnabound_Foxo1_Pa0_Ac1_pUb1*dnabound + cytoplasm_Foxo1_Pa1_Ac1_pUb0*cytoplasm + nucleus_Foxo1_Pa1_Ac1_pUb0*nucleus + dnabound_Foxo1_Pa1_Ac1_pUb0*dnabound + cytoplasm_Foxo1_Pa1_Ac1_pUb1*cytoplasm + nucleus_Foxo1_Pa1_Ac1_pUb1*nucleus + dnabound_Foxo1_Pa1_Ac1_pUb1*dnabound)/extracellular;
  Foxo1_pUb0_tot := (cytoplasm_Foxo1_Pa0_Ac0_pUb0*cytoplasm + nucleus_Foxo1_Pa0_Ac0_pUb0*nucleus + dnabound_Foxo1_Pa0_Ac0_pUb0*dnabound + cytoplasm_Foxo1_Pa0_Ac1_pUb0*cytoplasm + nucleus_Foxo1_Pa0_Ac1_pUb0*nucleus + dnabound_Foxo1_Pa0_Ac1_pUb0*dnabound + cytoplasm_Foxo1_Pa1_Ac0_pUb0*cytoplasm + nucleus_Foxo1_Pa1_Ac0_pUb0*nucleus + dnabound_Foxo1_Pa1_Ac0_pUb0*dnabound + cytoplasm_Foxo1_Pa1_Ac1_pUb0*cytoplasm + nucleus_Foxo1_Pa1_Ac1_pUb0*nucleus + dnabound_Foxo1_Pa1_Ac1_pUb0*dnabound)/extracellular;
  Foxo1_pUb1_tot := (cytoplasm_Foxo1_Pa0_Ac0_pUb1*cytoplasm + nucleus_Foxo1_Pa0_Ac0_pUb1*nucleus + dnabound_Foxo1_Pa0_Ac0_pUb1*dnabound + cytoplasm_Foxo1_Pa0_Ac1_pUb1*cytoplasm + nucleus_Foxo1_Pa0_Ac1_pUb1*nucleus + dnabound_Foxo1_Pa0_Ac1_pUb1*dnabound + cytoplasm_Foxo1_Pa1_Ac0_pUb1*cytoplasm + nucleus_Foxo1_Pa1_Ac0_pUb1*nucleus + dnabound_Foxo1_Pa1_Ac0_pUb1*dnabound + cytoplasm_Foxo1_Pa1_Ac1_pUb1*cytoplasm + nucleus_Foxo1_Pa1_Ac1_pUb1*nucleus + dnabound_Foxo1_Pa1_Ac1_pUb1*dnabound)/extracellular;
  cytoplasm_Foxo1_tot := (cytoplasm_Foxo1_Pa0_Ac0_pUb0*cytoplasm + cytoplasm_Foxo1_Pa0_Ac0_pUb1*cytoplasm + cytoplasm_Foxo1_Pa0_Ac1_pUb0*cytoplasm + cytoplasm_Foxo1_Pa0_Ac1_pUb1*cytoplasm + cytoplasm_Foxo1_Pa1_Ac0_pUb0*cytoplasm + cytoplasm_Foxo1_Pa1_Ac0_pUb1*cytoplasm + cytoplasm_Foxo1_Pa1_Ac1_pUb0*cytoplasm + cytoplasm_Foxo1_Pa1_Ac1_pUb1*cytoplasm)/extracellular;
  nucleus_Foxo1_tot := (nucleus_Foxo1_Pa0_Ac0_pUb0*nucleus + nucleus_Foxo1_Pa0_Ac0_pUb1*nucleus + nucleus_Foxo1_Pa0_Ac1_pUb0*nucleus + nucleus_Foxo1_Pa0_Ac1_pUb1*nucleus + nucleus_Foxo1_Pa1_Ac0_pUb0*nucleus + nucleus_Foxo1_Pa1_Ac0_pUb1*nucleus + nucleus_Foxo1_Pa1_Ac1_pUb0*nucleus + nucleus_Foxo1_Pa1_Ac1_pUb1*nucleus)/extracellular;
  dnabound_Foxo1_tot := (dnabound_Foxo1_Pa0_Ac0_pUb0*dnabound + dnabound_Foxo1_Pa0_Ac0_pUb1*dnabound + dnabound_Foxo1_Pa0_Ac1_pUb0*dnabound + dnabound_Foxo1_Pa0_Ac1_pUb1*dnabound + dnabound_Foxo1_Pa1_Ac0_pUb0*dnabound + dnabound_Foxo1_Pa1_Ac0_pUb1*dnabound + dnabound_Foxo1_Pa1_Ac1_pUb0*dnabound + dnabound_Foxo1_Pa1_Ac1_pUb1*dnabound)/extracellular;
  Foxo1_all := (cytoplasm_Foxo1_tot*extracellular + nucleus_Foxo1_tot*extracellular + dnabound_Foxo1_tot*extracellular)/extracellular;
  Foxo1_all_rate := Foxo1_all/Initial_for_Foxo1_all;

  // Reactions:
  R1: $null => cytoplasm_Foxo1_Pa0_Ac0_pUb0; cytoplasm*Function_for_Synthesis(E2F1, cytoplasm, ksynth); R1 is "Synthesis of Foxo1 in cytoplasm mediated by E2F1";  // modifiers: E2F1; isVersionOf ncit:C18103
    ksynth = 0.0055;
  R2: cytoplasm_Foxo1_Pa0_Ac0_pUb0 => nucleus_Foxo1_Pa0_Ac0_pUb0; Function_for_transport_cytoplasm_Foxo1_Pa0_Ac0_pUb0_to_nucleus_Foxo1_Pa0_Ac0_pUb0(cytoplasm, cytoplasm_Foxo1_Pa0_Ac0_pUb0, R2_ktr); R2 is "transport cytoplasm_Foxo1_unphosphorylated_unacetylated_notpolyubiquitinated";  // isVersionOf GO:0051170
    R2_ktr = 0.181818;
  R3: nucleus_Foxo1_Pa0_Ac0_pUb0 => cytoplasm_Foxo1_Pa0_Ac0_pUb0; Function_for_transport_nucleus_Foxo1_Pa0_Ac0_pUb0_to_cytoplasm_Foxo1_Pa0_Ac0_pUb0(R3_ktr, nucleus, nucleus_Foxo1_Pa0_Ac0_pUb0); R3 is "transport nucleus_Foxo1_unphosphorylated_unacetylated_notpolyubiquitinated to cytoplasm";  // isVersionOf GO:0051168
    R3_ktr = 0.055;
  R4: nucleus_Foxo1_Pa0_Ac0_pUb0 => dnabound_Foxo1_Pa0_Ac0_pUb0; Function_for_transport_nucleus_Foxo1_Pa0_Ac0_pUb0_to_dnabound_Foxo1_Pa0_Ac0_pUb0(R4_ktr, nucleus, nucleus_Foxo1_Pa0_Ac0_pUb0); R4 is "transport nucleus_Foxo1_unphosphorylated_unacetylated_notpolyubiquitinated to dnabound";  // isVersionOf ncit:C89777
    R4_ktr = 0.25;
  R5: dnabound_Foxo1_Pa0_Ac0_pUb0 => nucleus_Foxo1_Pa0_Ac0_pUb0; Function_for_transport_dnabound_Foxo1_Pa0_Ac0_pUb0_to_nucleus_Foxo1_Pa0_Ac0_pUb0(dnabound, dnabound_Foxo1_Pa0_Ac0_pUb0, R5_ktr); R5 is "transport dnabound_Foxo1_unphosphorylated_unacetylated_notpolyubiquitinated to nucleus";  // isVersionOf ncit:C89777
    R5_ktr = 0.125;
  R6: cytoplasm_Foxo1_Pa0_Ac0_pUb1 => nucleus_Foxo1_Pa0_Ac0_pUb1; Function_for_transport_cytoplasm_Foxo1_Pa0_Ac0_pUb1_to_nucleus_Foxo1_Pa0_Ac0_pUb1(cytoplasm, cytoplasm_Foxo1_Pa0_Ac0_pUb1, R6_ktr); R6 is "transport cytoplasm_Foxo1_unphosphorylated_unacetylated_polyubiquitinated to nucleus";  // isVersionOf GO:0051170
    R6_ktr = 0.181818;
  R7: nucleus_Foxo1_Pa0_Ac0_pUb1 => cytoplasm_Foxo1_Pa0_Ac0_pUb1; Function_for_transport_nucleus_Foxo1_Pa0_Ac0_pUb1_to_cytoplasm_Foxo1_Pa0_Ac0_pUb1(R7_ktr, nucleus, nucleus_Foxo1_Pa0_Ac0_pUb1); R7 is "transport nucleus_Foxo1_unphosphorylated_unacetylated_polyubiquitinated to cytoplasm";  // isVersionOf GO:0051168
    R7_ktr = 0.055;
  R8: nucleus_Foxo1_Pa0_Ac0_pUb1 => dnabound_Foxo1_Pa0_Ac0_pUb1; Function_for_transport_nucleus_Foxo1_Pa0_Ac0_pUb1_to_dnabound_Foxo1_Pa0_Ac0_pUb1(R8_ktr, nucleus, nucleus_Foxo1_Pa0_Ac0_pUb1); R8 is "transport nucleus_Foxo1_unphosphorylated_unacetylated_polyubiquitinated to dnabound";  // isVersionOf ncit:C89777
    R8_ktr = 0.25;
  R9: dnabound_Foxo1_Pa0_Ac0_pUb1 => nucleus_Foxo1_Pa0_Ac0_pUb1; Function_for_transport_dnabound_Foxo1_Pa0_Ac0_pUb1_to_nucleus_Foxo1_Pa0_Ac0_pUb1(dnabound, dnabound_Foxo1_Pa0_Ac0_pUb1, R9_ktr); R9 is "transport dnabound_Foxo1_unphosphorylated_unacetylated_polyubiquitinated to nucleus";  // isVersionOf ncit:C89777
    R9_ktr = 0.125;
  R10: cytoplasm_Foxo1_Pa0_Ac1_pUb0 => nucleus_Foxo1_Pa0_Ac1_pUb0; Function_for_transport_cytoplasm_Foxo1_Pa0_Ac1_pUb0_to_nucleus_Foxo1_Pa0_Ac1_pUb0(cytoplasm, cytoplasm_Foxo1_Pa0_Ac1_pUb0, R10_ktr); R10 is "transport cytoplasm_Foxo1_unphosphorylated_acetylated_notpolyubiquitinated to nucleus";  // isVersionOf GO:0051170
    R10_ktr = 0.181818;
  R11: nucleus_Foxo1_Pa0_Ac1_pUb0 => cytoplasm_Foxo1_Pa0_Ac1_pUb0; Function_for_transport_nucleus_Foxo1_Pa0_Ac1_pUb0_to_cytoplasm_Foxo1_Pa0_Ac1_pUb0(R11_ktr, nucleus, nucleus_Foxo1_Pa0_Ac1_pUb0); R11 is "transport nucleus_Foxo1_unphosphorylated_acetylated_notpolyubiquitinated to cytoplasm";  // isVersionOf GO:0051168
    R11_ktr = 0.055;
  R12: nucleus_Foxo1_Pa0_Ac1_pUb0 => dnabound_Foxo1_Pa0_Ac1_pUb0; Function_for_transport_nucleus_Foxo1_Pa0_Ac1_pUb0_to_dnabound_Foxo1_Pa0_Ac1_pUb0(R12_ktr, nucleus, nucleus_Foxo1_Pa0_Ac1_pUb0); R12 is "transport nucleus_Foxo1_unphosphorylated_acetylated_notpolyubiquitinated to dnabound";  // isVersionOf ncit:C89777
    R12_ktr = 0.125;
  R13: dnabound_Foxo1_Pa0_Ac1_pUb0 => nucleus_Foxo1_Pa0_Ac1_pUb0; Function_for_transport_dnabound_Foxo1_Pa0_Ac1_pUb0_to_nucleus_Foxo1_Pa0_Ac1_pUb0(dnabound, dnabound_Foxo1_Pa0_Ac1_pUb0, R13_ktr); R13 is "transport dnabound_Foxo1_unphosphorylated_acetylated_notpolyubiquitinated to nucleus";  // isVersionOf ncit:C89777
    R13_ktr = 0.125;
  R14: cytoplasm_Foxo1_Pa0_Ac1_pUb1 => nucleus_Foxo1_Pa0_Ac1_pUb1; Function_for_transport_cytoplasm_Foxo1_Pa0_Ac1_pUb1_to_nucleus_Foxo1_Pa0_Ac1_pUb1(cytoplasm, cytoplasm_Foxo1_Pa0_Ac1_pUb1, R14_ktr); R14 is "transport cytoplasm_Foxo1_unphosphorylated_acetylated_npolyubiquitinated to nucleus";  // isVersionOf GO:0051170
    R14_ktr = 0.181818;
  R15: nucleus_Foxo1_Pa0_Ac1_pUb1 => cytoplasm_Foxo1_Pa0_Ac1_pUb1; Function_for_transport_nucleus_Foxo1_Pa0_Ac1_pUb1_to_cytoplasm_Foxo1_Pa0_Ac1_pUb1(R15_ktr, nucleus, nucleus_Foxo1_Pa0_Ac1_pUb1); R15 is "transport nucleus_Foxo1_unphosphorylated_acetylated_polyubiquitinated to cytoplasm";  // isVersionOf GO:0051168
    R15_ktr = 0.055;
  R16: nucleus_Foxo1_Pa0_Ac1_pUb1 => dnabound_Foxo1_Pa0_Ac1_pUb1; Function_for_transport_nucleus_Foxo1_Pa0_Ac1_pUb1_to_dnabound_Foxo1_Pa0_Ac1_pUb1(R16_ktr, nucleus, nucleus_Foxo1_Pa0_Ac1_pUb1); R16 is "transport nucleus_Foxo1_unphosphorylated_acetylated_polyubiquitinated to dnabound";  // isVersionOf ncit:C89777
    R16_ktr = 0.125;
  R17: dnabound_Foxo1_Pa0_Ac1_pUb1 => nucleus_Foxo1_Pa0_Ac1_pUb1; Function_for_transport_dnabound_Foxo1_Pa0_Ac1_pUb1_to_nucleus_Foxo1_Pa0_Ac1_pUb1(dnabound, dnabound_Foxo1_Pa0_Ac1_pUb1, R17_ktr); R17 is "transport dnabound_Foxo1_unphosphorylated_acetylated_polyubiquitinated to nucleus";  // isVersionOf ncit:C89777
    R17_ktr = 0.125;
  R18: cytoplasm_Foxo1_Pa1_Ac0_pUb0 => nucleus_Foxo1_Pa1_Ac0_pUb0; Function_for_transport_cytoplasm_Foxo1_Pa1_Ac0_pUb0_to_nucleus_Foxo1_Pa1_Ac0_pUb0(cytoplasm, cytoplasm_Foxo1_Pa1_Ac0_pUb0, R18_ktr); R18 is "transport cytoplasm_Foxo1_phosphorylated_unacetylated_notpolyubiquitinated to nucleus";  // isVersionOf GO:0051170
    R18_ktr = 0.0181818;
  R19: nucleus_Foxo1_Pa1_Ac0_pUb0 => cytoplasm_Foxo1_Pa1_Ac0_pUb0; Function_for_transport_nucleus_Foxo1_Pa1_Ac0_pUb0_to_cytoplasm_Foxo1_Pa1_Ac0_pUb0(R19_ktr, nucleus, nucleus_Foxo1_Pa1_Ac0_pUb0); R19 is "transport nucleus_Foxo1_phosphorylated_unacetylated_notpolyubiquitinated to cytoplasm";  // isVersionOf GO:0051168
    R19_ktr = 0.55;
  R20: nucleus_Foxo1_Pa1_Ac0_pUb0 => dnabound_Foxo1_Pa1_Ac0_pUb0; Function_for_transport_nucleus_Foxo1_Pa1_Ac0_pUb0_to_dnabound_Foxo1_Pa1_Ac0_pUb0(R20_ktr, nucleus, nucleus_Foxo1_Pa1_Ac0_pUb0); R20 is "transport nucleus_Foxo1_phosphorylated_unacetylated_notpolyubiquitinated to dnabound";  // isVersionOf ncit:C89777
    R20_ktr = 0.125;
  R21: dnabound_Foxo1_Pa1_Ac0_pUb0 => nucleus_Foxo1_Pa1_Ac0_pUb0; Function_for_transport_dnabound_Foxo1_Pa1_Ac0_pUb0_to_nucleus_Foxo1_Pa1_Ac0_pUb0(dnabound, dnabound_Foxo1_Pa1_Ac0_pUb0, R21_ktr); R21 is "transport dnabound_Foxo1_phosphorylated_unacetylated_notpolyubiquitinated to nucleus";  // isVersionOf ncit:C89777
    R21_ktr = 0.125;
  R22: cytoplasm_Foxo1_Pa1_Ac0_pUb1 => nucleus_Foxo1_Pa1_Ac0_pUb1; Function_for_transport_cytoplasm_Foxo1_Pa1_Ac0_pUb1_to_nucleus_Foxo1_Pa1_Ac0_pUb1(cytoplasm, cytoplasm_Foxo1_Pa1_Ac0_pUb1, R22_ktr); R22 is "transport cytoplasm_Foxo1_phosphorylated_unacetylated_polyubiquitinated to nucleus";  // isVersionOf GO:0051170
    R22_ktr = 0.0181818;
  R23: nucleus_Foxo1_Pa1_Ac0_pUb1 => cytoplasm_Foxo1_Pa1_Ac0_pUb1; Function_for_transport_nucleus_Foxo1_Pa1_Ac0_pUb1_to_cytoplasm_Foxo1_Pa1_Ac0_pUb1(R23_ktr, nucleus, nucleus_Foxo1_Pa1_Ac0_pUb1); R23 is "transport nucleus_Foxo1_phosphorylated_unacetylated_polyubiquitinated to cytoplasm";  // isVersionOf GO:0051168
    R23_ktr = 0.55;
  R24: nucleus_Foxo1_Pa1_Ac0_pUb1 => dnabound_Foxo1_Pa1_Ac0_pUb1; Function_for_transport_nucleus_Foxo1_Pa1_Ac0_pUb1_to_dnabound_Foxo1_Pa1_Ac0_pUb1(R24_ktr, nucleus, nucleus_Foxo1_Pa1_Ac0_pUb1); R24 is "transport nucleus_Foxo1_phosphorylated_unacetylated_polyubiquitinated to dnabound";  // isVersionOf ncit:C89777
    R24_ktr = 0.125;
  R25: dnabound_Foxo1_Pa1_Ac0_pUb1 => nucleus_Foxo1_Pa1_Ac0_pUb1; Function_for_transport_dnabound_Foxo1_Pa1_Ac0_pUb1_to_nucleus_Foxo1_Pa1_Ac0_pUb1(dnabound, dnabound_Foxo1_Pa1_Ac0_pUb1, R25_ktr); R25 is "transport dnabound_Foxo1_phosphorylated_unacetylated_polyubiquitinated to nucleus";  // isVersionOf ncit:C89777
    R25_ktr = 0.125;
  R26: cytoplasm_Foxo1_Pa1_Ac1_pUb0 => nucleus_Foxo1_Pa1_Ac1_pUb0; Function_for_transport_cytoplasm_Foxo1_Pa1_Ac1_pUb0_to_nucleus_Foxo1_Pa1_Ac1_pUb0(cytoplasm, cytoplasm_Foxo1_Pa1_Ac1_pUb0, R26_ktr); R26 is "transport cytoplasm_Foxo1_phosphorylated_acetylated_notpolyubiquitinated to nucleus";  // isVersionOf GO:0051170
    R26_ktr = 0.0181818;
  R27: nucleus_Foxo1_Pa1_Ac1_pUb0 => cytoplasm_Foxo1_Pa1_Ac1_pUb0; Function_for_transport_nucleus_Foxo1_Pa1_Ac1_pUb0_to_cytoplasm_Foxo1_Pa1_Ac1_pUb0(R27_ktr, nucleus, nucleus_Foxo1_Pa1_Ac1_pUb0); R27 is "transport nucleus_Foxo1_phosphorylated_acetylated_notpolyubiquitinated to cytoplasm";  // isVersionOf GO:0051168
    R27_ktr = 0.55;
  R28: nucleus_Foxo1_Pa1_Ac1_pUb0 => dnabound_Foxo1_Pa1_Ac1_pUb0; Function_for_transport_nucleus_Foxo1_Pa1_Ac1_pUb0_to_dnabound_Foxo1_Pa1_Ac1_pUb0(R28_ktr, nucleus, nucleus_Foxo1_Pa1_Ac1_pUb0); R28 is "transport nucleus_Foxo1_phosphorylated_acetylated_notpolyubiquitinated to dnabound";  // isVersionOf ncit:C89777
    R28_ktr = 0.0625;
  R29: dnabound_Foxo1_Pa1_Ac1_pUb0 => nucleus_Foxo1_Pa1_Ac1_pUb0; Function_for_transport_dnabound_Foxo1_Pa1_Ac1_pUb0_to_nucleus_Foxo1_Pa1_Ac1_pUb0(dnabound, dnabound_Foxo1_Pa1_Ac1_pUb0, R29_ktr); R29 is "transport dnabound_Foxo1_phosphorylated_acetylated_notpolyubiquitinated to nucleus";  // isVersionOf ncit:C89777
    R29_ktr = 0.125;
  R30: cytoplasm_Foxo1_Pa1_Ac1_pUb1 => nucleus_Foxo1_Pa1_Ac1_pUb1; Function_for_transport_cytoplasm_Foxo1_Pa1_Ac1_pUb1_to_nucleus_Foxo1_Pa1_Ac1_pUb1(cytoplasm, cytoplasm_Foxo1_Pa1_Ac1_pUb1, R30_ktr); R30 is "transport cytoplasm_Foxo1_phosphorylated_acetylated_polyubiquitinated to nucleus";  // isVersionOf GO:0051170
    R30_ktr = 0.0181818;
  R31: nucleus_Foxo1_Pa1_Ac1_pUb1 => cytoplasm_Foxo1_Pa1_Ac1_pUb1; Function_for_transport_nucleus_Foxo1_Pa1_Ac1_pUb1_to_cytoplasm_Foxo1_Pa1_Ac1_pUb1(R31_ktr, nucleus, nucleus_Foxo1_Pa1_Ac1_pUb1); R31 is "transport nucleus_Foxo1_phosphorylated_acetylated_polyubiquitinated to cytoplasm";  // isVersionOf GO:0051168
    R31_ktr = 0.55;
  R32: nucleus_Foxo1_Pa1_Ac1_pUb1 => dnabound_Foxo1_Pa1_Ac1_pUb1; Function_for_transport_nucleus_Foxo1_Pa1_Ac1_pUb1_to_dnabound_Foxo1_Pa1_Ac1_pUb1(R32_ktr, nucleus, nucleus_Foxo1_Pa1_Ac1_pUb1); R32 is "transport nucleus_Foxo1_phosphorylated_acetylated_polyubiquitinated to dnabound";  // isVersionOf ncit:C89777
    R32_ktr = 0.0625;
  R33: dnabound_Foxo1_Pa1_Ac1_pUb1 => nucleus_Foxo1_Pa1_Ac1_pUb1; Function_for_transport_dnabound_Foxo1_Pa1_Ac1_pUb1_to_nucleus_Foxo1_Pa1_Ac1_pUb1(dnabound, dnabound_Foxo1_Pa1_Ac1_pUb1, R33_ktr); R33 is "transport dnabound_Foxo1_phosphorylated_acetylated_polyubiquitinated to nucleus";  // isVersionOf ncit:C89777
    R33_ktr = 0.125;
  R34: cytoplasm_Foxo1_Pa0_Ac0_pUb0 => cytoplasm_Foxo1_Pa1_Ac0_pUb0; cytoplasm*Function_for_conversion_of_cytoplasm_Foxo1_Pa0_Ac0_pUb0_to_cytoplasm_Foxo1_Pa1_Ac0_pUb0_by_Akt(Akt, cytoplasm, cytoplasm_Foxo1_Pa0_Ac0_pUb0, R34_kkin); R34 is "phosphorylation of cytoplasm_Foxo1_unphosphorylated_unacetylated_notpolyubiquitinated by Akt";  // modifiers: Akt; isVersionOf GO:0016310
    R34_kkin = 5e-5;
  R35: nucleus_Foxo1_Pa0_Ac0_pUb0 => nucleus_Foxo1_Pa1_Ac0_pUb0; Function_for_conversion_of_nucleus_Foxo1_Pa0_Ac0_pUb0_to_nucleus_Foxo1_Pa1_Ac0_pUb0_by_Akt(Akt, cytoplasm, R35_kkin, nucleus, nucleus_Foxo1_Pa0_Ac0_pUb0); R35 is "phosphorylation of nucleus_Foxo1_unphosphorylated_unacetylated_notpolyubiquitinated by Akt";  // modifiers: Akt; isVersionOf GO:0016310
    R35_kkin = 5e-5;
  R36: dnabound_Foxo1_Pa0_Ac0_pUb0 => dnabound_Foxo1_Pa1_Ac0_pUb0; Function_for_conversion_of_dnabound_Foxo1_Pa0_Ac0_pUb0_to_dnabound_Foxo1_Pa1_Ac0_pUb0_by_Akt(Akt, cytoplasm, dnabound, dnabound_Foxo1_Pa0_Ac0_pUb0, R36_kkin); R36 is "phosphorylation of dnabound_Foxo1_unphosphorylated_unacetylated_notpolyubiquitinated by Akt";  // modifiers: Akt; isVersionOf GO:0016310
    R36_kkin = 5e-5;
  R37: cytoplasm_Foxo1_Pa0_Ac0_pUb1 => cytoplasm_Foxo1_Pa1_Ac0_pUb1; cytoplasm*Function_for_conversion_of_cytoplasm_Foxo1_Pa0_Ac0_pUb1_to_cytoplasm_Foxo1_Pa1_Ac0_pUb1_by_Akt(Akt, cytoplasm, cytoplasm_Foxo1_Pa0_Ac0_pUb1, R37_kkin); R37 is "phosphorylation of cytoplasm_Foxo1_unphosphorylated_unacetylated_polyubiquitinated by Akt";  // modifiers: Akt; isVersionOf GO:0016310
    R37_kkin = 5e-5;
  R38: nucleus_Foxo1_Pa0_Ac0_pUb1 => nucleus_Foxo1_Pa1_Ac0_pUb1; Function_for_conversion_of_nucleus_Foxo1_Pa0_Ac0_pUb1_to_nucleus_Foxo1_Pa1_Ac0_pUb1_by_Akt(Akt, cytoplasm, R38_kkin, nucleus, nucleus_Foxo1_Pa0_Ac0_pUb1); R38 is "phosphorylation of nucleus_Foxo1_unphosphorylated_unacetylated_polyubiquitinated by Akt";  // modifiers: Akt; isVersionOf GO:0016310
    R38_kkin = 5e-5;
  R39: dnabound_Foxo1_Pa0_Ac0_pUb1 => dnabound_Foxo1_Pa1_Ac0_pUb1; Function_for_conversion_of_dnabound_Foxo1_Pa0_Ac0_pUb1_to_dnabound_Foxo1_Pa1_Ac0_pUb1_by_Akt(Akt, cytoplasm, dnabound, dnabound_Foxo1_Pa0_Ac0_pUb1, R39_kkin); R39 is "phosphorylation of dnabound_Foxo1_unphosphorylated_unacetylated_polyubiquitinated by Akt";  // modifiers: Akt; isVersionOf GO:0016310
    R39_kkin = 5e-5;
  R40: cytoplasm_Foxo1_Pa0_Ac1_pUb0 => cytoplasm_Foxo1_Pa1_Ac1_pUb0; cytoplasm*Function_for_conversion_of_cytoplasm_Foxo1_Pa0_Ac1_pUb0_to_cytoplasm_Foxo1_Pa1_Ac1_pUb0_by_Akt(Akt, cytoplasm, cytoplasm_Foxo1_Pa0_Ac1_pUb0, R40_kkin); R40 is "phosphorylation of cytoplasm_Foxo1_unphosphorylated_acetylated_notpolyubiquitinated by Akt";  // modifiers: Akt; isVersionOf GO:0016310
    R40_kkin = 5e-5;
  R41: nucleus_Foxo1_Pa0_Ac1_pUb0 => nucleus_Foxo1_Pa1_Ac1_pUb0; Function_for_conversion_of_nucleus_Foxo1_Pa0_Ac1_pUb0_to_nucleus_Foxo1_Pa1_Ac1_pUb0_by_Akt(Akt, cytoplasm, R41_kkin, nucleus, nucleus_Foxo1_Pa0_Ac1_pUb0); R41 is "phosphorylation of nucleus_Foxo1_unphosphorylated_acetylated_notpolyubiquitinated by Akt";  // modifiers: Akt; isVersionOf GO:0016310
    R41_kkin = 5e-5;
  R42: dnabound_Foxo1_Pa0_Ac1_pUb0 => dnabound_Foxo1_Pa1_Ac1_pUb0; Function_for_conversion_of_dnabound_Foxo1_Pa0_Ac1_pUb0_to_dnabound_Foxo1_Pa1_Ac1_pUb0_by_Akt(Akt, cytoplasm, dnabound, dnabound_Foxo1_Pa0_Ac1_pUb0, R42_kkin); R42 is "phosphorylation of dnabound_Foxo1_unphosphorylated_acetylated_notpolyubiquitinated by Akt";  // modifiers: Akt; isVersionOf GO:0016310
    R42_kkin = 5e-5;
  R43: cytoplasm_Foxo1_Pa0_Ac1_pUb1 => cytoplasm_Foxo1_Pa1_Ac1_pUb1; cytoplasm*Function_for_conversion_of_cytoplasm_Foxo1_Pa0_Ac1_pUb1_to_cytoplasm_Foxo1_Pa1_Ac1_pUb1_by_Akt(Akt, cytoplasm, cytoplasm_Foxo1_Pa0_Ac1_pUb1, R43_kkin); R43 is "phosphorylation of ccytoplasm_Foxo1_unphosphorylated_acetylated_polyubiquitinated by Akt";  // modifiers: Akt; isVersionOf GO:0016310
    R43_kkin = 5e-5;
  R44: nucleus_Foxo1_Pa0_Ac1_pUb1 => nucleus_Foxo1_Pa1_Ac1_pUb1; Function_for_conversion_of_nucleus_Foxo1_Pa0_Ac1_pUb1_to_nucleus_Foxo1_Pa1_Ac1_pUb1_by_Akt(Akt, cytoplasm, R44_kkin, nucleus, nucleus_Foxo1_Pa0_Ac1_pUb1); R44 is "phosphorylation of nucleus_Foxo1_unphosphorylated_acetylated_polyubiquitinated by Akt";  // modifiers: Akt; isVersionOf GO:0016310
    R44_kkin = 5e-5;
  R45: dnabound_Foxo1_Pa0_Ac1_pUb1 => dnabound_Foxo1_Pa1_Ac1_pUb1; Function_for_conversion_of_dnabound_Foxo1_Pa0_Ac1_pUb1_to_dnabound_Foxo1_Pa1_Ac1_pUb1_by_Akt(Akt, cytoplasm, dnabound, dnabound_Foxo1_Pa0_Ac1_pUb1, R45_kkin); R45 is "phosphorylation of dnabound_Foxo1_unphosphorylated_acetylated_polyubiquitinated by Akt";  // modifiers: Akt; isVersionOf GO:0016310
    R45_kkin = 5e-5;
  R46: cytoplasm_Foxo1_Pa0_Ac0_pUb0 => cytoplasm_Foxo1_Pa1_Ac0_pUb0; cytoplasm*Function_for_conversion_of_cytoplasm_Foxo1_Pa0_Ac0_pUb0_to_cytoplasm_Foxo1_Pa1_Ac0_pUb0_by_SGK(SGK, cytoplasm, cytoplasm_Foxo1_Pa0_Ac0_pUb0, R46_kkin); R46 is "phosphorylation of cytoplasm_Foxo1_unphosphorylated_unacetylated_notpolyubiquitinated by SGK";  // modifiers: SGK; isVersionOf GO:0016310
    R46_kkin = 5e-5;
  R47: nucleus_Foxo1_Pa0_Ac0_pUb0 => nucleus_Foxo1_Pa1_Ac0_pUb0; Function_for_conversion_of_nucleus_Foxo1_Pa0_Ac0_pUb0_to_nucleus_Foxo1_Pa1_Ac0_pUb0_by_SGK(SGK, cytoplasm, R47_kkin, nucleus, nucleus_Foxo1_Pa0_Ac0_pUb0); R47 is "phosphorylation of nucleus_Foxo1_unphosphorylated_unacetylated_notpolyubiquitinated by SGK";  // modifiers: SGK; isVersionOf GO:0016310
    R47_kkin = 5e-5;
  R48: dnabound_Foxo1_Pa0_Ac0_pUb0 => dnabound_Foxo1_Pa1_Ac0_pUb0; Function_for_conversion_of_dnabound_Foxo1_Pa0_Ac0_pUb0_to_dnabound_Foxo1_Pa1_Ac0_pUb0_by_SGK(SGK, cytoplasm, dnabound, dnabound_Foxo1_Pa0_Ac0_pUb0, R48_kkin); R48 is "phosphorylation of dnabound_Foxo1_unphosphorylated_unacetylated_notpolyubiquitinated by SGK";  // modifiers: SGK; isVersionOf GO:0016310
    R48_kkin = 5e-5;
  R49: cytoplasm_Foxo1_Pa0_Ac0_pUb1 => cytoplasm_Foxo1_Pa1_Ac0_pUb1; cytoplasm*Function_for_conversion_of_cytoplasm_Foxo1_Pa0_Ac0_pUb1_to_cytoplasm_Foxo1_Pa1_Ac0_pUb1_by_SGK(SGK, cytoplasm, cytoplasm_Foxo1_Pa0_Ac0_pUb1, R49_kkin); R49 is "phosphorylation of cytoplasm_Foxo1_unphosphorylated_unacetylated_polyubiquitinated by SGK";  // modifiers: SGK; isVersionOf GO:0016310
    R49_kkin = 5e-5;
  R50: nucleus_Foxo1_Pa0_Ac0_pUb1 => nucleus_Foxo1_Pa1_Ac0_pUb1; Function_for_conversion_of_nucleus_Foxo1_Pa0_Ac0_pUb1_to_nucleus_Foxo1_Pa1_Ac0_pUb1_by_SGK(SGK, cytoplasm, R50_kkin, nucleus, nucleus_Foxo1_Pa0_Ac0_pUb1); R50 is "phosphorylation of nucleus_Foxo1_unphosphorylated_unacetylated_polyubiquitinated by SGK";  // modifiers: SGK; isVersionOf GO:0016310
    R50_kkin = 5e-5;
  R51: dnabound_Foxo1_Pa0_Ac0_pUb1 => dnabound_Foxo1_Pa1_Ac0_pUb1; Function_for_conversion_of_dnabound_Foxo1_Pa0_Ac0_pUb1_to_dnabound_Foxo1_Pa1_Ac0_pUb1_by_SGK(SGK, cytoplasm, dnabound, dnabound_Foxo1_Pa0_Ac0_pUb1, R51_kkin); R51 is "phosphorylation of dnabound_Foxo1_unphosphorylated_unacetylated_polyubiquitinated by SGK";  // modifiers: SGK; isVersionOf GO:0016310
    R51_kkin = 5e-5;
  R52: cytoplasm_Foxo1_Pa0_Ac1_pUb0 => cytoplasm_Foxo1_Pa1_Ac1_pUb0; cytoplasm*Function_for_conversion_of_cytoplasm_Foxo1_Pa0_Ac1_pUb0_to_cytoplasm_Foxo1_Pa1_Ac1_pUb0_by_SGK(SGK, cytoplasm, cytoplasm_Foxo1_Pa0_Ac1_pUb0, R52_kkin); R52 is "phosphorylation of cytoplasm_Foxo1_unphosphorylated_acetylated_notpolyubiquitinated by SGK";  // modifiers: SGK; isVersionOf GO:0016310
    R52_kkin = 5e-5;
  R53: nucleus_Foxo1_Pa0_Ac1_pUb0 => nucleus_Foxo1_Pa1_Ac1_pUb0; Function_for_conversion_of_nucleus_Foxo1_Pa0_Ac1_pUb0_to_nucleus_Foxo1_Pa1_Ac1_pUb0_by_SGK(SGK, cytoplasm, R53_kkin, nucleus, nucleus_Foxo1_Pa0_Ac1_pUb0); R53 is "phosphorylation of nucleus_Foxo1_unphosphorylated_acetylated_notpolyubiquitinated by SGK";  // modifiers: SGK; isVersionOf GO:0016310
    R53_kkin = 5e-5;
  R54: dnabound_Foxo1_Pa0_Ac1_pUb0 => dnabound_Foxo1_Pa1_Ac1_pUb0; Function_for_conversion_of_dnabound_Foxo1_Pa0_Ac1_pUb0_to_dnabound_Foxo1_Pa1_Ac1_pUb0_by_SGK(SGK, cytoplasm, dnabound, dnabound_Foxo1_Pa0_Ac1_pUb0, R54_kkin); R54 is "phosphorylation of dnabound_Foxo1_Punphosphorylated_acetylated_notpolyubiquitinated by SGK";  // modifiers: SGK; isVersionOf GO:0016310
    R54_kkin = 5e-5;
  R55: cytoplasm_Foxo1_Pa0_Ac1_pUb1 => cytoplasm_Foxo1_Pa1_Ac1_pUb1; cytoplasm*Function_for_conversion_of_cytoplasm_Foxo1_Pa0_Ac1_pUb1_to_cytoplasm_Foxo1_Pa1_Ac1_pUb1_by_SGK(SGK, cytoplasm, cytoplasm_Foxo1_Pa0_Ac1_pUb1, R55_kkin); R55 is "phosphorylation of cytoplasm_Foxo1_unphosphorylated_acetylated_polyubiquitinated by SGK";  // modifiers: SGK; isVersionOf GO:0016310
    R55_kkin = 5e-5;
  R56: nucleus_Foxo1_Pa0_Ac1_pUb1 => nucleus_Foxo1_Pa1_Ac1_pUb1; Function_for_conversion_of_nucleus_Foxo1_Pa0_Ac1_pUb1_to_nucleus_Foxo1_Pa1_Ac1_pUb1_by_SGK(SGK, cytoplasm, R56_kkin, nucleus, nucleus_Foxo1_Pa0_Ac1_pUb1); R56 is "phosphorylation of nucleus_Foxo1_unphosphorylated_acetylated_polyubiquitinated by SGK";  // modifiers: SGK; isVersionOf GO:0016310
    R56_kkin = 5e-5;
  R57: dnabound_Foxo1_Pa0_Ac1_pUb1 => dnabound_Foxo1_Pa1_Ac1_pUb1; Function_for_conversion_of_dnabound_Foxo1_Pa0_Ac1_pUb1_to_dnabound_Foxo1_Pa1_Ac1_pUb1_by_SGK(SGK, cytoplasm, dnabound, dnabound_Foxo1_Pa0_Ac1_pUb1, R57_kkin); R57 is "phosphorylation of dnabound_Foxo1_unphosphorylated_acetylated_polyubiquitinated by SGK";  // modifiers: SGK; isVersionOf GO:0016310
    R57_kkin = 5e-5;
  R58: cytoplasm_Foxo1_Pa1_Ac0_pUb0 => cytoplasm_Foxo1_Pa0_Ac0_pUb0; cytoplasm*Function_for_conversion_of_cytoplasm_Foxo1_Pa1_Ac0_pUb0_to_cytoplasm_Foxo1_Pa0_Ac0_pUb0_by_PP2A(PP2A, cytoplasm, cytoplasm_Foxo1_Pa1_Ac0_pUb0, R58_kdephos); R58 is "dephosphorylation of cytoplasm_Foxo1_phosphorylated_unacetylated_notpolyubiquitinated by PP2A";  // modifiers: PP2A; isVersionOf GO:0016311
    R58_kdephos = 5e-5;
  R59: nucleus_Foxo1_Pa1_Ac0_pUb0 => nucleus_Foxo1_Pa0_Ac0_pUb0; Function_for_conversion_of_nucleus_Foxo1_Pa1_Ac0_pUb0_to_nucleus_Foxo1_Pa0_Ac0_pUb0_by_PP2A(PP2A, cytoplasm, R59_kdephos, nucleus, nucleus_Foxo1_Pa1_Ac0_pUb0); R59 is "dephosphorylation of nucleus_Foxo1_phosphorylated_unacetylated_notpolyubiquitinated by PP2A";  // modifiers: PP2A; isVersionOf GO:0016311
    R59_kdephos = 5e-5;
  R60: dnabound_Foxo1_Pa1_Ac0_pUb0 => dnabound_Foxo1_Pa0_Ac0_pUb0; Function_for_conversion_of_dnabound_Foxo1_Pa1_Ac0_pUb0_to_dnabound_Foxo1_Pa0_Ac0_pUb0_by_PP2A(PP2A, cytoplasm, dnabound, dnabound_Foxo1_Pa1_Ac0_pUb0, R60_kdephos); R60 is "dephosphorylation of dnabound_Foxo1_phosphorylated_unacetylated_notpolyubiquitinated by PP2A";  // modifiers: PP2A; isVersionOf GO:0016311
    R60_kdephos = 5e-5;
  R61: cytoplasm_Foxo1_Pa1_Ac0_pUb1 => cytoplasm_Foxo1_Pa0_Ac0_pUb1; cytoplasm*Function_for_conversion_of_cytoplasm_Foxo1_Pa1_Ac0_pUb1_to_cytoplasm_Foxo1_Pa0_Ac0_pUb1_by_PP2A(PP2A, cytoplasm, cytoplasm_Foxo1_Pa1_Ac0_pUb1, R61_kdephos); R61 is "dephosphorylation of cytoplasm_Foxo1_phosphorylated_unacetylated_polyubiquitinated by PP2A";  // modifiers: PP2A; isVersionOf GO:0016311
    R61_kdephos = 5e-5;
  R62: nucleus_Foxo1_Pa1_Ac0_pUb1 => nucleus_Foxo1_Pa0_Ac0_pUb1; Function_for_conversion_of_nucleus_Foxo1_Pa1_Ac0_pUb1_to_nucleus_Foxo1_Pa0_Ac0_pUb1_by_PP2A(PP2A, cytoplasm, R62_kdephos, nucleus, nucleus_Foxo1_Pa1_Ac0_pUb1); R62 is "dephosphorylation of nucleus_Foxo1_phosphorylated_unacetylated_polyubiquitinated by PP2A";  // modifiers: PP2A; isVersionOf GO:0016311
    R62_kdephos = 5e-5;
  R63: dnabound_Foxo1_Pa1_Ac0_pUb1 => dnabound_Foxo1_Pa0_Ac0_pUb1; Function_for_conversion_of_dnabound_Foxo1_Pa1_Ac0_pUb1_to_dnabound_Foxo1_Pa0_Ac0_pUb1_by_PP2A(PP2A, cytoplasm, dnabound, dnabound_Foxo1_Pa1_Ac0_pUb1, R63_kdephos); R63 is "dephosphorylation of dnabound_Foxo1_phosphorylated_unacetylated_polyubiquitinated by PP2A";  // modifiers: PP2A; isVersionOf GO:0016311
    R63_kdephos = 5e-5;
  R64: cytoplasm_Foxo1_Pa1_Ac1_pUb0 => cytoplasm_Foxo1_Pa0_Ac1_pUb0; cytoplasm*Function_for_conversion_of_cytoplasm_Foxo1_Pa1_Ac1_pUb0_to_cytoplasm_Foxo1_Pa0_Ac1_pUb0_by_PP2A(PP2A, cytoplasm, cytoplasm_Foxo1_Pa1_Ac1_pUb0, R64_kdephos); R64 is "dephosphorylation of cytoplasm_Foxo1_phosphorylated_acetylated_notpolyubiquitinated by PP2A";  // modifiers: PP2A; isVersionOf GO:0016311
    R64_kdephos = 5e-5;
  R65: nucleus_Foxo1_Pa1_Ac1_pUb0 => nucleus_Foxo1_Pa0_Ac1_pUb0; Function_for_conversion_of_nucleus_Foxo1_Pa1_Ac1_pUb0_to_nucleus_Foxo1_Pa0_Ac1_pUb0_by_PP2A(PP2A, cytoplasm, R65_kdephos, nucleus, nucleus_Foxo1_Pa1_Ac1_pUb0); R65 is "dephosphorylation of nucleus_Foxo1_phosphorylated_acetylated_notpolyubiquitinated by PP2A";  // modifiers: PP2A; isVersionOf GO:0016311
    R65_kdephos = 5e-5;
  R66: dnabound_Foxo1_Pa1_Ac1_pUb0 => dnabound_Foxo1_Pa0_Ac1_pUb0; Function_for_conversion_of_dnabound_Foxo1_Pa1_Ac1_pUb0_to_dnabound_Foxo1_Pa0_Ac1_pUb0_by_PP2A(PP2A, cytoplasm, dnabound, dnabound_Foxo1_Pa1_Ac1_pUb0, R66_kdephos); R66 is "dephosphorylation of dnabound_Foxo1_phosphorylated_acetylated_notpolyubiquitinated by PP2A";  // modifiers: PP2A; isVersionOf GO:0016311
    R66_kdephos = 5e-5;
  R67: cytoplasm_Foxo1_Pa1_Ac1_pUb1 => cytoplasm_Foxo1_Pa0_Ac1_pUb1; cytoplasm*Function_for_conversion_of_cytoplasm_Foxo1_Pa1_Ac1_pUb1_to_cytoplasm_Foxo1_Pa0_Ac1_pUb1_by_PP2A(PP2A, cytoplasm, cytoplasm_Foxo1_Pa1_Ac1_pUb1, R67_kdephos); R67 is "dephosphorylation of cytoplasm_Foxo1_phosphorylated_acetylated_polyubiquitinated by PP2A";  // modifiers: PP2A; isVersionOf GO:0016311
    R67_kdephos = 5e-5;
  R68: nucleus_Foxo1_Pa1_Ac1_pUb1 => nucleus_Foxo1_Pa0_Ac1_pUb1; Function_for_conversion_of_nucleus_Foxo1_Pa1_Ac1_pUb1_to_nucleus_Foxo1_Pa0_Ac1_pUb1_by_PP2A(PP2A, cytoplasm, R68_kdephos, nucleus, nucleus_Foxo1_Pa1_Ac1_pUb1); R68 is "dephosphorylation of nucleus_Foxo1_phosphorylated_acetylated_polyubiquitinated by PP2A";  // modifiers: PP2A; isVersionOf GO:0016311
    R68_kdephos = 5e-5;
  R69: dnabound_Foxo1_Pa1_Ac1_pUb1 => dnabound_Foxo1_Pa0_Ac1_pUb1; Function_for_conversion_of_dnabound_Foxo1_Pa1_Ac1_pUb1_to_dnabound_Foxo1_Pa0_Ac1_pUb1_by_PP2A(PP2A, cytoplasm, dnabound, dnabound_Foxo1_Pa1_Ac1_pUb1, R69_kdephos); R69 is "dephosphorylation of dnabound_Foxo1_phosphorylated_acetylated_polyubiquitinated by PP2A";  // modifiers: PP2A; isVersionOf GO:0016311
    R69_kdephos = 5e-5;
  R70: nucleus_Foxo1_Pa0_Ac0_pUb0 => nucleus_Foxo1_Pa0_Ac1_pUb0; Function_for_conversion_of_nucleus_Foxo1_Pa0_Ac0_pUb0_to_nucleus_Foxo1_Pa0_Ac1_pUb0_by_CBPP300(CBPP300, cytoplasm, R70_kacet, nucleus, nucleus_Foxo1_Pa0_Ac0_pUb0); R70 is "acetylation of nucleus_Foxo1_unphosphorylated_unacetylated_notpolyubiquitinated by CBPP300";  // modifiers: CBPP300
    R70_kacet = 0.0001;
  R71: dnabound_Foxo1_Pa0_Ac0_pUb0 => dnabound_Foxo1_Pa0_Ac1_pUb0; Function_for_conversion_of_dnabound_Foxo1_Pa0_Ac0_pUb0_to_dnabound_Foxo1_Pa0_Ac1_pUb0_by_CBPP300(CBPP300, cytoplasm, dnabound, dnabound_Foxo1_Pa0_Ac0_pUb0, R71_kacet); R71 is "acetylation of dnabound_Foxo1_unphosphorylated_unacetylated_notpolyubiquitinated by CBPP300";  // modifiers: CBPP300
    R71_kacet = 0.0001;
  R72: nucleus_Foxo1_Pa0_Ac0_pUb1 => nucleus_Foxo1_Pa0_Ac1_pUb1; Function_for_conversion_of_nucleus_Foxo1_Pa0_Ac0_pUb1_to_nucleus_Foxo1_Pa0_Ac1_pUb1_by_CBPP300(CBPP300, cytoplasm, R72_kacet, nucleus, nucleus_Foxo1_Pa0_Ac0_pUb1); R72 is "acetylation of nucleus_Foxo1_unphosphorylated_unacetylated_polyubiquitinated by CBPP300";  // modifiers: CBPP300
    R72_kacet = 0.0001;
  R73: dnabound_Foxo1_Pa0_Ac0_pUb1 => dnabound_Foxo1_Pa0_Ac1_pUb1; Function_for_conversion_of_dnabound_Foxo1_Pa0_Ac0_pUb1_to_dnabound_Foxo1_Pa0_Ac1_pUb1_by_CBPP300(CBPP300, cytoplasm, dnabound, dnabound_Foxo1_Pa0_Ac0_pUb1, R73_kacet); R73 is "acetylation of dnabound_Foxo1_unphosphorylated_unacetylated_polyubiquitinated by CBPP300";  // modifiers: CBPP300
    R73_kacet = 0.0001;
  R74: nucleus_Foxo1_Pa0_Ac1_pUb0 => nucleus_Foxo1_Pa0_Ac0_pUb0; Function_for_conversion_of_nucleus_Foxo1_Pa0_Ac1_pUb0_to_nucleus_Foxo1_Pa0_Ac0_pUb0_by_SIRT1(SIRT1, cytoplasm, R74_kdeac, nucleus, nucleus_Foxo1_Pa0_Ac1_pUb0); R74 is "deacetylation of nucleus_Foxo1unphosphorylated_acetylated_notpolyubiquitinated by SIRT1";  // modifiers: SIRT1; isVersionOf ncit:C41553
    R74_kdeac = 0.0001;
  R75: dnabound_Foxo1_Pa0_Ac1_pUb0 => dnabound_Foxo1_Pa0_Ac0_pUb0; Function_for_conversion_of_dnabound_Foxo1_Pa0_Ac1_pUb0_to_dnabound_Foxo1_Pa0_Ac0_pUb0_by_SIRT1(SIRT1, cytoplasm, dnabound, dnabound_Foxo1_Pa0_Ac1_pUb0, R75_kdeac); R75 is "deacetylation of dnabound_Foxo1_unphosphorylated_acetylated_notpolyubiquitinated by SIRT1";  // modifiers: SIRT1; isVersionOf ncit:C41553
    R75_kdeac = 0.0001;
  R76: nucleus_Foxo1_Pa0_Ac1_pUb1 => nucleus_Foxo1_Pa0_Ac0_pUb1; Function_for_conversion_of_nucleus_Foxo1_Pa0_Ac1_pUb1_to_nucleus_Foxo1_Pa0_Ac0_pUb1_by_SIRT1(SIRT1, cytoplasm, R76_kdeac, nucleus, nucleus_Foxo1_Pa0_Ac1_pUb1); R76 is "deacetylation of nucleus_Foxo1_unphosphorylated_acetylated_polyubiquitinated by SIRT1";  // modifiers: SIRT1; isVersionOf ncit:C41553
    R76_kdeac = 0.0001;
  R77: dnabound_Foxo1_Pa0_Ac1_pUb1 => dnabound_Foxo1_Pa0_Ac0_pUb1; Function_for_conversion_of_dnabound_Foxo1_Pa0_Ac1_pUb1_to_dnabound_Foxo1_Pa0_Ac0_pUb1_by_SIRT1(SIRT1, cytoplasm, dnabound, dnabound_Foxo1_Pa0_Ac1_pUb1, R77_kdeac); R77 is "deacetylation of dnabound_Foxo1_unphosphorylated_acetylated_polyubiquitinated by SIRT1";  // modifiers: SIRT1; isVersionOf ncit:C41553
    R77_kdeac = 0.0001;
  R78: nucleus_Foxo1_Pa1_Ac0_pUb0 => nucleus_Foxo1_Pa1_Ac1_pUb0; Function_for_conversion_of_nucleus_Foxo1_Pa1_Ac0_pUb0_to_nucleus_Foxo1_Pa1_Ac1_pUb0_by_CBPP300(CBPP300, cytoplasm, R78_kacet, nucleus, nucleus_Foxo1_Pa1_Ac0_pUb0); R78 is "acetylation of nucleus_Foxo1_phosphorylated_unacetylated_notpolyubiquitinated by CBPP300";  // modifiers: CBPP300
    R78_kacet = 0.0001;
  R79: dnabound_Foxo1_Pa1_Ac0_pUb0 => dnabound_Foxo1_Pa1_Ac1_pUb0; Function_for_conversion_of_dnabound_Foxo1_Pa1_Ac0_pUb0_to_dnabound_Foxo1_Pa1_Ac1_pUb0_by_CBPP300(CBPP300, cytoplasm, dnabound, dnabound_Foxo1_Pa1_Ac0_pUb0, R79_kacet); R79 is "acetylation of dnabound_Foxo1_phosphorylated_unacetylated_notpolyubiquitinated by CBPP300";  // modifiers: CBPP300
    R79_kacet = 0.0001;
  R80: nucleus_Foxo1_Pa1_Ac0_pUb1 => nucleus_Foxo1_Pa1_Ac1_pUb1; Function_for_conversion_of_nucleus_Foxo1_Pa1_Ac0_pUb1_to_nucleus_Foxo1_Pa1_Ac1_pUb1_by_CBPP300(CBPP300, cytoplasm, R80_kacet, nucleus, nucleus_Foxo1_Pa1_Ac0_pUb1); R80 is "acetylation of nucleus_Foxo1_phosphorylated_unacetylated_polyubiquitinated by CBPP300";  // modifiers: CBPP300
    R80_kacet = 0.0001;
  R81: dnabound_Foxo1_Pa1_Ac0_pUb1 => dnabound_Foxo1_Pa1_Ac1_pUb1; Function_for_conversion_of_dnabound_Foxo1_Pa1_Ac0_pUb1_to_dnabound_Foxo1_Pa1_Ac1_pUb1_by_CBPP300(CBPP300, cytoplasm, dnabound, dnabound_Foxo1_Pa1_Ac0_pUb1, R81_kacet); R81 is "acetylation of dnabound_Foxo1_phosphorylated_unacetylated_polyubiquitinated by CBPP300";  // modifiers: CBPP300
    R81_kacet = 0.0001;
  R82: nucleus_Foxo1_Pa1_Ac1_pUb0 => nucleus_Foxo1_Pa1_Ac0_pUb0; Function_for_conversion_of_nucleus_Foxo1_Pa1_Ac1_pUb0_to_nucleus_Foxo1_Pa1_Ac0_pUb0_by_SIRT1(SIRT1, cytoplasm, R82_kdeac, nucleus, nucleus_Foxo1_Pa1_Ac1_pUb0); R82 is "deacetylation of nucleus_Foxo1_phosphorylated_acetylated_notpolyubiquitinated by SIRT1";  // modifiers: SIRT1; isVersionOf ncit:C41553
    R82_kdeac = 0.0001;
  R83: dnabound_Foxo1_Pa1_Ac1_pUb0 => dnabound_Foxo1_Pa1_Ac0_pUb0; Function_for_conversion_of_dnabound_Foxo1_Pa1_Ac1_pUb0_to_dnabound_Foxo1_Pa1_Ac0_pUb0_by_SIRT1(SIRT1, cytoplasm, dnabound, dnabound_Foxo1_Pa1_Ac1_pUb0, R83_kdeac); R83 is "deacetylation of dnabound_Foxo1_phosphorylated_acetylated_notpolyubiquitinated by SIRT1";  // modifiers: SIRT1; isVersionOf ncit:C41553
    R83_kdeac = 0.0001;
  R84: nucleus_Foxo1_Pa1_Ac1_pUb1 => nucleus_Foxo1_Pa1_Ac0_pUb1; Function_for_conversion_of_nucleus_Foxo1_Pa1_Ac1_pUb1_to_nucleus_Foxo1_Pa1_Ac0_pUb1_by_SIRT1(SIRT1, cytoplasm, R84_kdeac, nucleus, nucleus_Foxo1_Pa1_Ac1_pUb1); R84 is "deacetylation of nucleus_Foxo1_phosphorylated_acetylated_polyubiquitinated by SIRT1";  // modifiers: SIRT1; isVersionOf ncit:C41553
    R84_kdeac = 0.0001;
  R85: dnabound_Foxo1_Pa1_Ac1_pUb1 => dnabound_Foxo1_Pa1_Ac0_pUb1; Function_for_conversion_of_dnabound_Foxo1_Pa1_Ac1_pUb1_to_dnabound_Foxo1_Pa1_Ac0_pUb1_by_SIRT1(SIRT1, cytoplasm, dnabound, dnabound_Foxo1_Pa1_Ac1_pUb1, R85_kdeac); R85 is "deacetylation of dnabound_Foxo1_phosphorylated_acetylated_polyubiquitinated by SIRT1";  // modifiers: SIRT1; isVersionOf ncit:C41553
    R85_kdeac = 0.0001;
  R86: cytoplasm_Foxo1_Pa0_Ac0_pUb0 => cytoplasm_Foxo1_Pa0_Ac0_pUb1; cytoplasm*Function_for_conversion_of_cytoplasm_Foxo1_Pa0_Ac0_pUb0_to_cytoplasm_Foxo1_Pa0_Ac0_pUb1_by_SCF(SCF, cytoplasm, cytoplasm_Foxo1_Pa0_Ac0_pUb0, R86_kub); R86 is "polyubiquitination of cytoplasm_Foxo1_unphosphorylated_unacetylated_notpolyubiquitinated by SCF";  // modifiers: SCF; isVersionOf GO:0000209
    R86_kub = 1e-6;
  R87: nucleus_Foxo1_Pa0_Ac0_pUb0 => nucleus_Foxo1_Pa0_Ac0_pUb1; Function_for_conversion_of_nucleus_Foxo1_Pa0_Ac0_pUb0_to_nucleus_Foxo1_Pa0_Ac0_pUb1_by_SCF(SCF, cytoplasm, R87_kub, nucleus, nucleus_Foxo1_Pa0_Ac0_pUb0); R87 is "polyubiquitination of nucleus_Foxo1_unphosphorylated_unacetylated_notpolyubiquitinated by SCF";  // modifiers: SCF; isVersionOf GO:0000209
    R87_kub = 1e-6;
  R88: dnabound_Foxo1_Pa0_Ac0_pUb0 => dnabound_Foxo1_Pa0_Ac0_pUb1; Function_for_conversion_of_dnabound_Foxo1_Pa0_Ac0_pUb0_to_dnabound_Foxo1_Pa0_Ac0_pUb1_by_SCF(SCF, cytoplasm, dnabound, dnabound_Foxo1_Pa0_Ac0_pUb0, R88_kub); R88 is "polyubiquitination of dnabound_Foxo1_unphosphorylated_unacetylated_notpolyubiquitinated by SCF";  // modifiers: SCF; isVersionOf GO:0000209
    R88_kub = 1e-6;
  R89: cytoplasm_Foxo1_Pa0_Ac1_pUb0 => cytoplasm_Foxo1_Pa0_Ac1_pUb1; cytoplasm*Function_for_conversion_of_cytoplasm_Foxo1_Pa0_Ac1_pUb0_to_cytoplasm_Foxo1_Pa0_Ac1_pUb1_by_SCF(SCF, cytoplasm, cytoplasm_Foxo1_Pa0_Ac1_pUb0, R89_kub); R89 is "polyubiquitination of cytoplasm_Foxo1_unphosphorylated_acetylated_notpolyubiquitinated by SCF";  // modifiers: SCF; isVersionOf GO:0000209
    R89_kub = 3.33333e-8;
  R90: nucleus_Foxo1_Pa0_Ac1_pUb0 => nucleus_Foxo1_Pa0_Ac1_pUb1; Function_for_conversion_of_nucleus_Foxo1_Pa0_Ac1_pUb0_to_nucleus_Foxo1_Pa0_Ac1_pUb1_by_SCF(SCF, cytoplasm, R90_kub, nucleus, nucleus_Foxo1_Pa0_Ac1_pUb0); R90 is "polyubiquitination of nucleus_Foxo1_unphosphorylated_acetylated_notpolyubiquitinated by SCF";  // modifiers: SCF; isVersionOf GO:0000209
    R90_kub = 3.33333e-8;
  R91: dnabound_Foxo1_Pa0_Ac1_pUb0 => dnabound_Foxo1_Pa0_Ac1_pUb1; Function_for_conversion_of_dnabound_Foxo1_Pa0_Ac1_pUb0_to_dnabound_Foxo1_Pa0_Ac1_pUb1_by_SCF(SCF, cytoplasm, dnabound, dnabound_Foxo1_Pa0_Ac1_pUb0, R91_kub); R91 is "polyubiquitination of dnabound_Foxo1_unphosphorylated_acetylated_notpolyubiquitinated by SCF";  // modifiers: SCF; isVersionOf GO:0000209
    R91_kub = 3.33333e-8;
  R92: cytoplasm_Foxo1_Pa1_Ac0_pUb0 => cytoplasm_Foxo1_Pa1_Ac0_pUb1; cytoplasm*Function_for_conversion_of_cytoplasm_Foxo1_Pa1_Ac0_pUb0_to_cytoplasm_Foxo1_Pa1_Ac0_pUb1_by_SCF(SCF, cytoplasm, cytoplasm_Foxo1_Pa1_Ac0_pUb0, R92_kub); R92 is "polyubiquitination of cytoplasm_Foxo1_phosphorylated_unacetylated_notpolyubiquitinated by SCF";  // modifiers: SCF; isVersionOf GO:0000209
    R92_kub = 3e-6;
  R93: nucleus_Foxo1_Pa1_Ac0_pUb0 => nucleus_Foxo1_Pa1_Ac0_pUb1; Function_for_conversion_of_nucleus_Foxo1_Pa1_Ac0_pUb0_to_nucleus_Foxo1_Pa1_Ac0_pUb1_by_SCF(SCF, cytoplasm, R93_kub, nucleus, nucleus_Foxo1_Pa1_Ac0_pUb0); R93 is "polyubiquitination of nucleus_Foxo1_phosphorylated_unacetylated_notpolyubiquitinated by SCF";  // modifiers: SCF; isVersionOf GO:0000209
    R93_kub = 3e-6;
  R94: dnabound_Foxo1_Pa1_Ac0_pUb0 => dnabound_Foxo1_Pa1_Ac0_pUb1; Function_for_conversion_of_dnabound_Foxo1_Pa1_Ac0_pUb0_to_dnabound_Foxo1_Pa1_Ac0_pUb1_by_SCF(SCF, cytoplasm, dnabound, dnabound_Foxo1_Pa1_Ac0_pUb0, R94_kub); R94 is "polyubiquitination of dnabound_Foxo1_phosphorylated_unacetylated_notpolyubiquitinated by SCF";  // modifiers: SCF; isVersionOf GO:0000209
    R94_kub = 3e-6;
  R95: cytoplasm_Foxo1_Pa1_Ac1_pUb0 => cytoplasm_Foxo1_Pa1_Ac1_pUb1; cytoplasm*Function_for_conversion_of_cytoplasm_Foxo1_Pa1_Ac1_pUb0_to_cytoplasm_Foxo1_Pa1_Ac1_pUb1_by_SCF(SCF, cytoplasm, cytoplasm_Foxo1_Pa1_Ac1_pUb0, R95_kub); R95 is "polyubiquitination of cytoplasm_Foxo1_phosphorylated_acetylated_notpolyubiquitinated by SCF";  // modifiers: SCF; isVersionOf GO:0000209
    R95_kub = 1e-7;
  R96: nucleus_Foxo1_Pa1_Ac1_pUb0 => nucleus_Foxo1_Pa1_Ac1_pUb1; Function_for_conversion_of_nucleus_Foxo1_Pa1_Ac1_pUb0_to_nucleus_Foxo1_Pa1_Ac1_pUb1_by_SCF(SCF, cytoplasm, R96_kub, nucleus, nucleus_Foxo1_Pa1_Ac1_pUb0); R96 is "polyubiquitination of nucleus_Foxo1phosphorylated_acetylated_notpolyubiquitinated by SCF";  // modifiers: SCF; isVersionOf GO:0000209
    R96_kub = 1e-7;
  R97: dnabound_Foxo1_Pa1_Ac1_pUb0 => dnabound_Foxo1_Pa1_Ac1_pUb1; Function_for_conversion_of_dnabound_Foxo1_Pa1_Ac1_pUb0_to_dnabound_Foxo1_Pa1_Ac1_pUb1_by_SCF(SCF, cytoplasm, dnabound, dnabound_Foxo1_Pa1_Ac1_pUb0, R97_kub); R97 is "polyubiquitination of dnabound_Foxo1_phosphorylated_acetylated_notpolyubiquitinated by SCF";  // modifiers: SCF; isVersionOf GO:0000209
    R97_kub = 1e-7;
  R98: cytoplasm_Foxo1_Pa0_Ac0_pUb1 => degr_Foxo1; cytoplasm*Function_for_degradation_of_cytoplasm_Foxo1_Pa0_Ac0_pUb1(Proteasome, cytoplasm, cytoplasm_Foxo1_Pa0_Ac0_pUb1, R98_kdeg); R98 is "degradation of cytoplasm_Foxo1_Pa0_Ac0_pUb1";  // modifiers: Proteasome
    R98_kdeg = 0.0001;
  R99: cytoplasm_Foxo1_Pa0_Ac1_pUb1 => degr_Foxo1; cytoplasm*Function_for_degradation_of_cytoplasm_Foxo1_Pa0_Ac1_pUb1(Proteasome, cytoplasm, cytoplasm_Foxo1_Pa0_Ac1_pUb1, R99_kdeg); R99 is "degradation of cytoplasm_Foxo1_Pa0_Ac1_pUb1";  // modifiers: Proteasome
    R99_kdeg = 0.0001;
  R100: cytoplasm_Foxo1_Pa1_Ac0_pUb1 => degr_Foxo1; cytoplasm*Function_for_degradation_of_cytoplasm_Foxo1_Pa1_Ac0_pUb1(Proteasome, cytoplasm, cytoplasm_Foxo1_Pa1_Ac0_pUb1, R100_kdeg); R100 is "degradation of cytoplasm_Foxo1_Pa1_Ac0_pUb1";  // modifiers: Proteasome
    R100_kdeg = 0.0001;
  R101: cytoplasm_Foxo1_Pa1_Ac1_pUb1 => degr_Foxo1; cytoplasm*Function_for_degradation_of_cytoplasm_Foxo1_Pa1_Ac1_pUb1(Proteasome, cytoplasm, cytoplasm_Foxo1_Pa1_Ac1_pUb1, R101_kdeg); R101 is "degradation of cytoplasm_Foxo1_Pa1_Ac1_pUb1";  // modifiers: Proteasome
    R101_kdeg = 0.0001;
  R102: $null => nucleus_RNA_Inr; Function_for_transcription_of_inr_by_dnabound_Foxo1_Pa0_Ac0_pUb0(dnabound, dnabound_Foxo1_Pa0_Ac0_pUb0, R102_ktranscr); R102 is "transcription of inr by dnabound_Foxo1_unphosphorylated_unacetylated_notpolyubiquitinated";  // modifiers: dnabound_Foxo1_Pa0_Ac0_pUb0
    R102_ktranscr = 0.3;
  R103: $null => nucleus_RNA_Sod2; Function_for_transcription_of_sod2_by_dnabound_Foxo1_Pa0_Ac0_pUb0(dnabound, dnabound_Foxo1_Pa0_Ac0_pUb0, R103_ktranscr); R103 is "transcription of sod2 by dnabound_Foxo1_unphosphorylated_unacetylated_notpolyubiquitinated";  // modifiers: dnabound_Foxo1_Pa0_Ac0_pUb0
    R103_ktranscr = 0.3;
  R104: $null => nucleus_RNA_Inr; Function_for_transcription_of_inr_by_dnabound_Foxo1_Pa0_Ac0_pUb1(dnabound, dnabound_Foxo1_Pa0_Ac0_pUb1, R104_ktranscr); R104 is "transcription of inr by dnabound_Foxo1_unphosphorylated_unacetylated_polyubiquitinated";  // modifiers: dnabound_Foxo1_Pa0_Ac0_pUb1
    R104_ktranscr = 0.3;
  R105: $null => nucleus_RNA_Sod2; Function_for_transcription_of_sod2_by_dnabound_Foxo1_Pa0_Ac0_pUb1(dnabound, dnabound_Foxo1_Pa0_Ac0_pUb1, R105_ktranscr); R105 is "transcription of sod2 by dnabound_Foxo1_unphosphorylated_unacetylated_polyubiquitinated";  // modifiers: dnabound_Foxo1_Pa0_Ac0_pUb1
    R105_ktranscr = 0.3;
  R106: $null => nucleus_RNA_Inr; Function_for_transcription_of_inr_by_dnabound_Foxo1_Pa0_Ac1_pUb0(dnabound, dnabound_Foxo1_Pa0_Ac1_pUb0, R106_ktranscr); R106 is "transcription of inr by dnabound_Foxo1_unphosphorylated_acetylated_notpolyubiquitinated";  // modifiers: dnabound_Foxo1_Pa0_Ac1_pUb0
    R106_ktranscr = 0.3;
  R107: $null => nucleus_RNA_Sod2; Function_for_transcription_of_sod2_by_dnabound_Foxo1_Pa0_Ac1_pUb0(dnabound, dnabound_Foxo1_Pa0_Ac1_pUb0, R107_ktranscr); R107 is "transcription of sod2 by dnabound_Foxo1_unphosphorylated_acetylated_notpolyubiquitinated";  // modifiers: dnabound_Foxo1_Pa0_Ac1_pUb0
    R107_ktranscr = 0.3;
  R108: $null => nucleus_RNA_Inr; Function_for_transcription_of_inr_by_dnabound_Foxo1_Pa0_Ac1_pUb1(dnabound, dnabound_Foxo1_Pa0_Ac1_pUb1, R108_ktranscr); R108 is "transcription of inr by dnabound_Foxo1_unphosphorylated_acetylated_polyubiquitinated";  // modifiers: dnabound_Foxo1_Pa0_Ac1_pUb1
    R108_ktranscr = 0.3;
  R109: $null => nucleus_RNA_Sod2; Function_for_transcription_of_sod2_by_dnabound_Foxo1_Pa0_Ac1_pUb1(dnabound, dnabound_Foxo1_Pa0_Ac1_pUb1, R109_ktranscr); R109 is "transcription of sod2 by dnabound_Foxo1_unphosphorylated_acetylated_polyubiquitinated";  // modifiers: dnabound_Foxo1_Pa0_Ac1_pUb1
    R109_ktranscr = 0.3;
  R110: $null => nucleus_RNA_Inr; Function_for_transcription_of_inr_by_dnabound_Foxo1_Pa1_Ac0_pUb0(dnabound, dnabound_Foxo1_Pa1_Ac0_pUb0, R110_ktranscr); R110 is "transcription of inr by dnabound_Foxo1_phosphorylated_unacetylated_notpolyubiquitinated";  // modifiers: dnabound_Foxo1_Pa1_Ac0_pUb0
    R110_ktranscr = 0.3;
  R111: $null => nucleus_RNA_Sod2; Function_for_transcription_of_sod2_by_dnabound_Foxo1_Pa1_Ac0_pUb0(dnabound, dnabound_Foxo1_Pa1_Ac0_pUb0, R111_ktranscr); R111 is "transcription of sod2 by dnabound_Foxo1_phosphorylated_unacetylated_notpolyubiquitinated";  // modifiers: dnabound_Foxo1_Pa1_Ac0_pUb0
    R111_ktranscr = 0.3;
  R112: $null => nucleus_RNA_Inr; Function_for_transcription_of_inr_by_dnabound_Foxo1_Pa1_Ac0_pUb1(dnabound, dnabound_Foxo1_Pa1_Ac0_pUb1, R112_ktranscr); R112 is "transcription of inr by dnabound_Foxo1_phosphorylated_unacetylated_polyubiquitinated";  // modifiers: dnabound_Foxo1_Pa1_Ac0_pUb1
    R112_ktranscr = 0.3;
  R113: $null => nucleus_RNA_Sod2; Function_for_transcription_of_sod2_by_dnabound_Foxo1_Pa1_Ac0_pUb1(dnabound, dnabound_Foxo1_Pa1_Ac0_pUb1, R113_ktranscr); R113 is "transcription of sod2 by dnabound_Foxo1_phosphorylated_unacetylated_polyubiquitinated";  // modifiers: dnabound_Foxo1_Pa1_Ac0_pUb1
    R113_ktranscr = 0.3;
  R114: $null => nucleus_RNA_Inr; Function_for_transcription_of_inr_by_dnabound_Foxo1_Pa1_Ac1_pUb0(dnabound, dnabound_Foxo1_Pa1_Ac1_pUb0, R114_ktranscr); R114 is "transcription of inr by dnabound_Foxo1_phosphorylated_acetylated_notpolyubiquitinated";  // modifiers: dnabound_Foxo1_Pa1_Ac1_pUb0
    R114_ktranscr = 0.3;
  R115: $null => nucleus_RNA_Sod2; Function_for_transcription_of_sod2_by_dnabound_Foxo1_Pa1_Ac1_pUb0(dnabound, dnabound_Foxo1_Pa1_Ac1_pUb0, R115_ktranscr); R115 is "transcription of sod2 by dnabound_Foxo1_phosphorylated_acetylated_notpolyubiquitinated";  // modifiers: dnabound_Foxo1_Pa1_Ac1_pUb0
    R115_ktranscr = 0.3;
  R116: $null => nucleus_RNA_Inr; Function_for_transcription_of_inr_by_dnabound_Foxo1_Pa1_Ac1_pUb1(dnabound, dnabound_Foxo1_Pa1_Ac1_pUb1, R116_ktranscr); R116 is "transcription of inr by dnabound_Foxo1_phosphorylated_acetylated_polyubiquitinated";  // modifiers: dnabound_Foxo1_Pa1_Ac1_pUb1
    R116_ktranscr = 0.3;
  R117: $null => nucleus_RNA_Sod2; Function_for_transcription_of_sod2_by_dnabound_Foxo1_Pa1_Ac1_pUb1(dnabound, dnabound_Foxo1_Pa1_Ac1_pUb1, R117_ktranscr); R117 is "transcription of sod2 by dnabound_Foxo1_phosphorylated_acetylated_polyubiquitinated";  // modifiers: dnabound_Foxo1_Pa1_Ac1_pUb1
    R117_ktranscr = 0.3;
  basal_transcription_of_inr: $null => nucleus_RNA_Inr; Constant_flux__irreversible(basal_transcription_of_inr_v);
    basal_transcription_of_inr_v = 3;
  export_of_inr_RNA: nucleus_RNA_Inr => cytoplasm_RNA_Inr; Function_for_export_of_inr_RNA(export_of_inr_RNA_kexp, nucleus, nucleus_RNA_Inr);  // isVersionOf GO:0006405
    export_of_inr_RNA_kexp = 0.22;
  cyto_degr_of_inr_RNA: cytoplasm_RNA_Inr => $null; cytoplasm*Function_for_cyto_degr_of_inr_RNA(cytoplasm, cytoplasm_RNA_Inr, cyto_degr_of_inr_RNA_kmdeg);
    cyto_degr_of_inr_RNA_kmdeg = 5.622;
  translation_of_inr: $null => cytoplasm_Inr; cytoplasm*Function_for_translation_of_inr(cytoplasm, cytoplasm_RNA_Inr, translation_of_inr_ktransl);  // modifiers: cytoplasm_RNA_Inr; isVersionOf GO:0006412
    translation_of_inr_ktransl = 1.23;
  degradation_of_Inr_protein: cytoplasm_Inr => $null; cytoplasm*Function_for_degradation_of_Inr_protein(cytoplasm, cytoplasm_Inr, degradation_of_Inr_protein_kpdeg);
    degradation_of_Inr_protein_kpdeg = 0.0019;
  basal_transcription_of_sod2: $null => nucleus_RNA_Sod2; Constant_flux__irreversible(basal_transcription_of_sod2_v);
    basal_transcription_of_sod2_v = 3;
  export_of_sod2_RNA: nucleus_RNA_Sod2 => cytoplasm_RNA_Sod2; Function_for_export_of_sod2_RNA(export_of_sod2_RNA_kexp, nucleus, nucleus_RNA_Sod2);  // isVersionOf GO:0006405
    export_of_sod2_RNA_kexp = 0.22;
  cyto_degr_of_sod2_RNA: cytoplasm_RNA_Sod2 => $null; cytoplasm*Function_for_cyto_degr_of_sod2_RNA(cytoplasm, cytoplasm_RNA_Sod2, cyto_degr_of_sod2_RNA_kmdeg);
    cyto_degr_of_sod2_RNA_kmdeg = 5.622;
  translation_of_sod2: $null => cytoplasm_Sod2; cytoplasm*Function_for_translation_of_sod2(cytoplasm, cytoplasm_RNA_Sod2, translation_of_sod2_ktransl);  // modifiers: cytoplasm_RNA_Sod2; isVersionOf GO:0006412
    translation_of_sod2_ktransl = 1.23;
  degradation_of_Sod2_protein: cytoplasm_Sod2 => $null; cytoplasm*Function_for_degradation_of_Sod2_protein(cytoplasm, cytoplasm_Sod2, degradation_of_Sod2_protein_kpdeg);
    degradation_of_Sod2_protein_kpdeg = 0.0019;

  // Events:
  event_0000001: at (time >= 60): Akt = 100000/cytoplasm;

  // Unit definitions:
  unit volume = 1e-3 litre;
  unit time = 60 second;
  unit substance = item;
end
