// SBML level 2 version 4
// dcterms:bibliographicCitation: urn:miriam:pubmed:17266989

function Function_for_Reaction_1__2(gammaV, I)
  gammaV*I;
end
Function_for_Reaction_1__2 is "Function for Reaction 1 [2]";

function Function_for_Reaction_2__2(gammaVA, S, A, V)
  gammaVA*S*A*V;
end
Function_for_Reaction_2__2 is "Function for Reaction 2 [2]";

function Function_for_Reaction_3__2(gammaVH, H, V)
  gammaVH*H*V;
end
Function_for_Reaction_3__2 is "Function for Reaction 3 [2]";

function Function_for_Reaction_5__1(aV1, V, aV2)
  aV1*V/(1 + aV2*V);
end
Function_for_Reaction_5__1 is "Function for Reaction 5 [1]";

function Function_for_Reaction_6__1(bHD, D, H, R)
  bHD*D*(H + R);
end
Function_for_Reaction_6__1 is "Function for Reaction 6 [1]";

function Function_for_Reaction_8(V, H, gammaHV)
  gammaHV*V*H;
end

function Function_for_Reaction_9__1(bHF, F, H)
  bHF*F*H;
end
Function_for_Reaction_9__1 is "Function for Reaction 9 [1]";

function Function_for_Reaction_10(bIE, E, I)
  bIE*E*I;
end

function Function_for_Reaction_12(bMD, D, bMV, V, M)
  (bMD*D + bMV*V)*(1 - M);
end

function Function_for_Reaction_14(bF, M)
  bF*M;
end

function Function_for_Reaction_15(cF, I)
  cF*I;
end

function Function_for_Reaction_16(bFH, H, F)
  bFH*H*F;
end

function Function_for_Reaction_18(bEM, M, E)
  bEM*M*E;
end

function Function_for_Reaction_19(bEI, I, E)
  bEI*I*E;
end

function Function_for_Reaction_20(aE, E)
  aE*(E - 1);
end

function Function_for_Reaction_21(M, P, bPM)
  bPM*M*P;
end

function Function_for_Reaction_22(aP, P)
  aP*(P - 1);
end

function Function_for_Reaction_23(bA, P)
  bA*P;
end

function Function_for_Reaction_24(gammaAV, S, A, V)
  gammaAV*S*A*V;
end

function Function_for_Reaction_26(r, P, S)
  r*P*(1 - S);
end

model Hancioglu2007___Human_Immune_Response_to_Influenza_A_virus_Infection()
  // Hancioglu2007 - Human Immune Response to Influenza A virus Infection
  // biomodels.db:MODEL1808280004 biomodels.db:BIOMD0000000711
  // hasProperty GO:0006955
  // hasProperty GO:0002250
  // hasProperty GO:0045087
  // hasProperty mamo:MAMO_0000046
  // hasTaxon taxonomy:11320

  // Compartments:
  compartment Respiratory_tract_mucosa = 1;  // isVersionOf BTO:0000973

  // Species:
  species Viral_Load__V in Respiratory_tract_mucosa = 0.01; Viral_Load__V is "Viral Load (V)";  // ncit:C53454; hasTaxon taxonomy:11320
  species Healthy_Epithelial_cells__H in Respiratory_tract_mucosa = 1; Healthy_Epithelial_cells__H is "Healthy Epithelial cells (H)";  // isVersionOf ncit:C12578
  species Infected_Epithelial_cells__I in Respiratory_tract_mucosa = 0; Infected_Epithelial_cells__I is "Infected Epithelial cells (I)";  // isVersionOf ncit:C12578; isVersionOf BTO:0000152
  species APC_cells__M in Respiratory_tract_mucosa = 0; APC_cells__M is "APC cells (M)";  // isVersionOf ncit:C12621
  // alpha and beta interferon
  species Interferons__F in Respiratory_tract_mucosa = 0; Interferons__F is "Interferons (F)";  // isVersionOf ncit:C20493
  species Resistant_cells__R in Respiratory_tract_mucosa = 0; Resistant_cells__R is "Resistant cells (R)";  // isVersionOf ncit:C12578; hasProperty MP:0002410
  species Effector_cells__E in Respiratory_tract_mucosa = 1; Effector_cells__E is "Effector cells (E)";  // isVersionOf ncit:C104083; isVersionOf BTO:0000289
  species Plasma_cells__P in Respiratory_tract_mucosa = 1; Plasma_cells__P is "Plasma cells (P)";  // isVersionOf ncit:C12486
  species Antibodies__A in Respiratory_tract_mucosa = 1; Antibodies__A is "Antibodies (A)";  // efo:0000264; isVersionOf ncit:C118191
  species Antigenic_compatibility__S in Respiratory_tract_mucosa = 0.1; Antigenic_compatibility__S is "Antigenic compatibility (S)";  // isVersionOf omit:0002315
  species $Dead_cells__D in Respiratory_tract_mucosa; Dead_cells__D is "Dead cells (D)";  // isVersionOf ncit:C12578; hasProperty GO:0008219; hasProperty ncit:C28554

  // Parameters:
  gammaV = 510;
  gammaVA = 619.2;
  gammaVH = 1.02;
  alphaV = 1.7;
  aV1 = 100;
  aV2 = 23000;
  bHD = 4;
  aR = 1;
  gammaHV = 0.34;
  bHF = 0.01;
  bIE = 0.066;
  aI = 1.5;
  bMD = 1;
  bMV = 0.0037;
  aM = 1;
  bF = 250000;
  cF = 2000;
  bFH = 17;
  aF = 8;
  bEM = 8.3;
  bEI = 2.72;
  aE = 0.4;
  bPM = 11.5;
  aP = 0.4;
  bA = 0.043;
  gammaAV = 146.25;
  aA = 0.043;
  r = 3e-5;

  // Assignment rules:
  Dead_cells__D := 1 - Healthy_Epithelial_cells__H - Resistant_cells__R - Infected_Epithelial_cells__I;

  // Reactions:
  Secretion_of_Virus__V__by_Infected_epithelial_cells__I: => Viral_Load__V; Respiratory_tract_mucosa*Function_for_Reaction_1__2(gammaV, Infected_Epithelial_cells__I); Secretion_of_Virus__V__by_Infected_epithelial_cells__I is "Secretion of Virus (V) by Infected epithelial cells (I)";  // modifiers: Infected_Epithelial_cells__I; isVersionOf GO:0019076
  Neutralization_of_Virus__V__by_Antibody__A: Viral_Load__V => ; Respiratory_tract_mucosa*Function_for_Reaction_2__2(gammaVA, Antigenic_compatibility__S, Antibodies__A, Viral_Load__V); Neutralization_of_Virus__V__by_Antibody__A is "Neutralization of Virus (V) by Antibody (A)";  // modifiers: Antigenic_compatibility__S, Antibodies__A
  Adsorption_of_Virus__V__by_Healthy_epithelial_cells__H: Viral_Load__V => ; Respiratory_tract_mucosa*Function_for_Reaction_3__2(gammaVH, Healthy_Epithelial_cells__H, Viral_Load__V); Adsorption_of_Virus__V__by_Healthy_epithelial_cells__H is "Adsorption of Virus (V) by Healthy epithelial cells (H)";  // modifiers: Healthy_Epithelial_cells__H
  Non_Specific_Removal_of_Virus__V___alphaV: Viral_Load__V => ; Respiratory_tract_mucosa*alphaV*Viral_Load__V; Non_Specific_Removal_of_Virus__V___alphaV is "Non-Specific Removal of Virus (V) [alphaV]";
  Non_Specific_Removal_of_Virus__V___aV1_aV2: Viral_Load__V => ; Respiratory_tract_mucosa*Function_for_Reaction_5__1(aV1, Viral_Load__V, aV2); Non_Specific_Removal_of_Virus__V___aV1_aV2 is "Non-Specific Removal of Virus (V) [aV1 aV2]";
  Regeneration_of_Healthy_Epithelial_cells__H: => Healthy_Epithelial_cells__H; Respiratory_tract_mucosa*Function_for_Reaction_6__1(bHD, Dead_cells__D, Healthy_Epithelial_cells__H, Resistant_cells__R); Regeneration_of_Healthy_Epithelial_cells__H is "Regeneration of Healthy Epithelial cells (H)";  // modifiers: Dead_cells__D, Resistant_cells__R
  R_virus_resistant_state_decay: Resistant_cells__R => Healthy_Epithelial_cells__H; Respiratory_tract_mucosa*aR*Resistant_cells__R;
  Infection_of_Healthy_Epithelial_cells_by__V: Healthy_Epithelial_cells__H => Infected_Epithelial_cells__I; Respiratory_tract_mucosa*Function_for_Reaction_8(Viral_Load__V, Healthy_Epithelial_cells__H, gammaHV); Infection_of_Healthy_Epithelial_cells_by__V is "Infection of Healthy Epithelial cells by (V)";  // modifiers: Viral_Load__V; isVersionOf ncit:C128320
  H_virus_resistant_state_induction: Healthy_Epithelial_cells__H => Resistant_cells__R; Respiratory_tract_mucosa*Function_for_Reaction_9__1(bHF, Interferons__F, Healthy_Epithelial_cells__H);  // modifiers: Interferons__F
  Degradation_of_Infected_Epithelial_cells___E: Infected_Epithelial_cells__I => ; Respiratory_tract_mucosa*Function_for_Reaction_10(bIE, Effector_cells__E, Infected_Epithelial_cells__I); Degradation_of_Infected_Epithelial_cells___E is "Degradation of Infected Epithelial cells [E]";  // modifiers: Effector_cells__E
  Degradation_of_Infected_Epithelial_cells___Cytopathicity_of_V: Infected_Epithelial_cells__I => ; Respiratory_tract_mucosa*aI*Infected_Epithelial_cells__I; Degradation_of_Infected_Epithelial_cells___Cytopathicity_of_V is "Degradation of Infected Epithelial cells [Cytopathicity of V]";
  Stimulation_of_APC_cells__M__by_Dead_cells__D__and_Virus__V: => APC_cells__M; Respiratory_tract_mucosa*Function_for_Reaction_12(bMD, Dead_cells__D, bMV, Viral_Load__V, APC_cells__M); Stimulation_of_APC_cells__M__by_Dead_cells__D__and_Virus__V is "Stimulation of APC cells (M) by Dead cells (D) and Virus (V)";  // modifiers: Dead_cells__D, Viral_Load__V
  Stimulates_State_loss_of_APC_cells__M: APC_cells__M => ; Respiratory_tract_mucosa*aM*APC_cells__M; Stimulates_State_loss_of_APC_cells__M is "Stimulates State loss of APC cells (M)";
  Synthesis_of_Interferons__F___M: => Interferons__F; Respiratory_tract_mucosa*Function_for_Reaction_14(bF, APC_cells__M); Synthesis_of_Interferons__F___M is "Synthesis of Interferons (F) [M]";  // modifiers: APC_cells__M; isVersionOf ncit:C61408
  Synthesis_of_Interferons__F___I: => Interferons__F; Respiratory_tract_mucosa*Function_for_Reaction_15(cF, Infected_Epithelial_cells__I); Synthesis_of_Interferons__F___I is "Synthesis of Interferons (F) [I]";  // modifiers: Infected_Epithelial_cells__I; isVersionOf ncit:C61408
  Binding_of_Healthy_epithelial_cells__H__and_Interferons__F: Interferons__F => ; Respiratory_tract_mucosa*Function_for_Reaction_16(bFH, Healthy_Epithelial_cells__H, Interferons__F); Binding_of_Healthy_epithelial_cells__H__and_Interferons__F is "Binding of Healthy epithelial cells (H) and Interferons (F)";  // modifiers: Healthy_Epithelial_cells__H; isVersionOf GO:0005488
  Degradation_of_Interferons__F: Interferons__F => ; Respiratory_tract_mucosa*aF*Interferons__F; Degradation_of_Interferons__F is "Degradation of Interferons (F)";
  Stimulation_of_Effector_cells__E___M: => Effector_cells__E; Respiratory_tract_mucosa*Function_for_Reaction_18(bEM, APC_cells__M, Effector_cells__E); Stimulation_of_Effector_cells__E___M is "Stimulation of Effector cells (E) [M]";  // modifiers: APC_cells__M
  Degradation_of_Effector_cells__E___Mod_I: Effector_cells__E => ; Respiratory_tract_mucosa*Function_for_Reaction_19(bEI, Infected_Epithelial_cells__I, Effector_cells__E); Degradation_of_Effector_cells__E___Mod_I is "Degradation of Effector cells (E) [Mod=I]";  // modifiers: Infected_Epithelial_cells__I
  Degradation_of_Effector_cells__E: Effector_cells__E => ; Respiratory_tract_mucosa*Function_for_Reaction_20(Degradation_of_Effector_cells__E_aE, Effector_cells__E); Degradation_of_Effector_cells__E is "Degradation of Effector cells (E)";
    Degradation_of_Effector_cells__E_aE = 0.1;
  Synthesis_of_Plasma_cells__P___Mod_M: => Plasma_cells__P; Respiratory_tract_mucosa*Function_for_Reaction_21(APC_cells__M, Plasma_cells__P, bPM); Synthesis_of_Plasma_cells__P___Mod_M is "Synthesis of Plasma cells (P) [Mod=M]";  // modifiers: APC_cells__M; isVersionOf ncit:C61408
  Degradation_of_Plasma_cells__P: Plasma_cells__P => ; Respiratory_tract_mucosa*Function_for_Reaction_22(aP, Plasma_cells__P); Degradation_of_Plasma_cells__P is "Degradation of Plasma cells (P)";
  Synthesis_of_Antibody__A___Mod_P: => Antibodies__A; Respiratory_tract_mucosa*Function_for_Reaction_23(bA, Plasma_cells__P); Synthesis_of_Antibody__A___Mod_P is "Synthesis of Antibody (A) [Mod=P]";  // modifiers: Plasma_cells__P; isVersionOf ncit:C61408
  Binding_of_Antibody__A__and_Virus__V: Antibodies__A => ; Respiratory_tract_mucosa*Function_for_Reaction_24(gammaAV, Antigenic_compatibility__S, Antibodies__A, Viral_Load__V); Binding_of_Antibody__A__and_Virus__V is "Binding of Antibody (A) and Virus (V)";  // modifiers: Antigenic_compatibility__S, Viral_Load__V; isVersionOf GO:0005488
  Degradation_of_Antibody__A: Antibodies__A => ; Respiratory_tract_mucosa*aA*Antibodies__A; Degradation_of_Antibody__A is "Degradation of Antibody (A)";
  Antigenic_Compatibility_variable: => Antigenic_compatibility__S; Respiratory_tract_mucosa*Function_for_Reaction_26(r, Plasma_cells__P, Antigenic_compatibility__S);  // modifiers: Plasma_cells__P

  // Events:
  Event_to_keep_viral_load_non_negative: at (Viral_Load__V < 0): Viral_Load__V = 0; Event_to_keep_viral_load_non_negative is "Event to keep viral load non-negative";

  // Unit definitions:
  unit volume = 1e-3 litre;
  unit time = 86400 second;
  unit substance = 1e-3 mole;
end
