// SBML level 2 version 4
// dcterms:bibliographicCitation: urn:miriam:pubmed:29652855

function Function_for_Reaction_1(s, I)
  s*I;
end

function Function_for_Reaction_2(T, I, r_T_Tmax)
  r_T_Tmax*T/(T + I);
end

function Function_for_Reaction_3(r_T_d, T)
  r_T_d*T;
end

function Function_for_Reaction_5(R, r_T_Tmax, I, T)
  1/(1 + R)*(r_T_Tmax*I/(T + I));
end

function Function_for_Reaction_6(R, r_T_d, I)
  1/(1 + R)*r_T_d*I;
end

function Function_for_Reaction_7(D, r_T_d, I)
  D*r_T_d*I;
end

function Function_for_Reaction_8(pstar, I)
  pstar*I;
end

model New_Model()
  // Aston2018 - Dynamics of Hepatitis C Infection
  // biomodels.db:MODEL1808280002 biomodels.db:BIOMD0000000713
  // biomodels.db:MODEL1808280002
  // hasProperty mamo:MAMO_0000046
  // hasProperty efo:0003047
  // hasTaxon taxonomy:11103
  // hasTaxon taxonomy:9606

  // Compartments:
  compartment compartment = 1; compartment is "Liver";  // BTO:0000759

  // Species:
  species T in compartment = 3.3246; T is "Healthy Hepatocytes (T)";  // isVersionOf BTO:0000575
  species I in compartment = 417520; I is "Infected Hepatocytes (I)";  // BTO:0000152; isVersionOf BTO:0000575
  species V in compartment = 4450000; V is "Viral Load (V)";  // hasTaxon taxonomy:11103

  // Parameters:
  s = 0.1178;
  r_T_Tmax = 10645;
  r_T_d = 0.0019927;
  R = 30.078;
  D = 58.954;
  beta = 8.3376e-9; beta is "beta*";
  pstar = 203.96;
  c = 17.908;

  // Reactions:
  Reaction_1: => T; compartment*Function_for_Reaction_1(s, I); Reaction_1 is "Proliferation of hepatocytes from liver stem cells";  // modifiers: I
  Reaction_2: => T; compartment*Function_for_Reaction_2(T, I, r_T_Tmax); Reaction_2 is "Proliferation of hepatocytes through cell division";  // modifiers: I
  Death_of_healthy_hepatocytes: T => ; compartment*Function_for_Reaction_3(r_T_d, T);
  Infection_of_healthy_hepatocytes: T + V => I; compartment*beta*T*V;  // isVersionOf ncit:c128320
  Reaction_5: => I; compartment*Function_for_Reaction_5(R, r_T_Tmax, I, T); Reaction_5 is "Proliferation of infected hepatocytes";  // modifiers: T
  Reaction_6: I => ; compartment*Function_for_Reaction_6(R, r_T_d, I); Reaction_6 is "Death of infected hepatocytes (1st term)";
  Reaction_7: I => ; compartment*Function_for_Reaction_7(D, r_T_d, I); Reaction_7 is "Death of Infected Hepatocytes (2nd term)";
  Release_of_the_virus: => V; compartment*Function_for_Reaction_8(pstar, I);  // modifiers: I; isVersionOf GO:0019076
  Degradation_of_the_virus: V => ; compartment*c*V;

  // Unit definitions:
  unit volume = 1e-3 litre;
  unit time = 86400 second;
end
