// SBML level 2 version 4
// dcterms:bibliographicCitation: urn:miriam:pubmed:28188732

function Constant_flux__irreversible(v)
  v;
end
Constant_flux__irreversible is "Constant flux (irreversible)";

function Function_for_Reaction_3(sigma, gamma, E_d)
  sigma*(1 - gamma)*E_d;
end

function Function_for_Reaction_4(beta, S_d, I_d)
  beta*S_d*I_d;
end

function Function_for_Reaction_6(sigma, gamma, E_d)
  sigma*gamma*E_d;
end

function Function_for_Reaction_15(sigma_h, gamma_h, E_h)
  sigma_h*(1 - gamma_h)*E_h;
end

function Function_for_Reaction_17(beta_dh, S_h, I_d)
  beta_dh*S_h*I_d;
end

function Function_for_Reaction_18(sigma_h, gamma_h, E_h)
  sigma_h*gamma_h*E_h;
end

model Ruan2017___Transmission_dynamics_and_control_of_rabies_in_China()
  // Ruan2017 - Transmission dynamics and control of rabies in China
  // biomodels.db:MODEL1808280012 biomodels.db:BIOMD0000000726
  // hasProperty mamo:MAMO_0000046
  // hasProperty ncit:C28182
  // hasTaxon taxonomy:11292
  // hasTaxon taxonomy:9606
  // hasTaxon taxonomy:9615

  // Compartments:
  compartment compartment = 1; compartment is "Dog Population";  // OBI:0000181; hasTaxon taxonomy:9615
  compartment Human_Population = 1;  // OBI:0000181; hasTaxon taxonomy:9606

  // Species:
  species S_d in compartment = 35000000; S_d is "Susceptible dogs (S_d)";  // isVersionOf ido:0000514; hasTaxon taxonomy:9615
  species E_d in compartment = 200000; E_d is "Exposed dogs (E_d)";  // hasProperty efo:0000487; hasTaxon taxonomy:9615
  species I_d in compartment = 100000; I_d is "Infectious dogs (I_d)";  // isVersionOf ido:0000511; hasTaxon taxonomy:9615
  species R_d in compartment = 200000; R_d is "Recovered dogs (R_d)";  // hasProperty ncit:C49498; hasTaxon taxonomy:9615
  species S_h in Human_Population = 1290000000; S_h is "Susceptible humans (S_h)";  // isVersionOf ido:0000514; hasTaxon taxonomy:9606
  species E_h in Human_Population = 250; E_h is "Exposed humans (E_h)";  // hasProperty efo:0000487; hasTaxon taxonomy:9606
  species I_h in Human_Population = 89; I_h is "Infectious humans (I_h)";  // isVersionOf ido:0000511; hasTaxon taxonomy:9606
  species R_h in Human_Population = 200000; R_h is "Recovered humans (R_h)";  // hasProperty ncit:C49498; hasTaxon taxonomy:9606

  // Parameters:
  A = 3000000;
  lambda = 1;
  gamma = 0.4;
  sigma = 6;
  m = 0.08;
  beta = 1.58e-7;
  k = 0.09;
  mu = 1;
  B = 15400000;
  lambda_h = 1;
  gamma_h = 0.4;
  sigma_h = 6;
  m_h = 0.003;
  beta_dh = 2.29e-12;
  k_h = 0.54;
  mu_h = 1.34;

  // Reactions:
  Birth_of_susceptible_dogs: => S_d; compartment*Constant_flux__irreversible(A);
  reaction_2: R_d => S_d; compartment*lambda*R_d; reaction_2 is "Loss of immunity in recovered dogs";
  reaction_3: E_d => S_d; compartment*Function_for_Reaction_3(sigma, gamma, E_d); reaction_3 is "Exposed dogs that do not get infected";
  reaction_4: S_d => E_d; compartment*Function_for_Reaction_4(beta, S_d, I_d); reaction_4 is "Exposure of virus to susceptible dogs";  // modifiers: I_d
  reaction_5: S_d => ; compartment*m*S_d; reaction_5 is "Natural death of susceptible dogs";
  Infection_of_exposed_dogs: E_d => I_d; compartment*Function_for_Reaction_6(sigma, gamma, E_d);
  Natural_death_of_exposed_dogs: E_d => ; compartment*m*E_d;
  Natural_death_of_infected_dogs: I_d => ; compartment*m*I_d;
  Vaccination_of_susceptible_dogs: S_d => R_d; compartment*k*S_d;  // isPartOf efo:0004292
  Vaccination_of_exposed_dogs: E_d => R_d; compartment*k*E_d;  // isPartOf efo:0004292
  reaction_11: I_d => ; compartment*mu*I_d; reaction_11 is "Disease related death of infected dogs";
  Natural_death_of_recovered_dogs: R_d => ; compartment*m*R_d;
  Birth_of_susceptible_humans: => S_h; Human_Population*Constant_flux__irreversible(B);
  reaction_14: R_h => S_h; Human_Population*lambda_h*R_h; reaction_14 is "Loss of immunity in recovered humans";
  reaction_15: E_h => S_h; Human_Population*Function_for_Reaction_15(sigma_h, gamma_h, E_h); reaction_15 is "Exposure humans that were not infected";
  reaction_16: S_h => ; Human_Population*m_h*S_h; reaction_16 is "Natural death of susceptible humans";
  reaction_17: S_h => E_h; Function_for_Reaction_17(beta_dh, S_h, I_d); reaction_17 is "Exposure of virus to susceptible humans";  // modifiers: I_d
  Infection_of_exposed_humans: E_h => I_h; Human_Population*Function_for_Reaction_18(sigma_h, gamma_h, E_h);
  Natural_death_of_exposed_humans: E_h => ; Human_Population*m_h*E_h;
  Vaccination_of_exposed_humans: E_h => R_h; Human_Population*k_h*E_h;  // isPartOf efo:0004292
  Natural_death_of_infected_humans: I_h => ; Human_Population*m_h*I_h;
  reaction_22: I_h => ; Human_Population*mu_h*I_h; reaction_22 is "Disease related death of infected humans";
  reaction_23: R_h => ; Human_Population*m_h*R_h; reaction_23 is "Natural death of recovered humans";

  // Unit definitions:
  unit time = 86400 second;
end
