// SBML level 2 version 4
// dcterms:bibliographicCitation: urn:miriam:pubmed:8631387

function Constant_flux__irreversible(v)
  v;
end
Constant_flux__irreversible is "Constant flux (irreversible)";

function function_for_decay(k1, S, k2)
  k1*S/(k2 + S);
end

function function_for_synthesis(k1, P, k2)
  k1*(1 - P)/(k2 + 1 - P);
end

function function_for_C_decay(k1, M, S, k2)
  k1*M*S/(k2 + S);
end

model Goldbeter1996___Cyclin_Cdc2_kinase_Oscillations()
  // Goldbeter1996 - Cyclin Cdc2 kinase Oscillations
  // We consider a minimal cascade model previously proposed for the mitotic oscillator driving the embryonic cell division cycle. The model is based on a bicyclic phosphorylation-dephosphorylation cascade involving cyclin and cdc2 kinase. By constructing stability diagrams showing domains of periodic behavior as a function of the maximum rates of the kinases and phosphatases involved in the two cycles of the cascade, we investigate the role of these converter enzymes in the oscillatory mechanism. Oscillations occur when the balance of kinase and phosphatase rates in each cycle is in a range bounded by two critical values. The results suggest ways to arrest the mitotic oscillator by altering the maximum rates of the converter enzymes. These results bear on the control of cell proliferation.
  // hasProperty mamo:MAMO_0000046
  // hasProperty GO:0000278
  // hasTaxon taxonomy:2759
  // isDescribedBy pubmed:8631387
  // biomodels.db:MODEL1812120005 biomodels.db:BIOMD0000000729

  // Compartments:
  compartment compartment = 1;

  // Species:
  species C in compartment = 0;  // isVersionOf uniprot:C94967; hasProperty ncit:C17349
  species M in compartment = 0;  // hasProperty ncit:C28597
  species X in compartment = 0;  // hasProperty ncit:C16981

  // Parameters:
  VM1 = 3;  // hasProperty ncit:C25636
  V2 = 1.5;  // hasProperty ncit:C25636
  VM3 = 1;  // hasProperty icd:C25636
  V4 = 0.5;  // hasInstance ncit:C25636
  Kc = 0.5;  // hasProperty ncit:C64638
  vi = 0.05;  // hasProperty ncit:C25636
  vd = 0.25;  // hasProperty ncit:C25636
  Kd = 0.02;  // hasProperty ncit:C64638
  K1 = 0.01;  // hasProperty ncit:C64638
  K2 = 0.01;  // hasProperty ncit:C64638
  K3 = 0.01;  // hasProperty ncit:C64638
  K4 = 0.01;  // hasProperty ncit:C64638
  kd = 0.01;  // hasProperty ncit:C94967

  // Assignment rules:
  V1 := C/(Kc + C)*VM1;
  V3 := M*VM3;

  // Reactions:
  Cyclin_synthesis: => C; compartment*Constant_flux__irreversible(vi);  // hasProperty ncit:C61408
  Cyclin_degradation: C => ; compartment*function_for_C_decay(vd, X, C, Kd);  // modifiers: X; hasProperty ncit:C61559
  Cyclin_decay: C => ; compartment*kd*C;  // hasProperty ncit:C75947
  Cdc2_kinase_activation: => M; compartment*function_for_synthesis(V1, M, K1);  // hasProperty ncit:C64382
  Cdc2_kinase_inactivation: M => ; compartment*function_for_decay(V2, M, K2);
  X_activation: => X; compartment*function_for_synthesis(V3, X, K3);  // hasProperty ncit:C64382
  X_inactivation: X => ; compartment*function_for_decay(V4, X, K4);

  // Unit definitions:
  unit volume = 1e-3 litre;
  unit time = 60 second;
  unit substance = 1e-3 mole;
end
