// SBML level 2 version 4
// dcterms:bibliographicCitation: http://identifiers.org/pubmed/9785481

function equation_for_Tumor_Growth(r2, b, Tumor)
  r2*(1 - b*Tumor)*Tumor;
end

function equation_for_Tumor_Killing(a, E, T, g2)
  a*E*T/(g2 + T);
end

function equation_for_immune_cell_activation(s1, c, T, p1, E, IL, g1_IL)
  s1 + c*T + p1*E*IL/g1_IL;
end

function Euuation_for_IL2_Production(s2, p2, E, T, g3)
  s2 + p2*E*T/(g3 + T);
end

model Kirschner1998_Immunotherapy_Tumour()
  // biomodels.db:MODEL1006230038 biomodels.db:BIOMD0000000732
  // hasPart ncit:C153548
  // biomodels.db:MODEL1006230038
  // isVersionOf GO:0002347
  // hasProperty mamo:MAMO_0000046
  // hasTaxon taxonomy:9606

  // Compartments:
  compartment COMpartment = 1; COMpartment is "Microenvr";  // isVersionOf ncit:C94498

  // Species:
  species $Source in COMpartment = 0;
  species Tumor in COMpartment = 1;  // isVersionOf EFO:0000616
  species $Sink in COMpartment = 0;
  species IL2 in COMpartment = 0;  // uniprot:P60568
  species Immune_cells in COMpartment = 0;  // hasPart BTO:0000801; hasPart BTO:0000914; hasPart BTO:0000289; isVersionOf ncit:C132890

  // Parameters:
  tau = 1 unit_0;
  mu2 = 0.03 unit_0;
  c = 0.035 unit_0;
  p1 = 0.1245 unit_0;
  g1 = 20000000 unit_1;
  s1 = 0 unit_0;
  r2 = 0.18 unit_0;
  a = 1 unit_0;
  b = 1e-9 unit_1;
  g2 = 100000 unit_1;
  mu3 = 10 unit_0;
  p2 = 5 unit_0;
  g3 = 1000 unit_1;
  s2 = 0 unit_0;

  // Reactions:
  Tumor_growth: $Source => Tumor; COMpartment*equation_for_Tumor_Growth(r2, b, Tumor);
  Tumor_Killing: Tumor => $Sink; COMpartment*equation_for_Tumor_Killing(a, Immune_cells, Tumor, g2);  // modifiers: Immune_cells; hasProperty GO:0001906
  Immune_cell_Activation: $Source => Immune_cells; COMpartment*equation_for_immune_cell_activation(s1, c, Tumor, p1, Immune_cells, IL2, g1);  // modifiers: Tumor, IL2
  Immune_cell_Utilization: Immune_cells => $Sink; COMpartment*mu2*Immune_cells;
  IL2_Synthesis: $Source => IL2; COMpartment*Euuation_for_IL2_Production(s2, p2, Immune_cells, Tumor, g3);  // modifiers: Immune_cells, Tumor
  IL2_Degradation: IL2 => $Sink; COMpartment*mu3*IL2;

  // Unit definitions:
  unit time = 86400 second;
  unit unit_0 = 1 / (8640 second); unit_0 is "1/d";
  unit unit_1 = litre; unit_1 is "l";
end
