// SBML level 2 version 4

function Constant_flux__irreversible(v)
  v;
end
Constant_flux__irreversible is "Constant flux (irreversible)";

function naive_tcells_degradation(Dn, Tn, Kn, C, n)
  Dn*Tn + Kn*Tn*(C/(C + n));
end

function eff_tcells_production(An, Kn, Tn, C, n, Ae, Te)
  An*Kn*Tn*(C/(C + n)) + Ae*Te*(C/(C + n));
end

function eff_tcells_degradation(De, Te, gammaE, C)
  De*Te + gammaE*C*Te;
end

function Tumor_growth_equation(Rc, C, Cmax)
  Rc*C*ln(Cmax/C);
end

function Tumor_killing_equation(Dc, C, gammaC, Te)
  Dc*C - gammaC*C*Te;
end

model Moore_2004()
  // Moore_2004_Mathematical model for CML and T cell interaction
  // Its a mathematical model depicting CML (chronic myelogenous leukemia) interaction with T cells and impact of T cell activations on CML progression over time.
  // biomodels.db:MODEL1902200001 biomodels.db:BIOMD0000000733
  // hasProperty GO:0002424
  // hasProperty ncit:C15262
  // hasProperty ncit:C153548
  // hasProperty GO:0002419
  // isPropertyOf mamo:MAMO_0000046

  // Compartments:
  compartment TumorMicroenvr = 1;  // isVersionOf ncit:C94498

  // Species:
  species naive_Tcells in TumorMicroenvr = 1510;  // isVersionOf ncit:C104081
  species eff_Tcells in TumorMicroenvr = 20;  // isVersionOf ncit:C104083
  species tumor_cells in TumorMicroenvr = 10000;  // isVersionOf efo:0000616

  // Parameters:
  Sn = 0.37 unit_0;
  n = 720 unit_1;
  Kn = 0.062 unit_2;
  De = 0.3 unit_2;
  gamma_E = 0.057 unit_3;
  An = 0.14 unit_4;
  Ae = 0.98 unit_2;
  Dn = 0.23 unit_2;
  Rc = 0.0057 unit_2;
  Cmax = 230000 unit_1;
  Dc = 0.024 unit_2;
  gamma_C = 0.0034 unit_3;

  // Reactions:
  Naive_Tcells_production: => naive_Tcells; TumorMicroenvr*Constant_flux__irreversible(Sn);
  Naive_Tcells_degradation: naive_Tcells => ; TumorMicroenvr*naive_tcells_degradation(Dn, naive_Tcells, Kn, tumor_cells, n);  // modifiers: tumor_cells
  eff_Tcells_production: => eff_Tcells; TumorMicroenvr*eff_tcells_production(An, Kn, naive_Tcells, tumor_cells, n, Ae, eff_Tcells);  // modifiers: naive_Tcells, tumor_cells
  eff_Tcells_degradation: eff_Tcells => ; TumorMicroenvr*eff_tcells_degradation(De, eff_Tcells, gamma_E, tumor_cells);  // modifiers: tumor_cells
  Tumor_growth: => tumor_cells; TumorMicroenvr*Tumor_growth_equation(Rc, tumor_cells, Cmax);
  Tumor_killing: tumor_cells => ; TumorMicroenvr*Tumor_killing_equation(Dc, tumor_cells, gamma_C, eff_Tcells);  // modifiers: eff_Tcells; hasProperty GO:0001906

  // Unit definitions:
  unit time = 86400 second;
  unit substance = 1e-3 mole;
  unit unit_0 = 1e-3 mole / (litre * 8640 second); unit_0 is "mmol/(l*d)";
  unit unit_1 = 1e-3 mole / litre; unit_1 is "mmol/l";
  unit unit_2 = 1 / (8640 second); unit_2 is "1/d";
  unit unit_3 = litre / (1e-3 mole * 8640 second); unit_3 is "l/(mmol*d)";
  unit unit_4 = dimensionless^0; unit_4 is "dimensionless";
end
