// SBML level 3 version 1
// dcterms:bibliographicCitation: http://identifiers.org/pubmed/29554938

function Constant_flux__irreversible_0(v)
  v;
end
Constant_flux__irreversible_0 is "Constant flux (irreversible)";

function tumor_killing_1(NI, NT, dt, hi)
  dt*NT*NI/(hi + NI);
end

function tumor_growth_1(NT, kgr)
  kgr*NT;
end

function CA125_secretion_1(NT, ft, rt)
  ft*rt*NT;
end

function IL7_secretion_1(NI, firi)
  firi*NI;
end

function immune_cell_growth_1(M, NI, NT, ai)
  ai*NT*(1 - NI/M);
end

model Eftimie2018___Cancer_and_Immune_biomarkers()
  // Eftimie2018 - Cancer and Immune biomarkers
  // The paper describes a model on the detection of cancer based on cancer and immune biomarkers.
  // Created by COPASI 4.25 (Build 207)
  // This model is described in the article:
  // Improving cancer detection through combinations of cancer and immune biomarkers: a modelling approach
  // Raluca Eftimie and and Esraa Hassanein
  // J Transl Med (2018) 16:73
  // Abstract:
  // Background: Early cancer diagnosis is one of the most important challenges of cancer research, since in many can- cers it can lead to cure for patients with early stage diseases. For epithelial
  // ovarian cancer (which is the leading cause of death among gynaecologic malignancies) the classical detection approach is based on measurements of CA-125 biomarker. However, the poor sensitivity and
  // specificity of this biomarker impacts the detection of early-stage cancers.
  // Methods: Here we use a computational approach to investigate the effect of combining multiple biomarkers for ovarian cancer (e.g., CA-125 and IL-7), to improve early cancer detection.
  // Results: We show that this combined biomarkers approach could lead indeed to earlier cancer detection. However, the immune response (which influences the level of secreted IL-7 biomarker) plays an
  // important role in improving and/or delaying cancer detection. Moreover, the detection level of IL-7 immune biomarker could be in a range that would not allow to distinguish between a healthy state
  // and a cancerous state. In this case, the construction of solu- tion diagrams in the space generated by the IL-7 and CA-125 biomarkers could allow us predict the long-term evolu- tion of cancer
  // biomarkers, thus allowing us to make predictions on cancer detection times.
  // Conclusions: Combining cancer and immune biomarkers could improve cancer detection times, and any predic- tions that could be made (at least through the use of CA-125/IL-7 biomarkers) are patient
  // specific.
  // Keywords: Ovarian cancer, Mathematical model, CA-125 biomarker, IL-7 biomarker, Cancer detection times
  // This model is hosted on BioModels Database and identified by: MODEL1907050002.
  // To cite BioModels Database, please use: BioModels Database: An enhanced, curated and annotated resource for published quantitative kinetic models.
  // To the extent possible under law, all copyright and related or neighbouring rights to this encoded model have been dedicated to the public domain worldwide.
  // Please refer to CC0 Public Domain Dedication for more information.
  // biomodels.db:MODEL1907050002 biomodels.db:BIOMD0000000741
  // isDescribedBy pubmed:29554938
  // isVersionOf GO:0002418
  // occursIn BTO:0000975
  // hasProperty efo:0001075
  // hasProperty mamo:MAMO_0000046
  // model units - substance: substance, time: time, volume: volume, area: area, length: length, extent: substance

  // Compartments:
  compartment compartment = 1 volume;  // isVersionOf ncit:C94498

  // Species:
  // tumor cell
  species NT in compartment = 1;  // CL:0001064; ncit:C12917
  // immune cell
  species NI in compartment = 0;  // isVersionOf CL:0000542; isVersionOf ncit:C12535
  // tumor plasma biomarker CA125 in U
  species BT in compartment = 0;  // uniprot:Q8WXI7; isVersionOf ncit:C16342
  // immune biomarker IL7 in pg
  species BI in compartment = 0;  // uniprot:P13232; isVersionOf ncit:C16342

  // Parameters:
  // healthy cell shedding influx of CA125, u/d
  fhtrhtnh = 4560 unit_0;
  // fraction of tumor biomarker entering vasculature
  ft = 0.1 unit_1;
  // biomarker shedding rate per tumor cell, u/d/cell
  rt = 4.5e-5 unit_0;
  // const. level of healthy cells shedding tumor biomarker
  nh = 0 unit_1;
  // growth rate of tumor cell population
  kgr = 0.00578 unit_0;
  // elimination rate of tumor biomarker from plasma
  ket = 0.11 unit_0;  // isPropertyOf ncit:C40678; isPropertyOf ncit:C40678
  // cutoff limit of tumor biomarker
  cca has unit_1;  // isHomologTo ncit:C105701
  // detection limit of tumor biomarker
  dca has unit_1;  // isVersionOf ncit:C105701
  // mean plasma volume in 70y female patient
  vpl = 3150 unit_2;
  // CD8+ T cell doubling time
  ai = 2.0794 unit_0;  // isVersionOf ncit:C94346
  // IL7 half life
  kei = 2.14 unit_0;
  // carrying capacity of immune cells
  M = 1000000000 unit_1;
  // influx of IL7 from immune cells into vasculature pg/ml/cell/d
  firi = 1.0925e-6 unit_0;
  // 1.9548e4 for low shedding, 7.1724e4 for high shedding
  // healthy cells shedding influx of IL7, pg/d
  fhirhinh = 19548 unit_0;
  // 3.8 for low threshold, 18 for high threshold
  // cutoff limit of IL7
  cil has unit_1;  // isHomologTo ncit:C105701
  // detection limit of Il7
  dil has unit_1;  // isVersionOf ncit:C105701
  // cutoff limit of IL7 assay, pg/ml conc
  cil_conc = 3.8 unit_3; cil_conc is "cil-conc";  // isHomologTo ncit:C105701
  // detection limit of IL7, pg/ml conc
  dil_conc = 1 unit_3; dil_conc is "dil-conc";  // isVersionOf ncit:C105701
  // cutoff limit of biomarker assay, u/ml conc
  cca_conc = 34.11 unit_3; cca_conc is "cca-conc";  // isHomologTo ncit:C105701
  // detection limit of biomarker assay, u/ml conc
  dca_conc = 1.5 unit_3; dca_conc is "dca-conc";  // isVersionOf ncit:C105701
  // CD8+ T cells half life
  di = 0.4 unit_0;
  // killing rate of tumor cell by effector cells
  dt = 1e-6 unit_0;  // isPropertyOf GO:0001909; isPropertyOf GO:0001909
  // half saturation const of immune cells generating anti-tumor response
  // has no affect on detection date, arbitrarily taken as 1000
  hi = 1000 unit_1;
  Initial_for_cca_conc = cca_conc; Initial_for_cca_conc is "Initial for cca-conc";
  Initial_for_cil_conc = cil_conc; Initial_for_cil_conc is "Initial for cil-conc";
  Initial_for_dca_conc = dca_conc; Initial_for_dca_conc is "Initial for dca-conc";
  Initial_for_dil_conc = dil_conc; Initial_for_dil_conc is "Initial for dil-conc";
  Initial_for_vpl = vpl;

  // Assignment rules:
  cca := Initial_for_cca_conc*Initial_for_vpl;
  dca := Initial_for_dca_conc*Initial_for_vpl;
  cil := Initial_for_cil_conc*Initial_for_vpl;
  dil := Initial_for_dil_conc*Initial_for_vpl;

  // Reactions:
  tumor_growth: => NT; compartment*tumor_growth_1(NT, kgr);  // isVersionOf GO:0008283
  tumor_killing: NT => ; compartment*tumor_killing_1(NI, NT, dt, hi);  // modifiers: NI; isVersionOf GO:0001909
  immune_cell_growth: => NI; compartment*immune_cell_growth_1(M, NI, NT, ai);  // modifiers: NT; isVersionOf GO:0008283
  immune_cell_decay: NI => ; compartment*di*NI; immune_cell_decay is "immune cell death";  // isVersionOf GO:0008219
  CA125_shedding_natural: => BT; compartment*Constant_flux__irreversible_0(fhtrhtnh); CA125_shedding_natural is "CA125 secretion from normal cells";  // isVersionOf GO:0046903
  CA125_decay: BT => ; compartment*ket*BT;
  CA125_secretion: => BT; compartment*CA125_secretion_1(NT, ft, rt); CA125_secretion is "CA125 secretion from cancer cells";  // modifiers: NT; isVersionOf GO:0046903
  IL7_shedding_natural: => BI; compartment*Constant_flux__irreversible_0(fhirhinh); IL7_shedding_natural is "IL7 secretion from non-immune cells";  // isVersionOf GO:0050663
  IL7_decay: BI => ; compartment*kei*BI;
  IL7_secretion: => BI; compartment*IL7_secretion_1(NI, firi); IL7_secretion is "IL7 secretion from immune cells";  // modifiers: NI; isVersionOf GO:0050663

  // Unit definitions:
  unit length = metre;
  unit area = metre^2;
  unit volume = 1e-3 litre;
  unit time = 86400 second;
  unit substance = 1e-3 mole;
  unit unit_0 = 1 / (1000 second); unit_0 is "1/ks";
  unit unit_1 = dimensionless^0;
  unit unit_2 = 1e-3 litre; unit_2 is "ml";
  unit unit_3 = 1 / (1e-3 litre); unit_3 is "1/ml";
end
