// SBML level 3 version 1
// dcterms:bibliographicCitation: http://identifiers.org/doi/10.1101/498741

function t_k_1(E, T, k)
  k*T*E;
end
t_k_1 is "t-k_1";

function t_g_1(T, a)
  a*T;
end
t_g_1 is "t-g_1";

function i_s_1(E, T, m)
  m*E*T;
end
i_s_1 is "i-s_1";

function t_d_1(T, a, b)
  a*b*T*T;
end
t_d_1 is "t-d_1";

function Constant_flux__irreversible(v)
  v;
end
Constant_flux__irreversible is "Constant flux (irreversible)";

model Garcia2018basic___cancer_and_immune_cell_count_basic_model()
  // Garcia2018basic - cancer and immune cell count basic model
  // The paper describes a basic model of immune-tumor cell interactions.
  // Created by COPASI 4.25 (Build 207)
  // This model is described in the article:
  // Cancer-Induced Immunosuppression can enable Effectiveness of Immunotherapy through Bistability Generation: a mathematical and computational Examination
  // Victor Garcia, Sebastian Bonhoeffer and Feng Fu
  // bioRxiv, 2018
  // Abstract: Cancer immunotherapies rely on how interactions between cancer and immune system cells are constituted. The more essential to the emergence of the dynamical behavior of cancer growth these
  // are, the more effectively they may be used as mechanisms for interventions. Mathematical modeling can help unearth such connections, and help explain how they shape the dynamics of cancer growth.
  // Here, we explored whether there exist simple, consistent properties of cancer-immune system interaction (CISI) models that might be harnessed to devise effective immunotherapy approaches. We did this
  // for a family of three related models of increasing complexity. To this end, we developed a base model of CISI, which captures some essential features of the more complex models built on it. We find
  // that the base model and its derivates can reproduce biologically plausible behavior. This behavior is consistent with situations in which the suppressive effects exerted by cancer cells on immune
  // cells dominate their proliferative effects. Under these circumstances, the model family may display a pattern of bistability, where two distinct, stable states (a cancer-free, and a full-grown cancer
  // state) are possible, consistent with the notion of an immunological barrier. Increasing the effectiveness of immune-caused cancer cell killing may remove the basis for bistability, and abruptly tip
  // the dynamics of the system into cancer-free state. In combination with the administration of immune effector cells, modifications in cancer cell killing may also be harnessed for immunotherapy
  // without resolving the bistability. We use these ideas to test immunotherapeutic interventions in silico in a stochastic version of the base model. This bistability-reliant approach to cancer
  // interventions might offer advantages over those that comprise gradual declines in cancer cell numbers.
  // This model is hosted on BioModels Database and identified by: MODEL1907050005.
  // To cite BioModels Database, please use: BioModels Database: An enhanced, curated and annotated resource for published quantitative kinetic models .
  // To the extent possible under law, all copyright and related or neighbouring rights to this encoded model have been dedicated to the public domain worldwide.
  // Please refer to CC0 Public Domain Dedication for more information.
  // biomodels.db:MODEL1907050005 biomodels.db:BIOMD0000000742
  // isDescribedBy doi:10.1101/498741
  // isVersionOf GO:0002418
  // hasProperty mamo:MAMO_0000046
  // hasTaxon taxonomy:9606
  // hasProperty mamo:MAMO_0000046
  // model units - substance: substance, time: time, volume: volume, area: area, length: length, extent: substance

  // Compartments:
  compartment Tumor = 1 volume; Tumor is "Tumor microenvironment";  // isVersionOf ncit:C94498

  // Species:
  species T in Tumor = 100;  // isVersionOf CL:0001063
  species E in Tumor = 1000;  // isVersionOf ncit:C28241; isVersionOf CL:0000738

  // Parameters:
  // maximum replication rate of cancer cells
  a = 0.514 unit_0;
  // inverse carrying capacity of tumor
  b = 1.02e-9 unit_1;
  // 1e-4 to 10
  // killing efficiency of immune cells
  k = 0.0001 unit_0;  // isPropertyOf GO:0001906; isPropertyOf GO:0001906
  // replenishment rate of immune cells
  s = 10 unit_0;
  // to 1e-6
  // maximum immune cell proliferation rate
  m = -1e-6 unit_0;
  // immune cell death rate
  d = 0.02 unit_0;  // isPropertyOf GO:0008219; isPropertyOf GO:0008219

  // Reactions:
  tumor_growth: => T; Tumor*t_g_1(T, a);  // isVersionOf GO:0008283
  tumor_death: T => ; Tumor*t_d_1(T, a, b);  // isVersionOf GO:0008219
  tumor_killing: T => ; Tumor*t_k_1(E, T, k);  // modifiers: E; isVersionOf GO:0002418; isVersionOf GO:0001909
  immune_cell_death: E => ; Tumor*d*E;  // isVersionOf GO:0008219
  immune_cell_growth: => E; Tumor*Constant_flux__irreversible(s);  // isVersionOf GO:0046651
  immune_stimulation: => E; Tumor*i_s_1(E, T, m);  // modifiers: T; isVersionOf GO:0046651

  // Unit definitions:
  unit length = metre;
  unit area = metre^2;
  unit volume = 1e-3 litre;
  unit time = 86400 second;
  unit substance = 1e-3 mole;
  unit unit_0 = 1 / (1000 second); unit_0 is "1/ks";
  unit unit_1 = dimensionless^0;
end
