// SBML level 3 version 1
// dcterms:bibliographicCitation: urn:miriam:pubmed:30843136

function PCC_growth_0(r1, x, b1)
  r1*x*(1 - x*b1);
end

function PCC_death_0(delta1, x, z, m1, w)
  delta1*x*z/(m1 + w);
end

function PCC_activation_by_PSC_0(beta1, y, x, b1)
  beta1*y*x*(1 - x*b1);
end

function PSC_growth_0(r2, y, b2)
  r2*y*(1 - b2*y);
end

function PSC_activation_by_tp_cytokine_0(beta2, w, k2, y, b2)
  beta2*w/(k2 + w)*y*(1 - b2*y);
end

function PSC_death_0(u2, y)
  u2*y;
end

function effector_production_0(beta3, z, v, k3, m3, w)
  beta3*z*v/((k3 + v)*(m3 + w));
end

function effector_death_0(u3, z)
  u3*z;
end

function effector_prolif_0(r3)
  r3;
end
effector_prolif_0 is "effector prolif.";

function tp_production(beta4, x, z, k4)
  beta4*x*z/(k4 + x);
end

function tp_decay_0(u4, w)
  u4*w;
end

function tp_by_PSC(r4, x, y, m4, v)
  r4*x*y/(m4 + v);
end

function ts_production_0(beta5, x, z, k5)
  beta5*x*z/(k5 + x);
end

function ts_decay_0(u5, v)
  u5*v;
end

model Hu2019___Pancreatic_cancer_dynamics()
  // Hu2019 - Pancreatic cancer dynamics
  // The paper describes a model on the size of pancreatic tumour.
  // Created by COPASI 4.25 (Build 207)
  // This model is described in the article:
  // Modeling Pancreatic Cancer Dynamics with Immunotherapy
  // Xiaochuan Hu, Guoyi Ke and Sophia R.-J. Jang
  // Bulletin of Mathematical Biology (2019) 81:1885–1915
  // Abstract:
  // We develop a mathematical model of pancreatic cancer that includes pancreatic cancer cells, pancreatic stellate cells, effector cells and tumor-promoting and tumor- suppressing cytokines to
  // investigate the effects of immunotherapies on patient survival. The model is first validated using the survival data of two clinical trials. Local sen- sitivity analysis of the parameters indicates
  // there exists a critical activation rate of pro-tumor cytokines beyond which the cancer can be eradicated if four adoptive trans- fers of immune cells are applied. Optimal control theory is explored
  // as a potential tool for searching the best adoptive cellular immunotherapies. Combined immunother- apies between adoptive ex vivo expanded immune cells and TGF-β inhibition by siRNA treatments are
  // investigated. This study concludes that mono-immunotherapy is unlikely to control the pancreatic cancer and combined immunotherapies between anti-TGF-β and adoptive transfers of immune cells can
  // prolong patient survival. We show through numerical explorations that how these two types of immunotherapies are scheduled is important to survival. Applying TGF-β inhibition first followed by
  // adoptive immune cell transfers can yield better survival outcomes.
  // This model is hosted on BioModels Database and identified by: MODEL1907050003.
  // To cite BioModels Database, please use: BioModels Database: An enhanced, curated and annotated resource for published quantitative kinetic models .
  // To the extent possible under law, all copyright and related or neighbouring rights to this encoded model have been dedicated to the public domain worldwide.
  // Please refer to CC0 Public Domain Dedication for more information.
  // biomodels.db:MODEL1907050003 biomodels.db:BIOMD0000000744
  // isDescribedBy pubmed:30843136
  // isVersionOf GO:0002418
  // occursIn BTO:0000988
  // hasProperty efo:0002618
  // hasProperty mamo:MAMO_0000046
  // model units - substance: substance, time: time, volume: volume, area: area, length: length, extent: substance

  // Compartments:
  compartment Pancreatic_tumor = 1 volume;  // isVersionOf BTO:0000988; isVersionOf ncit:C94498

  // Species:
  // PCC population
  species x in Pancreatic_tumor = 1000000000;  // isVersionOf ncit:C12917; isVersionOf CL:0001064
  // PSC population
  species y in Pancreatic_tumor = 5600000;  // ncit:C107531; CL:0002410
  // effector cells: CTL and NK
  // init. low: 1.3e8
  // median: 1.9e8
  // high: 2.56e8
  species z in Pancreatic_tumor = 190000000;  // hasVersion ncit:C12536; hasVersion ncit:C12542
  // conc. of tumor-promoting cytokine
  // pg/ml
  species w in Pancreatic_tumor = 50000;  // isVersionOf ncit:C20464
  // conc. of tumor-suppressing cytokine
  // pg/ml
  species v in Pancreatic_tumor = 9.4;  // isVersionOf ncit:C20464

  // Parameters:
  // intrinsic growth rate of PCC
  r1 = 0.0195 unit_0;
  // reciprocal of carrying capacity of PCC
  b1 = 1.02e-11 unit_1;
  // maximum activation rate of PCC due to PSC
  beta1 = 3.482115e-12 unit_0;  // isVersionOf ncit:C94967
  // conc. of tp cytokines at half-maximum of inhibition
  m1 = 100000000 unit_1;
  // maximum killing rate of pcc by effector cells
  delta1 = 0.96 unit_0;  // isVersionOf ncit:C94967; isPropertyOf GO:0001909
  // intrinsic growth rate of PSC
  r2 = 0.00195 unit_0;
  // maximum activation rate of PSC due to tp cytokine
  beta2 = 0.125 unit_0;  // isVersionOf ncit:C94967
  // half saturation const. of PSC activation rate
  k2 = 5.6e10 unit_1;
  // reciprocal of carrying capacity of PSC
  b2 = 1.7857e-9 unit_1;
  // natural death rate of psc
  u2 = 0.015 unit_0;  // isVersionOf ncit:C94967; isPropertyOf GO:0008219
  // maximum production rate of effector cells
  beta3 = 124.5 unit_0;  // isVersionOf ncit:C94967
  // half saturation const. of effector cell production rate
  k3 = 2e10 unit_1;
  // conc. of tp cytokines at half maximum of inhibition
  m3 = 1000000 unit_1;
  // natural prolif. rate of effector cell
  r3 = 3500 unit_0;
  // apoptosis rate of effector cells
  u3 = 0.02 unit_0;  // isVersionOf GO:0008219; isVersionOf ncit:C94967
  // maximum production rate of tp cytokine
  beta4 = 5.85 unit_0;  // isVersionOf ncit:C94967; isPropertyOf GO:0001816
  // half saturation const. of tp cytokine production
  k4 = 1000000 unit_1;
  // decay rate of tp cytokines
  u4 = 0.034 unit_0;  // isVersionOf ncit:C94967; isPropertyOf ncit:C40678
  // maximum production rate of tumor-promoting cytoking
  r4 = 12500 unit_0;  // isVersionOf GO:0001816
  // conc. of ts cytokines at half-maximum of inhibition
  m4 = 8.9e10 unit_1;
  // maximum production rate of ts cytokine
  beta5 = 7.3 unit_0;  // isVersionOf ncit:C94967; isPropertyOf GO:0001816
  // half saturation const. of ts cytokine production
  k5 = 1000000 unit_1;
  // decay rate of ts cytokines
  u5 = 0.034 unit_0;  // isVersionOf ncit:C94967; isPropertyOf ncit:C40678

  // Reactions:
  PCC_growth: => x; Pancreatic_tumor*PCC_growth_0(r1, x, b1);  // isVersionOf GO:0008283
  PCC_activation_by_PSC: => x; Pancreatic_tumor*PCC_activation_by_PSC_0(beta1, y, x, b1);  // modifiers: y; isVersionOf GO:0008283
  PCC_death: x => ; Pancreatic_tumor*PCC_death_0(delta1, x, z, m1, w);  // modifiers: z, w; isVersionOf GO:0008219
  PSC_growth: => y; Pancreatic_tumor*PSC_growth_0(r2, y, b2);  // isVersionOf GO:0008283
  PSC_activation_by_tp_cytokine: => y; Pancreatic_tumor*PSC_activation_by_tp_cytokine_0(beta2, w, k2, y, b2);  // modifiers: w; isVersionOf GO:0008283
  PSC_death: y => ; Pancreatic_tumor*PSC_death_0(u2, y);  // isVersionOf GO:0008219
  effector_production: => z; Pancreatic_tumor*effector_production_0(beta3, z, v, k3, m3, w);  // modifiers: v, w; isVersionOf GO:0046651
  effector_prolif: => z; Pancreatic_tumor*effector_prolif_0(r3); effector_prolif is "effector prolif.";  // isVersionOf GO:0046651
  effector_death: z => ; Pancreatic_tumor*effector_death_0(u3, z);  // isVersionOf GO:0008219
  tp_cytokine_production: => w; Pancreatic_tumor*tp_production(beta4, x, z, k4);  // modifiers: x, z; isVersionOf GO:0001816
  tp_decay: w => ; Pancreatic_tumor*tp_decay_0(u4, w);  // isVersionOf ncit:C40678
  tp_stimulation_by_PSC: => w; Pancreatic_tumor*tp_by_PSC(r4, x, y, m4, v);  // modifiers: x, y, v; isVersionOf GO:0001816
  ts_production: => v; Pancreatic_tumor*ts_production_0(beta5, x, z, k5);  // modifiers: x, z; isVersionOf GO:0001816
  ts_decay: v => ; Pancreatic_tumor*ts_decay_0(u5, v);  // isVersionOf ncit:C40678

  // Unit definitions:
  unit length = metre;
  unit area = metre^2;
  unit volume = 1e-3 litre;
  unit time = 86400 second;
  unit substance = 1e-3 mole;
  unit unit_0 = 1 / (8640 second); unit_0 is "1/d";
  unit unit_1 = dimensionless^0;
end
