// SBML level 3 version 1
// dcterms:bibliographicCitation: urn:miriam:pubmed:30239754

function t_d_1(I, T, ut)
  ut*T*I;
end
t_d_1 is "t-d_1";

function i__1(N, V, an, av)
  av*V + an*N;
end
i__1 is "i+_1";

function t_g_1(H, T, g, rho)
  g*T*(rho*H + 1);
end
t_g_1 is "t-g_1";

function i__1_0(I, N, T, V, an, av, ui)
  av*V*I + an*N*I + ui*I*T;
end
i__1_0 is "i-_1";

function v__1(I, T, ai, at)
  at*T + ai*I;
end
v__1 is "v+_1";

function v__1_0(I, T, V, ai, at, uv)
  at*T*V + ai*I*V + uv*V*T;
end
v__1_0 is "v-_1";

function n__1(N, V, beta)
  beta + beta*V*N;
end
n__1 is "n+_1";

function n__1_0(I, N, V, beta, un)
  beta*V + beta*N + un*N*I;
end
n__1_0 is "n-_1";

function h__1(H, V, delta, gamma)
  gamma*delta*H + gamma*V*H*H;
end
h__1 is "h+_1";

function h__1_0(H, V, delta, gamma)
  gamma*delta*H*H + gamma*V*H;
end
h__1_0 is "h-_1";

model Jarrett2018___trastuzumab_induced_immune_response_in_murine_HER2__breast_cancer_model_1()
  // Jarrett2018 - trastuzumab-induced immune response in murine HER2+ breast cancer model
  // The paper describes a model on the trastuzumab-induced immune response in murine(mouse) HER2+ breast cancer.
  // Created by COPASI 4.25 (Build 207)
  // This model is described in the article: Mathematical modelling of trastuzumab-induced immune response in an in vivo murine model of HER2+ breast cancer
  // Angela M. Jarrett, Meghan J. Bloom, Wesley Godfrey, Anum K. Syed, David A. Ekrut, Lauren I. Ehrlich, Thomas E. Yankeelov, Anna G. Sorace
  // Mathematical Medicine and Biology: A Journal of the IMA (2018) 00, 1–30
  // Abstract:
  // The goal of this study is to develop an integrated, mathematical–experimental approach for understanding the interactions between the immune system and the effects of trastuzumab on breast cancer
  // that overexpresses the human epidermal growth factor receptor 2 (HER2+). A system of coupled, ordinary differential equations was constructed to describe the temporal changes in tumour growth, along
  // with intratumoural changes in the immune response, vascularity, necrosis and hypoxia. The mathematical model is calibrated with serially acquired experimental data of tumour volume, vascularity,
  // necrosis and hypoxia obtained from either imaging or histology from a murine model of HER2+ breast cancer. Sensitivity analysis shows that model components are sensitive for 12 of 13 parameters, but
  // accounting for uncertainty in the parameter values, model simulations still agree with the experimental data. Given theinitial conditions, the mathematical model predicts an increase in the immune
  // infiltrates over time in the treated animals. Immunofluorescent staining results are presented that validate this prediction by showing an increased co-staining of CD11c and F4/80 (proteins expressed
  // by dendritic cells and/or macrophages) in the total tissue for the treated tumours compared to the controls. We posit that the proposed mathematical–experimental approach can be used to elucidate
  // driving interactions between the trastuzumab-induced responses in the tumour and the immune system that drive the stabilization of vasculature while simultaneously decreasing tumour growth—c
  // onclusions revealed by the mathematical model that were not deducible from the experimental data alone.
  // This model is hosted on BioModels Database and identified by: MODEL1907050004.
  // To cite BioModels Database, please use: BioModels Database: An enhanced, curated and annotated resource for published quantitative kinetic models .
  // To the extent possible under law, all copyright and related or neighbouring rights to this encoded model have been dedicated to the public domain worldwide.
  // Please refer to CC0 Public Domain Dedication for more information.
  // biomodels.db:MODEL1907050004 biomodels.db:BIOMD0000000745
  // isDescribedBy pubmed:30239754
  // isVersionOf GO:0002418
  // occursIn BTO:0000149
  // hasProperty mamo:MAMO_0000046
  // hasProperty efo:0000305
  // model units - substance: substance, time: time, volume: volume, area: area, length: length, extent: substance

  // Compartments:
  compartment tumor = 1 volume; tumor is "breast tumor";  // isVersionOf ncit:C94498

  // Species:
  // volume of tumor in ml
  species T in tumor = 0.2;  // isVersionOf ncit:C94515
  // fraction of immune response
  species I in tumor = 0.071;  // isVersionOf GO:0002418
  // fraction of vascular delivery
  species V in tumor = 0.12;
  // fraction of necrosis
  species N in tumor = 0.1;  // isVersionOf GO:0070265
  // fraction of hypoxia
  // normal tissue 0
  species H in tumor = 0.18;  // isVersionOf ncit:C3890

  // Parameters:
  // tumor volume growth rate
  g = 0.044 unit_0;  // isPropertyOf GO:0008283; isPropertyOf GO:0008283
  // Rate immune response increases due to necrosis
  an = 0.2 unit_0;  // isVersionOf ncit:C94967; isPropertyOf GO:0050778; isPropertyOf GO:0050778
  // Rate immune response increases due to vascular delivery
  av = 0.199 unit_0;  // isVersionOf ncit:C94967; isPropertyOf GO:0050778; isPropertyOf GO:0050778
  // Rate tumour volume decreases due to immune response
  ut = 0.187 unit_0;  // isVersionOf ncit:C94967; isPropertyOf GO:0002418; isPropertyOf GO:0002418
  // Rate immune response decreases per tumour volume
  ui = 0.722 unit_0;  // isVersionOf ncit:C94967; isPropertyOf GO:0050777; isPropertyOf GO:0050777
  // Rate vascular delivery increases per tumour volume
  at = 0.101 unit_0;  // isVersionOf ncit:C94967; isPropertyOf GO:0010232; isPropertyOf GO:0010232
  // Rate vascular delivery increases due to immune response
  ai = 0.045 unit_0;  // isVersionOf ncit:C94967; isPropertyOf GO:0010232; isPropertyOf GO:0010232
  // Rate vascular delivery decreases per tumour volume
  uv = 1.723 unit_0;  // isVersionOf ncit:C94967
  // Rate of increased necrosis due to decreased vascular delivery
  beta = 0.027 unit_0;  // isVersionOf ncit:C94967; isPropertyOf GO:0070265; isPropertyOf GO:0070265
  // Rate necrosis decreases due to immune response
  un = 0.911 unit_0;  // isVersionOf ncit:C94967; isPropertyOf GO:0070265; isPropertyOf GO:0070265
  // Rate of hypoxia increases/decreases due to vascular delivery
  gamma = 0.743 unit_0;  // isVersionOf ncit:C94967; isPropertyOf ncit:C3890; isPropertyOf ncit:C3890
  // Hypoxia increase/decrease threshold due to vascular delivery
  delta = 0.284 unit_1;  // isVersionOf ncit:C48228; isPropertyOf ncit:C3890; isPropertyOf ncit:C3890
  // Ability of hypoxia to promote tumour growth
  rho = 1.523 unit_1;

  // Reactions:
  tumor_death: T => ; tumor*t_d_1(I, T, ut);  // modifiers: I; isVersionOf GO:0008219; occursIn ncit:C94498
  tumor_growth: => T; tumor*t_g_1(H, T, g, rho);  // modifiers: H; isVersionOf GO:0008283; occursIn ncit:C94498
  immune_stimulation: => I; tumor*i__1(N, V, an, av);  // modifiers: V, N; isVersionOf GO:0050778; occursIn ncit:C94498
  immune_inhibition: I => ; tumor*i__1_0(I, N, T, V, an, av, ui);  // modifiers: V, N, T; isVersionOf GO:0050777; occursIn ncit:C94498
  vasc_increase: => V; tumor*v__1(I, T, ai, at);  // modifiers: T, I; isVersionOf GO:0010232; occursIn ncit:C94498
  vasc_decrease: V => ; tumor*v__1_0(I, T, V, ai, at, uv);  // modifiers: T, I; occursIn ncit:C94498
  necrotise: => N; tumor*n__1(N, V, beta);  // modifiers: V; isVersionOf GO:0070265; occursIn ncit:C94498
  de_necrotise: N => ; tumor*n__1_0(I, N, V, beta, un); de_necrotise is "de-necrotise";  // modifiers: V, I; isDerivedFrom ncit:C94498 GO:0070265; occursIn ncit:C94498; isDerivedFrom GO:0070265
  hypoxia: => H; tumor*h__1(H, V, delta, gamma);  // modifiers: V; occursIn ncit:C94498
  normoxia: H => ; tumor*h__1_0(H, V, delta, gamma);  // modifiers: V; occursIn ncit:C94498

  // Unit definitions:
  unit length = metre;
  unit area = metre^2;
  unit volume = 1e-3 litre;
  unit time = 86400 second;
  unit substance = 1e-3 mole;
  unit unit_0 = 1 / (1e-3 second); unit_0 is "1/ms";
  unit unit_1 = dimensionless^0;
end
