// SBML level 3 version 1
// dcterms:bibliographicCitation: urn:miriam:pubmed:29312460

function effector_activation(a, modifier, E, P, k)
  a*modifier*E/(P + k);
end

function effector_depletion_by_cancer_0(alpha2, E, C)
  alpha2*E*C;
end

function Constant_flux__irreversible(v)
  v;
end
Constant_flux__irreversible is "Constant flux (irreversible)";

function BCG_degradation(alpha3, E, B)
  alpha3*E*B;
end

function cancer_killing_0(alpha1, E, C, P, k)
  alpha1*E*C/(P + k);
end

function cancer_growth_0(r, C)
  r*C;
end

model Saad2017___immune_checkpoint_and_BCG_in_superficial_bladder_cancer()
  // Saad2017 - immune checkpoint and BCG in superficial bladder cancer
  // The paper describes a model on the Dynamics of Immune Checkpoints, Immune System, and BCG in the Treatment of Superficial Bladder Cancer. Created by COPASI 4.25 (Build 207) This model is described in the article: Dynamics of Immune Checkpoints, Immune System, and BCG in the Treatment of Superficial Bladder Cancer Farouk Tijjani Saad, Evren Hincal, and Bilgen Kaymakamzade Computational and Mathematical Methods in Medicine, vol. 2017, no. 3573082 Abstract: This paper aims to study the dynamics of immune suppressors/checkpoints, immune system, and BCG in the treatment of superficial bladder cancer. Programmed cell death protein-1 (PD-1), cytotoxic T-lymphocyte-associated antigen 4 (CTLA4), and transforming growth factor-beta (TGF-b) are some of the examples of immune suppressors/checkpoints. They are responsible for deactivating the immune system and enhancing immunological tolerance. Moreover, they categorically downregulate and suppress the immune system by preventing and blocking the activation of T-cells, which in turn decreases autoimmunity and enhances self- tolerance. In cancer immunotherapy, the immune checkpoints/suppressors prevent and block the immune cells from attacking, spreading, and killing the cancer cells, which leads to cancer growth and development. We formulate a mathematical model that studies three possible dynamics of the treatment and establish the effects of the immune checkpoints on the immune system and the treatment at large. Although the effect cannot be seen explicitly in the analysis of the model, we show it by numerical simulations. This model is hosted on BioModels Database and identified by: MODEL1907100001. To cite BioModels Database, please use: BioModels Database: An enhanced, curated and annotated resource for published quantitative kinetic models. To the extent possible under law, all copyright and related or neighbouring rights to this encoded model have been dedicated to the public domain worldwide. Please refer to CC0 Public Domain Dedication for more information.
  // isDescribedBy pubmed:29312460
  // biomodels.db:MODEL1907100001 biomodels.db:BIOMD0000000746
  // isVersionOf GO:0002418
  // occursIn BTO:0001418
  // hasProperty efo:0000292
  // hasProperty mamo:MAMO_0000046
  // model units - substance: substance, time: time, volume: volume, area: area, length: length, extent: substance

  // Compartments:
  compartment bladder_cancer_tme = 1 volume;  // isVersionOf ncit:C2901; isVersionOf ncit:C94498

  // Species:
  // cancer cell
  species C in bladder_cancer_tme = 100000;  // isVersionOf bto:0000362; isVersionOf CL:0001064
  // effector cell
  species E in bladder_cancer_tme = 0;  // isVersionOf ncit:C28241
  // BCG
  species B in bladder_cancer_tme = 0;  // ncit:C85546
  // immune checkpoint/suppressor
  species P in bladder_cancer_tme = 0;  // hasVersion uniprot:P01137; hasVersion uniprot:P16410; hasVersion uniprot:Q15116

  // Parameters:
  // Tumor growth rate
  r = 0.0033 unit_0;
  // Rate of elimination of cancer cells by effector cells
  alpha1 = 1.1e-7 unit_0;  // isVersionOf ncit:C94967
  // Inhibitory parameter
  k = 2000 unit_1;
  // Recruitment rate of effector cells
  a1 = 0.25 unit_0;
  // Activation rate of effector cells by the BCG
  a2 = 0.052 unit_0;
  // Internal production of immune checkpoints
  delta = 151932 unit_0;
  // Elimination rate of effector cells by cancer cells
  alpha2 = 3.45e-10 unit_0;  // isVersionOf ncit:C94967
  // Degradation rate of effector cells
  u1 = 0.041 unit_0;  // isVersionOf ncit:C94967
  // Rate of BCG decay
  u2 = 0.1 unit_0;  // isVersionOf ncit:C94967
  // Bioeffective concentration of BCG
  b = 650000 unit_0;  // isVersionOf ncit:C41185
  // Destruction of BCG by effector cells
  alpha3 = 1.25e-7 unit_0;  // isVersionOf ncit:C94967
  // Degradation rate of immune checkpoints
  u3 = 166.32 unit_0;  // isVersionOf ncit:C94967

  // Reactions:
  cancer_growth: => C; bladder_cancer_tme*cancer_growth_0(r, C);  // isVersionOf GO:0008283
  cancer_killing: C => ; bladder_cancer_tme*cancer_killing_0(alpha1, E, C, P, k);  // modifiers: E, P; isVersionOf GO:0001909; isVersionOf GO:0008219
  effector_activation_by_cancer: => E; bladder_cancer_tme*effector_activation(a1, C, E, P, k);  // modifiers: C, P; isVersionOf GO:0070661; isVersionOf GO:0008283
  effector_activation_by_BCG: => E; bladder_cancer_tme*effector_activation(a2, B, E, P, k);  // modifiers: B, P; isVersionOf GO:0070661; isVersionOf GO:0008283
  effector_depletion_by_cancer: E => ; bladder_cancer_tme*effector_depletion_by_cancer_0(alpha2, E, C);  // modifiers: C; isVersionOf GO:0008219
  effector_death: E => ; bladder_cancer_tme*u1*E;  // isVersionOf GO:0008219
  BCG_source__therapy: => B; bladder_cancer_tme*Constant_flux__irreversible(b); BCG_source__therapy is "BCG source (therapy)";  // isVersionOf GO:0008283
  BCG_death: B => ; bladder_cancer_tme*u2*B;  // isVersionOf GO:0008219
  BCG_killing_by_effector: B => ; bladder_cancer_tme*BCG_degradation(alpha3, E, B);  // modifiers: E; isVersionOf GO:0001909; isVersionOf GO:0008219
  checkpoint_source: => P; bladder_cancer_tme*Constant_flux__irreversible(delta);  // isVersionOf ncit:C18103
  checkpoint_decay: P => ; bladder_cancer_tme*u3*P;  // isVersionOf ncit:C18104

  // Unit definitions:
  unit length = metre;
  unit area = metre^2;
  unit volume = 1e-3 litre;
  unit time = 86400 second;
  unit substance = 1e-3 mole;
  unit unit_0 = 1 / (8640 second); unit_0 is "1/d";
  unit unit_1 = dimensionless^0;
end
