// SBML level 2 version 4
// dcterms:bibliographicCitation: urn:miriam:pubmed:12496240

model Nagashima2002___Simulating_blood_coagulation_inhibitory_effects()
  // Nagashima2002 - Simulating blood coagulation inhibitory effects
  // isDescribedBy pubmed:12496240
  // biomodels.db:MODEL1807230003 biomodels.db:BIOMD0000000747
  // isVersionOf GO:0007596
  // hasProperty mamo:MAMO_0000046
  // hasProperty taxonomy:9606

  // Compartments:
  compartment compartment = 1;

  // Species:
  species IX in compartment = 90;  // ncit:C82269
  species TF_VIIa_IX in compartment = 0; TF_VIIa_IX is "TF:VIIa:IX";  // hasPart ncit:C82269; hasPart ncit:C17197; hasPart ncit:C82271
  species TF_VIIa in compartment = 0.005; TF_VIIa is "TF:VIIa";  // hasPart ncit:C82271; hasPart ncit:C17197
  species IXa in compartment = 0;  // isVersionOf ncit:C82269
  species TF_VIIa_X in compartment = 0; TF_VIIa_X is "TF:VIIa:X";  // hasPart ncit:C82272; hasPart ncit:C82271; hasPart ncit:C17197
  species X in compartment = 170;  // ncit:C82272
  species Xa in compartment = 0;  // isVersionOf ncit:C82272
  species VIII in compartment = 0.7;  // ncit:C16571
  species Xa_VIII in compartment = 0; Xa_VIII is "Xa:VIII";  // hasPart ncit:C16571; hasPart ncit:C82272
  species VIIIa in compartment = 0;  // isVersionOf ncit:C16571
  species IIa in compartment = 0;  // ncit:C87773
  species IIa_VIII in compartment = 0; IIa_VIII is "IIa:VIII";  // hasPart ncit:C16571; hasPart ncit:C87773
  species VIIIa_IXa in compartment = 0; VIIIa_IXa is "VIIIa:IXa";  // hasPart ncit:C82269; hasPart ncit:C16571
  species VIIIa_IXa_X in compartment = 0; VIIIa_IXa_X is "VIIIa:IXa:X";  // hasPart ncit:C82272; hasPart ncit:C82269; hasPart ncit:C16571
  species V in compartment = 20;  // ncit:C91335
  species Xa_V in compartment = 0; Xa_V is "Xa:V";  // hasPart ncit:C91335; hasPart ncit:C82272
  species Va in compartment = 0;  // isVersionOf ncit:C91335
  species IIa_V in compartment = 0; IIa_V is "IIa:V";  // hasPart ncit:C91335; hasPart ncit:C87773
  species Va_Xa in compartment = 0; Va_Xa is "Va:Xa";  // hasPart ncit:C82272; hasPart ncit:C91335
  species II in compartment = 1400;  // ncit:C82273
  species Va_Xa_II in compartment = 0; Va_Xa_II is "Va:Xa:II";  // hasPart ncit:C82272; hasPart ncit:C82273; hasPart ncit:C91335
  species Fibrinogen in compartment = 7900;  // ncit:C25736
  species Fibrinogen_IIa in compartment = 0; Fibrinogen_IIa is "Fibrinogen:IIa";  // hasPart ncit:C87773; hasPart ncit:C25736
  species Fibrin in compartment = 0;  // ncit:C32598
  species VIIIa_inact in compartment = 0;  // isVersionOf ncit:C16571
  species IXa_inact in compartment = 0;  // isVersionOf ncit:C82269
  species Xa_inact in compartment = 0;  // isVersionOf ncit:C82272
  species IIa_inact in compartment = 0;  // isVersionOf ncit:C87773
  species Xa_Xa_Inhibitor in compartment = 0; Xa_Xa_Inhibitor is "Xa:Xa_Inhibitor";  // hasPart CHEBI:65232; hasPart ncit:C82272
  species Xa_Inhibitor in compartment = 0;  // isHomologTo CHEBI:68581
  species Va_Xa_Xa_Inhibitor in compartment = 0; Va_Xa_Xa_Inhibitor is "Va:Xa:Xa_Inhibitor";  // hasPart ncit:C82272; hasPart ncit:C91335; hasPart CHEBI:68581
  species IIa_IIa_Inhibitor in compartment = 0; IIa_IIa_Inhibitor is "IIa:IIa_Inhibitor";  // hasPart CHEBI:65232; hasPart ncit:C87773
  species IIa_Inhibitor in compartment = 0;  // isHomologTo CHEBI:65232

  // Parameters:
  k01 = 0.1;
  k02 = 2.2;
  k03 = 0.47;
  k04 = 0.1;
  k05 = 5.5;
  k06 = 1.4;
  k07 = 0.1;
  k08 = 2.1;
  k09 = 0.023;
  k10 = 0.1;
  k11 = 15;
  k12 = 0.9;
  k13 = 0.1;
  k14 = 0.17;
  k15 = 0.1;
  k16 = 19;
  k17 = 29;
  k18 = 0.1;
  k19 = 1;
  k20 = 0.043;
  k21 = 0.1;
  k22 = 7.2;
  k23 = 0.26;
  k24 = 0.1;
  k25 = 0.1;
  k26 = 0.1;
  k27 = 100;
  k28 = 35;
  k29 = 0.1;
  k30 = 720;
  k31 = 84;
  k32 = 0.0011;
  k33 = 0.0017;
  k34 = 0.011;
  k35 = 0.024;
  k36 = 0.1;
  k38 = 0.1;
  k39 = 0.1;
  k40 = 0.1;
  k42 = 0.1;
  // 0 == No inhibitor, 1 == Xa inhibitor, 2 == IIa inhibitor
  Dummy_variable_inhibitor = 0;

  // Assignment rules:
  k37 := 3;
  k41 := 3;
  k43 := 3;

  // Reactions:
  R01a: TF_VIIa + IX -> TF_VIIa_IX; compartment*(k01*TF_VIIa*IX - k02*TF_VIIa_IX);
  R01b: TF_VIIa_IX => TF_VIIa + IXa; compartment*k03*TF_VIIa_IX;
  R02a: TF_VIIa + X -> TF_VIIa_X; compartment*(k04*TF_VIIa*X - k05*TF_VIIa_X);
  R02b: TF_VIIa_X => TF_VIIa + Xa; compartment*k06*TF_VIIa_X;
  R03a: Xa + VIII -> Xa_VIII; compartment*(k07*Xa*VIII - k08*Xa_VIII);
  R03b: Xa_VIII => Xa + VIIIa; compartment*k09*Xa_VIII;
  R04a: IIa + VIII -> IIa_VIII; compartment*(k10*IIa*VIII - k11*IIa_VIII);
  R04b: IIa_VIII => IIa + VIIIa; compartment*k12*IIa_VIII;
  R05: VIIIa + IXa -> VIIIa_IXa; compartment*(k13*VIIIa*IXa - k14*VIIIa_IXa);
  R06a: VIIIa_IXa + X -> VIIIa_IXa_X; compartment*(k15*VIIIa_IXa*X - k16*VIIIa_IXa_X);
  R06b: VIIIa_IXa_X => VIIIa_IXa + Xa; compartment*k17*VIIIa_IXa_X;
  R07a: Xa + V -> Xa_V; compartment*(k18*Xa*V - k19*Xa_V);
  R07b: Xa_V => Xa + Va; compartment*k20*Xa_V;
  R08a: IIa + V -> IIa_V; compartment*(k21*IIa*V - k22*IIa_V);
  R08b: IIa_V => IIa + Va; compartment*k23*IIa_V;
  R09: Xa + Va -> Va_Xa; compartment*(k24*Xa*Va - k25*Va_Xa);
  R10a: Va_Xa + II -> Va_Xa_II; compartment*(k26*Va_Xa*II - k27*Va_Xa_II);
  R10b: Va_Xa_II => Va_Xa + IIa; compartment*k28*Va_Xa_II;
  R11a: Fibrinogen + IIa -> Fibrinogen_IIa; compartment*(k29*Fibrinogen*IIa - k30*Fibrinogen_IIa);
  R11b: Fibrinogen_IIa => Fibrin + IIa; compartment*k31*Fibrinogen_IIa;
  R12: VIIIa => VIIIa_inact; compartment*k32*VIIIa;
  R13: IXa => IXa_inact; compartment*k33*IXa;
  R14: Xa => Xa_inact; compartment*k34*Xa;
  R15: IIa => IIa_inact; compartment*k35*IIa;
  R16: Xa + Xa_Inhibitor -> Xa_Xa_Inhibitor; compartment*(k36*Xa*Xa_Inhibitor - k37*Xa_Xa_Inhibitor);
  R17: Va + Xa_Xa_Inhibitor -> Va_Xa_Xa_Inhibitor; compartment*(k38*Va*Xa_Xa_Inhibitor - k39*Va_Xa_Xa_Inhibitor);
  R18: Va_Xa + Xa_Inhibitor -> Va_Xa_Xa_Inhibitor; compartment*(k40*Va_Xa*Xa_Inhibitor - k41*Va_Xa_Xa_Inhibitor);
  R19: IIa + IIa_Inhibitor -> IIa_IIa_Inhibitor; compartment*(k42*IIa*IIa_Inhibitor - k43*IIa_IIa_Inhibitor);

  // Unit definitions:
  unit volume = 1e-3 litre;
  unit substance = 1e-9 mole;
end
