// SBML level 3 version 1
// dcterms:bibliographicCitation: urn:miriam:pubmed:24511375

function killing(a0, C, I)
  a0*C*I;
end

function logistic_growth(a, C, K)
  a*C*(1 - C/K);
end

function growth_immune(y, I, Ie, u, C)
  y*I*(1 - I/(Ie + u*C*I));
end

model Wilkie2013b___immune_induced_cancer_dormancy_and_immune_evasion_basic()
  // Wilkie2013b - immune-induced cancer dormancy and immune evasion-basic
  // The paper describes a basic model of immune-induced cancer dormancy and immune evasion. Created by COPASI 4.25 (Build 207) This model is described in the article: Mathematical models of immune-induced cancer dormancy and the emergence of immune evasion Kathleen P. Wilkie and Philip Hahnfeldt Interface Focus 3: 20130010 Abstract: Cancer dormancy, a state in which cancer cells persist in a host without sig- nificant growth, is a natural forestallment of progression to manifest disease and is thus of great clinical interest. Experimental work in mice suggests that in immune-induced dormancy, the longer a cancer remains dormant in a host, the more resistant the cancer cells become to cytotoxic T-cell-mediated killing. In this work, mathematical models are used to analyse the possible causative mechanisms of cancer escape from immune-induced dormancy. Using a data-driven approach, both decaying efficacy in immune predation and immune recruitment are analysed with results suggesting that decline in recruitment is a stronger determinant of escape than increased resistance to predation. Using a mechanistic approach, the existence of an immune- resistant cancer cell subpopulation is considered, and the effects on cancer dormancy and potential immunoediting mechanisms of cancer escape are analysed and discussed. The immunoediting mechanism assumes that the immune system selectively prunes the cancer of immune-sensitive cells, which is shown to cause an initially heterogeneous population to become a more homogeneous, and more resistant, population. The fact that this selec- tion may result in the appearance of decreasing efficacy in T-cell cytotoxic effect with time in dormancy is also demonstrated. This work suggests that through actions that temporarily delay cancer growth through the targeted removal of immune-sensitive subpopulations, the immune response may actually progress the cancer to a more aggressive state. To cite BioModels Database, please use: BioModels Database: An enhanced, curated and annotated resource for published quantitative kinetic models . To the extent possible under law, all copyright and related or neighbouring rights to this encoded model have been dedicated to the public domain worldwide. Please refer to CC0 Public Domain Dedication for more information.
  // isDescribedBy pubmed:24511375
  // biomodels.db:MODEL1907160002 biomodels.db:BIOMD0000000751
  // isVersionOf GO:0002418
  // hasProperty mamo:MAMO_0000046
  // hasTaxon taxonomy:9606
  // model units - substance: substance, time: time, volume: volume, area: area, length: length, extent: substance

  // Compartments:
  compartment tumor_microenvironment = 1 volume;  // isVersionOf ncit:C94498

  // Species:
  species C in tumor_microenvironment = 1;  // isVersionOf CL:0001064
  species I in tumor_microenvironment = 100;  // isVersionOf ncit:C28241

  // Parameters:
  // cancer growth rate
  a = 0.2 unit_0;
  // cancer carrying capacity
  K = 1e10 unit_0;
  // cancer sensitivity to immune predation
  // 7.25e-5*exp(-t/227.9)
  // 1.05e-4*exp(-t/168.1)
  // 1.08e-4*exp(-sqrt(t/99.0))
  a0 has unit_0;  // isVersionOf ncit:C25201
  // immune growth rate
  y = 0.2 unit_0;
  // immune homeostatic state
  Ie = 100 unit_0;
  // immune recruitment potential
  u = 0.001 unit_0;  // isVersionOf ncit:C64638

  // Assignment rules:
  a0 := 0.000105*exp(-time/168.1);

  // Reactions:
  immune_growth: => I; tumor_microenvironment*growth_immune(y, I, Ie, u, C);  // modifiers: C
  cancer_logistic_growth: => C; tumor_microenvironment*logistic_growth(a, C, K);  // isVersionOf GO:0008283
  cancer_killing: C => ; tumor_microenvironment*killing(a0, C, I);  // modifiers: I; isVersionOf GO:0002419

  // Unit definitions:
  unit length = metre;
  unit area = metre^2;
  unit volume = 1e-3 litre;
  unit time = second;
  unit substance = 1e-3 mole;
  unit unit_0 = dimensionless^0; unit_0 is "1";
end
