// SBML level 3 version 1
// dcterms:bibliographicCitation: urn:miriam:pubmed:23734575

function growth(a, T)
  a*T;
end

function il2p(p3, E, T, g4, alpha, S)
  p3*E*T/((g4 + T)*(1 + alpha*S));
end

function kill(aa, E, T, g2)
  aa*E*T/(g2 + T);
end

function td(a, T, k)
  a*T^2/k;
end

function ist(c, T, gamma, S)
  c*T/(1 + gamma*S);
end

function isil2(p1, E, I, g1, q1, S, q2)
  p1*E*I/(g1 + I)*(p1 - q1*S/(q2 + S));
end

function tgfbp(p4, T, theta)
  p4*T^2/(theta^2 + T^2);
end

function ts(p2, S, T, g3)
  p2*S*T/(g3 + S);
end

model Figueredo2013_3___immunointeraction_full_model()
  // Figueredo2013/3 - immunointeraction full model
  // The paper describes a full model of immune-itumor interaction. Created by COPASI 4.25 (Build 207) This model is described in the article: Investigating mathematical models of immuno-interactions with early-stage cancer under an agent-based modelling perspective Grazziela P Figueredo, Peer-Olaf Siebers, Uwe Aickelin Kathleen BMC Bioinformatics 2013, 14(Suppl 6):S6 Abstract: Many advances in research regarding immuno-interactions with cancer were developed with the help of ordinary differential equation (ODE) models. These models, however, are not effectively capable of representing problems involving individual localisation, memory and emerging properties, which are common characteristics of cells and molecules of the immune system. Agent-based modelling and simulation is an alternative paradigm to ODE models that overcomes these limitations. In this paper we investigate the potential contribution of agent-based modelling and simulation when compared to ODE modelling and simulation. We seek answers to the following questions: Is it possible to obtain an equivalent agent-based model from the ODE formulation? Do the outcomes differ? Are there any benefits of using one method compared to the other? To answer these questions, we have considered three case studies using established mathematical models of immune interactions with early-stage cancer. These case studies were re-conceptualised under an agent-based perspective and the simulation results were then compared with those from the ODE models. Our results show that it is possible to obtain equivalent agent-based models (i.e. implementing the same mechanisms); the simulation output of both types of models however might differ depending on the attributes of the system to be modelled. In some cases, additional insight from using agent-based modelling was obtained. Overall, we can confirm that agent-based modelling is a useful addition to the tool set of immunologists, as it has extra features that allow for simulations with characteristics that are closer to the biological phenomena. To cite BioModels Database, please use: BioModels Database: An enhanced, curated and annotated resource for published quantitative kinetic models . To the extent possible under law, all copyright and related or neighbouring rights to this encoded model have been dedicated to the public domain worldwide. Please refer to CC0 Public Domain Dedication for more information.
  // isDescribedBy pubmed:23734575
  // biomodels.db:MODEL1907220001 biomodels.db:BIOMD0000000756
  // isVersionOf GO:0002418
  // hasProperty mamo:MAMO_0000046
  // hasTaxon taxonomy:9606
  // model units - substance: substance, time: time, volume: volume, area: area, length: length, extent: substance

  // Compartments:
  compartment tumor_microenvironment = 1 volume;  // isVersionOf ncit:C94498

  // Species:
  // tumor cell
  species T in tumor_microenvironment = 1;  // isVersionOf CL:0001064
  // effector cell
  species E in tumor_microenvironment = 1;  // isVersionOf ncit:C28241
  species I in tumor_microenvironment = 10;  // isVersionOf uniprot:P60568
  // TGF-b
  species S in tumor_microenvironment = 0;  // isVersionOf uniprot:P01137

  // Parameters:
  // proliferation rate of tumor
  a = 0.18 unit_0;
  // immune growth rate
  c = 0.035 unit_0;
  // tumor cell killing rate
  aa = 1 unit_0;  // isVersionOf ncit:C53346
  // tumor killing half saturation constant
  g2 = 100000 unit_0;
  // il2 decay rate
  u2 = 10 unit_0;  // isVersionOf ncit:C25636
  // immune stimulation rate
  p1 = 0.1245 unit_0;
  // immune stimulation half saturation constant
  g1 = 20000000 unit_0;
  // cancer stimulation rate
  p2 = 0.27 unit_0;  // isVersionOf ncit:C25636
  // tumor stimulation half saturation constant
  g3 = 20000000 unit_0;
  // tgfb decay rate
  u3 = 10 unit_0;  // isVersionOf ncit:C25636
  // IL2 suppression sensitivity to TGFb
  alpha = 0.001 unit_0;  // isVersionOf ncit:C25201
  // IL2 production half saturation constant
  g4 = 1000 unit_0;
  // effector sensitivity to tgfb
  gamma = 10 unit_0;  // isVersionOf ncit:C25201
  // immune death rate
  u1 = 0.03 unit_0;  // isVersionOf ncit:C53346
  // IL2 production rate
  p3 = 5 unit_0;  // isVersionOf ncit:C25636
  // tgfb production rate
  p4 = 2.84 unit_0;  // isVersionOf ncit:C25636
  // effector inhibition rate of tgfb
  q1 = 10 unit_0;  // isVersionOf ncit:C25636
  // effector inhibition half saturation constant
  q2 = 0.1121 unit_0;
  // tgfb saturation constant
  theta = 1000000 unit_0;
  // carrying capacity of tumor
  k = 1e10 unit_0;

  // Reactions:
  tumor_growth: => T; tumor_microenvironment*growth(a, T);  // isVersionOf GO:0008283
  tumor_death: T => ; tumor_microenvironment*td(a, T, k);  // isVersionOf GO:0008219
  tumor_killing: T => ; tumor_microenvironment*kill(aa, E, T, g2);  // modifiers: E; isVersionOf GO:0002419
  immune_death: E => ; tumor_microenvironment*u1*E;  // isVersionOf GO:0008219
  immune_stimulation_tumor: => E; tumor_microenvironment*ist(c, T, gamma, S); immune_stimulation_tumor is "immune stimulation-tumor";  // modifiers: T, S; isVersionOf GO:0008283
  immune_stimulation_IL2: => E; tumor_microenvironment*isil2(p1, E, I, g1, q1, S, q2); immune_stimulation_IL2 is "immune stimulation-IL2";  // modifiers: I, S; isVersionOf GO:0008283
  IL2_loss: I => ; tumor_microenvironment*u2*I;  // isVersionOf ncit:C75947
  IL2_production: => I; tumor_microenvironment*il2p(p3, E, T, g4, alpha, S);  // modifiers: E, T, S; isVersionOf GO:0001816
  tumor_stimulation: => T; tumor_microenvironment*ts(p2, S, T, g3);  // modifiers: S; isVersionOf GO:0008283
  tgfb_production: => S; tumor_microenvironment*tgfbp(p4, T, theta);  // modifiers: T; isVersionOf GO:0001816
  tgfb_loss: S => ; tumor_microenvironment*u3*S;  // isVersionOf ncit:C75947

  // Unit definitions:
  unit length = metre;
  unit area = metre^2;
  unit volume = 1e-3 litre;
  unit time = second;
  unit substance = 1e-3 mole;
  unit unit_0 = dimensionless^0; unit_0 is "1";
end
