// SBML level 3 version 1
// dcterms:bibliographicCitation: urn:miriam:pubmed:22432059

function tumor_growth_0(g, T)
  g*T;
end

function kill(k, I)
  k*I;
end

function immune_stim(l, T, I)
  l*T*I;
end

model Babbs2012___immunotherapy()
  // Babbs2012 - immunotherapy
  // The paper describes a simple model of tumor immunotherapy. Created by COPASI 4.25 (Build 207) This model is described in the article: Predicting success or failure of immunotherapy for cancer: insights from a clinically applicable mathematical model Charles F Babbs Am J Cancer Res 2012;2(2):204-213 Abstract: The objective of this study was to create a clinically applicable mathematical model of immunotherapy for cancer and use it to explore differences between successful and unsuccessful treatment scenarios. The simplified predator-prey model includes four lumped parameters: tumor growth rate, g; immune cell killing efficiency, k; immune cell signaling factor, λ; and immune cell half-life decay, μ. The predator-prey equations as functions of time, t, for nor- malized tumor cell numbers, y, (the prey) and immunocyte numbers, x, (the predators) are: dy/dt = gy – kx and dx/dt = λxy – μx. A parameter estimation procedure that capitalizes on available clinical data and the timing of clinically observable phenomena gives mid-range benchmarks for parameters representing the unstable equilibrium case in which the tumor neither grows nor shrinks. Departure from this equilibrium results in oscillations in tumor cell num- bers and in many cases complete elimination of the tumor. Several paradoxical phenomena are predicted, including increasing tumor cell numbers prior to a population crash, apparent cure with late recurrence, one or more cycles of tumor growth prior to eventual tumor elimination, and improved tumor killing with initially weaker immune parame- ters or smaller initial populations of immune cells. The model and the parameter estimation techniques are easily adapted to various human cancers that evoke an immune response. They may help clinicians understand and predict certain strange and unexpected effects in the world of tumor immunity and lead to the design of clinical trials to test improved treatment protocols for patients. To cite BioModels Database, please use: BioModels Database: An enhanced, curated and annotated resource for published quantitative kinetic models . To the extent possible under law, all copyright and related or neighbouring rights to this encoded model have been dedicated to the public domain worldwide. Please refer to CC0 Public Domain Dedication for more information.
  // isDescribedBy pubmed:22432059
  // hasProperty ncit:C15438
  // hasProperty GO:0002418
  // hasProperty mamo:MAMO_0000046
  // hasTaxon taxonomy:9606
  // biomodels.db:MODEL1907240002 biomodels.db:BIOMD0000000758
  // model units - substance: substance, time: time, volume: volume, area: area, length: length, extent: substance

  // Compartments:
  compartment tumor_microenvironment = 1 volume;  // isVersionOf ncit:C94498

  // Species:
  // relative tumor size
  species T in tumor_microenvironment = 1;  // isVersionOf CL:0001064; isVersionOf ncit:C120284
  // relative immune cell density
  species I in tumor_microenvironment = 0.001;  // isVersionOf CL:0000911

  // Parameters:
  // Unopposed tumor growth constant
  g = 0.004 unit_0;
  // Immune cell killing effectiveness
  // =0.01/0.1/0.5/2/4/8/20/50/53
  // default 0.1
  k = 4 unit_0;  // isVersionOf ncit:C25636
  // Immune cell signalling constant
  // =0/0.05/0.07/0.09/0.1/0.11/0.17/0.179/0.181/0.19
  // default 0.1
  l = 0.09 unit_0;  // isVersionOf ncit:C25636
  // Decay constant for immunocytes
  u = 0.1 unit_0;  // isVersionOf ncit:C25636

  // Reactions:
  tumor_growth: => T; tumor_microenvironment*tumor_growth_0(g, T);  // isVersionOf GO:0008283
  tumor_killing: T => ; tumor_microenvironment*kill(k, I);  // modifiers: I; isVersionOf GO:0002419; isVersionOf GO:0008219
  immune_stimulation: => I; tumor_microenvironment*immune_stim(l, T, I);  // modifiers: T; isVersionOf GO:0070661
  immune_death: I => ; tumor_microenvironment*u*I;  // isVersionOf GO:0008219

  // Unit definitions:
  unit length = metre;
  unit area = metre^2;
  unit volume = 1e-3 litre;
  unit time = 86400 second;
  unit substance = 1e-3 mole;
  unit unit_0 = 1 / (8640 second); unit_0 is "1/d";
end
