// SBML level 2 version 4
// dcterms:bibliographicCitation: urn:miriam:pubmed:16849579

function Constant_flux__irreversible(v)
  v;
end
Constant_flux__irreversible is "Constant flux (irreversible)";

function Function_for_IL_21_Production_by_Tumor_1(Z, h)
  h*Z^(3/2);
end
Function_for_IL_21_Production_by_Tumor_1 is "Function_for_IL-21_Production_by_Tumor_1";

function Function_for_NK_Cell_Population_Growth_1(X, r1)
  r1*X;
end

function Function_for_NK_Cell_Population_Growth_3(U, a)
  a*U;
end

function Function_for_CD8_Population_Growth_Inhibition_1(M, Y, h2zero, r2, sigma, nD)
  r2*Y^2/(h2zero + sigma*M/(1 + M/nD));
end

function Function_for_Cytotoxic_Protein_Secretion(b1, varU, b2)
  b1*varU/(b2 + varU);
end

function Function_for_NK_Cell_Population_Growth_IL_21_Inhibition_1(U, X, p1, p2, q1, r1)
  r1*X^2/((p1*U + p2)/(U + q1));
end
Function_for_NK_Cell_Population_Growth_IL_21_Inhibition_1 is "Function_for_NK_Cell_Population_Growth_IL-21_Inhibition_1";

function Function_for_Cytotoxic_Tumor_Killing(param1, mod1, mod2, sub1)
  param1*mod1*mod2*sub1;
end

function Function_for_NK_Cell_Population_Growth_2(Y, r2)
  r2*Y;
end

function Function_for_Tumor_Growth_Exponential(varZ)
  varZ^(-1/2)*varZ^(3/2)*10^(-6);
end

model New_Model_1()
  // Cappuccio2006 - Cancer immunotherapy by interleukin-21
  // This model describes the effects of Il-21 on tumor eradication via natural killer cell-mediated and CD8+ T-cell-mediated lysis of tumor cells. The model demonstrates changes in growth dynamics in nonimmunogenic B16 melanoma and the immunogenic MethA and MCA205 fibrosarcomas, showing a strong dependence of the NK-cell/CD8+ T-cell balance on tumor immunogenicity.
  // isDescribedBy pubmed:16849579
  // biomodels.db:MODEL1907230001 biomodels.db:BIOMD0000000761
  // hasPart GO:0002420
  // hasPart GO:0002419
  // hasProperty ncit:C15438
  // hasProperty mamo:MAMO_0000046

  // Compartments:
  // No explicit compartment specified - paper implies that compartment encompasses entire organism.
  compartment compartment = 1;  // isVersionOf ncit:C13041

  // Species:
  // IL-21 concentration in the organism at any moment.
  species U in compartment = 0; U is "U_IL-21";  // uniprot:Q9ES17
  // Population dynamics of NK cells in the spleen.
  species X in compartment = 1.95185; X is "X_NK_T_Cells";  // isVersionOf BTO:0000914; occursIn BTO:0001281
  // antitumor CD8+ T cells in the lymph nodes.
  species Y in compartment = 0.066; Y is "Y_CD8_T_Cells";  // isVersionOf ncit:C12542; isVersionOf CL:0000811; occursIn BTO:0000784
  // CD8+ T Cell Memory Factor.
  species M in compartment = 0; M is "M_CD8_Memory_Factor";  // isVersionOf ncit:C48806
  // Cytotoxic protein affecting tumor lysis.
  species P in compartment = 0; P is "P_Cytotoxic_Protein";  // hasVersion uniprot:A2RSY7; hasVersion uniprot:C4NUM1
  // Tumor surface area at any moment.
  species Z in compartment = 2; Z is "Z_Tumor_SA";  // isVersionOf ncit:C25245; isPropertyOf ncit:C98275

  // Parameters:
  mu1 = 10 unit_0;
  h = 634 unit_1;
  r1 = 0.095 unit_0;
  p1 = 0.01;
  p2 = 1.054;
  q1 = 0.54;
  a = 0.58 unit_2;
  mu2 = 0.014 unit_0;
  r2 = 0.26 unit_0;
  sigma = 0.003;
  h2zero = 0.066;
  D = 1418.4; D is "nD";
  b1 = 1 unit_3;
  b2 = 0.1 unit_4;
  mu3 = 0.08 unit_0;
  r3 = 0.48 unit_0;
  K = 400 unit_5;
  c = 5.1 unit_6;
  d = 0.145;
  k1 = 0.05 unit_7;
  k2 = 0.0485 unit_7;
  z0 = 2;

  // Reactions:
  IL_21_Clearance_Rate: U => ; compartment*mu1*U; IL_21_Clearance_Rate is "IL-21_Clearance";
  IL_21_Production_by_Tumor: => U; compartment*Function_for_IL_21_Production_by_Tumor_1(Z, h); IL_21_Production_by_Tumor is "IL-21_Production_by_Tumor";  // modifiers: Z; isVersionOf ncit:C18971
  NK_Cell_Population_Growth: => X; compartment*Function_for_NK_Cell_Population_Growth_1(X, r1);
  NK_Cell_Population_Growth_IL_21_Inhibition: X => ; compartment*Function_for_NK_Cell_Population_Growth_IL_21_Inhibition_1(U, X, p1, p2, q1, r1); NK_Cell_Population_Growth_IL_21_Inhibition is "NK_Cell_Population_Growth_IL-21_Inhibition";  // modifiers: U; isVersionOf ncit:C20751
  CD8_Population_Growth: => Y; compartment*Function_for_NK_Cell_Population_Growth_2(Y, r2);
  CD8_Population_Growth_Inhibition: Y => ; compartment*Function_for_CD8_Population_Growth_Inhibition_1(M, Y, h2zero, r2, sigma, D);  // modifiers: M; isVersionOf ncit:C20751
  CD8_Memory_Formation: => M; compartment*Function_for_NK_Cell_Population_Growth_3(U, a);  // modifiers: U
  CD8_Memory_Loss: M => ; compartment*mu2*M;  // isVersionOf GO:0008219
  Cytotoxic_Protein_Secretion: => P; compartment*Function_for_Cytotoxic_Protein_Secretion(b1, U, b2);  // modifiers: U
  Cytotoxic_Protein_Degradation: P => ; compartment*mu3*P;  // isVersionOf ncit:C18104
  Tumor_Killing_By_NK_Cells: Z => ; compartment*Function_for_Cytotoxic_Tumor_Killing(k1, P, X, Z);  // modifiers: P, X
  Tumor_Killing_By_CD8_Cells: Z => ; compartment*Function_for_Cytotoxic_Tumor_Killing(k2, P, Y, Z); Tumor_Killing_By_CD8_Cells is "Tumor_Killing_By_CD8_TCells";  // modifiers: P, Y
  Tumor_Growth: => Z; compartment*Constant_flux__irreversible(c);
  Tumor_Growth_Exponential: => Z; compartment*Function_for_Tumor_Growth_Exponential(Z);

  // Unit definitions:
  unit length = 1e-3 metre;
  unit area = (1e-3 metre)^2;
  unit volume = 1e-3 litre;
  unit time = 86400 second;
  unit substance = 1e-9 mole;
  unit unit_0 = 1 / (8640 second); unit_0 is "1/d";
  unit unit_1 = 1e-12 mole / ((1e-3 metre)^4 * 8640 second); unit_1 is "nmol/(mm*ml*d)";
  unit unit_2 = 1e-3 litre / (1e-9 mole * 8640 second); unit_2 is "ml/(nmol*d)";
  unit unit_3 = 1e-9 mole / (1e-3 litre * 8640 second); unit_3 is "nmol/(d*ml)";
  unit unit_4 = 1e-9 mole / (1e-3 litre); unit_4 is "nmol/ml";
  unit unit_5 = (7.937005e-4 metre)^3; unit_5 is "mm^3/2";
  unit unit_6 = (1e-3 metre)^2 / (8640 second); unit_6 is "(mm^2)/d";
  unit unit_7 = 1e-3 litre / (1e-9 mole * 8640 second); unit_7 is "ml/(d*nmol)";
end
