// SBML level 3 version 1
// dcterms:bibliographicCitation: urn:miriam:pubmed:30984283

function tumor_grow_0(alph, U, I)
  alph*U*(1 - U - I);
end

function killing(d, C, S)
  d*C*S;
end

function infection(bet, U, V)
  bet*U*V;
end

function Constant_flux__irreversible(v)
  v;
end
Constant_flux__irreversible is "Constant flux (irreversible)";

function burst(b, I)
  b*I;
end

model Malinzi2019___chemovirotherapy()
  // Malinzi2019 - chemovirotherapy
  // The paper describes a model of oncolytic virothherapy. Created by COPASI 4.25 (Build 207) This model is described in the article: Mathematical Analysis of a Mathematical Model of Chemovirotherapy: Effect of Drug Infusion Method Joseph Malinzi Computational and Mathematical Methods in Medicine Volume 2019, Article ID 7576591, 16 pages Abstract: IA mathematical model for the treatment of cancer using chemovirotherapy is developed with the aim of determining the efficacy of three drug infusion methods: constant, single bolus, and periodic treatments. The model is in the form of ODEs and is further extended into DDEs to account for delays as a result of the infection of tumor cells by the virus and chemotherapeutic drug responses. Analysis of the model is carried out for each of the three drug infusion methods. Analytic solutions are determined where possible and stability analysis of both steady state solutions for the ODEs and DDEs is presented. The results indicate that constant and periodic drug infusion methods are more efficient compared to a single bolus injection. Numerical simulations show that with a large virus burst size, irrespective of the drug infusion method, chemovirotherapy is highly effective compared to either treatments. The simulations further show that both delays increase the period within which a tumor can be cleared from body tissue. To cite BioModels Database, please use: BioModels Database: An enhanced, curated and annotated resource for published quantitative kinetic models . To the extent possible under law, all copyright and related or neighbouring rights to this encoded model have been dedicated to the public domain worldwide. Please refer to CC0 Public Domain Dedication for more information.
  // isDescribedBy pubmed:30984283
  // biomodels.db:MODEL1907260017 biomodels.db:BIOMD0000000764
  // hasProperty mamo:MAMO_0000046
  // hasProperty ncit:C62713
  // hasTaxon taxonomy:9606
  // model units - substance: substance, time: time, volume: volume, area: area, length: length, extent: substance

  // Compartments:
  compartment tme = 1 volume;  // isVersionOf ncit:C94498

  // Species:
  // uninfected tumor cell/1e6
  species U in tme = 1;  // isVersionOf CL:0001064
  // infected tumor cell/1e6
  species I in tme = 0;  // isVersionOf CL:0001064
  // virus/1e6
  species V in tme = 0.1;  // isVersionOf ncit:C717
  // chemotherapeutic drug
  species C in tme = 0.1;

  // Parameters:
  // tumor growth rate
  alph has unit_0;
  // tumor infection rate
  bet has unit_0;  // isVersionOf ncit:C25636
  // uninfected tumor killing rate
  d0 has unit_0;  // isVersionOf ncit:C25636
  // infected tumor killing rate
  d1 has unit_0;  // isVersionOf ncit:C25636
  // virus burst size
  b has unit_0;
  // virus death rate
  y has unit_0;  // isVersionOf ncit:C25636
  p has unit_0;
  alpha = 0.206 unit_0;
  delta = 0.5115 unit_0;
  beta = 0.001 unit_0;
  delta0 = 0.005 unit_0;
  delta1 = 0.006 unit_0;
  // burst size
  // =2/5/10
  bb = 2 unit_0;
  K = 1000000 unit_0;
  gamma = 0.001 unit_0;
  q = 5 unit_0;
  lamda = 4.16 unit_0;
  a has unit_0;
  aa = 0.206 unit_0;
  V0 has unit_0;
  C0 has unit_0;
  // drug decay rate
  f has unit_0;  // isVersionOf ncit:C25636
  // drug infusion rate
  // =f or fexp(-at) or fsin2(at)
  k has unit_0;  // isVersionOf ncit:C25636
  Initial_for_C = C;

  // Assignment rules:
  C0 := Initial_for_C;
  d1 := delta1*C0/delta;
  alph := alpha/delta;
  y := gamma/delta;
  p := lamda/delta;
  d0 := delta0*C0/delta;
  V0 := K;
  b := bb*K/V0;
  bet := beta*V0/delta;
  a := aa/delta;
  f := q/(delta*C0);
  k := f*exp(-a*time);

  // Reactions:
  tumor_grow: => U; tme*tumor_grow_0(alph, U, I);  // modifiers: I; isVersionOf GO:0008283
  tumor_killing: U => ; tme*killing(d0, C, U);  // modifiers: C; isVersionOf GO:0008219
  tumor_infection: U + V => I; tme*infection(bet, U, V);  // isVersionOf ncit:C128320
  infected_tumor_death: I => ; tme*k1*I;  // isVersionOf GO:0008219
    k1 = 1;
  infected_tumor_killing: I => ; tme*killing(d1, C, I);  // modifiers: C; isVersionOf GO:0008219
  virus_burst: => V; tme*burst(b, I);  // modifiers: I; isVersionOf GO:0019079
  virus_death: V => ; tme*y*V;  // isVersionOf ncit:C75947
  drug_infusion: => C; tme*Constant_flux__irreversible(k);
  drug_decay: C => ; tme*p*C;  // isVersionOf ncit:C75947

  // Unit definitions:
  unit length = metre;
  unit area = metre^2;
  unit volume = 1e-3 litre;
  unit time = second;
  unit substance = 1e-3 mole;
  unit unit_0 = dimensionless^0; unit_0 is "1";
end
