// SBML level 2 version 4
// dcterms:bibliographicCitation: urn:miriam:pubmed:16180117

function Constant_flux__irreversible(v)
  v;
end
Constant_flux__irreversible is "Constant flux (irreversible)";

function Function_for_Complex_Dissociation(k_off, RC)
  k_off*RC;
end

function Function_for_Drug_Distribution_Tissue_to_Central(k_tp, A_T, V_c)
  k_tp*(A_T/V_c);
end

function Function_for_Drug_Exit_Central(k_pt, C, k_el)
  (k_el + k_pt)*C;
end

function Function_for_Complex_Internalisation(k_off, k_int, RC)
  (k_off + k_int)*RC;
end

function Function_for_Drug_Distribution_Central_to_Tissue(k_pt, C, V_c)
  k_pt*C*V_c;
end

model Mager2005___Quasi_equilibrium_pharmacokinetic_model_for_drugs_exhibiting_target_mediated_drug_disposition()
  // Mager2005 - Quasi-equilibrium pharmacokinetic model for drugs exhibiting target-mediated drug disposition
  // This model was developed with the aim of constructing an equilibrium model of the pharmacokinetic behaviour of a drug exhibiting target-mediated drug disposition (TMDD). TMDD involves the inclusion
  // of drug-target interactions within a pharmacokinetic description, something which is usually considered negligible and subsequently excluded. Two approaches were used, one of which involved a
  // quasi-equilibrium method to describe the kinetics of TMDD.
  // isDescribedBy pubmed:16180117
  // isDerivedFrom pubmed:11999290
  // biomodels.db:MODEL1907290001 biomodels.db:BIOMD0000000765
  // hasProperty mamo:MAMO_0000046
  // hasProperty ncit:C15299
  // hasTaxon taxonomy:1758

  // Compartments:
  compartment Central = 1;  // isVersionOf ncit:C16353
  compartment Peripheral_Tissue = 1;  // isVersionOf ncit:C12801

  // Species:
  species C in Central = 4000;  // CHEBI:23888; occursIn ncit:C16353
  species A_T in Peripheral_Tissue = 0;  // CHEBI:23888; occursIn ncit:C12801
  species R in Central = 53;  // isVersionOf ncit:C18106
  species RC in Central = 0;  // isVersionOf GO:0043235

  // Parameters:
  k_el = 1;
  V_c = 10;
  k_on = 0.1;
  K_D = 1;
  k_int = 0;
  k_deg = 0.566;
  k_syn = 0;
  k_off = 0.1;
  k_tp = 0;
  k_pt = 0;
  Initial_for_V_c = V_c;

  // Assignment rules:
  C_Concentration := C/Initial_for_V_c;
  C_tot := (C + RC)/Initial_for_V_c;

  // Reactions:
  Complex_Formation: R + C => RC; Central*k_on*R*C;
  Complex_Dissociation: => R + C; Central*Function_for_Complex_Dissociation(k_off, RC);  // modifiers: RC
  Complex_Internalisation: RC => ; Central*Function_for_Complex_Internalisation(k_off, k_int, RC);  // isVersionOf GO:0031623
  Drug_Exit_Central: C => ; Central*Function_for_Drug_Exit_Central(k_pt, C, k_el);
  Drug_Distribution_Tissue_to_Central: => C; Function_for_Drug_Distribution_Tissue_to_Central(k_tp, A_T, V_c);  // modifiers: A_T; isVersionOf ncit:C79370
  Drug_Distribution_Central_to_Tissue: => A_T; Function_for_Drug_Distribution_Central_to_Tissue(k_pt, C, V_c);  // modifiers: C; isVersionOf ncit:C79370
  Drug_Distribution_Tissue_to_Central_MA: A_T => ; Peripheral_Tissue*k_tp*A_T;  // isVersionOf ncit:C79370
  Receptor_Synthesis: => R; Central*Constant_flux__irreversible(k_syn);  // isVersionOf GO:0006412
  Receptor_Dergradation: R => ; Central*k_deg*R;

  // Unit definitions:
  unit volume = 1e-3 litre;
  unit time = 3600 second;
  unit substance = 1e-3 mole;
end
