// SBML level 3 version 1
// dcterms:bibliographicCitation: urn:miriam:pubmed:28219660

function _1_factor_(k, pro, mod)
  k*pro*mod;
end
_1_factor_ is "1 factor +";

function _1_factor(k, sub, mod)
  k*sub*mod;
end
_1_factor is "1 factor-";

function mod(k, mod)
  k*mod;
end

function tg(a, T, b)
  a*T*(1 - T/b);
end

function growth(p, product, mod, other, m)
  p*product*mod*(1 - (product + other)/m);
end

function m1g(pm1, M1, M2, m2)
  pm1*M1*(1 - (M1 + M2)/m2);
end

model Eftimie2017_2___interaction_of_Th_and_macrophage_in_melanoma()
  // Eftimie2017/2 - interaction of Th and macrophage in melanoma
  // The paper describes a model of interaction of Th cells and macrophage in melanoma. Created by COPASI 4.25 (Build 207) This model is described in the article: Modelling and investigation of the CD4 T cells – Macrophages paradox in melanoma immunotherapies Raluca Eftimie, Haneen Hamam Journal of Theoretical Biology 420 (2017) 82–104 Abstract: It is generally accepted that tumour cells can be eliminated by M1 anti-tumour macrophages and CD8+ T cells. However, experimental results over the past 10–15 years have shown that B16 mouse melanoma cells can be eliminated by the CD4+ T cells alone (either Th1 or Th2 sub-types), in the absence of CD8+ T cells. In some studies, elimination of B16 melanoma was associated with a Th1 immune response (i.e., elimination occurred in the presence of cytokines produced by Th1 cells), while in other studies melanoma elimination was associated with a Th2 immune response (i.e., elimination occurred in the presence of cytokines produced by Th2 cells). Moreover, macrophages have been shown to be present inside the tumours, during both Th1 and Th2 immune responses. To investigate the possible biological mechanisms behind these apparently contradictory results, we develop a class of mathematical models for the dynamics of Th1 and Th2 cells, and M1 and M2 macrophages in the presence/absence of tumour cells. Using this mathematical model, we show that depending on the re- polarisation rates between M1 and M2 macrophages, we obtain tumour elimination in the presence of a type-I immune response (i.e., more Th1 and M1 cells, compared to the Th2 and M2 cells), or in the presence of a type- II immune response (i.e., more Th2 and M2 cells). Moreover, tumour elimination is also possible in the presence of a mixed type-I/type-II immune response. Tumour growth always occurs in the presence of a type-II immune response, as observed experimentally. Finally, tumour dormancy is the result of a delicate balance between the pro-tumour effects of M2 cells and the anti-tumour effects of M1 and Th1 cells. To cite BioModels Database, please use: BioModels Database: An enhanced, curated and annotated resource for published quantitative kinetic models . To the extent possible under law, all copyright and related or neighbouring rights to this encoded model have been dedicated to the public domain worldwide. Please refer to CC0 Public Domain Dedication for more information.
  // isDescribedBy pubmed:28219660
  // biomodels.db:MODEL1907310003 biomodels.db:BIOMD0000000769
  // hasProperty mamo:MAMO_0000046
  // hasProperty efo:0000756
  // hasProperty GO:0002418
  // hasTaxon taxonomy:9606
  // model units - substance: substance, time: time, volume: volume, area: area, length: length, extent: substance

  // Compartments:
  compartment tme = 1 volume;  // isVersionOf ncit:C94498

  // Species:
  // tumor
  species T in tme = 100000;  // isVersionOf CL:0001064
  // Th1
  species H1 in tme = 0;  // isVersionOf CL:0000545
  // Th2
  species H2 in tme = 0;  // isVersionOf CL:0000546
  // M1 macrophage
  species M1 in tme = 100;  // isVersionOf ncit:C156004
  // M2 macrophage
  species M2 in tme = 0;  // isVersionOf ncit:C123783

  // Parameters:
  // tumour growth rate
  // 0.69-0.97
  a = 0.69 unit_0;
  // carrying capacity of the tumour
  b = 1000000000 unit_1;
  // tumour natural death rate
  f = 1e-8 unit_0;  // isVersionOf ncit:C25636
  // killing rate of tumour cells by the Th1 cells
  // 5×10−9-10−7
  gh1 = 4.8e-9 unit_0;  // isVersionOf ncit:C25636
  // killing rate of tumour cells by the Th2 cells
  gh2 = 1e-9 unit_0;  // isVersionOf ncit:C25636
  // killing rate of tumour cells by M1 macrophages
  gm1 = 6e-9 unit_0;  // isVersionOf ncit:C25636
  // tumour growth rate in the presence of M2 cells
  // 2.3 × 10−10, 7.3 × 10−10
  gm2 = 2.3e-10 unit_0;
  // inactivation rate of Th1 cells by tumour cells
  nh1 = 1e-7 unit_0;  // isVersionOf ncit:C25636
  // inactivation rate of Th2 cells by tumour cells
  nh2 = 1e-7 unit_0;  // isVersionOf ncit:C25636
  // inactivation rate of M1 cells by tumour cells
  nm1 = 1e-7 unit_0;  // isVersionOf ncit:C25636
  // recruitment rate of M2 cells in the presence of tumour cells
  nm2 = 1e-7 unit_0;
  // activation rate of Th1 cells 0.001-0.008
  ah1 = 0.008 unit_0;
  // activation rate of Th2 cells 0.001-0.008
  ah2 = 0.001 unit_0;
  // activation rate of M1 cells 0.0001-0.01
  am1 = 0.001 unit_0;
  // activation rate of M2 cells 0.0001-0.01
  am2 = 0.001 unit_0;
  // carrying capacity of Th cells
  m1 = 100000000 unit_1;
  // carrying capacity of macrophages
  m2 = 1000000000 unit_1;
  // interaction rate between Th1 cells and type−1 cytokines produced by the M1 cells, which leads to the proliferation of Th1 cells
  ph1 = 0.09 unit_0;
  // interaction rate between Th2 cells and type−2 cytokines produced by the M2 cells, which leads to the proliferation of Th2 cells
  ph2 = 0.09 unit_0;
  // proliferation rate of M1 cells
  pm1 = 0.02 unit_0;
  // interaction rate between M2 cells and the IL−4 cytokines produced by Th2 cells, which leads to M2 proliferation
  pm2 = 0.02 unit_0;
  // M1 → M2 transition rate
  // 0.05-0.09
  rm1 = 0.09 unit_0;  // isVersionOf ncit:C25636
  // M2 → M1 transition rate
  // 0.05-0.08
  rm2 = 0.05 unit_0;  // isVersionOf ncit:C25636
  // death rate of the Th1 cells
  eh1 = 0.03 unit_0;  // isVersionOf ncit:C25636
  // death rate of the Th2 cells
  eh2 = 0.03 unit_0;  // isVersionOf ncit:C25636
  // death rate of the M1 cells
  em1 = 0.02 unit_0;  // isVersionOf ncit:C25636
  // death rate of the M2 cells
  em2 = 0.02 unit_0;  // isVersionOf ncit:C25636

  // Reactions:
  tumor_growth: => T; tme*tg(a, T, b);  // isVersionOf GO:0008283
  tumor_death: T => ; tme*f*T;  // isVersionOf GO:0008219
  tumor_H1: T => ; tme*_1_factor(gh1, T, H1); tumor_H1 is "tumor-H1";  // modifiers: H1; isVersionOf GO:0002419
  tumor_H2: T => ; tme*_1_factor(gh2, T, H2); tumor_H2 is "tumor-H2";  // modifiers: H2; isVersionOf GO:0002419
  tumor_M1: T => ; tme*_1_factor(gm1, T, M1); tumor_M1 is "tumor-M1";  // modifiers: M1; isVersionOf GO:0008219
  tumor_M2: => T; tme*_1_factor_(gm2, T, M2); tumor_M2 is "tumor+M2";  // modifiers: M2; isVersionOf GO:0008283
  H1_M1: => H1; tme*mod(ah1, M1); H1_M1 is "H1+M1";  // modifiers: M1; isVersionOf GO:0042098
  H1_growth: => H1; tme*growth(ph1, H1, M1, H2, m1);  // modifiers: M1, H2; isVersionOf GO:0042098
  H1_exhaustion: H1 => ; tme*_1_factor(nh1, H1, T);  // modifiers: T; isVersionOf GO:0008219
  H1_death: H1 => ; tme*eh1*H1;  // isVersionOf GO:0008219
  H2_M2: => H2; tme*mod(ah2, M2); H2_M2 is "H2+M2";  // modifiers: M2; isVersionOf GO:0042098
  H2_growth: => H2; tme*growth(ph2, H2, M2, H1, m1);  // modifiers: M2, H1; isVersionOf GO:0042098
  H2_exhaustion: H2 => ; tme*_1_factor(nh2, H2, T);  // modifiers: T; isVersionOf GO:0008219
  H2_death: H2 => ; tme*eh2*H2;  // isVersionOf GO:0008219
  M1_H1: => M1; tme*mod(am1, H1); M1_H1 is "M1+H1";  // modifiers: H1; isVersionOf GO:0061517
  M1_growth: => M1; tme*m1g(pm1, M1, M2, m2);  // modifiers: M2; isVersionOf GO:0061517
  M1_exhaustion: M1 => ; tme*_1_factor(nm1, M1, T);  // modifiers: T; isVersionOf GO:0008219
  M1_death: M1 => ; tme*em1*M1;  // isVersionOf GO:0008219
  M1_M2_transition: M1 => M2; tme*rm2*M1; M1_M2_transition is "M1-M2 transition";
  M2_M1_transition: M2 => M1; tme*rm1*M2; M2_M1_transition is "M2-M1 transition";
  M2_H2: => M2; tme*mod(am2, H2); M2_H2 is "M2+H2";  // modifiers: H2; isVersionOf GO:0061517
  M2_growth: => M2; tme*growth(pm2, M2, H2, M1, m2);  // modifiers: H2, M1; isVersionOf GO:0061517
  M2_stimulation: => M2; tme*_1_factor_(nm2, M2, T);  // modifiers: T; isVersionOf GO:0061517
  M2_death: M2 => ; tme*em2*M2;  // isVersionOf GO:0008219

  // Unit definitions:
  unit length = metre;
  unit area = metre^2;
  unit volume = 1e-3 litre;
  unit time = 86400 second;
  unit substance = 1e-3 mole;
  unit unit_0 = 1 / (8640 second); unit_0 is "1/d";
  unit unit_1 = dimensionless^0;
end
