// SBML level 2 version 4
// dcterms:bibliographicCitation: urn:miriam:pubmed:18316099

function Function_for_Tumor_Growth(r, y, x, epsilon, K)
  r*y*(1 - (y + x)^epsilon/K^epsilon);
end

function Function_for_Virus_Production_Infected_Cell(alpha, x)
  alpha*x;
end

function Function_for_Tumor_Cell_Fusion(rho, x, y)
  rho*x*y;
end

model Bajzer2008___Modeling_of_cancer_virotherapy_with_recombinant_measles_viruses()
  // Bajzer2008 - Modeling of cancer virotherapy with recombinant measles viruses
  // This model describes the interactions between tumor cells and virus particles, with particular reference to virus-induced syncytium formation and ultimately death of tumor cells. Dynamics of infected
  // cells, and production of new virus particules by infected cells, is also included.
  // isDescribedBy pubmed:18316099
  // isDerivedFrom pubmed:11309314
  // biomodels.db:MODEL1907310005 biomodels.db:BIOMD0000000771
  // hasProperty mamo:MAMO_0000046
  // hasProperty ncit:C62713

  // Compartments:
  compartment compartment = 1;  // isVersionOf ncit:C94498

  // Species:
  species y_Tumor_Cell in compartment = 126.237;  // isVersionOf CL:0001063
  species v_Virus in compartment = 2;  // isVersionOf ncit:C717
  species x_Infected_Cell in compartment = 0;  // isVersionOf BTO:0000152

  // Parameters:
  r = 0.2062134;
  K = 2139.258;
  epsilon = 1.648773;
  kappa = 0.000448;
  rho = 0.608;
  delta = 0.309;
  alpha = 0.001;
  omega = 0.3;

  // Reactions:
  Tumor_Growth: => y_Tumor_Cell; compartment*Function_for_Tumor_Growth(r, y_Tumor_Cell, x_Infected_Cell, epsilon, K);  // modifiers: x_Infected_Cell; isVersionOf ncit:C18081
  Tumor_Cell_Infection: y_Tumor_Cell + v_Virus => x_Infected_Cell; compartment*kappa*y_Tumor_Cell*v_Virus;  // isVersionOf ncit:C3439
  Tumor_Cell_Fusion: y_Tumor_Cell => ; compartment*Function_for_Tumor_Cell_Fusion(rho, x_Infected_Cell, y_Tumor_Cell);  // modifiers: x_Infected_Cell; isVersionOf ncit:C16401
  Infected_Cell_Death: x_Infected_Cell => ; compartment*delta*x_Infected_Cell;  // isVersionOf GO:0008219
  Virus_Production_Infected_Cell: => v_Virus; compartment*Function_for_Virus_Production_Infected_Cell(alpha, x_Infected_Cell);  // modifiers: x_Infected_Cell; isVersionOf GO:0019076
  Virus_Elimination: v_Virus => ; compartment*omega*v_Virus;

  // Unit definitions:
  unit volume = 1e-3 litre;
  unit substance = 1e-3 mole;
end
