// SBML level 2 version 4
// dcterms:bibliographicCitation: urn:miriam:pubmed:31137188

function Function_for_Length_of_Eclipse_Phase(b, n, tau, x, y)
  b*exp(-n*tau)*x*y;
end

function Function_for_Stimulation(c, y, z)
  c*y*z;
end

function Function_for_Immune_Kill(p, y, z)
  p*y*z;
end

function Function_for_Uninfected_Cells_Proliferation(r, x, y, k)
  r*x*(1 - (x + y)/k);
end

model Wang2019_A_mathematical_model_of_oncolytic_virotherapy_with_time_delay()
  // A mathematical model describing oncolytic virotherapy with incorporation the viral lytic cycle and the virus-specific CTL response. The thresholds for viral treatment and virus-specific CTl response
  // are also obtained.
  // isDescribedBy pubmed:31137188
  // isDerivedFrom pubmed:11309314
  // biomodels.db:MODEL1908010001 biomodels.db:BIOMD0000000772
  // hasProperty ncit:C62713
  // hasProperty mamo:MAMO_0000089

  // Compartments:
  compartment compartment = 1;  // isVersionOf ncit:C94498

  // Species:
  species x in compartment = 200;  // isVersionOf CL:0000000
  species I in compartment = 0;  // isVersionOf GO:0098689
  species y in compartment = 800;  // isVersionOf BTO:0000152
  species z in compartment = 100;  // isVersionOf CL:0000910

  // Parameters:
  r = 0.206;
  k = 2139;
  b = 0.000448;
  tau = 0;
  a = 1;
  p = 0.01;
  c = 0.02;
  d = 0.5;
  n = 0.01;

  // Reactions:
  Uninfected_Cells_Proliferation: => x; compartment*Function_for_Uninfected_Cells_Proliferation(r, x, y, k);  // modifiers: y; isVersionOf ncit:C18081
  Uninfected_Cells_Infection: x + y => I; compartment*b*x*y;  // isVersionOf ncit:C3439
  Length_of_Eclipse_Phase: I => y; compartment*Function_for_Length_of_Eclipse_Phase(b, n, tau, x, y);  // modifiers: x; isVersionOf GO:0098689
  Cytotoxicity: y => ; compartment*a*y;  // isVersionOf ncit:C27988
  Immune_Kill: y => ; compartment*Function_for_Immune_Kill(p, y, z);  // modifiers: z; isVersionOf GO:0001906
  Stimulation: => z; compartment*Function_for_Stimulation(c, y, z);  // modifiers: y; isVersionOf ncit:C39042
  Clearance: z => ; compartment*d*z;  // isVersionOf GO:0008219

  // Unit definitions:
  unit volume = 1e-3 litre;
  unit time = 86400 second;
  unit substance = 1e-3 mole;
end
