// SBML level 3 version 1
// dcterms:bibliographicCitation: urn:miriam:pubmed:25596516

function rateOf(a)
  NaN;
end

function death(beta, sub, mod)
  beta*sub*mod;
end

function logistic(o, cell)
  o*cell*(1 - cell);
end

function n(a, gg, H, N)
  a*gg*H*N;
end
n is "n+";

function Constant_flux__irreversible(v)
  v;
end
Constant_flux__irreversible is "Constant flux (irreversible)";

function kill(p, sub, Q, a)
  p*sub*Q/(a + sub);
end

model Iarosz2015___brain_tumor()
  // Iarosz2015 - brain tumor
  // The paper describes a model of brain tumor. Created by COPASI 4.25 (Build 207) This model is described in the article: Mathematical model of brain tumour with glia-neuron interactions and chemotherapy treatment Kelly C. Iarosz, Fernando S. Borges, Antonio M. Batista, Murilo S. Baptista, Regiane A. N. Siqueira, Ricardo L. Viana, Sergio R. Lopes Abstract: In recent years, it became clear that a better understanding of the interactions among the main elements involved in the cancer network is necessary for the treatment of cancer and the suppression of cancer growth. In this work we propose a system of coupled differential equations that model brain tumour under treatment by chemotherapy, which considers interactions among the glial cells, the glioma, the neurons, and the chemotherapeutic agents. We study the conditions for the glioma growth to be eliminated, and identify values of the parameters for which the inhibition of the glioma growth is obtained with a minimal loss of healthy cells. To cite BioModels Database, please use: BioModels Database: An enhanced, curated and annotated resource for published quantitative kinetic models . To the extent possible under law, all copyright and related or neighbouring rights to this encoded model have been dedicated to the public domain worldwide. Please refer to CC0 Public Domain Dedication for more information.
  // isDescribedBy pubmed:25596516
  // biomodels.db:MODEL1908020001 biomodels.db:BIOMD0000000775
  // hasProperty mamo:MAMO_0000046
  // hasProperty GO:0002418
  // hasProperty efo:0003833
  // hasProperty ncit:C15632
  // model units - substance: substance, time: time, volume: volume, area: area, length: length, extent: substance

  // Compartments:
  compartment tme = 1 volume;  // isVersionOf ncit:C94498

  // Species:
  // glial cell
  species G in tme = 0.99;  // isVersionOf CL:0000125
  // glioma cell
  species C in tme = 0.01;  // isVersionOf BTO:0000526
  // neuron cell
  species N in tme = 0.99;  // isVersionOf CL:0000540
  // chemotherapy drug
  species Q in tme = 0;  // isVersionOf ncit:C15632

  // Parameters:
  // GC proliferation rate
  o1 = 0.0068 unit_0;
  // competition coeff. rate
  b1 = 0.018 unit_0;  // isVersionOf ncit:C25636
  // interaction coeff. rate
  p1 = 4.7e-8 unit_0;  // isVersionOf ncit:C25636
  // half saturation const. for GC
  a1 = 1 unit_1;
  // CC proliferation rate
  o2 = 0.012 unit_0;
  // competition coeff. rate
  b2 = 0.0018 unit_0;  // isVersionOf ncit:C25636
  // interaction coeff. rate
  p2 = 4.7e-5 unit_0;  // isVersionOf ncit:C25636
  // half saturation const. for CC
  a2 = 1 unit_1;
  // 0-10
  // loss influences
  a = 2 unit_1;  // isVersionOf ncit:C84380
  // interaction coeff. rate
  p3 = 4.7e-8 unit_0;  // isVersionOf ncit:C25636
  // half saturation const. for N
  a3 = 1 unit_1;
  // 0 or 100
  // chemotherapy rate
  fi = 100 unit_0;  // isVersionOf ncit:C25636
  // chemotherapy agent decay rate
  zeta = 0.2 unit_0;  // isVersionOf ncit:C25636
  // heaviside step function
  H has unit_1;  // isVersionOf ncit:C54025
  gg has unit_0;  // isVersionOf ncit:C25636

  // Assignment rules:
  gg := rateOf(G);
  H := piecewise(0, -gg < 0, piecewise(1, -gg > 0, 0.5));

  // Reactions:
  gc_growth: => G; tme*logistic(o1, G);  // GO:0014009; isVersionOf GO:0008283
  gc_death: G => ; tme*death(b1, G, C);  // modifiers: C; isVersionOf GO:0008219
  gc_killing: G => ; tme*kill(p1, G, Q, a1);  // modifiers: Q; isVersionOf GO:0008219
  cc_growth: => C; tme*logistic(o2, C);  // isVersionOf GO:0008283
  cc_death: C => ; tme*death(b2, C, G);  // modifiers: G; isVersionOf GO:0008219
  cc_killing: C => ; tme*kill(p2, C, Q, a2);  // modifiers: Q; isVersionOf GO:0008219
  n_increase: => N; tme*n(a, gg, H, N);  // modifiers: G; isVersionOf GO:0008283
  n_killing: N => ; tme*kill(p3, N, Q, a3);  // modifiers: Q; isVersionOf GO:0008219
  chemotherapy: => Q; tme*Constant_flux__irreversible(fi);  // isVersionOf ncit:C15632
  drug_decay: Q => ; tme*zeta*Q;

  // Unit definitions:
  unit length = metre;
  unit area = metre^2;
  unit volume = 1e-3 litre;
  unit time = 86400 second;
  unit substance = 1e-3 mole;
  unit unit_0 = 1 / (8640 second); unit_0 is "1/d";
  unit unit_1 = dimensionless^0;
end
