// SBML level 3 version 1
// dcterms:bibliographicCitation: urn:miriam:pubmed:19135065

function resistance_0(t1, S, t2, R, b, N, Ninf)
  -b*ln(N/Ninf)*(t1*S - t2*R);
end

function sd(b, N, Ninf, C0, S)
  -b*ln(N/Ninf)*C0*S;
end

function growth(b, N, Ninf, pro)
  -b*ln(N/Ninf)*pro;
end

model Monro2008___chemotherapy_resistance()
  // Monro2008 - chemotherapy resistance
  // The paper describes a model of resistance of cancer to chemotherapy. Created by COPASI 4.25 (Build 207) This model is described in the article: Modelling chemotherapy resistance in palliation and failed cure Helen C. Monro, Eamonn A. Gaffney J Theor Biol. 2009, 257 (2), pp.292 Abstract: The goal of palliative cancer chemotherapy treatment is to prolong survival and improve quality of life when tumour eradication is not feasible. Chemotherapy protocol design is considered in this context using a simple, robust, model of advanced tumour growth with Gompertzian dynamics, taking into account the effects of drug resistance. It is predicted that reduced chemotherapy protocols can readily lead to improved survival times due to the effects of competition between resistant and sensitive tumour cells. Very early palliation is also predicted to quickly yield near total tumour resistance and thus decrease survival duration. Finally, our simulations indicate that failed curative attempts using dose densification, a common protocol escalation strategy, can reduce survival times. To cite BioModels Database, please use: BioModels Database: An enhanced, curated and annotated resource for published quantitative kinetic models . To the extent possible under law, all copyright and related or neighbouring rights to this encoded model have been dedicated to the public domain worldwide. Please refer to CC0 Public Domain Dedication for more information.
  // isDescribedBy pubmed:19135065
  // hasProperty ncit:C15632
  // hasProperty mamo:MAMO_0000046
  // hasTaxon taxonomy:9606
  // biomodels.db:MODEL1908020002 biomodels.db:BIOMD0000000776
  // model units - substance: substance, time: time, volume: volume, area: area, length: length, extent: substance

  // Compartments:
  compartment tme = 1 volume;  // isVersionOf ncit:C94498

  // Species:
  // sensitive cell
  species S in tme = 1e10;  // isVersionOf CL:0001064
  // resistant cell
  species R in tme = 200000;  // isVersionOf CL:0001064

  // Parameters:
  // Rate of growth retardation
  // 0.005928/d=2.47e-4/h
  b = 0.005928 unit_0;  // isVersionOf ncit:C25636
  // total number of cells
  N has unit_1;  // isVersionOf CL:0001064
  // Level of chemotherapy cell kill, 0-40
  // =0/0.74/0.9/2
  C0 = 2 unit_1;  // isVersionOf ncit:C48922
  // Mutation to resistance per cell cycle
  t1 = 1e-6 unit_1;  // isVersionOf ncit:C25636
  // Back-mutation to sensitivity per cell cycle
  t2 = 1e-6 unit_1;  // isVersionOf ncit:C25636
  // Saturating number of cells in absence of therapy
  Ninf = 2e12 unit_1;
  // Critical (fatal) number of cells, tumor diameter=10cm
  Ncrit = 5e11 unit_1;

  // Assignment rules:
  N := R + S;

  // Reactions:
  sensitive_cell_growth: => S; tme*growth(b, N, Ninf, S);  // isVersionOf GO:0000828
  sensitive_cell_death: S => ; tme*sd(b, N, Ninf, C0, S);  // isVersionOf GO:0008219
  resistance: S -> R; tme*resistance_0(t1, S, t2, R, b, N, Ninf);
  resistant_cell_growth: => R; tme*growth(b, N, Ninf, R);  // isVersionOf GO:0000828

  // Unit definitions:
  unit length = metre;
  unit area = metre^2;
  unit volume = 1e-3 litre;
  unit time = 86400 second;
  unit substance = 1e-3 mole;
  unit unit_0 = 1 / (8640 second); unit_0 is "1/d";
  unit unit_1 = dimensionless^0;
end
