// SBML level 2 version 4
// dcterms:bibliographicCitation: urn:miriam:doi:10.1142/S0218339010003226

function Function_for_Tumor_Growth(r_1, M, k_1)
  r_1*M*(1 - M/k_1);
end

function Function_for_Tumor_Killing_T_Cells(alpha_1, M, N)
  alpha_1*M*N;
end

function Function_for_THL_Decay_IL_2(mu_2, N, Z)
  mu_2*N*Z;
end
Function_for_THL_Decay_IL_2 is "Function_for_THL_Decay_IL-2";

function Function_for_CTL_Recruitment(mu_2, N, Z)
  mu_2*N*Z;
end

function Function_for_CTL_Decay(alpha_2, M, N)
  alpha_2*M*N;
end

model Chakrabarty2010___A_control_theory_approach_to_cancer_remission_aided_by_an_optimal_therapy()
  // Chakrabarty2010 - A control theory approach to cancer remission aided by an optimal therapy
  // This is a reinvestigation of a previous model depicting cancer remission. It involves application of mathematical tools from control theory to assess the optimal approach during the use of Adaptive
  // Cellular Immunotherapy and interleukin-2 treatment.
  // isDescribedBy doi:10.1142/S0218339010003226
  // isDerivedFrom pubmed:18083299
  // biomodels.db:MODEL1908040001 biomodels.db:BIOMD0000000777
  // hasProperty ncit:C18246
  // hasProperty mamo:MAMO_0000046

  // Compartments:
  compartment compartment = 1;  // isVersionOf ncit:C94498

  // Species:
  species M_Tumor_Cells in compartment = 2750000;  // isVersionOf ncit:C12922
  species N_CTL in compartment = 200000;  // isVersionOf CL:0000910
  species Z_THL in compartment = 7200000;  // isVersionOf CL:0000912

  // Parameters:
  r_1 = 0.18;
  k_1 = 5000000;
  alpha_1 = 1.101e-7;
  d_1 = 0.0412;
  alpha_2 = 3.422e-10;
  r_2 = 0.0245;
  k_2 = 10000000;
  mu_1 = 0.05;
  mu_2 = 0;

  // Reactions:
  Tumor_Growth: => M_Tumor_Cells; compartment*Function_for_Tumor_Growth(r_1, M_Tumor_Cells, k_1);  // isVersionOf ncit:C18081
  Tumor_Killing_T_Cells: M_Tumor_Cells => ; compartment*Function_for_Tumor_Killing_T_Cells(alpha_1, M_Tumor_Cells, N_CTL);  // modifiers: N_CTL; isVersionOf GO:0001906
  CTL_Recruitment: => N_CTL; compartment*Function_for_CTL_Recruitment(mu_2, N_CTL, Z_THL);  // modifiers: Z_THL; isVersionOf GO:0072683
  CTL_Death: N_CTL => ; compartment*d_1*N_CTL;  // isVersionOf GO:0008219
  CTL_Decay: N_CTL => ; compartment*Function_for_CTL_Decay(alpha_2, M_Tumor_Cells, N_CTL);  // modifiers: M_Tumor_Cells; isVersionOf ncit:C15351
  THL_Growth: => Z_THL; compartment*Function_for_Tumor_Growth(r_2, Z_THL, k_2);  // isVersionOf ncit:C18081
  THL_Decay_IL_2: Z_THL => ; compartment*Function_for_THL_Decay_IL_2(mu_2, N_CTL, Z_THL); THL_Decay_IL_2 is "THL_Decay_IL-2";  // modifiers: N_CTL; isVersionOf ncit:C15543
  Tumor_Killing_ACI: M_Tumor_Cells => ; compartment*mu_1*M_Tumor_Cells;  // isVersionOf ncit:C15351

  // Unit definitions:
  unit volume = 1e-3 litre;
  unit time = 86400 second;
  unit substance = item;
end
