// SBML level 2 version 4
// dcterms:bibliographicCitation: urn:miriam:doi:10.1080/17486700802216301

function Constant_flux__irreversible(v)
  v;
end
Constant_flux__irreversible is "Constant flux (irreversible)";

function Function_for_CD8_T_Cell_Death_Medicine(K_L, delta_L, M, L)
  K_L*(1 - exp(-1*delta_L*M))*L;
end

function Function_for_Lymphocyte_Synthesis_Turnover_Bone_Marrow(beta, alphabeta, C)
  beta*(alphabeta - C);
end

function Function_for_CD8_T_Cell_Stimulation_IL_2(p_I, L, I, g_I)
  p_I*L*I/(g_I + I);
end
Function_for_CD8_T_Cell_Stimulation_IL_2 is "Function_for_CD8_T_Cell_Stimulation_IL-2";

function Function_for_IL_2_Production_Activated_CD8(omega, L, I, zeta)
  omega*L*I/(zeta + I);
end
Function_for_IL_2_Production_Activated_CD8 is "Function_for_IL-2_Production_Activated_CD8";

function Function_for_NK_Production_and_Turnover(f, ef, C, N)
  f*(ef*C - N);
end

function Function_for_CD8_T_Cell_Stimulation_NK(r_1, N, T)
  r_1*N*T;
end

function Function_for_CD8_Breakdown_Stimulation_IL_2(u, L, C, I, kappa)
  u*L^2*C*I/(kappa + I);
end
Function_for_CD8_Breakdown_Stimulation_IL_2 is "Function_for_CD8_Breakdown_Stimulation_IL-2";

function Function_for_NK_Death_Medicine(M, K_N, delta_N, N)
  K_N*(1 - exp(-1*delta_N*M))*N;
end

function Function_for_Logistic_Tumour_Growth(a, T, b)
  a*T*(1 - b*T);
end

function Function_for_CD8_T_Cell_Turnover(phi, m, L, I)
  phi*m*L/(phi + I);
end

function Function_for_NK_Induced_Tumour_Death(c, N, T)
  c*N*T;
end
Function_for_NK_Induced_Tumour_Death is "Function_for_NK-Induced_Tumour_Death";

function Function_for_CD8_T_Cell_Stimulation_Tumour_Debris(j, T, L, k)
  j*T*L/(k + T);
end

function Function_for_NK_Stimulation_IL_2(p_N, N, I, g_N)
  p_N*N*I/(g_N + I);
end
Function_for_NK_Stimulation_IL_2 is "Function_for_NK_Stimulation_IL-2";

function Function_for_Lymphocyte_Death_Medicine(K_C, delta_C, M, C)
  K_C*(1 - exp(-1*delta_C*M))*C;
end

function Function_for_IL_2_Production_Naive(phi, C)
  phi*C;
end
Function_for_IL_2_Production_Naive is "Function_for_IL-2_Production_Naive";

function Function_for_Chemotherapy_Induced_Tumour_Death(K_T, delta_T, M, T)
  K_T*(1 - exp(-1*delta_T*M))*T;
end
Function_for_Chemotherapy_Induced_Tumour_Death is "Function_for_Chemotherapy-Induced_Tumour_Death";

function Function_for_NK_Death_Tumour_Killing(p, N, T)
  p*N*T;
end

function Function_for_CD8_T_Cell_Death_Tumour_Killing(q, L, T)
  q*L*T;
end

model dePillis2009___Mathematical_model_creation_for_cancer_chemo_immunotherapy()
  // dePillis2009 - Mathematical model creation for cancer chemo-immunotherapy
  // This is an updated version of a previous model that described the dynamics of cancer treatment, with descriptions of tumour cell numbers, specific and non-specific immune cells (NK, CD8+ T cells and
  // other lymphocytes) with inclusion of chemo- and immunotherapy. This model incorporates new data to provide an improved and more comprehensive model, with specific emphasis on better descriptions of
  // IL-2 dynamics.
  // isDescribedBy doi:10.1080/17486700802216301
  // biomodels.db:MODEL1908050002 biomodels.db:BIOMD0000000779
  // hasProperty mamo:MAMO_0000046
  // hasProperty ncit:C15543
  // hasProperty ncit:C15632

  // Compartments:
  compartment compartment = 1;  // isVersionOf ncit:C94498

  // Species:
  species T_Tumour_Cells in compartment = 10000000;  // isVersionOf ncit:C12922
  species N_Natural_Killer_Cells in compartment = 250000000;  // CL:0000623
  species L_CD8_T_Cells in compartment = 526800;  // isVersionOf ncit:C12542
  species C_Lymphocytes in compartment = 2.25e9;  // isVersionOf CL:0000542
  species M_Chemotherapy_Drug in compartment = 0;  // CHEBI:28748
  species I_IL_2 in compartment = 1073; I_IL_2 is "I_IL-2";  // uniprot:Q0GK43

  // Parameters:
  a = 0.431;
  b = 1.02e-9;
  c = 2.9077e-13;
  K_T = 0.9;
  delta_T = 1.8328;
  ef = 0.111;
  f = 0.0125;
  p = 2.794e-13;
  p_N = 0.068;
  g_N = 250360;
  K_N = 0.0675;
  delta_N = 1.8328;
  m = 0.009;
  theta = 0.0025036;
  q = 3.422e-10;
  r_1 = 2.9077e-11;
  r_2 = 5.8467e-13;
  p_I = 2.971;
  g_I = 2503.6;
  u = 4.417e-14;
  kappa = 2503.6;
  j = 0.01245;
  k = 20190000;
  K_L = 0.0486;
  delta_L = 1.8328;
  alphabeta = 2.25e9;
  beta = 0.0063;
  K_C = 0.034;
  delta_C = 1.8328;
  gamma = 0.5199;
  mu_I = 11.7427;
  omega = 0.07874;
  phi = 2.38405e-7;
  zeta = 2503.6;
  d = 0;
  l = 0;
  s = 0;
  v_M = 0;
  v_I = 0;
  v_L = 0;
  ModelValue_34_0 = d; ModelValue_34_0 is "Initial for d";
  ModelValue_35_0 = l; ModelValue_35_0 is "Initial for l";
  ModelValue_36_0 = s; ModelValue_36_0 is "Initial for s";

  // Assignment rules:
  D := ModelValue_34_0*((L_CD8_T_Cells/T_Tumour_Cells)^ModelValue_35_0/(ModelValue_36_0 + (L_CD8_T_Cells/T_Tumour_Cells)^ModelValue_35_0));

  // Reactions:
  Logistic_Tumour_Growth: => T_Tumour_Cells; compartment*Function_for_Logistic_Tumour_Growth(a, T_Tumour_Cells, b);  // isVersionOf ncit:C18081
  NK_Induced_Tumour_Death: T_Tumour_Cells => ; compartment*Function_for_NK_Induced_Tumour_Death(c, N_Natural_Killer_Cells, T_Tumour_Cells); NK_Induced_Tumour_Death is "NK-Induced_Tumour_Death";  // modifiers: N_Natural_Killer_Cells; isVersionOf GO:0042267
  CD8_T_Cell_Induced_Tumour_Death: T_Tumour_Cells => ; compartment*D*T_Tumour_Cells; CD8_T_Cell_Induced_Tumour_Death is "CD8_T_Cell-Induced_Tumour_Death";  // isVersionOf GO:0008219
  Chemotherapy_Induced_Tumour_Death: T_Tumour_Cells => ; compartment*Function_for_Chemotherapy_Induced_Tumour_Death(K_T, delta_T, M_Chemotherapy_Drug, T_Tumour_Cells); Chemotherapy_Induced_Tumour_Death is "Chemotherapy-Induced_Tumour_Death";  // modifiers: M_Chemotherapy_Drug; isVersionOf GO:0008219
  NK_Death_Tumour_Killing: N_Natural_Killer_Cells => ; compartment*Function_for_NK_Death_Tumour_Killing(p, N_Natural_Killer_Cells, T_Tumour_Cells);  // modifiers: T_Tumour_Cells; isVersionOf GO:0008219
  NK_Stimulation_IL_2: => N_Natural_Killer_Cells; compartment*Function_for_NK_Stimulation_IL_2(p_N, N_Natural_Killer_Cells, I_IL_2, g_N); NK_Stimulation_IL_2 is "NK_Stimulation_IL-2";  // modifiers: I_IL_2; isVersionOf GO:0032819
  NK_Death_Medicine: N_Natural_Killer_Cells => ; compartment*Function_for_NK_Death_Medicine(M_Chemotherapy_Drug, K_N, delta_N, N_Natural_Killer_Cells);  // modifiers: M_Chemotherapy_Drug; isVersionOf GO:0008219
  CD8_T_Cell_Turnover: L_CD8_T_Cells => ; compartment*Function_for_CD8_T_Cell_Turnover(phi, m, L_CD8_T_Cells, I_IL_2);  // modifiers: I_IL_2; isVersionOf GO:0042098
  CD8_T_Cell_Death_Tumour_Killing: L_CD8_T_Cells => ; compartment*Function_for_CD8_T_Cell_Death_Tumour_Killing(q, L_CD8_T_Cells, T_Tumour_Cells);  // modifiers: T_Tumour_Cells; isVersionOf GO:0008219
  CD8_T_Cell_Stimulation_NK: => L_CD8_T_Cells; compartment*Function_for_CD8_T_Cell_Stimulation_NK(r_1, N_Natural_Killer_Cells, T_Tumour_Cells);  // modifiers: N_Natural_Killer_Cells, T_Tumour_Cells; isVersionOf GO:0031294
  CD8_T_Cell_Activation: => L_CD8_T_Cells; compartment*Function_for_CD8_T_Cell_Stimulation_NK(r_2, C_Lymphocytes, T_Tumour_Cells);  // modifiers: C_Lymphocytes, T_Tumour_Cells; isVersionOf GO:0036037
  CD8_Breakdown_Stimulation_IL_2: L_CD8_T_Cells => ; compartment*Function_for_CD8_Breakdown_Stimulation_IL_2(u, L_CD8_T_Cells, C_Lymphocytes, I_IL_2, kappa); CD8_Breakdown_Stimulation_IL_2 is "CD8_Breakdown_Stimulation_IL-2";  // modifiers: C_Lymphocytes, I_IL_2; isVersionOf GO:0008219
  CD8_T_Cell_Stimulation_Tumour_Debris: => L_CD8_T_Cells; compartment*Function_for_CD8_T_Cell_Stimulation_Tumour_Debris(j, T_Tumour_Cells, L_CD8_T_Cells, k);  // modifiers: T_Tumour_Cells; isVersionOf GO:0043378
  CD8_T_Cell_Death_Medicine: L_CD8_T_Cells => ; compartment*Function_for_CD8_T_Cell_Death_Medicine(K_L, delta_L, M_Chemotherapy_Drug, L_CD8_T_Cells);  // modifiers: M_Chemotherapy_Drug; isVersionOf GO:0008219
  Lymphocyte_Synthesis_Turnover_Bone_Marrow: => C_Lymphocytes; compartment*Function_for_Lymphocyte_Synthesis_Turnover_Bone_Marrow(beta, alphabeta, C_Lymphocytes);  // isVersionOf ncit:C18081
  Lymphocyte_Death_Medicine: C_Lymphocytes => ; compartment*Function_for_Lymphocyte_Death_Medicine(K_C, delta_C, M_Chemotherapy_Drug, C_Lymphocytes);  // modifiers: M_Chemotherapy_Drug; isVersionOf GO:0008219
  Medicine_Excretion: M_Chemotherapy_Drug => ; compartment*gamma*M_Chemotherapy_Drug;  // isVersionOf GO:0007588
  IL_2_Turnover: I_IL_2 => ; compartment*mu_I*I_IL_2; IL_2_Turnover is "IL-2_Turnover";  // isVersionOf GO:0030163
  IL_2_Production_Naive: => I_IL_2; compartment*Function_for_IL_2_Production_Naive(phi, C_Lymphocytes); IL_2_Production_Naive is "IL-2_Production_Naive";  // modifiers: C_Lymphocytes; isVersionOf GO:0006412
  IL_2_Production_Activated_CD8: => I_IL_2; compartment*Function_for_IL_2_Production_Activated_CD8(omega, L_CD8_T_Cells, I_IL_2, zeta); IL_2_Production_Activated_CD8 is "IL-2_Production_Activated_CD8";  // modifiers: L_CD8_T_Cells; isVersionOf GO:0006412
  Medicine_Injection: => M_Chemotherapy_Drug; compartment*Constant_flux__irreversible(v_M);  // isVersionOf ncit:C149592
  NK_Production_and_Turnover: => N_Natural_Killer_Cells; compartment*Function_for_NK_Production_and_Turnover(f, ef, C_Lymphocytes, N_Natural_Killer_Cells);  // modifiers: C_Lymphocytes; hasPart NCIT:C18081; hasPart GO:0008219
  CD8_T_Cell_Stimulation_IL_2: => L_CD8_T_Cells; compartment*Function_for_CD8_T_Cell_Stimulation_IL_2(p_I, L_CD8_T_Cells, I_IL_2, g_I); CD8_T_Cell_Stimulation_IL_2 is "CD8_T_Cell_Stimulation_IL-2";  // modifiers: I_IL_2; isVersionOf GO:0031294
  IL_2_Injection: => I_IL_2; compartment*Constant_flux__irreversible(v_I); IL_2_Injection is "IL-2_Injection";  // isVersionOf ncit:C149592
  CD8_T_Cell_Activated_Injection: => L_CD8_T_Cells; compartment*Constant_flux__irreversible(v_L);  // isVersionOf ncit:C149592

  // Unit definitions:
  unit time = 86400 second;
  unit substance = item;
end
