// SBML level 3 version 1
// dcterms:bibliographicCitation: urn:miriam:pubmed:26976483

function Constant_flux__irreversible(v)
  v;
end
Constant_flux__irreversible is "Constant flux (irreversible)";

function death(d, e, sub)
  (d + e)*sub;
end

function decrease(u, sub, mod)
  u*sub*mod;
end

function growth(r, mod, pro, u)
  r*u*mod*pro;
end

model Wang2016_3___oncolytic_efficacy_of_M1_virus_SN_model()
  // Wang2016/3 - oncolytic efficacy of M1 virus-SN model
  // The paper describes a basic model of oncolytic virotherapy. Created by COPASI 4.25 (Build 207) This model is described in the article: A mathematical model verifying potent oncolytic efficacy of M1 virus Zizi Wang, Zhiming Guo, Huaqin Peng Mathematical Biosciences 276 (2016) 19–27 Abstract: Motivated by the latest findings in a recent medical experiment [19] which identify a naturally occurring alphavirus (M1) as a novel selective killer targeting zinc-finger antiviral protein (ZAP)-deficient cancer cells, we propose a mathematical model to illustrate the growth of normal cells, tumor cells and the M1 virus with limited nutrient. In order to better understand biological mechanisms, we discuss two cases of the model: without competition and with competition. In the first part, the explicit threshold condi- tions for the persistence of normal cells (or tumor cells) is obtained accompanying with the biological explanations. The second part indicates that when competing with tumor cells, the normal cells will ex- tinct if M1 virus is ignored; Whereas, when M1 virus is considered, the growth trend of normal cells is similar to the one without competition. And by using uniformly strong repeller theorem, the minimum effective dosage of medication is explicitly found which is not reported in [19]. Furthermore, numerical simulations and corresponding biological interpretations are given to support our results. To cite BioModels Database, please use: BioModels Database: An enhanced, curated and annotated resource for published quantitative kinetic models . To the extent possible under law, all copyright and related or neighbouring rights to this encoded model have been dedicated to the public domain worldwide. Please refer to CC0 Public Domain Dedication for more information.
  // isDerivedFrom ncit:C62713 mamo:MAMO_0000046 GO:0002418 taxonomy:9606 biomodels.db:MODEL1908060001
  // isDerivedFrom biomodels.db:BIOMD0000000781
  // isDerivedFrom biomodels.db:BIOMD0000000780
  // isDerivedFrom biomodels.db:MODEL1908060002
  // isDescribedBy biomodels.db:MODEL1908060001 biomodels.db:BIOMD0000000781 biomodels.db:BIOMD0000000780 biomodels.db:MODEL1908060002 pubmed:26976483
  // biomodels.db:MODEL1908060003 biomodels.db:BIOMD0000000782
  // model units - substance: substance, time: time, volume: volume, area: area, length: length, extent: substance

  // Compartments:
  compartment tme = 1 volume;  // isVersionOf ncit:C94498

  // Species:
  // nutrient
  // =0.1/0.5/0.5
  species S in tme = 0.1;  // isVersionOf ncit:C1814
  // normal cell
  // =0.2/0.8/0.8
  species N in tme = 0.2;  // isVersionOf CL:0000000

  // Parameters:
  // recruitment rate of nutrient
  a = 0.02 unit_0;  // isVersionOf ncit:C25636
  // washout rate of nutrient and bacteri
  d = 0.02 unit_0;  // isVersionOf ncit:C25636
  // growth rate of normal cell
  // =0.2/0.03/0.2
  u1 = 0.2 unit_0;
  // yield constant of nutrient to biomass of normal cell
  r1 = 0.8 unit_0;  // isVersionOf ncit:C84380
  // death rate of normal cell
  // =0.01/0.01/0.14
  e1 = 0.01 unit_0;  // isVersionOf ncit:C25636
  // absorbing number
  Q1 has unit_0;  // isVersionOf ncit:C84380

  // Assignment rules:
  Q1 := a*r1*u1/(d*(d + e1));

  // Reactions:
  nutrient_supply: => S; tme*Constant_flux__irreversible(a);
  nutrient_decay: S => ; tme*d*S;
  nutrient_consumption_N: S => ; tme*decrease(u1, S, N);  // modifiers: N
  normal_cell_growth: => N; tme*growth(r1, S, N, u1);  // modifiers: S
  normal_cell_death: N => ; tme*death(d, e1, N);

  // Unit definitions:
  unit length = metre;
  unit area = metre^2;
  unit volume = 1e-3 litre;
  unit time = second;
  unit substance = 1e-3 mole;
  unit unit_0 = dimensionless^0; unit_0 is "1";
end
