// SBML level 2 version 4
// dcterms:bibliographicCitation: urn:miriam:doi:10.3934/dcdsb.2014.19.55

function Constant_flux__irreversible(v)
  v;
end
Constant_flux__irreversible is "Constant flux (irreversible)";

function Function_for_Tumor_Growth(alpha, x, beta)
  alpha*x*(1 - beta*x);
end

function Function_for_Tumor_Killing_ECs(x, y)
  x*y;
end

function Function_for_EC_Stimulation_Tumor_Debris(omega_1, x, y)
  omega_1*x*y;
end

function Function_for_EC_Activation_HTC(rho, y, z)
  rho*y*z;
end

function Function_for_HTC_Stimulation_Tumor_Antigens(omega_2, x, z)
  omega_2*x*z;
end

model Dong2014___Mathematical_modeling_on_helper_t_cells_in_a_tumor_immune_system()
  // Dong2014 - Mathematical modeling on helper t cells in a tumor immune system
  // This model gives a mathematical description of the interactions between tumor cells, cytotoxic T lymphocytes and helper T cells (HTCs) within the tumor microenvironment, with emphasis on the role
  // played by HTCs. The effects and dynamics of adoptive cell immunotherapy and HTC recruitment are also specifically discussed.
  // isDescribedBy doi:10.3934/dcdsb.2014.19.55
  // isDerivedFrom pubmed:8186756
  // biomodels.db:MODEL1908080001 biomodels.db:BIOMD0000000783
  // hasProperty ncit:C15351
  // hasProperty mamo:MAMO_0000046

  // Compartments:
  compartment compartment = 1;  // isVersionOf ncit:C94498

  // Species:
  species x_Tumor_Cells in compartment = 1;  // CL:0001063
  species y_Effector_Cells in compartment = 1;  // isVersionOf ncit:C28241
  species z_Helper_T_Cells in compartment = 1;  // CL:0000912

  // Parameters:
  alpha = 1.636;
  beta = 0.002;
  delta_1 = 0.3743;
  omega_1 = 0.04;
  sigma_2 = 0.38;
  delta_2 = 0.055;
  rho = 0.01;
  omega_2 = 0.002;

  // Reactions:
  Tumor_Growth: => x_Tumor_Cells; compartment*Function_for_Tumor_Growth(alpha, x_Tumor_Cells, beta);  // isVersionOf ncit:C18081
  Tumor_Killing_ECs: x_Tumor_Cells => ; compartment*Function_for_Tumor_Killing_ECs(x_Tumor_Cells, y_Effector_Cells);  // modifiers: y_Effector_Cells; isVersionOf GO:0008219
  EC_Stimulation_Tumor_Debris: => y_Effector_Cells; compartment*Function_for_EC_Stimulation_Tumor_Debris(omega_1, x_Tumor_Cells, y_Effector_Cells);  // modifiers: x_Tumor_Cells; isVersionOf GO:0042110
  EC_Natural_Death: y_Effector_Cells => ; compartment*delta_1*y_Effector_Cells;  // isVersionOf GO:0008219
  EC_Activation_HTC: => y_Effector_Cells; compartment*Function_for_EC_Activation_HTC(rho, y_Effector_Cells, z_Helper_T_Cells);  // modifiers: z_Helper_T_Cells; isVersionOf GO:0042110
  HTC_Production: => z_Helper_T_Cells; compartment*Constant_flux__irreversible(sigma_2);  // isVersionOf ncit:C18081
  HTC_Stimulation_Tumor_Antigens: => z_Helper_T_Cells; compartment*Function_for_HTC_Stimulation_Tumor_Antigens(omega_2, x_Tumor_Cells, z_Helper_T_Cells);  // modifiers: x_Tumor_Cells; isVersionOf GO:0042110
  HTC_Natural_Death: z_Helper_T_Cells => ; compartment*delta_2*z_Helper_T_Cells;  // isVersionOf GO:0008219

  // Unit definitions:
  unit volume = 1e-3 litre;
  unit time = 86400 second;
  unit substance = item;
end
