// SBML level 2 version 4
// dcterms:bibliographicCitation: urn:miriam:pubmed:25348062

function Constant_flux__irreversible(v)
  v;
end
Constant_flux__irreversible is "Constant flux (irreversible)";

function Function_for_Healthy_Cells_Competition_Tumor(a_21, x, y)
  a_21*x*y;
end

function Function_for_Effector_Competition_Tumor(a_31, x, z)
  a_31*x*z;
end

function Function_for_Tumor_Competition_Healthy_Cells(a_12, y, x)
  a_12*y*x;
end

function Function_for_Tumor_Growth(x)
  x*(1 - x);
end

function Function_for_Helper_Cells_Production(r_2, y)
  r_2*y*(1 - y);
end

function Function_for_Effector_Recruitment(g, D_x_z, x, h)
  g*D_x_z^2*x^2/(h + D_x_z^2*x^2);
end

model L_pez2014___A_Validated_Mathematical_Model_of_Tumor_Growth_Including_Tumor_Host_Interaction_and_Cell_Mediated_Immune_Response()
  // Lopez2014 - A Validated Mathematical Model of Tumor Growth Including Tumor-Host Interaction and Cell-Mediated Immune Response
  // This is a dynamical model of cancer growth that includes three interacting cell populations of tumor cells, healthy host cells and immune effector cells. The tumor-immune and the tumor-host
  // interactions are characterized to reproduce experimental results.
  // isDescribedBy pubmed:25348062
  // isDerivedFrom pubmed:16140967
  // biomodels.db:MODEL1908090001 biomodels.db:BIOMD0000000784
  // hasProperty GO:0002286
  // hasProperty mamo:MAMO_0000046
  // hasTaxon taxonomy:10090

  // Compartments:
  compartment compartment = 1;  // isVersionOf ncit:C94498

  // Species:
  species x_Tumor_Cells in compartment = 0.1;  // CL:0001063
  species y_Healthy_Cells in compartment = 0.9;  // isVersionOf CL:0000000
  species z_Effector_Cells in compartment = 0.2;  // CL:0000911

  // Parameters:
  a_12 = 0.195;
  d = 5;
  lambda = 0.21;
  s = 11.5;
  r_2 = 0.35;
  a_21 = 0.954;
  d_3 = 0.112;
  g = 0.29;
  h = 7.95e-11;
  a_31 = 5.25;
  Initial_for_d = d;
  Initial_for_lambda = lambda;
  Initial_for_s = s;

  // Assignment rules:
  h_x := Initial_for_s*x_Tumor_Cells^Initial_for_lambda;
  D_x_z := Initial_for_d*z_Effector_Cells^Initial_for_lambda/(h_x + z_Effector_Cells^Initial_for_lambda);

  // Reactions:
  Tumor_Growth: => x_Tumor_Cells; compartment*Function_for_Tumor_Growth(x_Tumor_Cells);  // isVersionOf ncit:C18081
  Tumor_Competition_Healthy_Cells: x_Tumor_Cells => ; compartment*Function_for_Tumor_Competition_Healthy_Cells(a_12, y_Healthy_Cells, x_Tumor_Cells);  // modifiers: y_Healthy_Cells; isVersionOf ncit:C20751
  Tumor_Killing: x_Tumor_Cells => ; compartment*D_x_z*x_Tumor_Cells;  // isVersionOf GO:0008219
  Healthy_Cells_Production: => y_Healthy_Cells; compartment*Function_for_Helper_Cells_Production(r_2, y_Healthy_Cells);  // isVersionOf ncit:C18081
  Healthy_Cells_Competition_Tumor: y_Healthy_Cells => ; compartment*Function_for_Healthy_Cells_Competition_Tumor(a_21, x_Tumor_Cells, y_Healthy_Cells);  // modifiers: x_Tumor_Cells; isVersionOf ncit:C20751
  Effector_Production_Constant: => z_Effector_Cells; compartment*Constant_flux__irreversible(v);  // isVersionOf ncit:C18081
    v = 1;
  Effector_Death: z_Effector_Cells => ; compartment*d_3*z_Effector_Cells;  // isVersionOf GO:0008219
  Effector_Recruitment: => z_Effector_Cells; compartment*Function_for_Effector_Recruitment(g, D_x_z, x_Tumor_Cells, h);  // modifiers: x_Tumor_Cells; isVersionOf GO:0072683
  Effector_Competition_Tumor: z_Effector_Cells => ; compartment*Function_for_Effector_Competition_Tumor(a_31, x_Tumor_Cells, z_Effector_Cells);  // modifiers: x_Tumor_Cells; isVersionOf ncit:C20751

  // Unit definitions:
  unit time = 86400 second;
  unit substance = item;
end
