// SBML level 2 version 4
// dcterms:bibliographicCitation: urn:miriam:pubmed:24759513

function Function_for_CTL_Recruitment(rho, r_c, V, C)
  rho*r_c*V^(2/3)*C;
end

function Function_for_Tumor_Growth(rho, r_t, V)
  rho*r_t*V^(2/3);
end

function Function_for_Tumor_Killing_CTL(rho, k, V, min_C)
  rho*k*V^(2/3)*min_C;
end

model Frascoli2014___A_dynamical_model_of_tumour_immunotherapy()
  // Frascoli2014 - A dynamical model of tumour immunotherapy
  // This is a coupled ordinary differential equation model of tumour-immune dynamics, accounting for biological and clinical factors which regulate the interaction rates of cytotoxic T lymphocytes on the
  // surface of the tumour mass.
  // isDescribedBy pubmed:24759513
  // biomodels.db:MODEL1908120001 biomodels.db:BIOMD0000000787
  // hasProperty GO:0002347
  // hasProperty GO:0001913
  // hasProperty mamo:MAMO_0000046
  // hasProperty GO:0002419

  // Compartments:
  compartment compartment = 1;  // isVersionOf ncit:C94498

  // Species:
  species V_Tumor_Volume in compartment = 1;  // ncit:C94515
  species C_Cytotoxic_T_Lymphocytes_Coverage in compartment = 0.1;  // hasPart CL:0000910; isVersionOf GO:0002419

  // Parameters:
  r_t = 0.1;
  k = 0.2;
  d_c = 0.2;
  r_c = 0.001;

  // Assignment rules:
  min_C := piecewise(1, C_Cytotoxic_T_Lymphocytes_Coverage >= 1, C_Cytotoxic_T_Lymphocytes_Coverage);
  rho := (36*pi)^(1/3);

  // Reactions:
  Tumor_Growth: => V_Tumor_Volume; compartment*Function_for_Tumor_Growth(rho, r_t, V_Tumor_Volume);  // isVersionOf ncit:C18081
  Tumor_Killing_CTL: V_Tumor_Volume => ; compartment*Function_for_Tumor_Killing_CTL(rho, k, V_Tumor_Volume, min_C);  // modifiers: C_Cytotoxic_T_Lymphocytes_Coverage; isVersionOf GO:0002419; isVersionOf GO:0001906
  CTL_Recruitment: => C_Cytotoxic_T_Lymphocytes_Coverage; compartment*Function_for_CTL_Recruitment(rho, r_c, V_Tumor_Volume, C_Cytotoxic_T_Lymphocytes_Coverage);  // modifiers: V_Tumor_Volume; isVersionOf GO:0035698
  CTL_Death: C_Cytotoxic_T_Lymphocytes_Coverage => ; compartment*d_c*C_Cytotoxic_T_Lymphocytes_Coverage;  // isVersionOf GO:0008219

  // Unit definitions:
  unit volume = metre^3;
  unit time = 86400 second;
  unit substance = item;
end
