// SBML level 2 version 4
// dcterms:bibliographicCitation: http://identifiers.org/pubmed/30480383

function Constant_flux__irreversible(v)
  v;
end
Constant_flux__irreversible is "Constant flux (irreversible)";

function Function_for_Disassociation_RC_AB_3_1(RC_AB, k_off_3)
  k_off_3*RC_AB;
end

function Function_for_C_Peripheral_Distribution_1(AP, V, k_21)
  k_21*(AP/V);
end

function Function_for_Distribution_AP_Central_1(C_free, V, k_12)
  k_12*C_free*V;
end

function Function_for_Internalisation_RC_A_1(RC_A, k_int_A, k_off_1)
  (k_off_1 + k_int_A)*RC_A;
end

function Function_for_Disassociation_RC_AB_4_1(RC_AB, k_off_4)
  k_off_4*RC_AB;
end

function Function_for_Disassociation_RC_A_1_1(RC_B, k_off_2)
  k_off_2*RC_B;
end

function Function_for_Internalisation_RC_B_1(RC_B, k_int_B, k_off_2)
  (k_off_2 + k_int_B)*RC_B;
end

function Function_for_Internalisation_RC_AB_1(RC_AB, k_int_AB, k_off_3, k_off_4)
  (k_off_3 + k_off_4 + k_int_AB)*RC_AB;
end

function Function_for_Distribution_AP_Central_2(AD, V, k_a)
  k_a*AD*V;
end

function Function_for_Disassociation_RC_A_1(RC_A, k_off_1)
  k_off_1*RC_A;
end

model Schropp2019___Target_Mediated_Drug_Disposition_Model_for_Bispecific_Antibodies()
  // Schropp2019 - Target-Mediated Drug Disposition Model for Bispecific Antibodies
  // This model presents a general target-mediated drug disposition (TMDD) model for bispecific antibodies (BsAbs), which bind to two different targets on different cell membranes. The model includes four
  // different binding events for BsAbs, turnover of the targets, and internalization of the complexes. In addition, a quasi-equilibrium (QE) approximation with decreased number of binding parameters is
  // also present.
  // isDescribedBy pubmed:30480383
  // biomodels.db:MODEL1907240003 biomodels.db:BIOMD0000000788
  // isVersionOf ncit:C1454
  // hasProperty mamo:MAMO_0000046
  // hasTaxon taxonomy:9606
  // hasProperty mamo:MAMO_0000046

  // Compartments:
  // The central compartment consists of the plasma and tissues where the distribution of the drug is practically instantaneous.
  compartment Central = 1;  // isVersionOf BTO:0000131; isVersionOf UBERON:0000479
  // The peripheral compartment consists of tissues where the distribution of the drug is slower.
  compartment Peripheral = 1;  // isVersionOf UBERON:0000479

  // Species:
  species C_free in Central = 50;  // isVersionOf ncit:C28227
  species R_A in Central = 10;  // isVersionOf ncit:C18106
  species R_B in Central = 100;  // isVersionOf ncit:C18106
  species RC_A in Central = 0;  // hasPart ncit:C18106; hasPart ncit:C28227
  species RC_B in Central = 0;  // hasPart ncit:C18106; hasPart ncit:C28227
  species RC_AB in Central = 0;  // hasPart ncit:C18106; hasPart ncit:C28227
  species AP in Peripheral = 0;  // isVersionOf ncit:C1454; isVersionOf ncit:C28227; occursIn BTO:0000553
  species AD in Peripheral = 0;  // isVersionOf ncit:C1454; isVersionOf ncit:C28227; occursIn ncit:C38299

  // Parameters:
  V = 3 unit_0;
  k_a = 0.2 unit_1;
  F = 0.75;
  k_el = 0.1 unit_1;
  k_12 = 0.1 unit_1;
  k_21 = 0.03 unit_1;
  k_on_1 = 10 unit_2;
  k_off_1 = 0.01 unit_1;
  k_on_2 = 1 unit_2;
  k_off_2 = 0.01 unit_1;
  k_syn_A = 1 unit_2;
  k_deg_A = 0.1 unit_1;
  k_syn_B = 10 unit_2;
  k_deg_B = 0.1 unit_1;
  k_int_A = 0.05 unit_1;
  k_int_B = 0.05 unit_1;
  k_int_AB = 0.1 unit_1;
  k_off_3 = 0.01 unit_1;
  k_off_4 = 0.01 unit_1;
  k_on_3 = 1 unit_2;
  k_on_4 = 10 unit_2;

  // Reactions:
  Binding_C_R_A: C_free + R_A => RC_A; Central*k_on_1*C_free*R_A;  // isVersionOf ncit:C40536
  Binding_C_R_B: C_free + R_B => RC_B; Central*k_on_2*C_free*R_B;  // isVersionOf ncit:C40536
  Binding_RC_A_R_B: RC_A + R_B => RC_AB; Central*k_on_3*RC_A*R_B;  // isVersionOf ncit:C40536
  Binding_RC_B_R_A: RC_B + R_A => RC_AB; Central*k_on_4*RC_B*R_A;  // isVersionOf ncit:C40536
  Disassociation_RC_A: => C_free + R_A; Central*Function_for_Disassociation_RC_A_1(RC_A, k_off_1);  // modifiers: RC_A
  Disassociation_RC_B: => C_free + R_B; Central*Function_for_Disassociation_RC_A_1_1(RC_B, k_off_2);  // modifiers: RC_B
  Disassociation_RC_AB_3: => RC_B + R_B; Central*Function_for_Disassociation_RC_AB_3_1(RC_AB, k_off_3);  // modifiers: RC_AB
  Disassociation_RC_AB_4: => RC_A + R_A; Central*Function_for_Disassociation_RC_AB_4_1(RC_AB, k_off_4);  // modifiers: RC_AB
  Elimination_C: C_free => ; Central*k_el*C_free;  // isVersionOf GO:0007588
  Distribution_C_Central: C_free => ; Central*k_12*C_free;  // isVersionOf GO:0008015
  Distribution_C_Peripheral: => C_free; Function_for_C_Peripheral_Distribution_1(AP, V, k_21);  // modifiers: AP; isVersionOf GO:0008015
  Distribution_AP_Central: => AP; Function_for_Distribution_AP_Central_1(C_free, V, k_12);  // modifiers: C_free; isVersionOf GO:0008015
  Distribution_AP_Peripheral: AP => ; Peripheral*k_21*AP;  // isVersionOf GO:0008015
  Association_AD: AD => ; Peripheral*k_a*AD;  // isVersionOf MI:0914
  Association_AD_C: => C_free; Function_for_Distribution_AP_Central_2(AD, V, k_a);  // modifiers: AD; isVersionOf MI:0914
  Synthesis_R_A: => R_A; Central*Constant_flux__irreversible(k_syn_A);  // isVersionOf GO:0006412
  Synthesis_R_B: => R_B; Central*Constant_flux__irreversible(k_syn_B);  // isVersionOf GO:0006412
  Degradation_R_A: R_A => ; Central*k_deg_A*R_A;  // isVersionOf ncit:C61559
  Degradation_R_B: R_B => ; Central*k_deg_B*R_B;  // isVersionOf ncit:C61559
  Internalisation_RC_A: RC_A => ; Central*Function_for_Internalisation_RC_A_1(RC_A, k_int_A, k_off_1);  // isVersionOf GO:0031623
  Internalisation_RC_B: RC_B => ; Central*Function_for_Internalisation_RC_B_1(RC_B, k_int_B, k_off_2);  // isVersionOf GO:0031623
  Internalisation_RC_AB: RC_AB => ; Central*Function_for_Internalisation_RC_AB_1(RC_AB, k_int_AB, k_off_3, k_off_4);  // isVersionOf GO:0031623

  // Unit definitions:
  unit time = 86400 second;
  unit substance = 1e-9 mole;
  unit unit_0 = litre; unit_0 is "l";
  unit unit_1 = 1 / (1e-3 second); unit_1 is "1/ms";
  unit unit_2 = 1e-3 litre / (mole * second); unit_2 is "ml/(mol*s)";
end
