// SBML level 2 version 4
// dcterms:bibliographicCitation: urn:miriam:pubmed:30930063

function Constant_flux__irreversible(v)
  v;
end
Constant_flux__irreversible is "Constant flux (irreversible)";

function Function_for_Tumor_Growth_1(a, T_1, b)
  a*T_1*(1 - b*T_1);
end

function Function_for_E1_Depletion(c_3, T_1, T_2, E_1)
  c_3*(T_1 + T_2)*E_1;
end

function Function_for_Tumor_Killing_T1_E1(mu, E_1, T_1)
  mu*E_1*T_1;
end

function Function_for_E2_Recruitment(d_1, T_1, E_1)
  d_1*T_1*E_1;
end

function Function_for_E2_Depletion(d_2, T_1, E_2)
  d_2*T_1*E_2;
end

function Function_for_Tumor_Competition_1(nu, T_1, T_2)
  nu*T_1*T_2;
end

function Function_for_E1_Recruitment(c_4, T_1, s, T_2, E_1, c_5)
  c_4*(T_1 + s*T_2)*E_1/(c_5 + T_1 + T_2);
end

function Function_for_Tumor_Killing_T1_E2(beta, E_2, T_1)
  beta*E_2*T_1;
end

function Function_for_Tumor_Killing_T2_E1(q, E_1, T_2, mu)
  mu*q*E_1*T_2;
end

function Function_for_Tumor_Competition_2(r, nu, T_1, T_2)
  r*nu*T_1*T_2;
end

function Function_for_Tumor_Growth_2(a, p, T_2, b)
  a*p*T_2*(1 - b*T_2);
end

model Alvarez2019___A_nonlinear_mathematical_model_of_cell_mediated_immune_response_for_tumor_phenotypic_heterogeneity()
  // Alvarez2019 - A nonlinear mathematical model of cell-mediated immune response for tumor phenotypic heterogeneity
  // This is a non-linear mathematical model of cancer immunosurveillance that takes into account intratumoral phenotypic heterogeneity, such as differential expression of cell surface receptors and
  // growth factors, according to cell-mediated immune responses. The model describes phenomena that have also been observed in vivo, such as tumor dormancy, cancer immunoediting, and a strong sensitivity
  // to initial conditions.
  // isDescribedBy pubmed:30930063
  // biomodels.db:MODEL1908120003 biomodels.db:BIOMD0000000790
  // hasProperty mamo:MAMO_0000046
  // hasProperty GO:0002418

  // Compartments:
  compartment compartment = 1;  // isVersionOf ncit:C94498

  // Species:
  species T_1 in compartment = 80000000;  // CL:0001063
  species T_2 in compartment = 20000000;  // CL:0001063
  species E_1_Innate in compartment = 10500000;  // isVersionOf CL:0000623; isVersionOf CL:0001065
  species E_2_Adaptive in compartment = 0;  // isVersionOf CL:0000084

  // Parameters:
  a = 0.514;
  b = 2e-9;
  mu = 1.101e-7;
  beta = 1.101e-10;
  nu = 1.101e-9;
  c_1 = 13000;
  c_2 = 0.0412;
  c_3 = 3.422e-10;
  c_4 = 0.1245;
  c_5 = 20193000;
  d_1 = 1.1e-7;
  d_2 = 3.42e-10;
  d_3 = 0.02;
  p = 0.35;
  q = 1;
  r = 1.5;
  s = 1;

  // Assignment rules:
  T_Total := T_1 + T_2;

  // Reactions:
  Tumor_Growth_1: => T_1; compartment*Function_for_Tumor_Growth_1(a, T_1, b);  // isVersionOf ncit:C18081
  Tumor_Growth_2: => T_2; compartment*Function_for_Tumor_Growth_2(a, p, T_2, b);  // isVersionOf ncit:C18081
  Tumor_Killing_T1_E1: T_1 => ; compartment*Function_for_Tumor_Killing_T1_E1(mu, E_1_Innate, T_1);  // modifiers: E_1_Innate; isVersionOf GO:0002420
  Tumor_Killing_T1_E2: T_1 => ; compartment*Function_for_Tumor_Killing_T1_E2(beta, E_2_Adaptive, T_1);  // modifiers: E_2_Adaptive; isVersionOf GO:0002419
  Tumor_Competition_1: T_1 => ; compartment*Function_for_Tumor_Competition_1(nu, T_1, T_2);  // modifiers: T_2; isVersionOf GO:0035212
  Tumor_Competition_2: T_2 => ; compartment*Function_for_Tumor_Competition_2(r, nu, T_1, T_2);  // modifiers: T_1; isVersionOf GO:0035212
  Tumor_Killing_T2_E1: T_2 => ; compartment*Function_for_Tumor_Killing_T2_E1(q, E_1_Innate, T_2, mu);  // modifiers: E_1_Innate; isVersionOf GO:0002420
  E1_Production_Constant: => E_1_Innate; compartment*Constant_flux__irreversible(c_1);  // isVersionOf ncit:C18081
  E1_Death: E_1_Innate => ; compartment*c_2*E_1_Innate;  // isVersionOf GO:0008219
  E1_Depletion: E_1_Innate => ; compartment*Function_for_E1_Depletion(c_3, T_1, T_2, E_1_Innate);  // modifiers: T_1, T_2; isVersionOf GO:0008219
  E1_Recruitment: => E_1_Innate; compartment*Function_for_E1_Recruitment(c_4, T_1, s, T_2, E_1_Innate, c_5);  // modifiers: T_1, T_2; isVersionOf GO:0030101
  E2_Recruitment: => E_2_Adaptive; compartment*Function_for_E2_Recruitment(d_1, T_1, E_1_Innate);  // modifiers: T_1, E_1_Innate; isVersionOf GO:0072683
  E2_Depletion: E_2_Adaptive => ; compartment*Function_for_E2_Depletion(d_2, T_1, E_2_Adaptive);  // modifiers: T_1; isVersionOf GO:0008219
  E2_Death: E_2_Adaptive => ; compartment*d_3*E_2_Adaptive;  // isVersionOf GO:0008219

  // Unit definitions:
  unit volume = 1e-3 litre;
  unit substance = item;
end
