// SBML level 2 version 4
// dcterms:bibliographicCitation: urn:miriam:pubmed:30843136

function Constant_flux__irreversible(v)
  v;
end
Constant_flux__irreversible is "Constant flux (irreversible)";

function Function_for_TSC_Production(beta_5, x, z, k_5)
  beta_5*x*z/(k_5 + x);
end

function Function_for_TPC_Production_PSC(r_4, x, y, m_4, v)
  r_4*x*y/(m_4 + v);
end

function Function_for_PSC_Tumor_Growth(r_2, beta_2, w, k_2, y, b_2)
  (r_2 + beta_2*w/(k_2 + w))*y*(1 - b_2*y);
end

function Function_for_PCC_Tumor_Killing(delta_1, x, z, m_1, w)
  delta_1*x*z/(m_1 + w);
end

function Function_for_Effector_Cells_Production(beta_3, z, v, k_3, m_3, w)
  beta_3*z*v/((k_3 + v)*(m_3 + w));
end

function Function_for_PCC_Tumor_Growth(r_1, beta_1, y, x, b_1)
  (r_1 + beta_1*y)*x*(1 - b_1*x);
end

model Hu2019___Modeling_Pancreatic_Cancer_Dynamics_with_Immunotherapy()
  // Hu2019 - Modeling Pancreatic Cancer Dynamics with Immunotherapy
  // This is a mathematical model of pancreatic cancer that includes descriptions of pancreatic cancer cells, pancreatic stellate cells, effector cells and tumor-promoting and tumor-suppressing cytokines
  // to investigate the effects of immunotherapies on patient survival.
  // isDescribedBy pubmed:30843136
  // isDerivedFrom doi:10.1142/S021833901750005X
  // biomodels.db:MODEL1908130001 biomodels.db:BIOMD0000000792
  // hasProperty mamo:MAMO_0000046
  // hasProperty GO:0002418

  // Compartments:
  compartment compartment = 1;  // isVersionOf ncit:C94498

  // Species:
  species x_PCC in compartment = 1000000000;  // isVersionOf EFO:0002966; isVersionOf CCO:0001063
  species y_PSC in compartment = 5600000;  // isVersionOf CCO:0002410
  species z_Effector_Cells in compartment = 190000000;  // isVersionOf ncit:C28241
  species w_TPC in compartment = 50000;  // hasPart uniprot:B5MCZ3; hasPart uniprot:Q49IL8; isVersionOf ncit:C20464
  species v_TSC in compartment = 9.4;  // hasPart uniprot:Q14609; isVersionOf ncit:C20464
  species R_siRNA in compartment = 1;  // isVersionOf ncit:C2191

  // Parameters:
  r_1 = 0.0195;
  b_1 = 1.02e-11;
  beta_1 = 1.7857e-12;
  m_1 = 1000000000;
  delta_1 = 0.96;
  r_2 = 0.00195;
  beta_2 = 0.125;
  k_2 = 5.6e10;
  b_2 = 1.7857e-9;
  mu_2 = 0.015;
  beta_3 = 124.5;
  k_3 = 2e10;
  m_3 = 1000000;
  r_3 = 3500;
  mu_3 = 0.02;
  beta_4 = 5.85;
  k_4 = 1000000;
  mu_4 = 0.034;
  r_4 = 12500;
  m_4 = 8.9e10;
  beta_5 = 7.3;
  k_5 = 1000000;
  mu_5 = 0.034;
  D_0 = 5e10;
  p = 0.9;
  k = 1;
  mu_6 = 0.66;

  // Reactions:
  PCC_Tumor_Growth: => x_PCC; compartment*Function_for_PCC_Tumor_Growth(r_1, beta_1, y_PSC, x_PCC, b_1);  // modifiers: y_PSC; isVersionOf GO:0008283
  PCC_Tumor_Killing: x_PCC => ; compartment*Function_for_PCC_Tumor_Killing(delta_1, x_PCC, z_Effector_Cells, m_1, w_TPC);  // modifiers: z_Effector_Cells, w_TPC; isVersionOf GO:0002418
  PSC_Tumor_Growth: => y_PSC; compartment*Function_for_PSC_Tumor_Growth(r_2, beta_2, w_TPC, k_2, y_PSC, b_2);  // modifiers: w_TPC; isVersionOf GO:0008283
  PSC_Natural_Death: y_PSC => ; compartment*mu_2*y_PSC;  // isVersionOf GO:0008219
  Effector_Cells_Production: => z_Effector_Cells; compartment*Function_for_Effector_Cells_Production(beta_3, z_Effector_Cells, v_TSC, k_3, m_3, w_TPC);  // modifiers: v_TSC, w_TPC; isVersionOf GO:0008283
  Effector_Cells_Apoptosis: z_Effector_Cells => ; compartment*mu_3*z_Effector_Cells;  // ncit:C17557
  Effector_Cells_Production_Constant: => z_Effector_Cells; compartment*Constant_flux__irreversible(r_3);  // isVersionOf GO:0008283
  TPC_Production: => w_TPC; compartment*Constant_flux__irreversible(v);  // modifiers: x_PCC, z_Effector_Cells; isVersionOf GO:0001816
    v = 0.1;
  TPC_Decay: w_TPC => ; compartment*mu_4*w_TPC;
  TPC_Production_PSC: => w_TPC; compartment*Function_for_TPC_Production_PSC(r_4, x_PCC, y_PSC, m_4, v_TSC);  // modifiers: x_PCC, y_PSC, v_TSC; isVersionOf GO:0001816
  TSC_Production: => v_TSC; compartment*Function_for_TSC_Production(beta_5, x_PCC, z_Effector_Cells, k_5);  // modifiers: x_PCC, z_Effector_Cells; isVersionOf GO:0001816
  TSC_Decay: v_TSC => ; compartment*mu_5*v_TSC;
  siRNA_Decay: R_siRNA => ; compartment*mu_6*R_siRNA;
  siRNA_Dose: => R_siRNA; compartment*Constant_flux__irreversible(D_0);  // isVersionOf ncit:C28160

  // Unit definitions:
  unit time = 86400 second;
  unit substance = item;
end
