// SBML level 3 version 1
// dcterms:bibliographicCitation: urn:miriam:pubmed:21967667

function hg(b1, T)
  b1*T*(1 - T);
end
hg is "tg";

function tg(b2, T, H)
  b2*H*(1 - T - H);
end
tg is "hg";

function ti(b1, T, H)
  b1*T*H;
end
ti is "hi";

model Chen2011_1___bone_marrow_invasion_absolute_model()
  // Chen2011/1 - bone marrow invasion absolute model
  // The paper describes a model of tumor invasion to bone marrow.
  // Created by COPASI 4.26 (Build 213)
  // This model is described in the article:
  // Modeling invasion of metastasizing cancer cells to bone marrow utilizing ecological principles
  // Kun-Wan Chen, Kenneth J Pienta
  // Theoretical Biology and Medical Modelling 2011, 8:36
  // Abstract:
  // Background: The invasion of a new species into an established ecosystem can be directly compared to the steps involved in cancer metastasis. Cancer must grow in a primary site, extravasate and
  // survive in the circulation to then intravasate into target organ (invasive species survival in transport). Cancer cells often lay dormant at their metastatic site for a long period of time (lag
  // period for invasive species) before proliferating (invasive spread). Proliferation in the new site has an impact on the target organ microenvironment (ecological impact) and eventually the human host
  // (biosphere impact).
  // Results: Tilman has described mathematical equations for the competition between invasive species in a structured habitat. These equations were adapted to study the invasion of cancer cells into the
  // bone marrow microenvironment as a structured habitat. A large proportion of solid tumor metastases are bone metastases, known to usurp hematopoietic stem cells (HSC) homing pathways to establish
  // footholds in the bone marrow. This required accounting for the fact that this is the natural home of hematopoietic stem cells and that they already occupy this structured space. The adapted Tilman
  // model of invasion dynamics is especially valuable for modeling the lag period or dormancy of cancer cells.
  // Conclusions: The Tilman equations for modeling the invasion of two species into a defined space have been modified to study the invasion of cancer cells into the bone marrow microenvironment. These
  // modified equations allow a more flexible way to model the space competition between the two cell species. The ability to model initial density, metastatic seeding into the bone marrow and growth once
  // the cells are present, and movement of cells out of the bone marrow niche and apoptosis of cells are all aspects of the adapted equations. These equations are currently being applied to clinical data
  // sets for verification and further refinement of the models.
  // To cite BioModels Database, please use: BioModels Database: An enhanced, curated and annotated resource for published quantitative kinetic models .
  // To the extent possible under law, all copyright and related or neighbouring rights to this encoded model have been dedicated to the public domain worldwide.
  // Please refer to CC0 Public Domain Dedication for more information.
  // occursIn BTO:0000141
  // hasProperty ncit:C20625
  // hasProperty mamo:MAMO_0000046
  // hasTaxon taxonomy:9606
  // isDescribedBy pubmed:21967667
  // model units - substance: substance, time: time, volume: volume, area: area, length: length, extent: substance

  // Compartments:
  compartment bone_marrow = 1 volume;  // BTO:0000141; isVersionOf ncit:C94498

  // Species:
  // HSC density
  // init=0.5/0.85/0.84
  species H in bone_marrow = 0.5;  // isVersionOf CL:0000037
  // cancer cell density
  // int=0.0001/0.01/0.0001
  species T in bone_marrow = 0.0001;  // isVersionOf CL:0001064

  // Parameters:
  // tumor growth rate
  b1 = 0.2 unit_0;
  // tumor death rate
  u1 = 0.1 unit_0;  // isVersionOf ncit:C25636
  // HSC growth rate
  // =0.8/0.8/0.6
  b2 = 0.8 unit_0;
  // HSC death rate
  u2 = 0.1 unit_0;  // isVersionOf ncit:C25636

  // Reactions:
  HSC_growth: => T; bone_marrow*hg(b1, T); HSC_growth is "Tumor growth";  // isVersionOf GO:0008283
  HSC_death: T => ; bone_marrow*u1*T; HSC_death is "Tumor death";  // isVersionOf GO:0008219
  Tumor_growth: => H; bone_marrow*tg(b2, T, H); Tumor_growth is "HSC growth";  // modifiers: T; isVersionOf GO:0008283
  Tumor_death: H => ; bone_marrow*u2*H; Tumor_death is "HSC death";  // isVersionOf GO:0008219
  Tumor_inhibition: H => ; bone_marrow*ti(b1, T, H); Tumor_inhibition is "HSC inhibition";  // modifiers: T; isVersionOf GO:0008219

  // Unit definitions:
  unit length = metre;
  unit area = metre^2;
  unit volume = 1e-3 litre;
  unit time = second;
  unit substance = 1e-3 mole;
  unit unit_0 = dimensionless^0; unit_0 is "1";
end
