// SBML level 2 version 4
// dcterms:bibliographicCitation: urn:miriam:doi:10.1016/j.amc.2017.11.009

function Constant_flux__irreversible(v)
  v;
end
Constant_flux__irreversible is "Constant flux (irreversible)";

function Function_for_CD4T_Production(beta_1, x, z, alpha_1)
  beta_1*x*z/(alpha_1 + x);
end

function Function_for_Normal_Tissue_Growth(r_2, w, b_2)
  r_2*w*(1 - b_2*w);
end

function Function_for_Tumor_Competition_Normal_Cells(delta_1, x, w)
  delta_1*x*w;
end

function Function_for_Normal_Tissue_Competition_Tumor_Cells(delta_3, x, w)
  delta_3*x*w;
end

function Function_for_CD4T_Depletion(delta_2, x, y)
  delta_2*x*y;
end

function Function_for_Tumor_Growth(r_1, x, b_1)
  r_1*x*(1 - b_1*x);
end

function Function_for_Cytokine_Production(beta_2, x, y, alpha_2)
  beta_2*x*y/(alpha_2 + x);
end

function Function_for_Tumor_Killing_Cytokine(c_1, x, z, a_1)
  c_1*x*z/(a_1 + x);
end

model Hu2018___Dynamics_of_tumor_CD4__cytokine_host_cells_interactions_with_treatments()
  // Hu2018 - Dynamics of tumor-CD4+-cytokine-host cells interactions with treatments
  // This is a proposed mathematical model describing interactions between tumor cells, CD4+ T cells, cytokines, and host cells within the context of CD4+ T cells inducing tumor regression. A platform is
  // provided to assess the effectiveness of single or combination therapy with CD4+ T cells and/or cytokines.
  // isDescribedBy doi:10.1016/j.amc.2017.11.009
  // isDerivedFrom doi:10.1002/mma.3370
  // biomodels.db:MODEL1908150001 biomodels.db:BIOMD0000000797
  // hasProperty mamo:MAMO_0000046
  // hasProperty GO:0002418

  // Compartments:
  compartment compartment = 1;  // isVersionOf ncit:C94498

  // Species:
  species x_Tumor_Cells in compartment = 67700;  // isVersionOf CL:0001063
  species y_CD4_T_Cells in compartment = 1000000;  // CL:0000492
  species z_Cytokine in compartment = 100000;  // hasPart uniprot:Q0GK43; ncit:C20464
  species w_Healthy_Tissue in compartment = 1000000000;  // isVersionOf ncit:C12801

  // Parameters:
  r_1 = 0.514;
  b_1 = 1.02e-9;
  c_1 = 0.2;
  a_1 = 100000;
  delta_1 = 1.1e-10;
  beta_1 = 0.835;
  alpha_1 = 1000;
  mu_1 = 0.1;
  delta_2 = 1e-7;
  beta_2 = 5.4;
  alpha_2 = 1000;
  mu_2 = 34;
  r_2 = 0.2822;
  b_2 = 1e-9;
  delta_3 = 5.8e-11;
  I_2 = 0;
  I_1 = 0;

  // Assignment rules:
  Tumor_Cells_1e8 := x_Tumor_Cells/100000000;
  Host_Cells_1e8 := w_Healthy_Tissue/100000000;

  // Reactions:
  Tumor_Growth: => x_Tumor_Cells; compartment*Function_for_Tumor_Growth(r_1, x_Tumor_Cells, b_1);  // isVersionOf ncit:C18081
  Tumor_Killing_Cytokine: x_Tumor_Cells => ; compartment*Function_for_Tumor_Killing_Cytokine(c_1, x_Tumor_Cells, z_Cytokine, a_1);  // modifiers: z_Cytokine; isVersionOf GO:0008219; isVersionOf GO:0002418
  Tumor_Competition_Normal_Cells: x_Tumor_Cells => ; compartment*Function_for_Tumor_Competition_Normal_Cells(delta_1, x_Tumor_Cells, w_Healthy_Tissue);  // modifiers: w_Healthy_Tissue; isVersionOf GO:0035212
  CD4T_Production: => y_CD4_T_Cells; compartment*Function_for_CD4T_Production(beta_1, x_Tumor_Cells, z_Cytokine, alpha_1);  // modifiers: x_Tumor_Cells, z_Cytokine
  CD4T_Natural_Death: y_CD4_T_Cells => ; compartment*mu_1*y_CD4_T_Cells;  // isVersionOf GO:0008219
  CD4T_Depletion: y_CD4_T_Cells => ; compartment*Function_for_CD4T_Depletion(delta_2, x_Tumor_Cells, y_CD4_T_Cells);  // modifiers: x_Tumor_Cells; isVersionOf GO:0008219
  CD4T_Treatment: => y_CD4_T_Cells; compartment*Constant_flux__irreversible(I_1);  // isVersionOf ncit:C15351
  Cytokine_Production: => z_Cytokine; compartment*Function_for_Cytokine_Production(beta_2, x_Tumor_Cells, y_CD4_T_Cells, alpha_2);  // modifiers: x_Tumor_Cells, y_CD4_T_Cells; GO:0001816
  Cytokine_Decay: z_Cytokine => ; compartment*mu_2*z_Cytokine;
  Cytokine_Treatment: => z_Cytokine; compartment*Constant_flux__irreversible(I_2);  // isVersionOf ncit:C15411
  Normal_Tissue_Growth: => w_Healthy_Tissue; compartment*Function_for_Normal_Tissue_Growth(r_2, w_Healthy_Tissue, b_2);  // isVersionOf ncit:C18081
  Normal_Tissue_Competition_Tumor_Cells: w_Healthy_Tissue => ; compartment*Function_for_Normal_Tissue_Competition_Tumor_Cells(delta_3, x_Tumor_Cells, w_Healthy_Tissue);  // modifiers: x_Tumor_Cells; isVersionOf GO:0035212

  // Unit definitions:
  unit time = 86400 second;
  unit substance = item;
end
