// SBML level 2 version 4
// dcterms:bibliographicCitation: urn:miriam:doi:10.1080/17486700902973751

function Function_for_Normal_Cells_Growth(a, x, b, y)
  a*x/(1 + b*(x + y));
end

function Function_for_Leukemic_Cells_Growth(A, y, B, x)
  A*y/(1 + B*(x + y));
end

model Cucuianu2010___A_hypothetical_mathematical_model_of_acute_myeloid_leukaemia_pathogenesis()
  // Cucuianu2010 - A hypothetical-mathematical model of acute myeloid leukaemia pathogenesis
  // This is a simple mathematical model describing the growth and removal of normal and leukemic haematopoietic stem cell populations and the role of these cellular processes in generating monoclonal
  // leukemic patterns.
  // isDescribedBy doi:10.1080/17486700902973751
  // biomodels.db:MODEL1908190002 biomodels.db:BIOMD0000000799
  // hasProperty ncit:C3171
  // hasProperty mamo:MAMO_0000046

  // Compartments:
  compartment compartment = 1;  // BTO:0000141

  // Species:
  species x_Normal_Hematopoietic_Stem_Cell in compartment = 4.5;  // CL:0000037; occursIn BTO:0000141
  species y_Leukemic_Cell in compartment = 1.5;  // isVersionOf BTO:0004178; occursIn BTO:0000141

  // Parameters:
  a = 0.3;
  b = 0.5;
  c = 0.1;
  A = 0.3;
  B = 0.5;
  C = 0.1;

  // Reactions:
  Normal_Cells_Growth: => x_Normal_Hematopoietic_Stem_Cell; compartment*Function_for_Normal_Cells_Growth(a, x_Normal_Hematopoietic_Stem_Cell, b, y_Leukemic_Cell);  // modifiers: y_Leukemic_Cell; isVersionOf GO:0071425
  Normal_Cells_Removal: x_Normal_Hematopoietic_Stem_Cell => ; compartment*c*x_Normal_Hematopoietic_Stem_Cell;  // isVersionOf GO:0035701
  Leukemic_Cells_Growth: => y_Leukemic_Cell; compartment*Function_for_Leukemic_Cells_Growth(A, y_Leukemic_Cell, B, x_Normal_Hematopoietic_Stem_Cell);  // modifiers: x_Normal_Hematopoietic_Stem_Cell; isVersionOf GO:0071425
  Leukemic_Cells_Removal: y_Leukemic_Cell => ; compartment*C*y_Leukemic_Cell;  // isVersionOf GO:0035701

  // Unit definitions:
  unit volume = 1e-3 litre;
  unit time = 86400 second;
  unit substance = item;
end
