// SBML level 2 version 4
// dcterms:bibliographicCitation: urn:miriam:doi:10.1142/S1793524511001684

function Function_for_Normal_Cells_Growth(x, a, b, y, z, epsilon, g)
  a/(1 + b*(x + y + z))*((x + y + epsilon)/(x + y + epsilon + g*z))*x;
end

function Function_for_Leukemic_Cells_Growth(A, B, x, y, z, epsilon, G)
  A/(1 + B*(x + y + z))*((x + y + epsilon)/(x + y + epsilon + G*z))*y;
end

function Function_for_Donor_Cells_Growth(a, b, x, y, z, h, epsilon)
  a/(1 + b*(x + y + z))*(1 - h*(x + y)/(z + epsilon + h*(x + y)))*z;
end

model Precup2012___Mathematical_modeling_of_cell_dynamics_after_allogeneic_bone_marrow_transplantation()
  // Precup2012 - Mathematical modeling of cell dynamics after allogeneic bone marrow transplantation
  // This is a basic mathematical model describing the dynamics of three cell lines (normal host cells, leukemic host cells and donor cells) after allogeneic stem cell transplantation.
  // isDescribedBy doi:10.1142/S1793524511001684
  // isDerivedFrom doi:10.1080/17486700902973751
  // biomodels.db:MODEL1908190003 biomodels.db:BIOMD0000000800
  // hasProperty NCIT:C46089
  // hasProperty ncit:C3161
  // hasProperty mamo:MAMO_0000046

  // Compartments:
  compartment compartment = 1;  // BTO:0000141

  // Species:
  species x in compartment = 200000000;  // isVersionOf BTO:0000725; occursIn BTO:0000141
  species y in compartment = 100000000;  // BTO:0004178; occursIn BTO:0000141
  species z in compartment = 400000000;  // isVersionOf BTO:0000725; occursIn BTO:0000141

  // Parameters:
  a = 0.23;
  A = 0.45;
  b = 2.2e-8;
  B = 2.2e-8;
  c = 0.01;
  C = 0.01;
  epsilon = 1;
  g = 2;
  G = 2;
  h = 2;

  // Reactions:
  Normal_Cells_Growth: => x; compartment*Function_for_Normal_Cells_Growth(x, a, b, y, z, epsilon, g);  // modifiers: y, z; GO:0071425
  Normal_Cells_Removal: x => ; compartment*c*x;  // isVersionOf GO:0035701
  Leukemic_Cells_Growth: => y; compartment*Function_for_Leukemic_Cells_Growth(A, B, x, y, z, epsilon, G);  // modifiers: x, z; isVersionOf GO:0071425
  Leukemic_Cells_Removal: y => ; compartment*C*y;  // isVersionOf GO:0035701
  Donor_Cells_Growth: => z; compartment*Function_for_Donor_Cells_Growth(a, b, x, y, z, h, epsilon);  // modifiers: x, y; isVersionOf GO:0071425
  Donor_Cells_Removal: z => ; compartment*c*z;  // isVersionOf GO:0035701

  // Unit definitions:
  unit volume = 1e-3 litre;
  unit time = 86400 second;
  unit substance = item;
end
