// SBML level 3 version 1
// dcterms:bibliographicCitation: urn:miriam:pubmed:26073722

function Constant_flux__irreversible(v)
  v;
end
Constant_flux__irreversible is "Constant flux (irreversible)";

function ir(ati, T, I)
  ati*T*I;
end

function _1mod(d, mod, sub)
  d*mod*sub;
end

function tg(at, B, T, kt)
  at*B*T*(1 - T/kt);
end

function ig(as, v, I, B)
  as*(v + I)*B;
end

function gcb(do, as, v, I, B)
  (do + as*(v + I))*B;
end

model Sturrock2015__glioma_growth()
  // Sturrock2015 - glioma growth
  // The paper describes a model of glioma. Created by COPASI 4.26 (Build 213) This model is described in the article: A mathematical model of pre-diagnostic glioma growth Marc Sturrock, Wenrui Hao, Judith Schwartzbaum, Grzegorz A. Rempala J Theor Biol. 2015 September 7; 380: 299–308 Abstract: Due to their location, the malignant gliomas of the brain in humans are very difficult to treat in advanced stages. Blood-based biomarkers for glioma are needed for more accurate evaluation of treatment response as well as early diagnosis. However, biomarker research in primary brain tumors is challenging given their relative rarity and genetic diversity. It is further complicated by variations in the permeability of the blood brain barrier that affects the amount of marker released into the bloodstream. Inspired by recent temporal data indicating a possible decrease in serum glucose levels in patients with gliomas yet to be diagnosed, we present an ordinary differential equation model to capture early stage glioma growth. The model contains glioma-glucose-immune interactions and poses a potential mechanism by which this glucose drop can be explained. We present numerical simulations, parameter sensitivity analysis, linear stability analysis and a numerical experiment whereby we show how a dormant glioma can become malignant. To cite BioModels Database, please use: BioModels Database: An enhanced, curated and annotated resource for published quantitative kinetic models . To the extent possible under law, all copyright and related or neighbouring rights to this encoded model have been dedicated to the public domain worldwide. Please refer to CC0 Public Domain Dedication for more information.
  // isDescribedBy pubmed:26073722
  // biomodels.db:MODEL1908200001 biomodels.db:BIOMD0000000801
  // hasProperty efo:0005543
  // hasProperty mamo:MAMO_0000046
  // hasProperty GO:0002418
  // hasTaxon taxonomy:9606
  // model units - substance: substance, time: time, volume: volume, area: area, length: length, extent: substance

  // Compartments:
  compartment tme = 1 volume;  // isVersionOf ncit:C94498

  // Species:
  // tumor cell g/ml
  // 0.14/0.0498/0
  species T in tme = 0.14;  // isVersionOf BTO:0000526
  // brain glucose g/ml
  // 3.92e-4/8.28e-4/8.45e-4
  species B in tme = 0.000392;  // isVersionOf CHEBI:17234
  // immune cell g/ml
  // 2.84e-4/0.016/0.061
  species I in tme = 0.000284;  // isVersionOf CL:0000738
  // glucose in serum g/ml
  // 4.39e-4/8,86e-4/8.81e-4
  species S in tme = 0.000439;  // isVersionOf CHEBI:17234

  // Parameters:
  // Growth rate of glioma
  at = 1.575 unit_0;
  // Carrying capacity of glioma
  kt = 2 unit_1;
  // Decay rate of glioma due to immune response
  dti = 0.072 unit_0;  // isVersionOf ncit:C25636
  // Recruitment rate of immune systems cells due to glioma
  ati = 0.0003 unit_0;
  // Natural decay rate of glioma
  dt = 0.0001 unit_0;  // isVersionOf ncit:C25636
  // Natural decay rate of immune system cells
  di = 0.01 unit_0;  // isVersionOf ncit:C25636
  // Immune system cell recruitment rate
  as = 0.7 unit_0;
  // Baseline immune system cell production rate
  v = 0.7 unit_1;
  // Glucose consumption rate by glioma
  dto = 1 unit_0;  // isVersionOf ncit:C25636
  // Transfer rate of glucose from serum to brain
  ao = 20 unit_0;  // isVersionOf ncit:C25636
  // Minimum glucose intake rate to serum
  omin = 0.0008 unit_1;  // isVersionOf ncit:C25636
  // Maximum variation in glucose intake rate
  oo = 0.0016 unit_1;  // isVersionOf ncit:C25636
  // Glucose consumption in brain by healthy cells
  do = 0.01 unit_0;  // isVersionOf ncit:C25636
  // Rate of glioma cells killing immune cells
  dtt = 0.72 unit_0;  // isVersionOf ncit:C25636
  // glucose intase
  F has unit_0;  // isVersionOf ncit:C25636
  // glucose intake-alternate
  F2 has unit_0;  // isVersionOf ncit:C25636
  // coefficient for F2
  c has unit_1;  // isVersionOf ncit:C48922

  // Assignment rules:
  c := piecewise(piecewise(2, time < 4745, 1), 1095 < time, 1);
  F := piecewise(oo*sin(6*pi*time), omin < oo*sin(6*pi*time), omin);
  F2 := piecewise(oo*sin(6*pi*time)*c, omin < oo*sin(6*pi*time)*c, omin);

  // Reactions:
  tumor_growth: => T; tme*tg(at, B, T, kt);  // modifiers: B; isVersionOf GO:0008283
  tumor_death: T => ; tme*dt*T;  // isVersionOf GO:0008219
  tumor_immune: T => ; tme*_1mod(dti, I, T);  // modifiers: I; isVersionOf GO:0008219
  glucose_b_s: B => S; tme*ao*B; glucose_b_s is "glucose b-s";
  glioma_consumption: B => ; tme*_1mod(dto, T, B);  // modifiers: T; isVersionOf GO:0046323
  glucose_consumption_b: B => ; tme*gcb(do, as, v, I, B); glucose_consumption_b is "glucose consumption-b";  // modifiers: I; isVersionOf GO:0046323
  immune_growth: => I; tme*ig(as, v, I, B);  // modifiers: B; isVersionOf GO:0008283
  immune_recruitment: => I; tme*ir(ati, T, I);  // modifiers: T; isVersionOf GO:0008283
  immune_cell_death: I => ; tme*di*I;  // isVersionOf GO:0008219
  glioma_response: I => ; tme*_1mod(dtt, T, I);  // modifiers: T; isVersionOf GO:0008219
  // =F or F2
  glucose_intake: => S; tme*Constant_flux__irreversible(F);
  glucose_consumption_s: S => ; tme*do*S; glucose_consumption_s is "glucose consumption-s";  // isVersionOf GO:0046323
  glucose_s_b: S => B; tme*ao*S; glucose_s_b is "glucose s-b";

  // Unit definitions:
  unit length = metre;
  unit area = metre^2;
  unit volume = 1e-3 litre;
  unit time = 86400 second;
  unit substance = 1e-3 mole;
  unit unit_0 = 1 / (8640 second); unit_0 is "1/d";
  unit unit_1 = dimensionless^0;
end
