// SBML level 3 version 1
// dcterms:bibliographicCitation: http://identifiers.org/pubmed/31410657

function Constant_flux__irreversible(v)
  v;
end
Constant_flux__irreversible is "Constant flux (irreversible)";

function function_for_uninfected_tumour_cell_logistic_growth_1(K, UnInfected_Tumour_Cells_Xu, r)
  r*UnInfected_Tumour_Cells_Xu*(1 - UnInfected_Tumour_Cells_Xu/K);
end

function function_for_uninfected_tumour_cell_infection_1(UnInfected_Tumour_Cells_Xu, Virus_Xv, d_v, v_h_u)
  d_v*Virus_Xv*UnInfected_Tumour_Cells_Xu/(v_h_u + UnInfected_Tumour_Cells_Xu);
end

function function_for_uninfected_tumour_cell_elimination_1_1(Effector_Cytotoxic_CD8_TCells__Xe, UnInfected_Tumour_Cells_Xu, d_u, h_e)
  d_u*UnInfected_Tumour_Cells_Xu*Effector_Cytotoxic_CD8_TCells__Xe/(h_e + Effector_Cytotoxic_CD8_TCells__Xe);
end

function function_for_uninfected_tumour_cell_elimination_2_1(M1_Macrophage_Xm1, M2_Macrophage_Xm2, UnInfected_Tumour_Cells_Xu, d_m1, h_m)
  d_m1*UnInfected_Tumour_Cells_Xu*M1_Macrophage_Xm1/(h_m + M2_Macrophage_Xm2);
end

function function_for_uninfected_tumour_cell_growth_M2_1(M2_Macrophage_Xm2, UnInfected_Tumour_Cells_Xu, d_m2, h_m)
  d_m2*UnInfected_Tumour_Cells_Xu*M2_Macrophage_Xm2/(h_m + M2_Macrophage_Xm2);
end
function_for_uninfected_tumour_cell_growth_M2_1 is "function for uninfected tumour cell growth;M2_1";

function function_for_virus_growth_1(Infected_Tumour_Cells_Xi, b, delta_i)
  delta_i*b*Infected_Tumour_Cells_Xi;
end

function function_for_infected_tumour_cell_elimination_1_1(Effector_Cytotoxic_CD8_TCells__Xe, Infected_Tumour_Cells_Xi, h_e, v_d_u)
  v_d_u*Infected_Tumour_Cells_Xi*Effector_Cytotoxic_CD8_TCells__Xe/(h_e + Effector_Cytotoxic_CD8_TCells__Xe);
end

function function_for_infected_tumour_cell_elimination_2_1(Infected_Tumour_Cells_Xi, M1_Macrophage_Xm1, M2_Macrophage_Xm2, h_m, v_d_m1)
  v_d_m1*Infected_Tumour_Cells_Xi*M1_Macrophage_Xm1/(h_m + M2_Macrophage_Xm2);
end

function function_for_virus_clearance_1_1(M1_Macrophage_Xm1, M2_Macrophage_Xm2, Virus_Xv, h_m, v_d_m1)
  v_d_m1*Virus_Xv*M1_Macrophage_Xm1/(h_m + M2_Macrophage_Xm2);
end

function function_for_virus_clearance_2_1(Effector_Cytotoxic_CD8_TCells__Xe, Virus_Xv, h_e, v_d_u)
  v_d_u*Virus_Xv*Effector_Cytotoxic_CD8_TCells__Xe/(h_e + Effector_Cytotoxic_CD8_TCells__Xe);
end

function function_for_M1_activation_1_1(Infected_Tumour_Cells_Xi, Virus_Xv, v_a_1)
  v_a_1*(Infected_Tumour_Cells_Xi + Virus_Xv);
end

function function_for_M1_activation_2_1(UnInfected_Tumour_Cells_Xu, u_a_1)
  u_a_1*UnInfected_Tumour_Cells_Xu;
end

function function_for_M1_recruitment_1(M, M1_Macrophage_Xm1, M2_Macrophage_Xm2, p_m1)
  p_m1*M1_Macrophage_Xm1*(1 - (M1_Macrophage_Xm1 + M2_Macrophage_Xm2)/M);
end

function function_for_M1_to_M2_repolarisation_1(M1_Macrophage_Xm1, UnInfected_Tumour_Cells_Xu, h_u, o_r_m1, u_r_m1)
  M1_Macrophage_Xm1*(o_r_m1 + u_r_m1*UnInfected_Tumour_Cells_Xu/(h_u + UnInfected_Tumour_Cells_Xu));
end

function function_for_M2_to_M1_repolarisation_1(M2_Macrophage_Xm2, Virus_Xv, h_v, o_r_m2, v_r_m2)
  M2_Macrophage_Xm2*(o_r_m2 + v_r_m2*Virus_Xv/(h_v + Virus_Xv));
end

function function_for_M2_activation_1(UnInfected_Tumour_Cells_Xu, u_a_2)
  u_a_2*UnInfected_Tumour_Cells_Xu;
end

function function_for_M2_growth_1(M, M1_Macrophage_Xm1, M2_Macrophage_Xm2, p_m2)
  p_m2*M2_Macrophage_Xm2*(1 - (M1_Macrophage_Xm1 + M2_Macrophage_Xm2)/M);
end

function function_for_T_cells_activation_1(M1_Macrophage_Xm1, M2_Macrophage_Xm2, h_m, p_e)
  p_e*M1_Macrophage_Xm1/(h_m + M2_Macrophage_Xm2);
end

function function_for_T_cells_inactivation_1(Effector_Cytotoxic_CD8_TCells__Xe, UnInfected_Tumour_Cells_Xu, d_t)
  d_t*UnInfected_Tumour_Cells_Xu*Effector_Cytotoxic_CD8_TCells__Xe;
end

model Eftimie2019()
  // Eftimie2019-Macrophages Plasticity
  // This a model from the article:
  // Investigating Macrophages Plasticity Following Tumour–Immune Interactions During Oncolytic Therapies
  // R. Eftimie, G. Eftimie. Acta Biotheoretica.
  // Abstract:
  // Over the last few years, oncolytic virus therapy has been recognised as a promising approach in cancer treatment, due to the potential of these viruses to induce systemic anti-tumour immunity and
  // selectively killing tumour cells. However, the effectiveness of these viruses depends significantly on their interactions with the host immune responses, both innate (e.g., macrophages, which
  // accumulate in high numbers inside solid tumours) and adaptive (e.g., [Formula: see text] T cells). In this article, we consider a mathematical approach to investigate the possible outcomes of the
  // complex interactions between two extreme types of macrophages (M1 and M2 cells), effector [Formula: see text] T cells and an oncolytic Vesicular Stomatitis Virus (VSV), on the growth/elimination of
  // B16F10 melanoma. We discuss, in terms of VSV, [Formula: see text] and macrophages levels, two different types of immune responses which could ensure tumour control and eventual elimination. We show
  // that both innate and adaptive anti-tumour immune responses, as well as the oncolytic virus, could be very important in delaying tumour relapse and eventually eliminating the tumour. Overall this
  // study supports the use mathematical modelling to increase our understanding of the complex immune interaction following oncolytic virotherapies. However, the complexity of the model combined with a
  // lack of sufficient data for model parametrisation has an impact on the possibility of making quantitative predictions.
  // This model originates from BioModels Database: A Database of Annotated Published Models (http://www.ebi.ac.uk/biomodels/). It is copyright (c) 2005-2011 The BioModels.net Team.
  // For more information see the terms of use.
  // To cite BioModels Database, please use: Li C, Donizelli M, Rodriguez N, Dharuri H, Endler L, Chelliah V, Li L, He E, Henry A, Stefan MI, Snoep JL, Hucka M, Le Novère N, Laibe C (2010) BioModels
  // Database: An enhanced, curated and annotated resource for published quantitative kinetic models. BMC Syst Biol., 4:92.
  // biomodels.db:MODEL1909050001 biomodels.db:BIOMD0000000806
  // hasProperty DOID:4159
  // hasProperty efo:0000311
  // hasProperty GO:0002837
  // hasProperty mamo:MAMO_0000046
  // hasProperty DOID:162
  // model units - substance: substance, time: time, volume: volume, area: area, length: length, extent: substance

  // Compartments:
  compartment compartment = 1 volume;  // isVersionOf ncit:C14424; isVersionOf ncit:C13413

  // Species:
  species UnInfected_Tumour_Cells_Xu in compartment = 500000; UnInfected_Tumour_Cells_Xu is "UnInfected_Tumour_Cells(Xu)";  // isVersionOf efo:0000311; isVersionOf BTO:0002014
  species Infected_Tumour_Cells_Xi in compartment = 0; Infected_Tumour_Cells_Xi is "Infected_Tumour_Cells(Xi)";  // isVersionOf BTO:0002014; isVersionOf EFO:0000311; isVersionOf BTO:0000152
  species Virus_Xv in compartment = 0; Virus_Xv is "Virus(Xv)";  // isVersionOf taxonomy:11276
  species Effector_Cytotoxic_CD8_TCells__Xe in compartment = 0; Effector_Cytotoxic_CD8_TCells__Xe is "Effector_Cytotoxic_CD8_TCells (Xe)";  // isVersionOf CL:0000794
  species M1_Macrophage_Xm1 in compartment = 0; M1_Macrophage_Xm1 is "M1_Macrophage(Xm1)";  // isVersionOf ncit:C156004
  species M2_Macrophage_Xm2 in compartment = 0; M2_Macrophage_Xm2 is "M2_Macrophage(Xm2)";  // isVersionOf ncit:C123783

  // Parameters:
  r = 0.924 unit_0;
  K = 3.3e9 unit_1;  // isVersionOf ncit:C25443
  d_v = 0.011;
  v_h_u = 100000;
  d_u = 0.44;
  h_e = 1;
  d_m1 = 0.01;
  h_m = 1000;
  d_m2 = 0.4;
  delta_i = 0.475 unit_0;
  b = 2500;
  v_d_u = 4.4 unit_0;
  v_d_m1 = 1.5 unit_0;
  H = 0;
  omega = 2 unit_0;
  d_em1 = 0.2;
  v_a_1 = 1e-6 unit_0;
  u_a_1 = 3e-6 unit_0;
  p_m1 = 0.22 unit_0;
  M = 100000000;  // isVersionOf ncit:C25443
  o_r_m1 = 0.001 unit_0;
  o_r_m2 = 0.001 unit_0;
  u_r_m1 = 4 unit_0;
  v_r_m2 = 0.5 unit_0;
  p_m2 = 0.22 unit_0;
  h_u = 5e9;
  h_v = 0.105636;
  d_em2 = 0.2 unit_0;
  u_a_2 = 4e-8 unit_0;
  d_ee = 0.4 unit_0;
  p_e = 2070 unit_0;
  d_t = 1e-10 unit_0;

  // Reactions:
  Uninfected_tumour_cell_logistic_growth: => UnInfected_Tumour_Cells_Xu; compartment*function_for_uninfected_tumour_cell_logistic_growth_1(K, UnInfected_Tumour_Cells_Xu, r);  // isVersionOf GO:0040007
  Uninfected_tumour_cell_infection: UnInfected_Tumour_Cells_Xu => Infected_Tumour_Cells_Xi; compartment*function_for_uninfected_tumour_cell_infection_1(UnInfected_Tumour_Cells_Xu, Virus_Xv, d_v, v_h_u);  // modifiers: Virus_Xv; isVersionOf GO:0019089
  Uninfected_tumour_cell_elimination_1: UnInfected_Tumour_Cells_Xu => ; compartment*function_for_uninfected_tumour_cell_elimination_1_1(Effector_Cytotoxic_CD8_TCells__Xe, UnInfected_Tumour_Cells_Xu, d_u, h_e);  // modifiers: Effector_Cytotoxic_CD8_TCells__Xe
  Uninfected_tumour_cell_elimination_2: UnInfected_Tumour_Cells_Xu => ; compartment*function_for_uninfected_tumour_cell_elimination_2_1(M1_Macrophage_Xm1, M2_Macrophage_Xm2, UnInfected_Tumour_Cells_Xu, d_m1, h_m);  // modifiers: M1_Macrophage_Xm1, M2_Macrophage_Xm2
  Uninfected_tumour_cell_growth_M2: => UnInfected_Tumour_Cells_Xu; compartment*function_for_uninfected_tumour_cell_growth_M2_1(M2_Macrophage_Xm2, UnInfected_Tumour_Cells_Xu, d_m2, h_m); Uninfected_tumour_cell_growth_M2 is "Uninfected tumour cell growth;M2";  // modifiers: M2_Macrophage_Xm2; isVersionOf GO:0040007
  Infected_tumour_cell_death: Infected_Tumour_Cells_Xi => ; compartment*delta_i*Infected_Tumour_Cells_Xi;
  virus_growth: => Virus_Xv; compartment*function_for_virus_growth_1(Infected_Tumour_Cells_Xi, b, delta_i);  // modifiers: Infected_Tumour_Cells_Xi; isVersionOf GO:0040007
  Infected_tumour_cell_elimination_1: Infected_Tumour_Cells_Xi => ; compartment*function_for_infected_tumour_cell_elimination_1_1(Effector_Cytotoxic_CD8_TCells__Xe, Infected_Tumour_Cells_Xi, h_e, v_d_u);  // modifiers: Effector_Cytotoxic_CD8_TCells__Xe
  Infected_tumour_cell_elimination_2: Infected_Tumour_Cells_Xi => ; compartment*function_for_infected_tumour_cell_elimination_2_1(Infected_Tumour_Cells_Xi, M1_Macrophage_Xm1, M2_Macrophage_Xm2, h_m, v_d_m1);  // modifiers: M1_Macrophage_Xm1, M2_Macrophage_Xm2
  virus_injection: => Virus_Xv; compartment*Constant_flux__irreversible(H);  // isVersionOf GO:0035737
  virus_death: Virus_Xv => ; compartment*omega*Virus_Xv;
  virus_clearance_1: Virus_Xv => ; compartment*function_for_virus_clearance_1_1(M1_Macrophage_Xm1, M2_Macrophage_Xm2, Virus_Xv, h_m, v_d_m1);  // modifiers: M1_Macrophage_Xm1, M2_Macrophage_Xm2
  virus_clearance_2: Virus_Xv => ; compartment*function_for_virus_clearance_2_1(Effector_Cytotoxic_CD8_TCells__Xe, Virus_Xv, h_e, v_d_u);  // modifiers: Effector_Cytotoxic_CD8_TCells__Xe
  M1_activation_1: => M1_Macrophage_Xm1; compartment*function_for_M1_activation_1_1(Infected_Tumour_Cells_Xi, Virus_Xv, v_a_1);  // modifiers: Infected_Tumour_Cells_Xi, Virus_Xv
  M1_activation_2: => M1_Macrophage_Xm1; compartment*function_for_M1_activation_2_1(UnInfected_Tumour_Cells_Xu, u_a_1);  // modifiers: UnInfected_Tumour_Cells_Xu
  M1_recruitment: => M1_Macrophage_Xm1; compartment*function_for_M1_recruitment_1(M, M1_Macrophage_Xm1, M2_Macrophage_Xm2, p_m1);  // modifiers: M2_Macrophage_Xm2; isVersionOf GO:1905517
  M1_to_M2_repolarisation: M1_Macrophage_Xm1 => M2_Macrophage_Xm2; compartment*function_for_M1_to_M2_repolarisation_1(M1_Macrophage_Xm1, UnInfected_Tumour_Cells_Xu, h_u, o_r_m1, u_r_m1);  // modifiers: UnInfected_Tumour_Cells_Xu; isPropertyOf GO:0048246; isPropertyOf GO:0048246
  M2_to_M1_repolarisation: M2_Macrophage_Xm2 => M1_Macrophage_Xm1; compartment*function_for_M2_to_M1_repolarisation_1(M2_Macrophage_Xm2, Virus_Xv, h_v, o_r_m2, v_r_m2);  // modifiers: Virus_Xv; isPropertyOf GO:0048246; isPropertyOf GO:0048246
  M1_death: M1_Macrophage_Xm1 => ; compartment*d_em1*M1_Macrophage_Xm1;
  M2_activation: => M2_Macrophage_Xm2; compartment*function_for_M2_activation_1(UnInfected_Tumour_Cells_Xu, u_a_2);  // modifiers: UnInfected_Tumour_Cells_Xu; isVersionOf GO:0042116
  M2_growth: => M2_Macrophage_Xm2; compartment*function_for_M2_growth_1(M, M1_Macrophage_Xm1, M2_Macrophage_Xm2, p_m2);  // modifiers: M1_Macrophage_Xm1; isVersionOf GO:0040007
  M2_death: M2_Macrophage_Xm2 => ; compartment*d_em2*M2_Macrophage_Xm2;
  T_cells_activation: => Effector_Cytotoxic_CD8_TCells__Xe; compartment*function_for_T_cells_activation_1(M1_Macrophage_Xm1, M2_Macrophage_Xm2, h_m, p_e);  // modifiers: M1_Macrophage_Xm1, M2_Macrophage_Xm2
  T_cells_death: Effector_Cytotoxic_CD8_TCells__Xe => ; compartment*d_ee*Effector_Cytotoxic_CD8_TCells__Xe;
  T_cells_inactivation: Effector_Cytotoxic_CD8_TCells__Xe => ; compartment*function_for_T_cells_inactivation_1(Effector_Cytotoxic_CD8_TCells__Xe, UnInfected_Tumour_Cells_Xu, d_t);  // modifiers: UnInfected_Tumour_Cells_Xu; isVersionOf GO:0002870

  // Events:
  Heaviside_function_at_10: at (time >= 10), t0=false, fromTrigger=false: H = H + 2*10^7;
  Heaviside_function_at_11: at (time >= 11), t0=false, fromTrigger=false: H = H - 2*10^7;
  Heaviside_function_at_13: at (time >= 13), t0=false, fromTrigger=false: H = H + 2*10^7;
  Heaviside_function_at_14: at (time >= 14), t0=false, fromTrigger=false: H = H - 2*10^7;
  dm1_at_11: at (time >= 11), t0=false, fromTrigger=false: d_m1 = d_m1 + 0.28;
  du_at_15: at (time >= 15), t0=false, fromTrigger=false: d_u = d_u + 0.41;

  // Unit definitions:
  unit length = metre;
  unit area = metre^2;
  unit volume = 1e-3 litre;
  unit time = 86400 second;
  unit substance = 1e-3 mole;
  unit unit_0 = 1 / (1e-3 second); unit_0 is "1/ms";
  unit unit_1 = dimensionless^0;
end
