// SBML level 3 version 1
// dcterms:bibliographicCitation: http://identifiers.org/pubmed/29947770

function function_for_normal_cell_growth_1(K, r_N)
  r_N/K;
end

function function_for_cancer_cell_death_tissue_repair_system_1(K, beta_3, normalized_cancer_cell_a, normalized_normal_cell_n)
  beta_3*K*normalized_normal_cell_n*normalized_cancer_cell_a;
end
function_for_cancer_cell_death_tissue_repair_system_1 is "function for cancer cell death;tissue repair system_1";

function function_for_negative_effect_on_G_A_1(beta_5, normalized_cancer_cell_a, normalized_pre_cancer_cell_g)
  beta_5*normalized_cancer_cell_a*normalized_pre_cancer_cell_g;
end
function_for_negative_effect_on_G_A_1 is "function for negative effect on G;A_1";

function function_for_transition_to_cancer_cell_1(K, delta, normalized_pre_cancer_cell_g, xi)
  delta*normalized_pre_cancer_cell_g^2/(xi/K + normalized_pre_cancer_cell_g);
end

function function_for_normal_cell_damage_A_1(K, beta_1, normalized_cancer_cell_a, normalized_normal_cell_n)
  beta_1*K*normalized_normal_cell_n*normalized_cancer_cell_a;
end
function_for_normal_cell_damage_A_1 is "function for normal cell damage;A_1";

function function_for_negative_effect_on_A_G_1(beta_6, normalized_cancer_cell_a, normalized_pre_cancer_cell_g)
  beta_6*normalized_cancer_cell_a*normalized_pre_cancer_cell_g;
end
function_for_negative_effect_on_A_G_1 is "function for negative effect on A;G_1";

function function_for_normal_cell_damage_G_1(beta_4, normalized_normal_cell_n, normalized_pre_cancer_cell_g)
  beta_4*normalized_normal_cell_n*normalized_pre_cancer_cell_g;
end
function_for_normal_cell_damage_G_1 is "function for normal cell damage;G_1";

function function_for_pre_cancer_cell_logistic_growth_1(normalized_pre_cancer_cell_g, r_G)
  r_G*normalized_pre_cancer_cell_g;
end
function_for_pre_cancer_cell_logistic_growth_1 is "function for pre-cancer cell logistic growth_1";

function function_for_pre_cancer_cell_death_tissue_repair_system_1(K, beta_2, normalized_normal_cell_n, normalized_pre_cancer_cell_g)
  beta_2*K*normalized_normal_cell_n*normalized_pre_cancer_cell_g;
end
function_for_pre_cancer_cell_death_tissue_repair_system_1 is "function for pre-cancer cell death;tissue repair system_1";

function function_for_cancer_cell_logistic_growth_1(K, K_A, normalized_cancer_cell_a, r_A)
  r_A*normalized_cancer_cell_a*(1 - normalized_cancer_cell_a/(K_A/K));
end

model New_Model()
  // Fassoni2019 - Oncogenesis encompassing mutations and genetic instability
  // This model describes the multistep process that transform a normal cell and its descendants into a malignant tumour by considering three populations: normal, premalignant and cancer cells. Created by COPASI 4.24(Build 197) Abstract: Tumorigenesis has been described as a multistep process, where each step is associated with a genetic alteration, in the direction to progressively transform a normal cell and its descendants into a malignant tumour. Into this work, we propose a mathematical model for cancer onset and development, considering three populations: normal, premalignant and cancer cells. The model takes into account three hallmarks of cancer: self-sufficiency on growth signals, insensibility to anti-growth signals and evading apoptosis. By using a nonlinear expression to describe the mutation from premalignant to cancer cells, the model includes genetic instability as an enabling characteristic of tumour progression. Mathematical analysis was performed in detail. Results indicate that apoptosis and tissue repair system are the first barriers against tumour progression. One of these mechanisms must be corrupted for cancer to develop from a single mutant cell. The results also show that the presence of aggressive cancer cells opens way to survival of less adapted premalignant cells. Numerical simulations were performed with parameter values based on experimental data of breast cancer, and the necessary time taken for cancer to reach a detectable size from a single mutant cell was estimated with respect to some parameters. We find that the rates of apoptosis and mutations have a large influence on the pace of tumour progression and on the time it takes to become clinically detectable.
  // hasProperty mamo:MAMO_0000046
  // hasProperty ncit:C19320
  // hasProperty ncit:C18121
  // hasProperty ncit:C45576
  // hasProperty ncit:C16870
  // hasProperty ncit:C17938
  // model units - substance: substance, time: time, volume: volume, area: area, length: length, extent: substance

  // Compartments:
  compartment compartment = 1 volume;  // isVersionOf ncit:C13413

  // Species:
  species normalized_normal_cell_n in compartment = n0;  // hasProperty ncit:C115935; hasProperty ncit:C12508; hasProperty ncit:C115935
  species normalized_pre_cancer_cell_g in compartment = g0; normalized_pre_cancer_cell_g is "normalized pre-cancer cell g";  // hasProperty ncit:C12959; hasProperty ncit:C25629; hasProperty ncit:C12959; hasProperty ncit:C25629
  species normalized_cancer_cell_a in compartment = a0;  // hasProperty ncit:C12959; hasProperty ncit:C12959

  // Parameters:
  r_N = 1000000 unit_2;
  mu_N = 0.01 unit_2;  // hasProperty ncit:C85060; hasProperty ncit:C53346; hasProperty ncit:C53346; hasProperty ncit:C85060
  beta_1 = 3.5e-10 unit_2;
  beta_4 = 0 unit_2;
  r_G = 0.05 unit_2;
  mu_G = 0.01 unit_2;  // hasProperty ncit:C53346; hasProperty ncit:C85060; hasProperty ncit:C85060; hasProperty ncit:C53346
  xi_G = 0.01 unit_2;  // hasProperty ncit:C53346; hasProperty ncit:C53346
  beta_2 = 3.5e-10 unit_2;
  beta_5 = 0 unit_2;
  delta = 1e-5 unit_2;  // hasProperty GO:0000492; hasProperty ncit:C25636; hasProperty ncit:C25564; hasProperty GO:0000492
  xi = 1000 unit_1;  // hasProperty ncit:C48228; hasProperty ncit:C48228
  r_A = 0.05 unit_2;
  K_A = 10000000 unit_1;  // hasProperty ncit:C81005; hasProperty ncit:C81005
  mu_A = 0.01 unit_2;  // hasProperty ncit:C53346; hasProperty ncit:C85060; hasProperty ncit:C53346; hasProperty ncit:C85060
  xi_A = 0.006 unit_2;  // hasProperty ncit:C53346; hasProperty ncit:C53346
  beta_3 = 3.5e-10 unit_2;
  beta_6 = 0 unit_2;
  K = 100000000;
  G0 = 1;  // hasProperty ncit:C25629; hasProperty ncit:C12959
  A0 = 0;  // hasProperty ncit:C12959
  var a; a is "a'";  // hasProperty ncit:C12959

  // Assignment rules:
  N0 := r_N/mu_N - 1;
  g0 := G0/K;
  a := normalized_cancer_cell_a*10;
  A := normalized_cancer_cell_a*K;
  G := normalized_pre_cancer_cell_g*K;
  n0 := N0/K;
  a0 := A0/K;
  N := normalized_normal_cell_n*K;

  // Reactions:
  normal_cell_growth: => normalized_normal_cell_n; compartment*function_for_normal_cell_growth_1(K, r_N);
  normal_cell_death: normalized_normal_cell_n => ; compartment*mu_N*normalized_normal_cell_n;
  normal_cell_damage_A: normalized_normal_cell_n => ; compartment*function_for_normal_cell_damage_A_1(K, beta_1, normalized_cancer_cell_a, normalized_normal_cell_n); normal_cell_damage_A is "normal cell damage;A";  // modifiers: normalized_cancer_cell_a
  normal_cell_damage_G: normalized_normal_cell_n => ; compartment*function_for_normal_cell_damage_G_1(beta_4, normalized_normal_cell_n, normalized_pre_cancer_cell_g); normal_cell_damage_G is "normal cell damage;G";  // modifiers: normalized_pre_cancer_cell_g
  pre_cancer_cell_logistic_growth: => normalized_pre_cancer_cell_g; compartment*function_for_pre_cancer_cell_logistic_growth_1(normalized_pre_cancer_cell_g, r_G); pre_cancer_cell_logistic_growth is "pre-cancer cell logistic growth";  // hasProperty GO:0040007; hasProperty GO:0040007
  pre_cancer_cell_natural_death: normalized_pre_cancer_cell_g => ; compartment*mu_G*normalized_pre_cancer_cell_g; pre_cancer_cell_natural_death is "pre-cancer cell natural death";
  pre_cancer_cell_death_tissue_repair_system: normalized_pre_cancer_cell_g => ; compartment*function_for_pre_cancer_cell_death_tissue_repair_system_1(K, beta_2, normalized_normal_cell_n, normalized_pre_cancer_cell_g); pre_cancer_cell_death_tissue_repair_system is "pre-cancer cell death;tissue repair system";  // modifiers: normalized_normal_cell_n
  pre_cancer_cell_death_apoptosis: normalized_pre_cancer_cell_g => ; compartment*xi_G*normalized_pre_cancer_cell_g; pre_cancer_cell_death_apoptosis is "pre-cancer cell death;apoptosis";
  negative_effect_on_G_A: normalized_pre_cancer_cell_g => ; compartment*function_for_negative_effect_on_G_A_1(beta_5, normalized_cancer_cell_a, normalized_pre_cancer_cell_g); negative_effect_on_G_A is "negative effect on G;A";  // modifiers: normalized_cancer_cell_a
  negative_effect_on_A_G: normalized_cancer_cell_a => ; compartment*function_for_negative_effect_on_A_G_1(beta_6, normalized_cancer_cell_a, normalized_pre_cancer_cell_g); negative_effect_on_A_G is "negative effect on A;G";  // modifiers: normalized_pre_cancer_cell_g
  cancer_cell_natural_death: normalized_cancer_cell_a => ; compartment*mu_A*normalized_cancer_cell_a;
  cancer_cell_logistic_growth: => normalized_cancer_cell_a; compartment*function_for_cancer_cell_logistic_growth_1(K, K_A, normalized_cancer_cell_a, r_A);  // hasProperty GO:0040007; hasProperty GO:0040007
  cancer_cell_death_tissue_repair_system: normalized_cancer_cell_a => ; compartment*function_for_cancer_cell_death_tissue_repair_system_1(K, beta_3, normalized_cancer_cell_a, normalized_normal_cell_n); cancer_cell_death_tissue_repair_system is "cancer cell death;tissue repair system";  // modifiers: normalized_normal_cell_n
  cancer_cell_death_apoptosis: normalized_cancer_cell_a => ; compartment*xi_A*normalized_cancer_cell_a; cancer_cell_death_apoptosis is "cancer cell death;apoptosis";
  transition_to_cancer_cell: normalized_pre_cancer_cell_g => normalized_cancer_cell_a; compartment*function_for_transition_to_cancer_cell_1(K, delta, normalized_pre_cancer_cell_g, xi);

  // Unit definitions:
  unit length = metre;
  unit area = metre^2;
  unit volume = 1e-3 litre;
  unit time = 86400 second;
  unit substance = 1e-3 mole;
  unit unit_0 = 1 / (8640 second); unit_0 is "1/d";
  unit unit_1 = dimensionless^0;
  unit unit_2 = 1 / (1e-3 second); unit_2 is "1/ms";
end
