// SBML level 2 version 4
// dcterms:bibliographicCitation: urn:miriam:pubmed:17823798

function Constant_flux__irreversible(v)
  v;
end
Constant_flux__irreversible is "Constant flux (irreversible)";

function Function_for_F_gamma_CTL_Production(a_gamma_C, C)
  a_gamma_C*C;
end

function Function_for_F_beta_Tumor_Production(a_B_T, T)
  a_B_T*T;
end

function Function_for_CTL_Recruitment(a_C_M2, M2, T, e_C_M2, a_C_beta, e_C_beta, F_beta)
  a_C_M2*M2*T/(M2*T + e_C_M2)*(a_C_beta + e_C_beta*(1 - a_C_beta)/(F_beta + e_C_beta));
end

function Function_for_Tumor_Elimination_CTL(a_T, M1, e_T, C, T, h_T, a_T_beta, e_T_beta, F_beta)
  a_T*M1/(M1 + e_T)*(C*T/(h_T + T))*(a_T_beta + e_T_beta*(1 - a_T_beta)/(F_beta + e_T_beta));
end

function Function_for_Tumor_Growth(r, T, K)
  r*T*(1 - T/K);
end

model Kronik2008___Improving_alloreactive_CTL_immunotherapy_for_malignant_gliomas_using_a_simulation_model_of_their_interactive_dynamics()
  // Kronik2008 - Improving alloreactive CTL immunotherapy for malignant gliomas using a simulation model of their interactive dynamics
  // This mathematical model describes interactions between glioma tumors and the immune system that may occur following direct intra-tumoral administration of ex-vivo activated alloreactive
  // cytotoxic-T-lymphocytes (aCTLs) as part of adoptive immunotherapy. The model includes descriptions of aCTL, neoplastic cells, MHC class I and II molecules, TGF-beta and IFN-gamma.
  // isDescribedBy pubmed:17823798
  // biomodels.db:MODEL1909090001 biomodels.db:BIOMD0000000808
  // hasProperty ncit:C15351
  // hasProperty mamo:MAMO_0000046

  // Compartments:
  compartment compartment = 1;  // isVersionOf ncit:C94498

  // Species:
  species T in compartment = 1e10;  // CL:0001063
  species C in compartment = 2000000;  // CL:0000910
  species F_beta in compartment = 0;  // isVersionOf ncit:C20455
  species F_gamma in compartment = 0;  // uniprot:Q14609
  species M1 in compartment = 0;  // isVersionOf GO:0042612
  species M2 in compartment = 0;  // isVersionOf GO:0042613

  // Parameters:
  r = 0.00035;
  K = 1e11;
  a_T = 0.12;
  e_T = 50;
  a_T_beta = 0.69;
  e_T_beta = 10000;
  h_T = 500000000;
  a_C_M2 = 4.8e-11;
  e_C_M2 = 1e14;
  a_C_beta = 0.8;
  e_C_beta = 10000;
  mu_C = 0.007;
  g_beta = 63945;
  a_beta_T = 5.75e-6;
  mu_beta = 7;
  a_gamma_C = 0.000102;
  mu_gamma = 0.102;
  g_M1 = 1.44;
  a_M1_gamma = 2.88;
  e_M1_gamma = 338000;
  mu_M1 = 0.0144;
  a_M2_gamma = 8660;
  e_M2_gamma = 1420;
  a_M2_beta = 0.012;
  e_M2_beta = 100000;
  mu_M2 = 0.0144;
  S_dose = 300000000;
  S_interval = 10;
  Initial_for_S_dose = S_dose;
  Initial_for_S_interval = S_interval;

  // Assignment rules:
  T_e9 := T/100000000;
  S_3 := piecewise(Initial_for_S_dose/Initial_for_S_interval, (((piecewise(time - 120*ceil(time/120), xor(time < 0, 120 < 0), time - 120*floor(time/120)) >= 0) && (piecewise(time - 120*ceil(time/120), xor(time < 0, 120 < 0), time - 120*floor(time/120)) <= Initial_for_S_interval)) && (time > 2880)) && (time < 3240), 0);
  S_4 := piecewise(Initial_for_S_dose/Initial_for_S_interval, (((piecewise(time - 120*ceil(time/120), xor(time < 0, 120 < 0), time - 120*floor(time/120)) >= 0) && (piecewise(time - 120*ceil(time/120), xor(time < 0, 120 < 0), time - 120*floor(time/120)) <= Initial_for_S_interval)) && (time > 4320)) && (time < 4680), 0);
  C_e7 := C/10000000;
  S_5 := piecewise(Initial_for_S_dose/Initial_for_S_interval, (((piecewise(time - 120*ceil(time/120), xor(time < 0, 120 < 0), time - 120*floor(time/120)) >= 0) && (piecewise(time - 120*ceil(time/120), xor(time < 0, 120 < 0), time - 120*floor(time/120)) <= Initial_for_S_interval)) && (time > 5760)) && (time < 6120), 0);
  S_2 := piecewise(Initial_for_S_dose/Initial_for_S_interval, (((piecewise(time - 120*ceil(time/120), xor(time < 0, 120 < 0), time - 120*floor(time/120)) >= 0) && (piecewise(time - 120*ceil(time/120), xor(time < 0, 120 < 0), time - 120*floor(time/120)) <= Initial_for_S_interval)) && (time > 1440)) && (time < 1800), 0);
  S_1 := piecewise(S_dose/Initial_for_S_interval, ((piecewise(time - 120*ceil(time/120), xor(time < 0, 120 < 0), time - 120*floor(time/120)) >= 0) && (piecewise(time - 120*ceil(time/120), xor(time < 0, 120 < 0), time - 120*floor(time/120)) <= Initial_for_S_interval)) && (time < 360), 0);
  S := S_1 + S_2 + S_3 + S_4 + S_5;

  // Reactions:
  Tumor_Growth: => T; compartment*Function_for_Tumor_Growth(r, T, K);  // isVersionOf ncit:C18081
  Tumor_Elimination_CTL: T => ; compartment*Function_for_Tumor_Elimination_CTL(a_T, M1, e_T, C, T, h_T, a_T_beta, e_T_beta, F_beta);  // modifiers: M1, C, F_beta; isVersionOf GO:0002419
  CTL_Recruitment: => C; compartment*Function_for_CTL_Recruitment(a_C_M2, M2, T, e_C_M2, a_C_beta, e_C_beta, F_beta);  // modifiers: M2, T, F_beta; isVersionOf GO:0035698
  CTL_Death: C => ; compartment*mu_C*C;  // isVersionOf GO:0008219
  CTL_Infusion: => C; compartment*Constant_flux__irreversible(S);  // isVersionOf ncit:C15351
  F_beta_Basal_Production: => F_beta; compartment*Constant_flux__irreversible(g_beta);  // isVersionOf ncit:C80450
  F_beta_Tumor_Production: => F_beta; compartment*Function_for_F_beta_Tumor_Production(a_T_beta, T);  // modifiers: T; isVersionOf ncit:C36662
  F_beta_Degradation: F_beta => ; compartment*mu_beta*F_beta;
  F_gamma_CTL_Production: => F_gamma; compartment*Function_for_F_gamma_CTL_Production(a_gamma_C, C);  // modifiers: C; isVersionOf GO:0032609
  F_gamma_Degradation: F_gamma => ; compartment*mu_gamma*F_gamma;
  M1_Receptor_Expression_Basal: => M1; compartment*Constant_flux__irreversible(g_M1);  // isVersionOf ncit:C80450
  M1_Expression_Stimulated: => M1; compartment*Constant_flux__irreversible(M1_Expression_Stimulated_v);  // isVersionOf ncit:C80450
    M1_Expression_Stimulated_v = 0.1;
  M1_Degradation: M1 => ; compartment*mu_M1*M1;
  M2_Production: => M2; compartment*Constant_flux__irreversible(M2_Production_v);  // isVersionOf ncit:C80450
    M2_Production_v = 0.1;
  M2_Degradation: M2 => ; compartment*mu_M2*M2;  // isVersionOf sbo:degradation

  // Unit definitions:
  unit volume = 1e-3 litre;
  unit time = 3600 second;
  unit substance = 1e-3 mole;
end
