// SBML level 2 version 4
// dcterms:bibliographicCitation: urn:miriam:pubmed:30537482

function Function_for_x_logistic_growth(phi_1, x, phi_2)
  phi_1*x*(1 - phi_2*x);
end

function Function_for_x_proliferation(delta, x, y, gamma)
  delta*x*y/(gamma + x);
end

function Function_for_x_immune_inactivation(nu_1, x, y)
  nu_1*x*y;
end

function Function_for_y_logistic_growth(sigma_1, y, sigma_2)
  sigma_1*y*(1 - sigma_2*y);
end

function Function_for_y_tumour_lysis(nu_2, x, y)
  nu_2*x*y;
end

function Function_for_u_production(nu_3, x, y)
  nu_3*x*y;
end

function Function_for_u_decay(myu_1, u)
  myu_1*u;
end

function Function_for_y__formation(x, y, rho)
  rho*x*y;
end
Function_for_y__formation is "Function for y* formation";

function Function_for_y__decay(myu_2, ystar)
  myu_2*ystar;
end
Function_for_y__decay is "Function for y* decay";

model New_Model()
  // Malinzi2018 - tumour-immune interaction model
  // The paper describes a spatio-temporal mathematical model, in the form of a moving boundary problem, to explain cancer dormancy is developed. Created by COPASI 4.24 (Build 197) Abstract: A spatio-temporal mathematical model, in the form of a moving boundary problem, to explain cancer dormancy is developed. Analysis of the model is carried out for both temporal and spatio-temporal cases. Stability analysis and numerical simulations of the temporal model replicate experimental observations of immune-induced tumour dormancy. Travelling wave solutions of the spatio-temporal model are determined using the hyperbolic tangent method and minimum wave speeds of invasion are calculated. Travelling wave analysis depicts that cell invasion dynamics are mainly driven by their motion and growth rates. A stability analysis of the spatio-temporal model shows a possibility of dynamical stabilization of the tumour-free steady state. Simulation results reveal that the tumour swells to a dormant level.
  // biomodels.db:MODEL1909060001 biomodels.db:BIOMD0000000809
  // hasProperty GO:0002837
  // hasProperty DOID:162
  // hasProperty efo:0000311
  // hasProperty GO:0022611
  // hasProperty mamo:MAMO_0000046

  // Compartments:
  compartment compartment = 1;  // isVersionOf ncit:C13413

  // Species:
  species x in compartment = 0.3; x is "Immune cell x";  // isVersionOf ncit:C132890
  species y in compartment = 0.8; y is "Tumour cell y";  // isVersionOf efo:0000311
  species u in compartment = 1e-6; u is "Chemokine concentration u";  // isVersionOf ncit:C20466; isVersionOf ncit:C41185
  species ystar in compartment = 0.1; ystar is "Dead tumour cell ystar";  // isVersionOf efo:0000311; isPropertyOf ncit:C28554

  // Parameters:
  R = 0.8;  // isVersionOf efo:0000311; isVersionOf ncit:C63921
  phi_1 = 1.3398;
  phi_2 = 0.25;
  delta = 3.0218;
  nu_1 = 0.00218;
  sigma_1 = 0.3;
  sigma_2 = 0.5;
  nu_2 = 0.7279;
  nu_3 = 300;
  myu_1 = 1;
  rho = 0.1;
  myu_2 = 0.24;
  gamma = 2.02;

  // Rate rules:
  R' = R*((sigma_1*y*(1 - sigma_2*y) - myu_2*ystar)/(y + ystar - 1))/3;

  // Reactions:
  x_logistic_growth: => x; compartment*Function_for_x_logistic_growth(phi_1, x, phi_2); x_logistic_growth is "Immune cell x logistic growth";  // isVersionOf GO:0040007
  x_proliferation: => x; compartment*Function_for_x_proliferation(delta, x, y, gamma); x_proliferation is "Immune cell x proliferation";  // modifiers: y
  x_immune_inactivation: x => ; compartment*Function_for_x_immune_inactivation(nu_1, x, y); x_immune_inactivation is "Immune cell x immune inactivation";  // modifiers: y
  y_logistic_growth: => y; compartment*Function_for_y_logistic_growth(sigma_1, y, sigma_2); y_logistic_growth is "Tumour cell y logistic growth";  // isVersionOf GO:0040007
  y_tumour_lysis: y => ; compartment*Function_for_y_tumour_lysis(nu_2, x, y); y_tumour_lysis is "Tumour cell y tumour lysis";  // modifiers: x
  u_production: => u; compartment*Function_for_u_production(nu_3, x, y); u_production is "Chemokine concentration u production";  // modifiers: x, y
  u_decay: u => ; compartment*Function_for_u_decay(myu_1, u); u_decay is "Chemokine concentration u decay";
  ystar_formation: => ystar; compartment*Function_for_y__formation(x, y, rho); ystar_formation is "Dead tumour cell ystar formation";  // modifiers: x, y
  ystar_decay: ystar => ; compartment*Function_for_y__decay(myu_2, ystar); ystar_decay is "Dead tumour cell ystar decay";

  // Unit definitions:
  unit volume = 1e-3 litre;
  unit substance = 1e-3 mole;
end
