// SBML level 2 version 4
// dcterms:bibliographicCitation: urn:miriam:doi:10.1142/S021833901750005X

function Constant_flux__irreversible(v)
  v;
end
Constant_flux__irreversible is "Constant flux (irreversible)";

function Function_for_PSC_Growth(k_p, f_p, C, mu_p, P, a_p)
  (k_p + f_p*C/(mu_p + C))*P*(1 - a_p*P);
end

function Function_for_Tumor_Removal_CD8(d_c, E, C, r_1, R, r_2, gamma_2_tau_3)
  d_c*E*C/((1 + r_1*R)*(1 + r_2*gamma_2_tau_3*C));
end

function Function_for_CD8_Recruitment_NK(r_e, N, C)
  r_e*N*C;
end

function Function_for_Tumor_Interaction_NK(b_c, N, C)
  b_c*N*C;
end

function Function_for_CD8_Inactivation(c_e, E, C)
  c_e*E*C;
end

function Function_for_CD8_Proliferation_Stimulation_IL_2(p_e, H, E, g_e, tau_1_alpha_1)
  p_e*H*E/(g_e*tau_1_alpha_1 + H);
end
Function_for_CD8_Proliferation_Stimulation_IL_2 is "Function_for_CD8_Proliferation_Stimulation_IL-2";

function Function_for_CD8_Proliferation_Stimulation_IFNG(f_e, E, beta_1_tau_2, beta_2_tau_2, N, beta_3_tau_2, H, h_e)
  f_e*E*(beta_1_tau_2*E + beta_2_tau_2*N + beta_3_tau_2*H)/(h_e + beta_1_tau_2*E + beta_2_tau_2*N + beta_3_tau_2*H);
end

function Function_for_CD8_Death_Treg(delta_e, R, E)
  delta_e*R*E;
end

function Function_for_NK_Proliferation_Stimulation_IL_2(p_n, N, g_n, H, tau_1_alpha_1)
  p_n*H*N/(g_n*tau_1_alpha_1 + H);
end
Function_for_NK_Proliferation_Stimulation_IL_2 is "Function_for_NK_Proliferation_Stimulation_IL-2";

function Function_for_NK_Proliferation_Stimulation_IFNG(f_n, N, beta_1_tau_2, E, beta_2_tau_2, beta_3_tau_2, H, h_n)
  f_n*N*(beta_1_tau_2*E + beta_2_tau_2*N + beta_3_tau_2*H)/(h_n + beta_1_tau_2*E + beta_2_tau_2*N + beta_3_tau_2*H);
end

function Function_for_Thelp_Proliferation_Stimulation_IFNG(f_h, H, beta_1_tau_2, E, beta_2_tau_2, N, beta_3_tau_2, h_h)
  f_h*H*(beta_1_tau_2*E + beta_2_tau_2*N + beta_3_tau_2*H)/(h_h + beta_1_tau_2*E + beta_2_tau_2*N + beta_3_tau_2*H);
end

function Function_for_Thelp_Proliferation_Stimulation_IL_2(p_h, H, g_h, tau_1_alpha_1)
  p_h*H*H/(g_h*tau_1_alpha_1 + H);
end
Function_for_Thelp_Proliferation_Stimulation_IL_2 is "Function_for_Thelp_Proliferation_Stimulation_IL-2";

function Function_for_NK_Inactivation(c_n, N, C)
  c_n*N*C;
end

function Function_for_Treg_Origination_CD8(a_r, E)
  a_r*E;
end

function Function_for_Tumor_Growth(k_c, mu_c, P, C, a_c)
  (k_c + mu_c*P)*C*(1 - a_c*C);
end

function Function_for_Thelp_Death_Treg(delta_h, R, H)
  delta_h*R*H;
end

function Function_for_Treg_Lysis_NK(r, N, R)
  r*N*R;
end

function Function_for_Treg_Proliferation_Stimulation_IL_2(p_r, H, R, g_r, tau_1_alpha_1)
  p_r*H*R/(g_r*tau_1_alpha_1 + H);
end
Function_for_Treg_Proliferation_Stimulation_IL_2 is "Function_for_Treg_Proliferation_Stimulation_IL-2";

function Function_for_Treg_Origination_Thelp(b_r, H)
  b_r*H;
end

model He2017___A_mathematical_model_of_pancreatic_cancer_with_two_kinds_of_treatments()
  // He2017 - A mathematical model of pancreatic cancer with two kinds of treatments
  // This is a mathematical model of pancreatic cancer which includes descriptions of regulatory T cell activity and inhibition therapy. Descriptions of cytokine induced killer immunotherapy are also
  // included.
  // isDescribedBy doi:10.1142/S021833901750005X
  // isDerivedFrom pubmed:8186756
  // biomodels.db:MODEL1909120001 biomodels.db:BIOMD0000000811
  // hasProperty mamo:MAMO_0000046
  // hasProperty ncit:C71757
  // hasProperty ncit:C36294

  // Compartments:
  compartment compartment = 1;  // isVersionOf ncit:C94498

  // Species:
  species C_PCC in compartment = 1000000000;  // BTO:0000584
  species P_PSC in compartment = 5600000;  // CL:0002410
  species E_CD8 in compartment = 873600000;  // ncit:C12542
  species N_Killer in compartment = 481600000;  // CL:0000623
  species H_T_Helper in compartment = 2116800000;  // BTO:0002417
  species R_T_Regulatory in compartment = 158760000;  // BTO:0004520

  // Parameters:
  k_c = 0.0195;
  a_c = 1.02e-11;
  b_c = 1.5e-11;
  d_c = 7.87e-5;
  r_1 = 0.345;
  r_2 = 0.286;
  a_p = 1.7857e-9;
  f_p = 0.125;
  mu_p = 56000000;
  lambda_p = 0.015;
  a_e = 13000;
  b_e = 0.02;
  c_e = 3.42e-12;
  r_e = 5e-12;
  p_e = 0.125;
  g_e = 0.3;
  f_e = 0.125;
  h_e = 0.3;
  delta_e = 1e-10;
  a_n = 130000;
  b_n = 0.015;
  c_n = 1e-13;
  p_n = 0.125;
  g_n = 0.3;
  f_n = 0.125;
  h_n = 0.3;
  delta_n = 1e-10;
  a_h = 360000;
  b_h = 0.0012;
  p_h = 0.125;
  g_h = 0.3;
  f_h = 0.125;
  h_h = 0.3;
  delta_h = 1e-10;
  a = 560000;
  delta_r = 0.023;
  a_r = 0.0002;
  b_r = 0.0004;
  p_r = 0.125;
  g_r = 0.3;
  r = 1e-11;
  tau_1_alpha_1 = 2.2483e11;
  beta_1_tau_2 = 4.4691e-13;
  beta_2_tau_2 = 4.4691e-13;
  beta_3_tau_2 = 4.4691e-13;
  gamma_2_tau_3 = 4.4691e-13;
  k_R = 1.5e-11;
  Initial_for_a_c = a_c;
  Initial_for_a_p = a_p;
  Initial_for_k_c = k_c;

  // Assignment rules:
  mu_c := 0.1*Initial_for_a_c*Initial_for_a_p;
  k_p := 0.1*Initial_for_k_c;

  // Reactions:
  Tumor_Growth: => C_PCC; compartment*Function_for_Tumor_Growth(k_c, mu_c, P_PSC, C_PCC, a_c);  // modifiers: P_PSC; isVersionOf ncit:C36294
  Tumor_Interaction_NK: C_PCC => ; compartment*Function_for_Tumor_Interaction_NK(b_c, N_Killer, C_PCC);  // modifiers: N_Killer; isVersionOf GO:0002420
  Tumor_Removal_CD8: C_PCC => ; compartment*Function_for_Tumor_Removal_CD8(d_c, E_CD8, C_PCC, r_1, R_T_Regulatory, r_2, gamma_2_tau_3);  // modifiers: E_CD8, R_T_Regulatory; isVersionOf GO:0002419
  PSC_Growth: => P_PSC; compartment*Function_for_PSC_Growth(k_p, f_p, C_PCC, mu_p, P_PSC, a_p);  // modifiers: C_PCC; isVersionOf ncit:C18081
  PSC_Death: P_PSC => ; compartment*lambda_p*P_PSC;  // isVersionOf GO:0008219
  CD8_Growth_Constant: => E_CD8; compartment*Constant_flux__irreversible(a_e);  // isVersionOf ncit:C18081
  CD8_Death_Natural: E_CD8 => ; compartment*b_e*E_CD8;  // isVersionOf GO:0008219
  CD8_Inactivation: E_CD8 => ; compartment*Function_for_CD8_Inactivation(c_e, E_CD8, C_PCC);  // modifiers: C_PCC; isVersionOf GO:0008219
  CD8_Recruitment_NK: => E_CD8; compartment*Function_for_CD8_Recruitment_NK(r_e, N_Killer, C_PCC);  // modifiers: N_Killer, C_PCC; isVersionOf GO:0072683
  CD8_Proliferation_Stimulation_IL_2: => E_CD8; compartment*Function_for_CD8_Proliferation_Stimulation_IL_2(p_e, H_T_Helper, E_CD8, g_e, tau_1_alpha_1); CD8_Proliferation_Stimulation_IL_2 is "CD8_Proliferation_Stimulation_IL-2";  // modifiers: H_T_Helper; isVersionOf ncit:C18081
  CD8_Proliferation_Stimulation_IFNG: => E_CD8; compartment*Function_for_CD8_Proliferation_Stimulation_IFNG(f_e, E_CD8, beta_1_tau_2, beta_2_tau_2, N_Killer, beta_3_tau_2, H_T_Helper, h_e);  // modifiers: N_Killer, H_T_Helper; isVersionOf ncit:C18081
  CD8_Death_Treg: E_CD8 => ; compartment*Function_for_CD8_Death_Treg(delta_e, R_T_Regulatory, E_CD8);  // modifiers: R_T_Regulatory; isVersionOf GO:0001906
  NK_Growth_Constant: => N_Killer; compartment*Constant_flux__irreversible(a_n);
  NK_Death: N_Killer => ; compartment*b_n*N_Killer;  // isVersionOf GO:0008219
  NK_Inactivation: N_Killer => ; compartment*Function_for_NK_Inactivation(c_n, N_Killer, C_PCC);  // modifiers: C_PCC; isVersionOf GO:0008219
  NK_Proliferation_Stimulation_IL_2: => N_Killer; compartment*Function_for_NK_Proliferation_Stimulation_IL_2(p_n, N_Killer, g_n, H_T_Helper, tau_1_alpha_1); NK_Proliferation_Stimulation_IL_2 is "NK_Proliferation_Stimulation_IL-2";  // modifiers: H_T_Helper; isVersionOf ncit:C18081
  NK_Proliferation_Stimulation_IFNG: => N_Killer; compartment*Function_for_NK_Proliferation_Stimulation_IFNG(f_n, N_Killer, beta_1_tau_2, E_CD8, beta_2_tau_2, beta_3_tau_2, H_T_Helper, h_n);  // modifiers: E_CD8, H_T_Helper; isVersionOf ncit:C18081
  NK_Death_Treg: N_Killer => ; compartment*delta_n*N_Killer;  // isVersionOf GO:0001906
  Thelp_Growth_Constant: => H_T_Helper; compartment*Constant_flux__irreversible(a_h);  // isVersionOf ncit:C18081
  Thelp_Death_Natural: H_T_Helper => ; compartment*b_h*H_T_Helper;  // isVersionOf GO:0008219
  Thelp_Proliferation_Stimulation_IL_2: => H_T_Helper; compartment*Function_for_Thelp_Proliferation_Stimulation_IL_2(p_h, H_T_Helper, g_h, tau_1_alpha_1); Thelp_Proliferation_Stimulation_IL_2 is "Thelp_Proliferation_Stimulation_IL-2";  // isVersionOf ncit:C18081
  Thelp_Proliferation_Stimulation_IFNG: => H_T_Helper; compartment*Function_for_Thelp_Proliferation_Stimulation_IFNG(f_h, H_T_Helper, beta_1_tau_2, E_CD8, beta_2_tau_2, N_Killer, beta_3_tau_2, h_h);  // modifiers: E_CD8, N_Killer; isVersionOf ncit:C18081
  Thelp_Death_Treg: H_T_Helper => ; compartment*Function_for_Thelp_Death_Treg(delta_h, R_T_Regulatory, H_T_Helper);  // modifiers: R_T_Regulatory; isVersionOf GO:0001906
  Treg_Growth_Constant: => R_T_Regulatory; compartment*Constant_flux__irreversible(a);  // isVersionOf ncit:C18081
  Treg_Death_Natural: R_T_Regulatory => ; compartment*delta_r*R_T_Regulatory;  // isVersionOf GO:0008219
  Treg_Origination_Thelp: => R_T_Regulatory; compartment*Function_for_Treg_Origination_Thelp(b_r, H_T_Helper);  // modifiers: H_T_Helper; isVersionOf GO:0030217
  Treg_Origination_CD8: => R_T_Regulatory; compartment*Function_for_Treg_Origination_CD8(a_r, E_CD8);  // modifiers: E_CD8; isVersionOf GO:0030217
  Treg_Proliferation_Stimulation_IL_2: => R_T_Regulatory; compartment*Function_for_Treg_Proliferation_Stimulation_IL_2(p_r, H_T_Helper, R_T_Regulatory, g_r, tau_1_alpha_1); Treg_Proliferation_Stimulation_IL_2 is "Treg_Proliferation_Stimulation_IL-2";  // modifiers: H_T_Helper; isVersionOf ncit:C18081
  Treg_Lysis_NK: R_T_Regulatory => ; compartment*Function_for_Treg_Lysis_NK(r, N_Killer, R_T_Regulatory);  // modifiers: N_Killer; isVersionOf GO:0001906

  // Unit definitions:
  unit volume = 1e-3 litre;
  unit time = 86400 second;
  unit substance = item;
end
