// SBML level 2 version 4
// dcterms:bibliographicCitation: urn:miriam:pubmed:21656310

function Function_for_T_Growth(k, T)
  k*T;
end

function Function_for_X_Complex_Formation(k1, C, E)
  k1*C*E;
end

function Function_for_C_Carrying_Capacity_Limit(k_5, C)
  k_5*C^2;
end

function Function_for_P_Production(k_p, E, k_m_1, k_m_2, C)
  k_p*E/((k_m_1 + E)*k_m_2*C);
end

function Function_for_C_Growth(k, C)
  k*C;
end

model Galante2012___B7_H1_and_a_Mathematical_Model_for_Cytotoxic_T_Cell_and_Tumor_Cell_Interaction()
  // Galante2012 - B7-H1 and a Mathematical Model for Cytotoxic T Cell and Tumor Cell Interaction
  // This is a mathematical model that describes the interactions between cytotoxic T cells and tumor cells as influenced by B7-H1 (PD-L1) activity, with a focus on how B7-H1 affects cancer cells
  // apoptosis.
  // isDescribedBy pubmed:21656310
  // isDerivedFrom pubmed:15705911
  // biomodels.db:MODEL1909160001 biomodels.db:BIOMD0000000812
  // hasProperty taxonomy:9606
  // hasProperty GO:0012501
  // hasProperty mamo:MAMO_0000046

  // Compartments:
  compartment compartment = 1;  // isVersionOf ncit:C94498

  // Species:
  species X_Complex in compartment = 0;  // hasPart CL:0000910; hasPart CL:0001063; isVersionOf ncit:C47881
  species P_Perforin in compartment = 0.315;  // uniprot:S5S2F2
  species C_Cancer_Uncomplexed in compartment = 1;  // isVersionOf CL:0001063
  species T_ast in compartment = 1;  // isVersionOf CL:0001063
  species $E_CTL in compartment;  // CL:0000910
  species $T_Cancer_Cell_Total in compartment;  // isVersionOf CL:0001063

  // Parameters:
  k = 0.035;
  k_1 = 0.0001;
  k_2 = 0.0001;
  k_3 = 0.0001;
  k_4 = 3;
  k_5 = 0.003;
  k_6 = 0.63;
  k_p = 0.097;
  k_m = 1;
  k_m_1 = 2.2;
  k_m_2 = 80;
  E_init = 1;
  Initial_for_E_init = E_init;

  // Assignment rules:
  E_CTL := Initial_for_E_init - X_Complex;
  T_Cancer_Cell_Total := C_Cancer_Uncomplexed + X_Complex;
  Perc_Lysis := 100*((T_ast - T_Cancer_Cell_Total)/T_ast);
  P_10 := 10*P_Perforin;
  X_1000 := X_Complex*1000;

  // Reactions:
  X_Complex_Formation: C_Cancer_Uncomplexed => X_Complex; compartment*Function_for_X_Complex_Formation(k_1, C_Cancer_Uncomplexed, E_CTL);  // modifiers: E_CTL
  X_Complex_Dissociation: X_Complex => C_Cancer_Uncomplexed; compartment*k_2*X_Complex;
  X_Complex_Apoptosis: X_Complex => ; compartment*k_3*X_Complex;  // isVersionOf ncit:C17557
  P_Production: => P_Perforin; compartment*Function_for_P_Production(k_p, E_CTL, k_m_1, k_m_2, C_Cancer_Uncomplexed);  // modifiers: E_CTL, C_Cancer_Uncomplexed
  P_Apoptosis_Perforin: P_Perforin + C_Cancer_Uncomplexed => ; compartment*k_4*P_Perforin*C_Cancer_Uncomplexed;  // isVersionOf ncit:C17557
  C_Growth: => C_Cancer_Uncomplexed; compartment*Function_for_C_Growth(k, C_Cancer_Uncomplexed);  // isVersionOf ncit:C18081
  C_Carrying_Capacity_Limit: C_Cancer_Uncomplexed => ; compartment*Function_for_C_Carrying_Capacity_Limit(k_5, C_Cancer_Uncomplexed);  // isVersionOf GO:0035212
  T_Growth: => T_ast; compartment*Function_for_T_Growth(k, T_ast);  // isVersionOf ncit:C18081
  T_Carrying_Capacity_Limit: T_ast => ; compartment*Function_for_C_Carrying_Capacity_Limit(k_5, T_ast);  // isVersionOf GO:0035212

  // Unit definitions:
  unit volume = 1e-3 litre;
  unit time = 3600 second;
  unit substance = item;
end
