// SBML level 2 version 4
// dcterms:bibliographicCitation: urn:miriam:doi:10.1142/S0218339011004111

function Function_for_Immune_Growth(d, y)
  d*y;
end

function Function_for_Tumor_Growth(a, x)
  a*x;
end

function Function_for_Tumor_Killing(b, x, y)
  b*x*y;
end

function Function_for_Immune_Loss_Tumor(e, x, y)
  e*x*y;
end

function Function_for_Tumor_Competition(c, x)
  c*x^2;
end

function Function_for_Immune_Growth_Control(f, y)
  f*y^2;
end

model Chrobak2011___A_mathematical_model_of_induced_cancer_adaptive_immune_system_competition()
  // Chrobak2011 - A mathematical model of induced cancer-adaptive immune system competition
  // This is a mathematical model describing competition between an artificially induced tumor and the adaptive immune system based on the use of an autonomous system of ordinary differential equations.
  // isDescribedBy doi:10.1142/S0218339011004111
  // biomodels.db:MODEL1909170003 biomodels.db:BIOMD0000000815
  // hasProperty GO:0002418
  // hasProperty GO:0035212
  // hasProperty mamo:MAMO_0000046
  // hasProperty ncit:C36294

  // Compartments:
  compartment compartment = 1;  // isVersionOf ncit:C94498

  // Species:
  species x_Cancer in compartment = 0.0005;  // isVersionOf CL:0001063
  species y_Immune_System in compartment = 0.01;  // isVersionOf ncit:C132890

  // Assignment rules:
  d := 1/32;
  e := 275/3200;
  f := 1/32;
  a := 1/16;
  b := 1/8;
  c := 1/32;

  // Reactions:
  Tumor_Growth: => x_Cancer; compartment*Function_for_Tumor_Growth(a, x_Cancer);  // ncit:C36294
  Tumor_Killing: x_Cancer => ; compartment*Function_for_Tumor_Killing(b, x_Cancer, y_Immune_System);  // modifiers: y_Immune_System; isVersionOf GO:0002418
  Tumor_Competition: x_Cancer => ; compartment*Function_for_Tumor_Competition(c, x_Cancer);  // isVersionOf GO:0035212
  Immune_Growth: => y_Immune_System; compartment*Function_for_Immune_Growth(d, y_Immune_System);  // isVersionOf ncit:C18081
  Immune_Loss_Tumor: y_Immune_System => ; compartment*Function_for_Immune_Loss_Tumor(e, x_Cancer, y_Immune_System);  // modifiers: x_Cancer; isVersionOf GO:0008219
  Immune_Growth_Control: y_Immune_System => ; compartment*Function_for_Immune_Growth_Control(f, y_Immune_System);  // isVersionOf GO:0050672

  // Unit definitions:
  unit volume = 1e-3 litre;
  unit time = 86400 second;
  unit substance = item;
end
