// SBML level 2 version 4
// dcterms:bibliographicCitation: urn:miriam:pubmed:30510594

function Function_for_Tumor_Cell_elimination(k0, c_kill, I, U, T, N)
  (k0 + c_kill*I)*U*T/N;
end

function Function_for_Tumor_Cell_infection(beta, U, V, N)
  beta*U*V/N;
end

function Function_for_natural_decay_of_virus(delta_V, V)
  delta_V*V;
end

function Function_for_Activation_of_T_cells__IL12(Chi_A, A)
  Chi_A*A;
end
Function_for_Activation_of_T_cells__IL12 is "Function for Activation of T cells; IL12";

function Function_for_Activation_of_T_cells__4_1BBL(C_T, I)
  C_T*I;
end
Function_for_Activation_of_T_cells__4_1BBL is "Function for Activation of T cells; 4-1BBL";

function Function_for_natural_death_of_naive_T_cells(delta_A, A)
  delta_A*A;
end

function Function_for_Activation_of_naive_T_cells_IL12(C_A, I)
  C_A*I;
end
Function_for_Activation_of_naive_T_cells_IL12 is "Function for Activation of naive T cells;IL12";

function Function_for_Infected_Tumor_Cell_death(delta_I, I)
  delta_I*I;
end

function Function_for_Infected_Tumor_Cell_elimination(k0, c_kill, I, T, N)
  (k0 + c_kill*I)*I*T/N;
end

function Function_for_natural_death_of_T_cells(delta_T, T)
  delta_T*T;
end

function Function_for_production_of_T_cells(chi_D, D)
  chi_D*D;
end

function Function_for_treatment_of_DC(U_D)
  U_D;
end

function Function_for_natural_decay_of_DC(delta_D, D)
  delta_D*D;
end

function Function_for_Tumor_Cell_exponential_growth(r, U)
  r*U;
end

function Function_for_treatment_with_virus(U_V)
  U_V;
end

function Function_for_release_of_virus(alpha, delta_I, I)
  alpha*delta_I*I;
end

model New_Model()
  // Gevertz2018 - Cancer Treatment with Oncolytic Viruses and Dendritic Cell injections original model
  // The model is based on 'Developing a Minimally Structured Mathematical Model of Cancer Treatment with Oncolytic Viruses and Dendritic Cell Injections', PMID:30510594. Author:Jana L.Gevertz and Joanna R.Wares. This model describes the original mathematical model described in section 2.1. Built by COPASI 4.24( Build 197) Abstract: Mathematical models of biological systems must strike a balance between being sufficiently complex to capture important biological features, while being simple enough that they remain tractable through analysis or simulation. In this work, we rigorously explore how to balance these competing interests when modeling murine melanoma treatment with oncolytic viruses and dendritic cell injections. Previously, we developed a system of six ordinary differential equations containing fourteen parameters that well describes experimental data on the efficacy of these treatments. Here, we explore whether this previously developed model is the minimal model needed to accurately describe the data. Using a variety of techniques, including sensitivity analyses and a parameter sloppiness analysis, we find that our model can be reduced by one variable and three parameters and still give excellent fits to the data. We also argue that our model is not too simple to capture the dynamics of the data, and that the original and minimal models make similar predictions about the efficacy and robustness of protocols not considered in experiments. Reducing the model to its minimal form allows us to increase the tractability of the system in the face of parametric uncertainty.
  // biomodels.db:MODEL1909180001 biomodels.db:BIOMD0000000816
  // hasProperty DOID:1909
  // hasProperty mamo:MAMO_0000046
  // hasProperty efo:0000756
  // hasProperty efo:0000311
  // hasProperty ncit:C62713

  // Compartments:
  compartment compartment = 1;  // hasProperty ncit:C13413; hasTaxon taxonomy:10090

  // Species:
  species Uninfected_Tumor_Cell_U in compartment = 58.020755;  // isVersionOf efo:0000311; isVersionOf BTO:0002014
  species Infected_Cancer_Cell_I in compartment = 0;  // isVersionOf efo:0000311; isVersionOf BTO:0002014; isPropertyOf ncit:C25401
  species Oncolytic_Adenovirus_V in compartment = 0;  // isVersionOf ncit:C14179; isVersionOf ncit:C28373
  species Tumor_targeting_T_cells_T in compartment = 0; Tumor_targeting_T_cells_T is "Tumor-targeting T cells T";  // isVersionOf ncit:C129906; isPropertyOf ncit:C64542
  species Naive_T_cells_A in compartment = 0;  // isVersionOf ncit:C129906
  species Dendritic_Cells_D in compartment = 0;  // isVersionOf ncit:C12583; isVersionOf BTO:0002042
  species $Total_cells_N in compartment;  // isPartOf efo:0000311; isPartOf BTO:0002014; isPartOf ncit:C129906
  species $total_tumor_cells in compartment;  // isVersionOf BTO:0002014; isVersionOf efo:0000311

  // Parameters:
  r = 0.3198;
  beta = 1.008538;
  k0 = 2;
  c_kill = 0.595397;
  delta_I = 1;
  U_V = 0;
  alpha = 3;
  delta_V = 2.3;
  C_T = 1.698362;
  chi_A = 1;
  chi_D = 4.675397;
  delta_T = 0.35;
  C_A = 0.000517;
  delta_A = 0.35;
  U_D = 0;
  delta_D = 0.35;
  OV_dose = 2.5;
  D0 = 1;

  // Assignment rules:
  Total_cells_N := Uninfected_Tumor_Cell_U + Infected_Cancer_Cell_I + Tumor_targeting_T_cells_T;
  total_tumor_cells := Uninfected_Tumor_Cell_U + Infected_Cancer_Cell_I;

  // Reactions:
  Tumor_cell_U_exponential_growth: => Uninfected_Tumor_Cell_U; compartment*Function_for_Tumor_Cell_exponential_growth(r, Uninfected_Tumor_Cell_U);  // isVersionOf GO:0040007
  Tumour_cell_U_elimination: Uninfected_Tumor_Cell_U => ; compartment*Function_for_Tumor_Cell_elimination(k0, c_kill, Infected_Cancer_Cell_I, Uninfected_Tumor_Cell_U, Tumor_targeting_T_cells_T, Total_cells_N);  // modifiers: Infected_Cancer_Cell_I, Tumor_targeting_T_cells_T, Total_cells_N
  Tumor_Cell_U_infection: Uninfected_Tumor_Cell_U => Infected_Cancer_Cell_I; compartment*Function_for_Tumor_Cell_infection(beta, Uninfected_Tumor_Cell_U, Oncolytic_Adenovirus_V, Total_cells_N);  // modifiers: Oncolytic_Adenovirus_V, Total_cells_N; isVersionOf GO:0019089
  Infected_Tumor_Cell_I_death: Infected_Cancer_Cell_I => ; compartment*Function_for_Infected_Tumor_Cell_death(delta_I, Infected_Cancer_Cell_I);
  Infected_Tumor_Cell_I_elimination: Infected_Cancer_Cell_I => ; compartment*Function_for_Infected_Tumor_Cell_elimination(k0, c_kill, Infected_Cancer_Cell_I, Tumor_targeting_T_cells_T, Total_cells_N);  // modifiers: Tumor_targeting_T_cells_T, Total_cells_N
  Treatment_with_virus: => Oncolytic_Adenovirus_V; compartment*Function_for_treatment_with_virus(U_V);  // isVersionOf GO:0035737
  Natural_decay_of_virus: Oncolytic_Adenovirus_V => ; compartment*Function_for_natural_decay_of_virus(delta_V, Oncolytic_Adenovirus_V);
  Release_of_virus: => Oncolytic_Adenovirus_V; compartment*Function_for_release_of_virus(alpha, delta_I, Infected_Cancer_Cell_I);  // modifiers: Infected_Cancer_Cell_I
  Activation_of_T_Cells_IL12: => Tumor_targeting_T_cells_T; compartment*Function_for_Activation_of_T_cells__IL12(chi_A, Naive_T_cells_A); Activation_of_T_Cells_IL12 is "Activation of T Cells;IL12";  // modifiers: Naive_T_cells_A; isVersionOf GO:0051132
  Activation_of_naive_T_cells_IL12: => Naive_T_cells_A; compartment*Function_for_Activation_of_naive_T_cells_IL12(C_A, Infected_Cancer_Cell_I); Activation_of_naive_T_cells_IL12 is "Activation of naive T cells;IL12";  // modifiers: Infected_Cancer_Cell_I; isVersionOf GO:0051132
  Activation_of_T_cells_4_1BBL: => Tumor_targeting_T_cells_T; compartment*Function_for_Activation_of_T_cells__4_1BBL(C_T, Infected_Cancer_Cell_I); Activation_of_T_cells_4_1BBL is "Activation of T cells;4-1BBL";  // modifiers: Infected_Cancer_Cell_I; isVersionOf GO:0051132
  Production_of_T_cells: => Tumor_targeting_T_cells_T; compartment*Function_for_production_of_T_cells(chi_D, Dendritic_Cells_D);  // modifiers: Dendritic_Cells_D
  natural_death_of_T_cells: Tumor_targeting_T_cells_T => ; compartment*Function_for_natural_death_of_T_cells(delta_T, Tumor_targeting_T_cells_T);
  natural_death_of_naive_T_cells: Naive_T_cells_A => ; compartment*Function_for_natural_death_of_naive_T_cells(delta_A, Naive_T_cells_A);
  Treatment_with_Dendritic_Cells_D: => Dendritic_Cells_D; compartment*Function_for_treatment_of_DC(U_D);  // isVersionOf GO:0035737
  natural_decay_of_Dendritic_Cells_D: Dendritic_Cells_D => ; compartment*Function_for_natural_decay_of_DC(delta_D, Dendritic_Cells_D);

  // Events:
  OV_1: at (time == 0): Oncolytic_Adenovirus_V = Oncolytic_Adenovirus_V + OV_dose;  // isVersionOf GO:0035737
  OV_2: at (time == 2): Oncolytic_Adenovirus_V = Oncolytic_Adenovirus_V + OV_dose;  // isVersionOf GO:0035737
  OV_3: at (time == 4): Oncolytic_Adenovirus_V = Oncolytic_Adenovirus_V + OV_dose;  // isVersionOf GO:0035737
  AD_1: at (time == 1): Dendritic_Cells_D = Dendritic_Cells_D + D0;  // isVersionOf GO:0035737
  AD_2: at (time == 3): Dendritic_Cells_D = Dendritic_Cells_D + D0;  // isVersionOf GO:0035737
  AD_3: at (time == 5): Dendritic_Cells_D = D0 + Dendritic_Cells_D;  // isVersionOf GO:0035737

  // Unit definitions:
  unit volume = 1e-3 litre;
  unit substance = 1e-3 mole;
end
