// SBML level 2 version 4
// dcterms:bibliographicCitation: urn:miriam:pubmed:18463697

function Henri_Michaelis_Menten__irreversible(substrate, Km, V)
  V*substrate/(Km + substrate);
end
Henri_Michaelis_Menten__irreversible is "Henri-Michaelis-Menten (irreversible)";

function facilitated_synthesis(k, A)
  k*A;
end

function Facilitated_function(kcat, A, B, Km)
  kcat*A*B/(Km + B);
end

model Lee2008___ERK_and_PI3K_signal_integration_by_Myc()
  // Lee2008 - ERK and PI3K signal integration by Myc
  // Mechanisitc model of PI3K and ERK signal integration by Myc. ERK and PI3K regulated Myc satbility by phosphorylating the same. (PMID:18463697)
  // isDescribedBy pubmed:18463697
  // biomodels.db:MODEL1909170004 biomodels.db:BIOMD0000000818
  // occursIn BTO:0004254
  // hasProperty PW:0000168
  // hasProperty GO:0031647
  // hasProperty mamo:MAMO_0000046

  // Compartments:
  compartment Cell = 1;  // isVersionOf GO:0005623

  // Species:
  species Myc in Cell = 0;  // isVersionOf uniprot:P01106
  species AKT in Cell = 0.6;  // isVersionOf uniprot:P31749
  species AKTp in Cell = 0;  // isVersionOf uniprot:P31749
  species PI3K in Cell = 1;  // isVersionOf uniprot:P27986
  species GSK3B in Cell = 0.6;  // isVersionOf uniprot:P49841
  species GSK3Bp in Cell = 0;  // isVersionOf uniprot:P49841
  species ERK in Cell = 1;  // isVersionOf uniprot:P27361
  species Myc_ser62 in Cell = 0;  // isPropertyOf uniprot:P01106
  species Myc_thr58 in Cell = 0;  // isPropertyOf uniprot:P01106
  species GF in Cell = 1;  // NCIT:C20424
  species $Myc_total in Cell;  // isPropertyOf uniprot:P01106

  // Parameters:
  kM = 1 unit_0;
  ERKmax = 1 unit_0; ERKmax is "ERKmax*";
  K_GP = 0.01 unit_1;
  k_GD = 72 unit_2;
  K_GD = 0.01 unit_1;
  k_MS = 2.3 unit_0; k_MS is "k_MS*";
  K_MT = 0.01 unit_1;
  dM = 2.08 unit_0;
  dMS = 0.35 unit_0;
  dMT = 2.08 unit_0;
  PI3Kmax_ = 1 unit_0; PI3Kmax_ is "PI3Kmax**";
  k_ap = 360 unit_0;
  K_AP = 0.01 unit_1;
  k_AD = 72 unit_2;
  K_AD = 0.01 unit_1;
  k_GP = 360 unit_0;
  K_MS = 0.01 unit_1;
  k_MT = 0.4 unit_0;

  // Assignment rules:
  Myc_total := Myc + Myc_ser62 + Myc_thr58;

  // Reactions:
  Myc_synthesis: => Myc; Cell*facilitated_synthesis(kM, GF);  // modifiers: GF; isInstanceOf ncit:C18103
  AKT_phosphorylation: AKT => AKTp; Cell*Facilitated_function(k_ap, PI3K, AKT, K_AP);  // modifiers: PI3K; isInstanceOf GO:0006468
  AKTp_dephosphorylation: AKTp => AKT; Cell*Henri_Michaelis_Menten__irreversible(AKTp, K_AD, k_AD);  // isInstanceOf GO:0006470
  GSK3B_phosphorylation: GSK3B => GSK3Bp; Cell*Facilitated_function(k_GP, AKTp, GSK3B, K_GP);  // modifiers: AKTp; isInstanceOf GO:0006468
  GSK3Bp_dephosphorylation: GSK3Bp => GSK3B; Cell*Henri_Michaelis_Menten__irreversible(GSK3Bp, K_GD, k_GD);  // isInstanceOf GO:0006470
  Myc_ser62_phosphorylation: Myc => Myc_ser62; Cell*Facilitated_function(k_MS, ERK, Myc, K_MS);  // modifiers: ERK; isInstanceOf GO:0006468
  Myc_thr58_phosphorylation: Myc_ser62 => Myc_thr58; Cell*Facilitated_function(k_MT, GSK3B, Myc_ser62, K_MT);  // modifiers: GSK3B; isInstanceOf GO:0006468
  Myc_degradation: Myc => ; Cell*dM*Myc;  // isInstanceOf GO:0030163
  Myc_ser62_degradation: Myc_ser62 => ; Cell*dMS*Myc_ser62;  // isInstanceOf GO:0030163
  Myc_thr58_degradation: Myc_thr58 => ; Cell*dMT*Myc_thr58;  // isInstanceOf GO:0030163

  // Events:
  erk: at (time >= 1): ERK = 0.1;
  pi3k: at (time >= 1): PI3K = 0.1;
  pi3k1: at (time >= 4): PI3K = 1;
  pi3k2: at (time >= 6): PI3K = 0.1;

  // Unit definitions:
  unit time = 3600 second;
  unit substance = 1e-9 mole;
  unit unit_0 = 1 / (360000 second); unit_0 is "1/h";
  unit unit_1 = 1e-9 mole / litre; unit_1 is "nmol/l";
  unit unit_2 = 1e-9 mole / (litre * 360000 second); unit_2 is "nmol/(h*l)";
end
