// SBML level 2 version 4
// dcterms:bibliographicCitation: urn:miriam:pubmed:31046990

function Function_for_tumor_growth(lambda_1, x_1, x_2, a)
  lambda_1*x_1*ln(x_1/x_2)*a;
end

function Function_for_drug_kill(e, x_2, x_3, a)
  e*x_2*x_3*a;
end

function Function_for_inhibition_effect(d, x_2, x_1, a)
  d*x_2*x_1^(2/3)*a;
end

function Function_for_endothelial_loss(lambda_2, x_2, a)
  lambda_2*x_2*a;
end

function Function_for_stimulatory_effect(b, x_1, a)
  b*x_1*a;
end

function Function_for_inhibitor_clearance(lambda_3, x_3, a)
  lambda_3*x_3*a;
end

function Function_for_administrated_inhibitor_rate(u)
  u;
end

model New_Model()
  // Yazdjer2019 - reinforcement learning-based control of tumor growth under anti-angiogenic therapy
  // This model is based on: Reinforcement learning-based control of tumor growth under anti-angiogenic therapy Authors: Parisa Yazdjerdi, Nader Meskin, Mohammad Al-Naemi, Ala-Eddin Al Moustafa, Levente Kovacs Abstract: Background and objectives: In recent decades, cancer has become one of the most fatal and destructive diseases which is threatening humans life. Accordingly, different types of cancer treatment are studied with the main aim to have the best treatment with minimum side effects. Anti-angiogenic is a molecular targeted therapy which can be coupled with chemotherapy and radiotherapy. Although this method does not eliminate the whole tumor, but it can keep the tumor size in a given state by preventing the formation of new blood vessels. In this paper, a novel model-free method based on reinforcement learning (RL) framework is used to design a closed-loop control of anti-angiogenic drug dosing administration. Methods: A Q-learning algorithm is developed for the drug dosing closed-loop control. This controller is designed using two different values of the maximum drug dosage to reduce the tumor volume up to a desired value. The mathematical model of tumor growth under anti-angiogenic inhibitor is used to simulate a real patient. Results: The effectiveness of the proposed method is shown through in silico simulation and its robustness to patient parameters variation is demonstrated. It is demonstrated that the tumor reaches its minimal volume in 84 days with maximum drug inlet of 30 mg/kg/day. Also, it is shown that the designed controller is robust with respect to ± 20% of tumor growth parameters changes. Conclusion: The proposed closed-loop reinforcement learning-based controller for cancer treatment using anti-angiogenic inhibitor provides an effective and novel result such that with a clinically valid and safe dosage of drug, the volume reduces up to 1mm3 in a reasonable short period compared to the literature.
  // biomodels.db:MODEL1909240003 biomodels.db:BIOMD0000000821
  // hasProperty GO:0001525
  // hasProperty efo:0000311
  // hasProperty mamo:MAMO_0000046
  // hasProperty ncit:C25409
  // hasProperty ncit:C19361

  // Compartments:
  compartment compartment = 1;  // hasProperty ncit:C13413

  // Species:
  species tumor_volume_x_1 in compartment = 1;  // isVersionOf ncit:C94515
  species endothelial_volume_x_2 in compartment = 1;  // isVersionOf ncit:C12481
  species concentration_of_administrated_inhibitor_x_3 in compartment = 0;  // isVersionOf ncit:C41185; isVersionOf ncit:C154898

  // Parameters:
  lambda_1 = 0.192 unit_0;
  lambda_2 = 0 unit_0;
  lambda_3 = 1.3 unit_0;
  b = 5.85 unit_0;
  d = 0.00873 unit_1;
  e = 0.66 unit_2;
  u = 0 unit_3;
  a = 1;

  // Reactions:
  tumor_growth: tumor_volume_x_1 => ; compartment*Function_for_tumor_growth(lambda_1, tumor_volume_x_1, endothelial_volume_x_2, a);  // modifiers: endothelial_volume_x_2; isVersionOf GO:0040007
  endothelial_loss: endothelial_volume_x_2 => ; compartment*Function_for_endothelial_loss(lambda_2, endothelial_volume_x_2, a);
  stimulatory_effect: => endothelial_volume_x_2; compartment*Function_for_stimulatory_effect(b, tumor_volume_x_1, a);  // modifiers: tumor_volume_x_1
  inhibition_effect: endothelial_volume_x_2 => ; compartment*Function_for_inhibition_effect(d, endothelial_volume_x_2, tumor_volume_x_1, a);  // modifiers: tumor_volume_x_1
  drug_kill: endothelial_volume_x_2 => ; compartment*Function_for_drug_kill(e, endothelial_volume_x_2, concentration_of_administrated_inhibitor_x_3, a);  // modifiers: concentration_of_administrated_inhibitor_x_3
  inhibitor_clearance: concentration_of_administrated_inhibitor_x_3 => ; compartment*Function_for_inhibitor_clearance(lambda_3, concentration_of_administrated_inhibitor_x_3, a);
  administrated_inhibitor: => concentration_of_administrated_inhibitor_x_3; compartment*Function_for_administrated_inhibitor_rate(u);  // isVersionOf GO:0035737

  // Unit definitions:
  unit length = 1e-3 metre;
  unit area = (1e-3 metre)^2;
  unit volume = 1e-3 litre;
  unit time = 86400 second;
  unit substance = 1e-3 mole;
  unit unit_0 = 1 / (8640 second); unit_0 is "1/d";
  unit unit_1 = 1 / ((1e-3 metre)^2 * 8640 second); unit_1 is "1/(mm^2*day)";
  unit unit_2 = 8.64e9 second; unit_2 is "kg/mg*d";
  unit unit_3 = 1 / (8.64e9 second); unit_3 is "mg/kg/d";
end
