// SBML level 2 version 4
// dcterms:bibliographicCitation: urn:miriam:pubmed:29330362

function Constant_flux__irreversible(v)
  v;
end
Constant_flux__irreversible is "Constant flux (irreversible)";

function Henri_Michaelis_Menten__irreversible(substrate, Km, V)
  V*substrate/(Km + substrate);
end
Henri_Michaelis_Menten__irreversible is "Henri-Michaelis-Menten (irreversible)";

function HMM_Mod(V, s, m, Km)
  V*s*m/(Km + s);
end

function Function_for_v11(k11ca, pmTORC1, DEPTOR, Km11a, pDEPTOR, k11cb, pmTORC2, Km11b)
  k11ca*pmTORC1*DEPTOR/(Km11a + pDEPTOR) + k11cb*pmTORC2*DEPTOR/(Km11b + DEPTOR);
end

function Function_for_v5(k5ca, pIRS, Akt, Km5a, k5cb, pmTORC2, Km5b)
  k5ca*pIRS*Akt/(Km5a + Akt) + k5cb*pmTORC2*Akt/(Km5b + Akt);
end

model Varusai2018___Dynamic_modelling_of_the_mTOR_signalling_network_reveals_complex_emergent_behaviours_conferred_by_DEPTOR()
  // Varusai2018 - Dynamic modelling of the mTOR signalling network reveals complex emergent behaviours conferred by DEPTOR
  // This is a mathematical describing the effect that DEP domain-containing mTOR-interacting protein (DEPTOR) has on the mammalian target of rapamycin (mTOR) signalling network.
  // isDescribedBy pubmed:29330362
  // hasProperty mamo:MAMO_0000046
  // hasProperty PW:0000180
  // hasProperty ncit:C101595
  // hasTaxon taxonomy:9606
  // biomodels.db:MODEL1909250003 biomodels.db:BIOMD0000000823

  // Compartments:
  compartment compartment = 1;  // isVersionOf ncit:C48694

  // Species:
  species IR in compartment = 50;  // PR:000009064
  species pIR in compartment = 0;  // isVersionOf PR:000009064
  species IRS in compartment = 100;  // ncit:C28474
  species pIRS in compartment = 0;  // isVersionOf ncit:C28474
  species iIRS in compartment = 0;  // isVersionOf ncit:C28474
  species Akt in compartment = 100;  // PR:000029189
  species pAkt in compartment = 0;  // isVersionOf PR:000029189
  species mTORC1 in compartment = 250;  // isVersionOf ncit:C96314
  species pmTORC1 in compartment = 0;  // isVersionOf ncit:C96314
  species mTORC2 in compartment = 200;  // ncit:C96315
  species pmTORC2 in compartment = 0;  // isVersionOf ncit:C96315
  species imTORC2 in compartment = 0;  // isVersionOf ncit:C96315
  species mTORC1_DEPTOR in compartment = 0;  // hasPart ncit:C96314; hasPart ncit:C101595
  species mTORC2_DEPTOR in compartment = 0;  // hasPart ncit:C101595; hasPart ncit:C96315
  species DEPTOR in compartment = 350;  // ncit:C101595
  species pDEPTOR in compartment = 0;  // isVersionOf ncit:C101595

  // Parameters:
  V1 = 1;
  Km1 = 95;
  V2 = 1;
  Km2 = 35;
  k3c = 0.1;
  Km3 = 50;
  V4 = 1;
  Km4 = 50;
  k5ca = 0.05;
  Km5a = 7;
  k5cb = 1.5;
  Km5b = 4;
  V6 = 2;
  Km6 = 34;
  k7c = 0.1;
  Km7 = 2;
  V8 = 6;
  Km8 = 1;
  k9c = 0.3;
  Km9 = 160;
  V10 = 3;
  Km10 = 7;
  k11ca = 0.1;
  Km11a = 120;
  k11cb = 0.13;
  Km11b = 11;
  V12 = 4;
  Km12 = 7;
  k13f = 0.001;
  k13r = 0.006;
  k14f = 0.007;
  k14r = 0.006;
  k15c = 0.1;
  Km15 = 50;
  V16 = 1;
  Km16 = 50;
  ks17 = 0;
  kd18 = 0;

  // Reactions:
  v1: IR => pIR; compartment*Henri_Michaelis_Menten__irreversible(IR, Km1, V1);  // isVersionOf GO:0016310
  v2: pIR => IR; compartment*Henri_Michaelis_Menten__irreversible(pIR, Km2, V2);  // isVersionOf GO:0016311
  v3: IRS => pIRS; compartment*HMM_Mod(k3c, IRS, pIR, Km3);  // modifiers: pIR; isVersionOf GO:0016310
  v4: pIRS => IRS; compartment*Henri_Michaelis_Menten__irreversible(pIRS, Km4, V4);  // isVersionOf GO:0016311
  v5: Akt => pAkt; compartment*Function_for_v5(k5ca, pIRS, Akt, Km5a, k5cb, pmTORC2, Km5b);  // modifiers: pIRS, pmTORC2; isVersionOf GO:0016310
  v6: pAkt => Akt; compartment*Henri_Michaelis_Menten__irreversible(pAkt, Km6, V6);  // isVersionOf GO:0016311
  v7: mTORC1 => pmTORC1; compartment*HMM_Mod(k7c, mTORC1, pAkt, Km7);  // modifiers: pAkt; isVersionOf GO:0016310
  v8: pmTORC1 => mTORC1; compartment*Henri_Michaelis_Menten__irreversible(pmTORC1, Km8, V8);  // isVersionOf GO:0016311
  v9: mTORC2 => pmTORC2; compartment*HMM_Mod(k9c, mTORC2, pIR, Km9);  // modifiers: pIR; isVersionOf GO:0016310
  v10: pmTORC2 => mTORC2; compartment*Henri_Michaelis_Menten__irreversible(pmTORC2, Km10, V10);  // isVersionOf GO:0016311
  v11: DEPTOR => pDEPTOR; compartment*Function_for_v11(k11ca, pmTORC1, DEPTOR, Km11a, pDEPTOR, k11cb, pmTORC2, Km11b);  // modifiers: pmTORC1, pmTORC2; isVersionOf GO:0016310
  v12: pDEPTOR => DEPTOR; compartment*Henri_Michaelis_Menten__irreversible(pDEPTOR, Km12, V12);  // isVersionOf GO:0016311
  v13: mTORC1 + DEPTOR -> mTORC1_DEPTOR; compartment*(k13f*mTORC1*DEPTOR - k13r*mTORC1_DEPTOR);  // isVersionOf ncit:C18469
  v14: mTORC2 + DEPTOR -> mTORC2_DEPTOR; compartment*(k14f*mTORC2*DEPTOR - k14r*mTORC2_DEPTOR);  // isVersionOf ncit:C18469
  v15: IRS => iIRS; compartment*HMM_Mod(k15c, IRS, pmTORC1, Km15);  // modifiers: pmTORC1; isVersionOf ncit:C16983
  v16: iIRS => IRS; compartment*Henri_Michaelis_Menten__irreversible(iIRS, Km16, V16);  // isVersionOf ncit:C21018
  v17: => DEPTOR; compartment*Constant_flux__irreversible(ks17);  // isVersionOf ncit:C80450
  v18: pDEPTOR => ; compartment*kd18*pDEPTOR;  // isVersionOf ncit:C61559

  // Unit definitions:
  unit volume = 1e-3 litre;
  unit substance = 1e-3 mole;
end
