// SBML level 2 version 4
// dcterms:bibliographicCitation: urn:miriam:pubmed:31201663

function Function_for_export_of_mature_naive_T_cells(gamma)
  gamma;
end
Function_for_export_of_mature_naive_T_cells is "Function for export of mature naive T-cells";

function Function_for_cell_removal_due_to_death_or_phenotypic_changes(myu, N)
  myu*N;
end

function Function_for_peripheral_proliefration(p, N)
  p*N;
end

model New_Model()
  // Lewkiewics2019 - effects of aging on naive T cell populations and diversity
  // This model is built by COPASI 4.24(Build197), based on paper: A mathematical model of the effects of aging on naive T-cell population and diversity Authors: Stephanie Lewkiewicz, Yao-li Chuang, Tom Chou Abstract: The human adaptive immune response is known to weaken in advanced age, resulting in increased severity of pathogen-born illness, poor vaccine efficacy, and a higher prevalence of cancer in the elderly. Age-related erosion of the T cell compartment has been implicated as a likely cause, but the underlying mechanisms driving this immunosenescence have not been quantitatively modeled and systematically analyzed. T cell receptor diversity, or the extent of pathogen-derived antigen responsiveness of the T cell pool, is known to diminish with age, but inherent experimental difficulties preclude accurate analysis on the full organismal level. In this paper, we formulate a mechanistic mathematical model of T cell population dynamics on the immunoclonal subpopulation level, which provides quantitative estimates of diversity. We define different estimates for diversity that depend on the individual number of cells in a specific immunoclone. We show that diversity decreases with age primarily due to diminished thymic output of new T cells and the resulting overall loss of small immunoclones.
  // biomodels.db:MODEL1909260001 biomodels.db:BIOMD0000000824
  // hasProperty ncit:C28159
  // hasProperty ncit:C129906
  // hasProperty mamo:MAMO_0000046
  // hasProperty ncit:C16269
  // hasTaxon taxonomy:49990

  // Compartments:
  compartment compartment = 1;  // isVersionOf ncit:C13413

  // Species:
  species $myu in compartment;
  species N in compartment = 1; N is "Naive T-cells N";  // isVersionOf ncit:C129906

  // Parameters:
  p = 0.17;
  gamma_0 = 1.8e10;
  a = 0.044;
  myu_0 = 0.18;
  myu_1 = 0.04;
  K = 1e10;

  // Assignment rules:
  myu := myu_0 + myu_1*N^2/(N^2 + K^2);
  gamma := gamma_0*exp(-a*time);

  // Reactions:
  export_of_mature_naive_T_cells: => N; compartment*Function_for_export_of_mature_naive_T_cells(gamma); export_of_mature_naive_T_cells is "export of mature naive T-cells";  // isVersionOf GO:0072678
  peripheral_prolieferation: => N; compartment*Function_for_peripheral_proliefration(p, N);
  cell_removal_due_to_death_or_phenotypic_changes: N => ; compartment*Function_for_cell_removal_due_to_death_or_phenotypic_changes(myu, N);  // modifiers: myu

  // Unit definitions:
  unit volume = 1e-3 litre;
  unit substance = 1e-3 mole;
end
