// SBML level 3 version 1
// dcterms:bibliographicCitation: urn:miriam:pubmed:30969799

function Function_for_Transition_to_resistance(epsilon, alpha, u, S)
  (epsilon + alpha*u)*S;
end

function Function_for_growth_of_resistant_tumor(p_r, S, R)
  p_r*(1 - (S + R))*R;
end

function Function_for_drug_induced_death(d, u, S)
  d*u*S;
end
Function_for_drug_induced_death is "Function for drug-induced death";

function Function_for_growth_of_sensitive_tumor(S, R)
  (1 - (S + R))*S;
end

model New_Model()
  // Greene2019 - Differentiate Spontaneous and Induced Evolution to Drug Resistance During Cancer Treatment
  // This model is built by COPASI 4.24(Build 197), based on paper: Mathematical Approach to Differentiate Spontaneous and Induced Evolution to Drug Resistance During Cancer Treatment. Author: James M. Greene, Jana L. Gevertz, Eduardo D. sontag Abstract: PURPOSE:Drug resistance is a major impediment to the success of cancer treatment. Resistance is typically thought to arise from random genetic mutations, after which mutated cells expand via Darwinian selection. However, recent experimental evidence suggests that progression to drug resistance need not occur randomly, but instead may be induced by the treatment itself via either genetic changes or epigenetic alterations. This relatively novel notion of resistance complicates the already challenging task of designing effective treatment protocols. MATERIALS AND METHODS:To better understand resistance, we have developed a mathematical modeling framework that incorporates both spontaneous and drug-induced resistance. RESULTS:Our model demonstrates that the ability of a drug to induce resistance can result in qualitatively different responses to the same drug dose and delivery schedule. We have also proven that the induction parameter in our model is theoretically identifiable and propose an in vitro protocol that could be used to determine a treatment's propensity to induce resistance.
  // biomodels.db:MODEL1909260002 biomodels.db:BIOMD0000000825
  // hasProperty mamo:MAMO_0000046
  // hasProperty efo:0000311
  // hasProperty ncit:C16523
  // hasProperty ncit:C16096
  // isDescribedBy pubmed:30969799
  // model units - substance: substance, time: time, volume: volume, area: area, length: length, extent: substance

  // Compartments:
  compartment compartment = 1 volume;  // isVersionOf ncit:C13413

  // Species:
  species Resistant_tumor_R in compartment = 0;  // isVersionOf PATO:0001178; isVersionOf efo:0000311
  species Sensitive_tumor_S in compartment = S_0;  // isVersionOf efo:0000311; isPropertyOf pato:0000516
  species $Tumor_Volume_V in compartment;  // isVersionOf efo:0000311; isVersionOf efo:0004134; isVersionOf ncit:C120284

  // Parameters:
  S_0 = 0.01;
  R_0 = 0;
  V_d = 0.1;
  V_c = 0.9;
  epsilon = 1e-6;
  d = 1;
  p_r = 0.2;
  u_on = 1.5;
  delta_ton = 1;
  delta_toff = 3;
  u = 0;
  alpha = 0.01;

  // Assignment rules:
  Tumor_Volume_V := Resistant_tumor_R + Sensitive_tumor_S;

  // Reactions:
  Transition_to_resistance: Sensitive_tumor_S => Resistant_tumor_R; compartment*Function_for_Transition_to_resistance(epsilon, alpha, u, Sensitive_tumor_S);
  growth_of_sensitive_tumor: => Sensitive_tumor_S; compartment*Function_for_growth_of_sensitive_tumor(Sensitive_tumor_S, Resistant_tumor_R);  // modifiers: Resistant_tumor_R; isVersionOf GO:0040007
  growth_of_resistant_tumor: => Resistant_tumor_R; compartment*Function_for_growth_of_resistant_tumor(p_r, Sensitive_tumor_S, Resistant_tumor_R);  // modifiers: Sensitive_tumor_S; isVersionOf GO:0040007
  drug_induced_death: Sensitive_tumor_S => ; compartment*Function_for_drug_induced_death(d, u, Sensitive_tumor_S); drug_induced_death is "drug-induced death";  // isVersionOf GO:0008219

  // Events:
  treatment: at ((Tumor_Volume_V > V_d) && (u == 0)), t0=false: u = u + u_on;

  // Unit definitions:
  unit length = metre;
  unit area = metre^2;
  unit volume = 1e-3 litre;
  unit time = second;
  unit substance = 1e-3 mole;
end
