// SBML level 2 version 4
// dcterms:bibliographicCitation: urn:miriam:pubmed:29920512

function STAT3(STAT3tot, pSTAT3, STAT3uStattic)
  STAT3tot - pSTAT3 - STAT3uStattic;
end

function Function_for_v16(Km16, cMET, kc16, kdeg16, pCbl, rootCompartment)
  (kdeg16 + kc16*pCbl*rootCompartment)*cMET*rootCompartment/(Km16 + cMET*rootCompartment)/rootCompartment;
end

function PYK2tot(PYK2, pPYK2)
  PYK2 + pPYK2;
end

function Stattic(Stattictot, STAT3uStattic)
  Stattictot - STAT3uStattic;
end

function Function_for_v9(EMD, Ki9, Km9, PYK2, kc9a, kc9b, pEGFR, pcMET, rootCompartment)
  (kc9a*pEGFR*rootCompartment + kc9b*pcMET*rootCompartment/(1 + EMD/Ki9))*PYK2*rootCompartment/(Km9 + PYK2*rootCompartment)/rootCompartment;
end

function Function_for_v5(Km5, Vmax5, Vs5, pSTAT3, rootCompartment)
  (Vs5 + Vmax5*pSTAT3*rootCompartment/(Km5 + pSTAT3*rootCompartment))/rootCompartment;
end

function Function_for_v22(Km22, Vmax22, aPTP, rootCompartment)
  Vmax22*aPTP*rootCompartment/(Km22 + aPTP*rootCompartment)/rootCompartment;
end

function Function_for_v7(Km7, PYK2m, Vmax7, rootCompartment)
  Vmax7*PYK2m*rootCompartment/(Km7 + PYK2m*rootCompartment)/rootCompartment;
end

function PTP(PTPtot, aPTP)
  PTPtot - aPTP;
end

function Function_for_v12(Km12, Vmax12, aPTP, kc12, pSTAT3, rootCompartment)
  (Vmax12 + kc12*aPTP*rootCompartment)*pSTAT3*rootCompartment/(Km12 + pSTAT3*rootCompartment)/rootCompartment;
end

function Function_for_v10(Km10, Vmax10, aPTP, kc10, pPYK2, rootCompartment)
  (Vmax10 + kc10*aPTP*rootCompartment)*pPYK2*rootCompartment/(Km10 + pPYK2*rootCompartment)/rootCompartment;
end

function Function_for_v13(Km13, Vmax13, Vs13, pSTAT3, rootCompartment)
  (Vs13 + Vmax13*pSTAT3*rootCompartment/(Km13 + pSTAT3*rootCompartment))/rootCompartment;
end

function Function_for_v21(Km21, PTPtot, aPTP, kc21, pEGFR, rootCompartment)
  kc21*pEGFR*rootCompartment*PTP(PTPtot, aPTP*rootCompartment)/(Km21 + PTP(PTPtot, aPTP*rootCompartment))/rootCompartment;
end

function Function_for_v11(Ki3b, Km11, PF396, STAT3tot, STAT3uStattic, kc11, pPYK2, pSTAT3, rootCompartment)
  kc11*(pPYK2*rootCompartment/(1 + PF396/Ki3b))*STAT3(STAT3tot, pSTAT3*rootCompartment, STAT3uStattic*rootCompartment)/(Km11 + STAT3(STAT3tot, pSTAT3*rootCompartment, STAT3uStattic*rootCompartment))/rootCompartment;
end

function Function_for_v25(STAT3tot, STAT3uStattic, Stattictot, ka25, kd25, pSTAT3, rootCompartment)
  (ka25*STAT3(STAT3tot, pSTAT3*rootCompartment, STAT3uStattic*rootCompartment)*Stattic(Stattictot, STAT3uStattic*rootCompartment) - kd25*STAT3uStattic*rootCompartment)/rootCompartment;
end

function Function_for_v18(Km18, Vmax18, pcMET, rootCompartment)
  Vmax18*pcMET*rootCompartment/(Km18 + pcMET*rootCompartment)/rootCompartment;
end

function Function_for_v14(cMETm, kdeg14, rootCompartment)
  kdeg14*cMETm*rootCompartment/rootCompartment;
end

function Function_for_v8(PYK2, kdeg8, rootCompartment)
  kdeg8*PYK2*rootCompartment/rootCompartment;
end

function Function_for_v20(Km20, Vmax20, aPTP, kc20, pCbl, rootCompartment)
  (Vmax20 + kc20*aPTP*rootCompartment)*pCbl*rootCompartment/(Km20 + pCbl*rootCompartment)/rootCompartment;
end

function Function_for_v24(Km24, Vmax24, pERK, rootCompartment)
  Vmax24*pERK*rootCompartment/(Km24 + pERK*rootCompartment)/rootCompartment;
end

function Cbl(Cbltot, pCbl)
  Cbltot - pCbl;
end

function Function_for_v17(HGF, Km17, cMET, caHGF, kc17, rootCompartment)
  (kc17*HGF + caHGF)*cMET*rootCompartment/(Km17 + cMET*rootCompartment)/rootCompartment;
end

function Function_for_v2(Km2, Vmax2, aPTP, kc2, pEGFR, rootCompartment)
  (Vmax2 + kc2*aPTP*rootCompartment)*pEGFR*rootCompartment/(Km2 + pEGFR*rootCompartment)/rootCompartment;
end

function Function_for_v4(EGFRub, Km4, Vmax4, rootCompartment)
  Vmax4*EGFRub*rootCompartment/(Km4 + EGFRub*rootCompartment)/rootCompartment;
end

function ERK(ERKtot, pERK)
  ERKtot - pERK;
end

function Function_for_v6(PYK2m, kdeg6, rootCompartment)
  kdeg6*PYK2m*rootCompartment/rootCompartment;
end

function EGFR(EGFRtot, pEGFR, EGFRub)
  EGFRtot - pEGFR - EGFRub;
end

function Function_for_v15(Km15, Vmax15, cMETm, rootCompartment)
  Vmax15*cMETm*rootCompartment/(Km15 + cMETm*rootCompartment)/rootCompartment;
end

function Function_for_v3(EGFRtot, EGFRub, Ki3a, Ki3b, Km3, PF396, PYK2, Vmax3, kc3, pCbl, pEGFR, pPYK2, rootCompartment)
  (Vmax3 + kc3*pCbl*rootCompartment)*EGFR(EGFRtot, pEGFR*rootCompartment, EGFRub*rootCompartment)/(Km3 + EGFR(EGFRtot, pEGFR*rootCompartment, EGFRub*rootCompartment))*Ki3a/(Ki3a + PYK2tot(PYK2*rootCompartment, pPYK2*rootCompartment)/(1 + PF396/Ki3b))/rootCompartment;
end

function Function_for_v1(EGF, EGFRtot, EGFRub, Gefitinib, Ki1, Km1, caEGF, kc1, pEGFR, rootCompartment)
  kc1*(EGF/(1 + Gefitinib/Ki1) + caEGF)*EGFR(EGFRtot, pEGFR*rootCompartment, EGFRub*rootCompartment)/(Km1 + EGFR(EGFRtot, pEGFR*rootCompartment, EGFRub*rootCompartment))/rootCompartment;
end

function Function_for_v23(EMD, ERKtot, Ki23, Km23, kc23a, kc23b, pEGFR, pERK, pcMET, rootCompartment)
  (kc23a*pcMET*rootCompartment/(1 + EMD/Ki23) + kc23b*pEGFR*rootCompartment)*ERK(ERKtot, pERK*rootCompartment)/(Km23 + ERK(ERKtot, pERK*rootCompartment))/rootCompartment;
end

function Function_for_v19(Cbltot, Km19, kc19, pCbl, pEGFR, rootCompartment)
  kc19*pEGFR*rootCompartment*Cbl(Cbltot, pCbl*rootCompartment)/(Km19 + Cbl(Cbltot, pCbl*rootCompartment))/rootCompartment;
end

model Shin_2018_EGFR_PYK2_c_Met_interaction_network_model()
  // Shin_2018_EGFR-PYK2-c-Met interaction network_model
  // Systems modelling of the EGFR-PYK2-c-Met interaction network predicted and prioritized synergistic drug combinations for Triple-negative breast cancer
  // isDescribedBy pubmed:29920512
  // biomodels.db:MODEL1909270001 biomodels.db:BIOMD0000000826
  // hasProperty mamo:MAMO_0000046
  // hasProperty ncit:C71732
  // hasTaxon taxonomy:9606

  // Compartments:
  compartment rootCompartment = 1;  // isVersionOf CL:0000000

  // Species:
  species pEGFR in rootCompartment = 0.109014;  // isVersionOf PR:000006933
  species EGFRub in rootCompartment = 6.93991;  // isVersionOf PR:000006933; hasProperty PATO:0002216
  species PYK2m in rootCompartment = 0.6219;  // hasProperty ncit:C17020; hasProperty CHEBI:33699
  species PYK2 in rootCompartment = 9.29922;  // isVersionOf ncit:C17020
  species pPYK2 in rootCompartment = 2.51016;  // isVersionOf ncit:C17020
  species pSTAT3 in rootCompartment = 1.17843;  // isVersionOf PR:000002089
  species cMETm in rootCompartment = 0.0228566;  // hasProperty PR:P08581; hasProperty CHEBI:33699
  species cMET in rootCompartment = 4.67164;  // isVersionOf PR:P08581
  species pcMET in rootCompartment = 0.502111;  // isVersionOf PR:P08581
  species pCbl in rootCompartment = 10.4757;  // isVersionOf ncit:C18547
  species aPTP in rootCompartment = 0.49418;  // isVersionOf ncit:C17444
  species pERK in rootCompartment = 0.669043;  // isVersionOf PR:000000019
  species STAT3uStattic in rootCompartment = 0;  // hasProperty PR:000002089; hasProperty CHEBI:86989

  // Parameters:
  EGF = 10;
  HGF = 0;
  caSTAT3 = 0;
  kc1 = 413.048;
  Km1 = 248.886;
  kc2 = 1406.05;
  Km2 = 3.80189;
  Vmax3 = 0.000103753;
  Km3 = 2.2856;
  Ki3a = 0.0835603;
  Vmax4 = 11.1173;
  kc3 = 10.7895;
  Km4 = 90.7821;
  Vs5 = 26.5461;
  Vmax5 = 34.0408;
  Km5 = 4.74242;
  kdeg6 = 53.5797;
  Vmax7 = 3.34965;
  Km7 = 3.33426;
  kc9a = 0.463447;
  kc9b = 0.988553;
  Km9 = 34.914;
  Vmax10 = 0.530884;
  Km10 = 9.14113;
  kdeg8 = 0.0566239;
  kc11 = 0.321366;
  Km11 = 20.6063;
  kc12 = 0.000289734;
  Km12 = 11.5878;
  Vs13 = 0.0937562;
  Vmax13 = 0.354813;
  Km13 = 38.7258;
  kdeg14 = 4.56037;
  Vmax15 = 91.4113;
  Km15 = 6.45654;
  kc17 = 0.000810961;
  Km17 = 9.81748;
  Vmax18 = 0.0606736;
  Km18 = 9.95405;
  kdeg16 = 24.4906;
  kc16 = 1.1749;
  Km16 = 528.445;
  kc19 = 52.723;
  Km19 = 13.3045;
  kc20 = 35.6451;
  Km20 = 24.322;
  kc21 = 0.00397192;
  Km21 = 52.723;
  Vmax22 = 0.034914;
  Km22 = 46.4515;
  Vmax2 = 112.202;
  Vmax12 = 7.63836;
  Vmax20 = 0.0483059;
  kc23a = 7.03072e9;
  kc23b = 843335000;
  Km23 = 2.83139;
  Vmax24 = 4.39542e9;
  Km24 = 0.156675;
  kc10 = 0.00610942;
  Ki9 = 1.65577;
  Ki23 = 13.4896;
  ka25 = 127.35;
  kd25 = 11.749;
  kalEMD1 = 9311.08;
  caEGF = 0.0891251;
  caHGF = 0.0090365;
  EGFRtot = 398.107;
  STAT3tot = 144.212;
  Cbltot = 174.985;
  PTPtot = 296.483;
  ERKtot = 166.725;
  Ki1 = 1;
  Ki3b = 1;
  Gefitinib = 0;
  EMD = 0;
  PF396 = 0;
  Stattictot = 0;
  pSTAT3_max = 128;
  pERK_max = 163.6;
  c_Met_max = 16.7;
  PYK2_max = 14.58;
  var c_Met_norm; c_Met_norm is "c-Met_norm";
  Initial_for_PYK2_max = PYK2_max;
  Initial_for_c_Met_max = c_Met_max;
  Initial_for_pERK_max = pERK_max;
  Initial_for_pSTAT3_max = pSTAT3_max;

  // Assignment rules:
  pSTAT3_norm := pSTAT3/Initial_for_pSTAT3_max;
  PYK2_norm := PYK2/Initial_for_PYK2_max;
  pERK_norm := pERK/Initial_for_pERK_max;
  c_Met_norm := cMET/Initial_for_c_Met_max;

  // Reactions:
  v1: => pEGFR; rootCompartment*Function_for_v1(EGF, EGFRtot, EGFRub, Gefitinib, Ki1, Km1, caEGF, kc1, pEGFR, rootCompartment);  // modifiers: EGFRub; isVersionOf ncit:C18496
  v2: pEGFR => ; rootCompartment*Function_for_v2(Km2, Vmax2, aPTP, kc2, pEGFR, rootCompartment);  // modifiers: aPTP; isVersionOf ncit:C21018
  v3: => EGFRub; rootCompartment*Function_for_v3(EGFRtot, EGFRub, Ki3a, Ki3b, Km3, PF396, PYK2, Vmax3, kc3, pCbl, pEGFR, pPYK2, rootCompartment);  // modifiers: PYK2, pCbl, pEGFR, pPYK2
  v4: EGFRub => ; rootCompartment*Function_for_v4(EGFRub, Km4, Vmax4, rootCompartment);  // isVersionOf GO:0016579
  v5: => PYK2m; rootCompartment*Function_for_v5(Km5, Vmax5, Vs5, pSTAT3, rootCompartment);  // modifiers: pSTAT3
  v6: PYK2m => ; rootCompartment*Function_for_v6(PYK2m, kdeg6, rootCompartment);
  v7: => PYK2; rootCompartment*Function_for_v7(Km7, PYK2m, Vmax7, rootCompartment);  // modifiers: PYK2m
  v8: PYK2 => ; rootCompartment*Function_for_v8(PYK2, kdeg8, rootCompartment);
  v9: PYK2 => pPYK2; rootCompartment*Function_for_v9(EMD, Ki9, Km9, PYK2, kc9a, kc9b, pEGFR, pcMET, rootCompartment);  // modifiers: pEGFR, pcMET; isVersionOf ncit:C18496
  v10: pPYK2 => PYK2; rootCompartment*Function_for_v10(Km10, Vmax10, aPTP, kc10, pPYK2, rootCompartment);  // modifiers: aPTP; isVersionOf ncit:C21018
  v11: => pSTAT3; rootCompartment*Function_for_v11(Ki3b, Km11, PF396, STAT3tot, STAT3uStattic, kc11, pPYK2, pSTAT3, rootCompartment);  // modifiers: STAT3uStattic, pPYK2; isVersionOf ncit:C18496
  v12: pSTAT3 => ; rootCompartment*Function_for_v12(Km12, Vmax12, aPTP, kc12, pSTAT3, rootCompartment);  // modifiers: aPTP; isVersionOf ncit:C21018
  v13: => cMETm; rootCompartment*Function_for_v13(Km13, Vmax13, Vs13, pSTAT3, rootCompartment);  // modifiers: pSTAT3
  v14: cMETm => ; rootCompartment*Function_for_v14(cMETm, kdeg14, rootCompartment);
  v15: => cMET; rootCompartment*Function_for_v15(Km15, Vmax15, cMETm, rootCompartment);  // modifiers: cMETm
  v16: cMET => ; rootCompartment*Function_for_v16(Km16, cMET, kc16, kdeg16, pCbl, rootCompartment);  // modifiers: pCbl
  v17: cMET => pcMET; rootCompartment*Function_for_v17(HGF, Km17, cMET, caHGF, kc17, rootCompartment);  // isVersionOf ncit:C18496
  v18: pcMET => cMET; rootCompartment*Function_for_v18(Km18, Vmax18, pcMET, rootCompartment);  // isVersionOf ncit:C21018
  v19: => pCbl; rootCompartment*Function_for_v19(Cbltot, Km19, kc19, pCbl, pEGFR, rootCompartment);  // modifiers: pEGFR; isVersionOf ncit:C18496
  v20: pCbl => ; rootCompartment*Function_for_v20(Km20, Vmax20, aPTP, kc20, pCbl, rootCompartment);  // modifiers: aPTP; isVersionOf ncit:C21018
  v21: => aPTP; rootCompartment*Function_for_v21(Km21, PTPtot, aPTP, kc21, pEGFR, rootCompartment);  // modifiers: pEGFR; isVersionOf ncit:C64382; isVersionOf ncit:C16983
  v22: aPTP => ; rootCompartment*Function_for_v22(Km22, Vmax22, aPTP, rootCompartment);  // isVersionOf ncit:C21018
  v23: => pERK; rootCompartment*Function_for_v23(EMD, ERKtot, Ki23, Km23, kc23a, kc23b, pEGFR, pERK, pcMET, rootCompartment);  // modifiers: pEGFR, pcMET; isVersionOf ncit:C18496
  v24: pERK => ; rootCompartment*Function_for_v24(Km24, Vmax24, pERK, rootCompartment);  // isVersionOf ncit:C21018
  v25: => STAT3uStattic; rootCompartment*Function_for_v25(STAT3tot, STAT3uStattic, Stattictot, ka25, kd25, pSTAT3, rootCompartment);  // modifiers: pSTAT3; hasPart CHEBI:86989; isVersionOf GO:0008144

  // Unit definitions:
  unit time = 60 second;
  unit substance = 1e-9 mole;
end
