// SBML level 2 version 4
// dcterms:bibliographicCitation: Heparan Sulfate Regrowth Profiles Under Laminar Shear Flow Following Enzymatic Degradation. urn:miriam:pubmed:23805169

function Function_for_k3(default, k3, golgi)
  golgi*default*k3/default;
end

function Function_for_k1(default, k1, HS_surface)
  HS_surface*default*k1/default;
end

function Function_for_k2(default, k2, early_endosome)
  early_endosome*default*k2/default;
end

function Function_for_k6(default, k6, early_endosome)
  early_endosome*default*k6/default;
end

function Function_for_k7(default, k7, late_endosome)
  late_endosome*default*k7/default;
end

function Function_for_k8(default, k8, lysosome)
  lysosome*default*k8/default;
end

function Function_for_k4(default, k4, HS_surface)
  HS_surface*default*k4/default;
end

model Giantsos_Adams2013___Growth_of_glycocalyx_under_static_conditions()
  // GiantsosAdams2013 - Growth of glycocalyx under static conditions
  // Giantsos-Adams2013 - Growth of glycocalyx under static conditions
  // This model is described in the article:
  // Heparan Sulfate Regrowth Profiles Under Laminar Shear Flow Following Enzymatic Degradation.
  // Giantsos-Adams KM, Koo AJ, Song S, Sakai J, Sankaran J, Shin JH, Garcia-Cardena G, Dewey CF.
  // Cell Mol Bioeng 2013 Jun; 6(2): 160-174
  // Abstract:
  // The local hemodynamic shear stress waveforms present in an artery dictate the endothelial cell phenotype. The observed decrease of the apical glycocalyx layer on the endothelium in atheroprone regions of the circulation suggests that the glycocalyx may have a central role in determining atherosclerotic plaque formation. However, the kinetics for the cells' ability to adapt its glycocalyx to the environment have not been quantitatively resolved. Here we report that the heparan sulfate component of the glycocalyx of HUVECs increases by 1.4-fold following the onset of high shear stress, compared to static cultured cells, with a time constant of 19 h. Cell morphology experiments show that 12 h are required for the cells to elongate, but only after 36 h have the cells reached maximal alignment to the flow vector. Our findings demonstrate that following enzymatic degradation, heparan sulfate is restored to the cell surface within 12 h under flow whereas the time required is 20 h under static conditions. We also propose a model describing the contribution of endocytosis and exocytosis to apical heparan sulfate expression. The change in HS regrowth kinetics from static to high-shear EC phenotype implies a differential in the rate of endocytic and exocytic membrane turnover.
  // This model is hosted on BioModels Database and identified by: MODEL1609100001.
  // To cite BioModels Database, please use: BioModels Database: An enhanced, curated and annotated resource for published quantitative kinetic models.
  // To the extent possible under law, all copyright and related or neighbouring rights to this encoded model have been dedicated to the public domain worldwide. Please refer to CC0 Public Domain Dedication for more information.
  // hasInstance mamo:MAMO_0000046 biomodels.db:MODEL1609100000 taxonomy:9606 ncit:C540
  // isDescribedBy ncit:C540 pubmed:23805169
  // hasProperty mamo:MAMO_0000046
  // hasProperty biomodels.db:MODEL1609100000
  // hasTaxon taxonomy:9606
  // biomodels.db:MODEL1609100000 biomodels.db:BIOMD0000000830

  // Compartments:
  compartment default = 1;

  // Species:
  species HS_surface in default = 0.1;  // ncit:C540
  species early_endosome in default = 0.4;  // GO:0005769
  species late_endosome in default = 0.4;  // GO:0005770
  species $golgi in default = 0.05;  // ncit:C13238
  species lysosome in default = 1.23;  // GO:0005764
  species release in default = 0;  // hasProperty ncit:C42882
  species shedding in default = 0;

  // Reactions:
  k_golgi: $golgi => HS_surface; default*Function_for_k3(default, k3, golgi); k_golgi is "De novo HS production for Golgi aparatus";  // hasProperty ncit:C112927
    k3 = 0.96;
  k_endo: HS_surface => early_endosome; default*Function_for_k1(default, k1, HS_surface); k_endo is "HS exocytosis from recycling vesicles";  // hasProperty ncit:C16568
    k1 = 0.05;
  k_exo: early_endosome => HS_surface; default*Function_for_k2(default, k2, early_endosome); k_exo is "HS endocytosis";  // hasProperty ncit:C16544
    k2 = 0.05;
  k_le: early_endosome => late_endosome; default*Function_for_k6(default, k6, early_endosome); k_le is "HS trafficking to late endosome";  // hasProperty ncit:C48167
    k6 = 0.01;
  k_lys: late_endosome => lysosome; default*Function_for_k7(default, k7, late_endosome); k_lys is "HS trafficking to lysosome";  // hasProperty ncit:C48167
    k7 = 0.01;
  k_deg: lysosome => release; default*Function_for_k8(default, k8, lysosome); k_deg is "HS release from lysosome";  // hasProperty ncit:C42882
    k8 = 0.005;
  k_shed: HS_surface => shedding; default*Function_for_k4(default, k4, HS_surface); k_shed is "HS cell surface shedding";
    k4 = 0.033;

  // Unit definitions:
  unit time = 3600 second;
end
