// SBML level 2 version 4
// dcterms:bibliographicCitation: Hypothalamic regulation of pituitary secretion of luteinizing hormone. II. Feedback control of gonadotropin secretion. urn:miriam:pubmed:6986927

function Function_for_R_formation(c, h, T, H)
  (c - h*T)*(1 - H);
end

function Function_for_R_degradation(b1, R)
  b1*R;
end

function Function_fror_LH_formation(g1, R)
  g1*R;
end

function Function_for_LH_degradation(b2, L)
  b2*L;
end

function Function_for_T_formation(g2, L)
  g2*L;
end

function Function_for_T_degradation(b3, T)
  b3*T;
end

model Smith1980_HypothalamicRegulation()
  // Smith1980 - Hypothalamic Regulation
  // This a model from the article:
  // Hypothalamic regulation of pituitary secretion of luteinizing hormone.II. Feedback control of gonadotropin secretion.
  // Smith WR Bull Math Biol.(1980) 42(1): 57-78 6986927,
  // Abstract:
  // No Abstract Available
  // This model was taken from the CellML repositoryand automatically converted to SBML.
  // The original model was: smith,1980,version02
  // The original CellML model was created by:
  // Lloyd, Catherine, May
  // c.lloyd@auckland.ac.nz
  // The University of Auckland
  // Auckland Bioengineering Institute
  // This model originates from BioModels Database: A Database of Annotated Published Models (http://www.ebi.ac.uk/biomodels/). It is copyright (c) 2005-2011 The BioModels.net Team.
  // To the extent possible under law, all copyright and related or neighbouring rights to this encoded model have been dedicated to the public domain worldwide. Please refer to CC0 Public Domain Dedicationfor more information.
  // In summary, you are entitled to use this encoded model in absolutely any manner you deem suitable, verbatim, or with modification, alone or embedded it in a larger context, redistribute it, commercially or not, in a restricted way or not..
  // To cite BioModels Database, please use: Li C, Donizelli M, Rodriguez N, Dharuri H, Endler L, Chelliah V, Li L, He E, Henry A, Stefan MI, Snoep JL, Hucka M, Le Novère N, Laibe C (2010) BioModels Database: An enhanced, curated and annotated resource for published quantitative kinetic models. BMC Syst Biol., 4:92.
  // isInstanceOf mamo:MAMO_0000046 biomodels.db:MODEL7898438988 taxonomy:9913 GO:0032274
  // isInstanceOf GO:0032275
  // isDescribedBy GO:0032274 GO:0032275 pubmed:6986927
  // biomodels.db:MODEL7898438988 biomodels.db:BIOMD0000000831
  // hasProperty mamo:MAMO_0000046
  // hasProperty biomodels.db:MODEL7898438988

  // Compartments:
  compartment Compartment = 1;

  // Species:
  species R in Compartment = 0.5;  // uniprot:B0FMT3
  species L in Compartment = 22;  // uniprot:Q9I999
  species T in Compartment = 15;  // uniprot:Q5I3B1

  // Parameters:
  h = 12 unit_0;
  c = 100 unit_1;
  b1 = 1.29 unit_0;
  g1 = 10 unit_0;
  b2 = 0.97 unit_0;
  g2 = 0.7 unit_0;
  b3 = 1.39 unit_0;
  x has unit_2;
  H has unit_3;

  // Assignment rules:
  x := T - c/h;
  H := piecewise(1, x > 0, 0);

  // Reactions:
  LH_formation: => L; Compartment*Function_fror_LH_formation(g1, R);  // modifiers: R; hasProperty ncit:C25513
  T_formation: => T; Compartment*Function_for_T_formation(g2, L);  // modifiers: L; hasProperty ncit:C25513
  R_degradation: R => ; Compartment*Function_for_R_degradation(b1, R);
  LH_degradation: L => ; Compartment*Function_for_LH_degradation(b2, L);
  T_degradation: T => ; Compartment*Function_for_T_degradation(b3, T);
  R_formation: => R; Compartment*Function_for_R_formation(c, h, T, H);  // modifiers: T; hasProperty ncit:C25513

  // Unit definitions:
  unit volume = 1e-3 litre;
  unit time = 3600 second;
  unit substance = 1e-12 mole;
  unit unit_0 = 1 / (360000 second); unit_0 is "1/h";
  unit unit_1 = 1e-9 gram / (litre * 360000 second); unit_1 is "ng/(l*h)";
  unit unit_2 = 1e-9 gram / litre; unit_2 is "ng/l";
  unit unit_3 = dimensionless^0; unit_3 is "1";
end
