// SBML level 2 version 4
// dcterms:bibliographicCitation: urn:miriam:pubmed:27527217

function Function_for_v25(kc131, aRaf1, ERK, Km131)
  kc131*aRaf1*ERK/(Km131 + ERK);
end

function Function_for_v2(V11, pAkt, Km12)
  V11*pAkt/(Km12 + pAkt);
end

function Function_for_v26(V131, ppERK, Km132)
  V131*ppERK/(Km132 + ppERK);
end

function Function_for_v18(kc92, iRaf1, RasGTP, Km93)
  kc92*iRaf1*RasGTP/(Km93 + iRaf1);
end

function Function_for_v1(kc11, aEGFR, Akt, Km11)
  kc11*aEGFR*Akt/(Km11 + Akt);
end

function Function_for_v24(V121, RasGTP, Km122)
  V121*RasGTP/(Km122 + RasGTP);
end

function Function_for_v19(V101, aRaf1, Km101)
  V101*aRaf1/(Km101 + aRaf1);
end

function Function_for_v11(V51, MST2uRASSF1A, Km51)
  V51*MST2uRASSF1A/(Km51 + MST2uRASSF1A);
end

function Function_for_v20(V102, Raf1, Km102)
  V102*Raf1/(Km102 + Raf1);
end

function Function_for_v16(V91, Raf1, Km91)
  V91*Raf1/(Km91 + Raf1);
end

function Function_for_v3(kc12, Akt, RasGTP, Km13)
  kc12*Akt*RasGTP/(Km13 + Akt);
end

function Function_for_v22(kc112, aRaf1, ppERK, Km112)
  kc112*aRaf1*ppERK/(Km112 + aRaf1);
end

function Function_for_v23(kc121, aEGFR, RasGDP, Km121)
  kc121*aEGFR*RasGDP/(Km121 + RasGDP);
end

function Function_for_v7(ka22, MST2, RASSF1A, kd21, MST2uRASSF1A)
  ka22*MST2*RASSF1A - kd21*MST2uRASSF1A;
end

function Function_for_v15(kc82, aMST2uRASSF1A, LATS1, Km83)
  kc82*aMST2uRASSF1A*LATS1/(Km83 + LATS1);
end

function Function_for_v8(kc21, MST2, pAkt, Km23)
  kc21*MST2*pAkt/(Km23 + MST2);
end

function Function_for_v4(V21, aMST2, Km21)
  V21*aMST2/(Km21 + aMST2);
end

function Function_for_v10(ka41, aMST2, RASSF1A, kd41, aMST2uRASSF1A)
  ka41*aMST2*RASSF1A - kd41*aMST2uRASSF1A;
end

function Function_for_v12(ka71, iMST2, iRaf1, kd71, iRaf1uiMST2)
  ka71*iMST2*iRaf1 - kd71*iRaf1uiMST2;
end

function Function_for_v5(V22, iMST2, Km22)
  V22*iMST2/(Km22 + iMST2);
end

function Function_for_v6(ka21, MST2)
  ka21*MST2^2;
end

function Function_for_v14(kc81, aMST2, LATS1, Km82)
  kc81*aMST2*LATS1/(Km82 + LATS1);
end

function Function_for_v21(V111, ipRaf1, Km111)
  V111*ipRaf1/(Km111 + ipRaf1);
end

function Function_for_v13(V81, aLATS1, Km81)
  V81*aLATS1/(Km81 + aLATS1);
end

function Function_for_v17(kc91, aLATS1, Raf1, Km92)
  kc91*aLATS1*Raf1/(Km92 + Raf1);
end

function Function_for_v9(kd31, dMST2)
  kd31*dMST2;
end

model Shin2016___Unveiling_Hidden_Dynamics_of_Hippo_Signalling()
  // Shin2016 - Unveiling Hidden Dynamics of Hippo Signalling
  // This is a mathematical model describing Hippo signalling pathway activity. It includes descriptions of crosstalk with the Akt and ERK MAPK pathways; crosstalk activity is described using complex
  // regulatory mechanisms comprised of competitive protein-protein interactions and phosphorylation mediated feedback loops.
  // isDescribedBy pubmed:27527217
  // biomodels.db:MODEL1909250001 biomodels.db:BIOMD0000000832
  // hasProperty NCIT:C38834
  // hasProperty NCIT:C38981
  // hasProperty GO:0035329
  // hasProperty mamo:MAMO_0000046

  // Compartments:
  compartment compartment = 1;

  // Species:
  species Akt in compartment = 200;  // PR:000029189
  species RASSF1A in compartment = 1.77;  // isVersionOf ncit:C60667
  species MST2 in compartment = 0.2;  // isVersionOf ncit:C131221
  species dMST2 in compartment = 350;  // isVersionOf ncit:C131221
  species aMST2 in compartment = 185.6;  // isVersionOf ncit:C131221
  species aMST2uRASSF1A in compartment = 113.9;  // hasPart ncit:C131221; hasPart ncit:C60667
  species MST2uRASSF1A in compartment = 0.23;  // hasPart ncit:C60667; isVersionOf ncit:C131221
  species iMST2 in compartment = 0;  // isVersionOf ncit:C131221
  species iRaf1uiMST2 in compartment = 200;  // hasPart uniprot:P04049; hasPart ncit:C131221
  species aLATS1 in compartment = 192.2;  // isVersionOf PR:000009686
  species LATS1 in compartment = 7.8;  // isDerivedFrom PR:000009686
  species iRaf1 in compartment = 750;  // isVersionOf uniprot:P04049
  species Raf1 in compartment = 0;  // uniprot:P04049
  species aRaf1 in compartment = 0;  // isVersionOf uniprot:P04049
  species ipRaf1 in compartment = 0;  // isVersionOf uniprot:P04049
  species RasGDP in compartment = 300;  // isEncodedBy ncit:C25784
  species RasGTP in compartment = 0;  // isEncodedBy ncit:C25784
  species ERK in compartment = 3000;  // uniprot:P27361
  species ppERK in compartment = 0;  // isVersionOf uniprot:P27361
  species pAkt in compartment = 0;  // isVersionOf PR:000029189

  // Parameters:
  kc_121 = 0.2061;
  V_121 = 1027;
  kc_11 = 0.001149;
  kc_12 = 0.717;
  V_11 = 0.08687;
  kc_92 = 0.9203;
  V_91 = 2.071;
  V_102 = 317.3;
  V_101 = 994.8;
  kc_131 = 5.342;
  V_131 = 995.3;
  Km_132 = 151;
  Km_23 = 0.0008313;
  Km_22 = 816.2;
  kd_71 = 0.0004886;
  kd_31 = 0.6117;
  Km_21 = 427.3;
  kd_21 = 0.113;
  kd_41 = 1.226;
  Km_51 = 6.708;
  Km_82 = 3961;
  Km_83 = 22.26;
  Km_81 = 0.08503;
  Km_112 = 207.1;
  Km_111 = 0.07678;
  Km_121 = 120.5;
  Km_122 = 297.2;
  Km_11 = 51.21;
  Km_13 = 0.744;
  Km_12 = 0.01497;
  Km_93 = 0.9015;
  Km_91 = 0.8821;
  Km_102 = 3.197;
  Km_101 = 457.5;
  Km_131 = 0.03676;
  Km_92 = 10.68;
  kc_21 = 6684;
  V_22 = 7511;
  ka_71 = 28.12;
  ka_21 = 4472;
  V_21 = 1414;
  ka_22 = 0.0684;
  ka_41 = 0.4237;
  V_51 = 0.0005688;
  kc_81 = 6189;
  kc_82 = 0.000293;
  V_81 = 2261;
  kc_112 = 0.002742;
  V_111 = 254.7;
  kc_91 = 0.1177;
  aEGFR = 500;
  pAkt_max = 200;
  aMST2_max = 94.8;
  ppERK_max = 226.84;
  Initial_for_aMST2 = aMST2;
  Initial_for_aMST2uRASSF1A = aMST2uRASSF1A;
  Initial_for_pAkt_max = pAkt_max;
  Initial_for_ppERK_max = ppERK_max;

  // Assignment rules:
  aMST2_norm := (aMST2 + aMST2uRASSF1A)/(Initial_for_aMST2 + Initial_for_aMST2uRASSF1A);
  ppERK_norm := ppERK/Initial_for_ppERK_max;
  pAkt_norm := pAkt/Initial_for_pAkt_max;

  // Reactions:
  v1: Akt => pAkt; compartment*Function_for_v1(kc_11, aEGFR, Akt, Km_11);
  v2: pAkt => Akt; compartment*Function_for_v2(V_11, pAkt, Km_12);
  v3: Akt => pAkt; compartment*Function_for_v3(kc_12, Akt, RasGTP, Km_13);  // modifiers: RasGTP
  v4: aMST2 => MST2; compartment*Function_for_v4(V_21, aMST2, Km_21);
  v5: iMST2 => MST2; compartment*Function_for_v5(V_22, iMST2, Km_22);
  v6: 2 MST2 => dMST2; compartment*Function_for_v6(ka_21, MST2);  // ncit:C19901
  v7: MST2 + RASSF1A -> MST2uRASSF1A; compartment*Function_for_v7(ka_22, MST2, RASSF1A, kd_21, MST2uRASSF1A);
  v8: MST2 => iMST2; compartment*Function_for_v8(kc_21, MST2, pAkt, Km_23);  // modifiers: pAkt
  v9: dMST2 => 2 aMST2; compartment*Function_for_v9(kd_31, dMST2);
  v10: aMST2 + RASSF1A -> aMST2uRASSF1A; compartment*Function_for_v10(ka_41, aMST2, RASSF1A, kd_41, aMST2uRASSF1A);
  v11: MST2uRASSF1A => aMST2uRASSF1A; compartment*Function_for_v11(V_51, MST2uRASSF1A, Km_51);
  v12: iMST2 + iRaf1 -> iRaf1uiMST2; compartment*Function_for_v12(ka_71, iMST2, iRaf1, kd_71, iRaf1uiMST2);
  v13: aLATS1 => LATS1; compartment*Function_for_v13(V_81, aLATS1, Km_81);
  v14: LATS1 => aLATS1; compartment*Function_for_v14(kc_81, aMST2, LATS1, Km_82);  // modifiers: aMST2
  v15: LATS1 => aLATS1; compartment*Function_for_v15(kc_82, aMST2uRASSF1A, LATS1, Km_83);  // modifiers: aMST2uRASSF1A
  v16: Raf1 => iRaf1; compartment*Function_for_v16(V_91, Raf1, Km_91);
  v17: Raf1 => iRaf1; compartment*Function_for_v17(kc_91, aLATS1, Raf1, Km_92);  // modifiers: aLATS1
  v18: iRaf1 => Raf1; compartment*Function_for_v18(kc_92, iRaf1, RasGTP, Km_93);  // modifiers: RasGTP
  v19: aRaf1 => Raf1; compartment*Function_for_v19(V_101, aRaf1, Km_101);
  v20: Raf1 => aRaf1; compartment*Function_for_v20(V_102, Raf1, Km_102);
  v21: ipRaf1 => aRaf1; compartment*Function_for_v21(V_111, ipRaf1, Km_111);
  v22: aRaf1 => ipRaf1; compartment*Function_for_v22(kc_112, aRaf1, ppERK, Km_112);  // modifiers: ppERK
  v23: RasGDP => RasGTP; compartment*Function_for_v23(kc_121, aEGFR, RasGDP, Km_121);  // isVersionOf GO:1904477
  v24: RasGTP => RasGDP; compartment*Function_for_v24(V_121, RasGTP, Km_122);  // isVersionOf GO:1904476
  v25: ERK => ppERK; compartment*Function_for_v25(kc_131, aRaf1, ERK, Km_131);  // modifiers: aRaf1
  v26: ppERK => ERK; compartment*Function_for_v26(V_131, ppERK, Km_132);

  // Unit definitions:
  unit volume = 1e-3 litre;
  unit time = 60 second;
  unit substance = item;
end
