// SBML level 2 version 4
// dcterms:bibliographicCitation: Epidemics of panic during a bioterrorist attack--a mathematical model. http://identifiers.org/pubmed/19423234

model Radosavljevic2009_BioterroristAttack_PanicProtection_1()
  // This model is from the article:
  // Epidemics of panic during a bioterrorist attack--a mathematical model.
  // Radosavljevic V, Radunovic D, Belojevic G. Med Hypotheses2009 Sep;73(3):342-6 19423234,
  // Abstract:
  // A bioterrorist attacks usually cause epidemics of panic in a targeted population. We have presented epidemiologic aspect of this phenomenon as a three-component model--host, information on an attack and social network. We have proposed a mathematical model of panic and counter-measures as the function of time in a population exposed to a bioterrorist attack. The model comprises ordinary differential equations and graphically presented combinations of the equations parameters. Clinically, we have presented a model through a sequence of psychic conditions and disorders initiated by an act of bioterrorism. This model might be helpful for an attacked community to timely and properly apply counter-measures and to minimize human mental suffering during a bioterrorist attack.
  // To the extent possible under law, all copyright and related or neighbouring rights to this encoded model have been dedicated to the public domain worldwide. Please refer to CC0 Public Domain Dedicationfor more information.
  // In summary, you are entitled to use this encoded model in absolutely any manner you deem suitable, verbatim, or with modification, alone or embedded it in a larger context, redistribute it, commercially or not, in a restricted way or not.
  // To cite BioModels Database, please use: Li C, Donizelli M, Rodriguez N, Dharuri H, Endler L, Chelliah V, Li L, He E, Henry A, Stefan MI, Snoep JL, Hucka M, Le Novère N, Laibe C (2010) BioModels Database: An enhanced, curated and annotated resource for published quantitative kinetic models. BMC Syst Biol., 4:92.
  // hasTaxon taxonomy:9606
  // isDescribedBy pubmed:19423234
  // biomodels.db:MODEL1203070000 biomodels.db:BIOMD0000000836
  // isVersionOf GO:0042596
  // isVersionOf efo:0004262
  // hasProperty biomodels.db:MODEL1203070000

  // Compartments:
  compartment compartment = 1;

  // Species:
  species $S in compartment = 0.1; S is "panic_intensity";
  species $P in compartment = 0.1; P is "protection+prevention_intensity";

  // Parameters:
  alpha = 6;
  beta = 2.8;
  gamma = 0;
  delta = 1;
  C = 10; C is "whole_population";

  // Rate rules:
  S' = (alpha*(1 - S/C) - beta*P)*S;
  P' = (-gamma + delta*S)*P;

  // Unit definitions:
  unit time = 86400 second;
end
