// SBML level 2 version 4
// dcterms:bibliographicCitation: urn:miriam:doi:10.1101/049908

function Constant_flux__irreversible(v)
  v;
end
Constant_flux__irreversible is "Constant flux (irreversible)";

function Function_for_Cytotoxic_T_Cells_Memory_Formation(r_2, C_m, LT)
  r_2*C_m*LT;
end

function Function_for_Inflammation_Suppression_Drug(D)
  D;
end

function Function_for_Tumor_Growth(r_1, B, k_1)
  r_1*B*(1 - B/k_1);
end

function Function_for_Tumor_Killing_C_e(d_1, B, C_e)
  d_1*B*C_e;
end

function Function_for_Immune_Stimulation_C_e(p_1, B, C_e, H_e)
  p_1*B*(C_e + H_e);
end

function Function_for_Cytotoxic_T_Cells_Effector_Formation(n, a_1, B, C_m, I, a_2, H_e, b)
  2^n*a_1*B*C_m*(I^2/(I^2 + b^2))*(1 + a_2*H_e);
end

function Function_for_Helper_T_Cells_Memory_Formation(r_3, H_m, LT)
  r_3*H_m*LT;
end

function Function_for_Lympocyte_Formation(r_4, L, LT)
  r_4*L*LT;
end

function Function_for_Cytotoxic_T_Cells_Memory_Decay(a_1, B, C_m, a_2, H_e, I, b)
  a_1*B*C_m*(1 + a_2*H_e)*(I^2/(I^2 + b^2));
end

function Function_for_Helper_T_Cells_Memory_Decay(a_3, B, H_m, I, b)
  a_3*B*H_m*(I^2/(I^2 + b^2));
end

function Function_for_Helper_T_Cells_Effector_Formation(n, a_3, B, H_m, I, b)
  2^n*a_3*B*H_m*(I^2/(I^2 + b^2));
end

model Hanson2016___Toxicity_Management_in_CAR_T_cell_therapy_for_B_ALL()
  // Hanson2016 - Toxicity Management in CAR T cell therapy for B-ALL
  // This model provides an in silico mathematical platform to explore the interactions between chimeric antigen receptor-modified T cells, inflammatory toxicitiy, and the tumour burdens of individual
  // patients.
  // isDescribedBy doi:10.1101/049908
  // biomodels.db:MODEL1910250001 biomodels.db:BIOMD0000000837
  // hasProperty mamo:MAMO_0000046
  // hasProperty ncit:C126102
  // hasProperty ncit:C8644

  // Compartments:
  compartment compartment = 1;  // BTO:0000141

  // Species:
  species C_m in compartment = 10;  // isVersionOf CL:0000910
  species C_e in compartment = 10;  // isVersionOf CL:0000910
  species H_m in compartment = 10;  // isVersionOf CL:0000912
  species H_e in compartment = 10;  // isVersionOf CL:0000912
  species L in compartment = 1600;  // CL:0000542
  species Inflam in compartment = 140;  // GO:0006954
  species B in compartment = 300;  // BTO:0000731
  species D in compartment = 0;  // isVersionOf ncit:C574

  // Parameters:
  n = 6;
  r_1 = 0.003;
  r_2 = 0.1;
  r_3 = 0.1;
  r_4 = 0.1;
  d_1 = 0.0002;
  d_2 = 1.5;
  d_3 = 0.004;
  d_4 = 0.004;
  d_5 = 0.0002;
  p_1 = 0.002;
  p_2 = 0.4;
  a_1 = 4e-7;
  a_2 = 2;
  a_3 = 8e-5;
  b = 800;
  l = 1600;
  k = 4800;
  p_0 = 200;
  Initial_for_l = l;

  // Assignment rules:
  Total_Lymphocytes := B + C_e + C_m + H_e + H_m + L;
  Lymphocyte_Term := piecewise(1 - Total_Lymphocytes/Initial_for_l, 1 - Total_Lymphocytes/Initial_for_l > 0, 0);

  // Reactions:
  Tumor_Growth: => B; compartment*Function_for_Tumor_Growth(r_1, B, k);  // ncit:C36294
  Tumor_Killing_C_e: B => ; compartment*Function_for_Tumor_Killing_C_e(d_1, B, C_e);  // modifiers: C_e; isVersionOf GO:0002419
  Inflammation_Stimulation_C_e: => Inflam; compartment*Function_for_Immune_Stimulation_C_e(p_1, B, C_e, H_e);  // modifiers: B, C_e, H_e; isVersionOf GO:0006954
  Inflammation_Decay: Inflam => ; compartment*d_2*Inflam;
  Inflammation_Suppression_Drug: Inflam => ; compartment*Function_for_Inflammation_Suppression_Drug(D);  // modifiers: D; isVersionOf ncit:C574
  Cytotoxic_T_Cells_Effector_Formation: => C_e; compartment*Function_for_Cytotoxic_T_Cells_Effector_Formation(n, a_1, B, C_m, Inflam, a_2, H_e, b);  // modifiers: B, C_m, Inflam, H_e; isVersionOf ncit:C18081
  Cytotoxic_T_Cells_Effector_Decay: C_e => ; compartment*d_3*C_e;  // isVersionOf GO:0008219
  Cytotoxic_T_Cells_Memory_Formation: => C_m; compartment*Function_for_Cytotoxic_T_Cells_Memory_Formation(r_2, C_m, Lymphocyte_Term);  // modifiers: Inflam; isVersionOf ncit:C18081
  Cytotoxic_T_Cells_Memory_Decay: C_m => ; compartment*Function_for_Cytotoxic_T_Cells_Memory_Decay(a_1, B, C_m, a_2, H_e, Inflam, b);  // modifiers: B, H_e, Inflam; isVersionOf GO:0008219
  Helper_T_Cells_Effector_Formation: => H_e; compartment*Function_for_Helper_T_Cells_Effector_Formation(n, a_3, B, H_m, Inflam, b);  // modifiers: B, H_m, Inflam; isVersionOf ncit:C18081
  Helper_T_Cells_Effector_Decay: H_e => ; compartment*d_4*H_e;  // isVersionOf GO:0008219
  Helper_T_Cells_Memory_Formation: => H_m; compartment*Function_for_Helper_T_Cells_Memory_Formation(r_3, H_m, Lymphocyte_Term);  // isVersionOf ncit:C18081
  Helper_T_Cells_Memory_Decay: H_m => ; compartment*Function_for_Helper_T_Cells_Memory_Decay(a_3, B, H_m, Inflam, b);  // modifiers: B, Inflam; isVersionOf GO:0008219
  Lympocyte_Formation_Constant: => L; compartment*Constant_flux__irreversible(p_2);  // isVersionOf ncit:C18081
  Lympocyte_Formation: => L; compartment*Function_for_Lympocyte_Formation(r_4, L, Lymphocyte_Term);  // isVersionOf ncit:C18081
  Lympocyte_Decay: L => ; compartment*d_5*L;  // isVersionOf GO:0008219
  Inflammation_Input: => Inflam; compartment*Constant_flux__irreversible(p_0);  // isVersionOf GO:0006954

  // Unit definitions:
  unit volume = 1e-3 litre;
  unit time = 3600 second;
  unit substance = item;
end
