// SBML level 2 version 4
// dcterms:bibliographicCitation: urn:miriam:pubmed:31580835

function Function_for_Tumor_Death_CD8(nu_mel, T, M, g)
  nu_mel*T*M/(M + g);
end

function Function_for_Tumor_Growth(gamma_mel, M)
  gamma_mel*M;
end

function Function_for_APC_Activation(alpha_A, M, b)
  alpha_A*M/(M + b);
end

function Function_for_Activation_CD8(alpha_E, A)
  alpha_E*A;
end

model Tsur2019___Response_of_patients_with_melanoma_to_immune_checkpoint_blockade()
  // Tsur2019 - Response of patients with melanoma to immune checkpoint blockade
  // This is a simple mathematical population model for pembrolizumab-treated advanced melanoma patients, used to predict the response of melanoma patients to immune checkpoint inhibitors.
  // isDescribedBy pubmed:31580835
  // biomodels.db:MODEL1910250002 biomodels.db:BIOMD0000000838
  // hasProperty efo:0000756
  // hasProperty ncit:C141144
  // hasProperty mamo:MAMO_0000046

  // Compartments:
  compartment compartment = 1;  // ncit:C94498

  // Species:
  species A in compartment = alpha_A/mu_a/(M/(M + b));  // ncit:C12621
  species T in compartment = alpha_e/mu_e*A;  // ncit:C12542
  species M in compartment = 1000000;  // ncit:C36873

  // Parameters:
  alpha_A = 2986;
  b = 92330;
  mu_a = 0.231;
  alpha_e = 831.8;
  mu_e = 0.1777;
  gamma_mel = 0.04496;
  nu_mel = 0.1245;
  g = 60100000;

  // Reactions:
  APC_Activation: => A; compartment*Function_for_APC_Activation(alpha_A, M, b);  // modifiers: M; isVersionOf ncit:C64382
  APC_Death: A => ; compartment*mu_a*A;  // GO:0008219
  Activation_CD8: => T; compartment*Function_for_Activation_CD8(alpha_e, A);  // modifiers: A; GO:0036037
  CD8_Death: T => ; compartment*mu_e*T;  // GO:0008219
  Tumor_Growth: => M; compartment*Function_for_Tumor_Growth(gamma_mel, M);  // ncit:C36294
  Tumor_Death_CD8: M => ; compartment*Function_for_Tumor_Death_CD8(nu_mel, T, M, g);  // modifiers: T; GO:0002419

  // Unit definitions:
  unit volume = 1e-3 litre;
  unit time = 86400 second;
  unit substance = item;
end
