// SBML level 2 version 4
// dcterms:bibliographicCitation: urn:miriam:pubmed:31513802

function Function_for_Vicodin_Use_Transition_Abuse_Relapse_Nonlinear(gamma_3, A, T)
  gamma_3*A*T;
end

function Function_for_New_Vicodin_Prescriptions(lambda, rho, A)
  lambda/(1 + rho*A);
end

model Caldwell2019___The_Vicodin_abuse_problem()
  // Caldwell2019 - The Vicodin abuse problem
  // This is a mathematical model of Vicodin use and abuse used to investigate methods of combating Vicodin abuse in a population of patients who have obtained the drug through prescription. Mathematical
  // descriptions of transitions through acute, chronic, abusive, and in-treatment populations are included.
  // isDescribedBy pubmed:31513802
  // biomodels.db:MODEL1910290002 biomodels.db:BIOMD0000000840
  // hasProperty ncit:C16522
  // hasProperty mamo:MAMO_0000046
  // hasProperty CHEBI:5779

  // Compartments:
  compartment compartment = 1;  // isVersionOf ncit:C17005

  // Species:
  species M in compartment = 37600000;  // hasProperty ncit:C14140
  species C1 in compartment = 5640000;  // hasProperty ncit:C14141
  species C2 in compartment = 3760000;  // hasProperty ncit:C14141
  species A in compartment = 2000000;  // hasProperty ncit:C16522
  species T in compartment = 700000;  // hasProperty efo:0000727

  // Parameters:
  lambda = 3000000;
  rho = 1e-6;
  alpha_1 = 0.22;
  alpha_2 = 0.45;
  beta = 0.14;
  delta = 0.05;
  epsilon = 0.03;
  gamma_1 = 0.24;
  gamma_2 = 0.293;
  gamma_3 = 8e-10;

  // Reactions:
  New_Vicodin_Prescriptions: => M; compartment*Function_for_New_Vicodin_Prescriptions(lambda, rho, A);  // modifiers: A; ncit:C28180
  Vicodin_Use_Transition_Acute_Chronic: M => C1; compartment*alpha_1*M;  // hasProperty ncit:C14141
  Vicodin_Use_Transition_Cessation: M => ; compartment*alpha_2*M;  // hasProperty ncit:C61497
  Vicodin_Use_Transition_Chronic_Abuse: C2 => A; compartment*delta*C2;  // hasProperty ncit:C16522
  Vicodin_Use_Transition_Chronic_Exit: C1 => ; compartment*beta*C1;  // hasProperty ncit:C61497
  Vicodin_Use_Transition_Chronic: C1 => C2; compartment*delta*C1;  // hasProperty ncit:C14141
  Vicodin_Use_Transition_Chronic2_Exit: C2 => ; compartment*beta*C2;  // hasProperty ncit:C61497
  Vicodin_Use_Transition_Abuse_Treatment_Exit: A => T; compartment*epsilon*A;  // hasProperty ncit:C3479; hasProperty ncit:C61497; hasProperty ncit:C70742
  Vicodin_Use_Transition_Abuse_Relapse_Linear: T => A; compartment*gamma_1*T;  // isVersionOf efo:0004952
  Vicodin_Use_Transition_Abuse_Relapse_Nonlinear: T => A; compartment*Function_for_Vicodin_Use_Transition_Abuse_Relapse_Nonlinear(gamma_3, A, T);  // isVersionOf efo:0004952
  Vicodin_Use_Transition_Treatment_Succesful: T => ; compartment*gamma_2*T;  // hasProperty ncit:C25362; hasProperty efo:0000727

  // Unit definitions:
  unit volume = 1e-3 litre;
  unit time = 86400 second;
  unit substance = item;
end
