// SBML level 2 version 4
// dcterms:bibliographicCitation: urn:miriam:pubmed:31181241

function Constant_flux__irreversible(v)
  v;
end
Constant_flux__irreversible is "Constant flux (irreversible)";

function Function_for_HSP_Translation(k4, mRNA)
  k4*mRNA;
end

function Function_for_mRNA_Transcription(k_8_T, HSE_HSF_3)
  k_8_T*HSE_HSF_3;
end

function Function_for_HSF_Activation(k3, HSF)
  k3*HSF^3;
end

model Dudziuk2019___Biologically_sound_formal_model_of_Hsp70_heat_induction()
  // Dudziuk2019 - Biologically sound formal model of Hsp70 heat induction
  // This is a mathematical model of Hsp70 induction. To model heat shock effects, the model incorporates temperature dependencies in transcirption to Hsp70 mRNA and in dissociation of transcriptional
  // complexes, in addition to a formal expression relating temperature to protein denaturation.
  // isDescribedBy pubmed:31181241
  // isDerivedFrom pubmed:19327370
  // isDerivedFrom pubmed:23985732
  // biomodels.db:MODEL1807160001 biomodels.db:BIOMD0000000843
  // hasProperty mamo:MAMO_0000046
  // hasProperty ncit:C17888

  // Compartments:
  compartment compartment = 1;  // isVersionOf CL:0000000

  // Species:
  species HSP in compartment = 52.06;  // ncit:C16672
  species HSF in compartment = 0.001363;  // CCO:37068
  species S in compartment = 8.122e-8;  // hasProperty MI:0908; hasProperty ncit:C17021
  species HSP_HSF in compartment = 0.01429;  // hasPart CCO:37068; hasPart ncit:C16672
  species HSP_S in compartment = 0.0005268;  // hasPart ncit:C16672
  species HSF_3 in compartment = 9.082e-6;  // hasPart CCO:37068
  species HSE in compartment = 3.996e-6;  // SO:0001850
  species HSE_HSF_3 in compartment = 4.484e-9;  // hasPart SO:0001850; hasPart CCO:37068
  species P in compartment = 1297;  // isVersionOf ncit:C17021
  species mRNA in compartment = 0.0004946;  // encodes ncit:C16672; ncit:C813

  // Parameters:
  k1 = 12.6;
  I1 = 0.003028;
  k2 = 0.218;
  I2 = 1.162;
  k3 = 446500;
  I3 = 2.392;
  k4 = 18.85;
  k5 = 0.0008709;
  k6 = 0.08899;
  k7 = 5892;
  I_7_37 = 47.68;
  I_7_41 = 1.233;
  I_7_42 = 0.6628;
  I_7_43 = 0.01639;
  I_7_44 = 50.01;
  I_7_45 = 84.27;
  k_8_max = 96.07;
  R_k_8 = 15.93;
  T_k_8 = 42.89;
  k9 = 0.001888;
  k10 = 0.09813;
  T_0 = 35.81;
  T_05 = 47.13;
  n_V = 6.522;
  P_tot = 1297;
  HSF_tot = 0.01568;
  HSE_tot = 4e-6;
  T = 42;
  Initial_for_I_7_42 = I_7_42;
  Initial_for_R_k_8 = R_k_8;
  Initial_for_T_k_8 = T_k_8;
  Initial_for_k10 = k10;
  Initial_for_k_8_max = k_8_max;
  Initial_for_n_V = n_V;

  // Assignment rules:
  I_7_T := Initial_for_I_7_42;
  k_8_T := Initial_for_k_8_max*(1 - 1/(1 + exp(-Initial_for_R_k_8*(T - Initial_for_T_k_8))));
  V_den_T := 1 - (1 + ((T - T_0)/(T_05 - T_0))^Initial_for_n_V)^(-1);
  k_11_T := Initial_for_k10*(V_den_T/(1 - V_den_T));
  HSF_3_tot := HSF_3 + HSE_HSF_3;

  // Reactions:
  HSF_Inactivation: HSP + HSF_3 => 2 HSF + HSP_HSF; compartment*I3*HSP*HSF_3;
  HSP_S_Association: HSP + S => HSP_S; compartment*k1*HSP*S;
  HSP_S_Dissociation: HSP_S => HSP + S; compartment*I1*HSP_S;
  HSP_HSF_Association: HSF + HSP => HSP_HSF; compartment*k2*HSF*HSP;
  HSP_HSF_Dissociation: HSP_HSF => HSP + HSF; compartment*I2*HSP_HSF;
  HSP_Degradation: HSP => ; compartment*k9*HSP;
  HSP_S_Protein_Refolding: HSP_S => HSP + P; compartment*k10*HSP_S;  // isVersionOf ncit:C17568
  HSP_Translation: => HSP; compartment*Function_for_HSP_Translation(k4, mRNA);  // modifiers: mRNA
  HSP_Production_Constitutive: => HSP; compartment*Constant_flux__irreversible(k6);
  HSF_Activation: 3 HSF => HSF_3; compartment*Function_for_HSF_Activation(k3, HSF);  // ncit:C64382
  P_Proteins_Denaturation: P => S; compartment*k_11_T*P;  // GO:0030164
  HSE_HSF_3_Association: HSE + HSF_3 => HSE_HSF_3; compartment*k7*HSE*HSF_3;
  HSE_HSF_3_Dissociation: HSE_HSF_3 => HSE + HSF_3; compartment*I_7_T*HSE_HSF_3;
  mRNA_Transcription: => mRNA; compartment*Function_for_mRNA_Transcription(k_8_T, HSE_HSF_3);  // modifiers: HSE_HSF_3
  mRNA_Degradation: mRNA => ; compartment*k5*mRNA;

  // Unit definitions:
  unit volume = 1e-3 litre;
  unit time = 60 second;
  unit substance = 1e-6 mole;
end
