// SBML level 2 version 4
// dcterms:bibliographicCitation: urn:miriam:pubmed:30412698

function Henri_Michaelis_Menten__irreversible(substrate, Km, V)
  V*substrate/(Km + substrate);
end
Henri_Michaelis_Menten__irreversible is "Henri-Michaelis-Menten (irreversible)";

function Constant_flux__irreversible(v)
  v;
end
Constant_flux__irreversible is "Constant flux (irreversible)";

function Function_for_Caffeoyl_Shikimate_Biosynthesis(a_3, X_2, X_3, K_3_2, K_3_3)
  a_3*X_2*X_3/((K_3_2 + X_2)*(K_3_3 + X_3));
end

function Function_for_Phenylalanine_Biosynthesis_Shikimate(a_1, X_1, K_1, b, X_2)
  a_1*X_1/(K_1*(1 + b*X_2) + X_1);
end

function Function_for_V_2_Shikimate_Transport(a2f, X_1, K2f, b2f, X_3, a2r, K2r, b2r)
  a2f*X_1/(K2f*(1 + b2f*X_3) + X_1) - a2r*X_3/(K2r*(1 + b2r*X_1) + X_3);
end

model Adams2019___The_regulatory_role_of_shikimate_in_plant_phenylalanine_metabolism()
  // Adams2019 - The regulatory role of shikimate in plant phenylalanine metabolism
  // This is a mathematical model of phenylalanine metabolism in plants as influenced by shikimate, with specific evidence of how shikimate dynamics influence phenylalanine metabolism as a function of
  // phenylalanine availability.
  // isDescribedBy pubmed:30412698
  // biomodels.db:MODEL1911100002 biomodels.db:BIOMD0000000847
  // hasProperty CHEBI:64477
  // hasProperty mamo:MAMO_0000046
  // hasProperty ncit:C20633

  // Compartments:
  compartment compartment = 1;  // PO:0009002

  // Species:
  species X_1 in compartment = 0;  // CHEBI:36208; occursIn GO:0009536
  species X_2 in compartment = 0;  // CHEBI:28044
  species X_3 in compartment = 0;  // CHEBI:36208; occursIn GO:0005829
  species X_4 in compartment = 0;  // hasVersion CHEBI:91005

  // Parameters:
  a_1 = 100;
  K_1 = 0.1;
  b = 1;
  a_2_plus = 2;
  K_2_plus = 100;
  a_2_minus = 1.5;
  K_2_minus = 100;
  a_3 = 75;
  K_3_3 = 0.1;
  a_4 = 75;
  K_4 = 1;
  a_5 = 5;
  K_5 = 1;
  K_3_2 = 1;
  a_0 = 25;
  b2f = 0;
  b2r = 0;

  // Reactions:
  a_0_Shikimate_Biosynthesis: => X_1; compartment*Constant_flux__irreversible(a_0);  // hasProperty GO:0033587
  V_1_Phenylalanine_Biosynthesis_Shikimate: X_1 => X_2; compartment*Function_for_Phenylalanine_Biosynthesis_Shikimate(a_1, X_1, K_1, b, X_2);  // hasProperty GO:0009094
  V_3_Caffeoyl_Shikimate_Biosynthesis: X_2 + X_3 => X_4; compartment*Function_for_Caffeoyl_Shikimate_Biosynthesis(a_3, X_2, X_3, K_3_2, K_3_3);  // hasProperty GO:0009058; hasProperty CHEBI:91005
  V_4_Mass_Release_Monolignol_Pathway: X_4 => X_3; compartment*Henri_Michaelis_Menten__irreversible(X_4, K_4, a_4);  // hasProperty CHEBI:64477; hasProperty ncit:C18611
  V_5_Phenylalanine_To_Protein: X_2 => ; compartment*Henri_Michaelis_Menten__irreversible(X_2, K_5, a_5);  // isVersionOf ncit:C18103
  V_2_Shikimate_Transport: X_1 -> X_3; compartment*Function_for_V_2_Shikimate_Transport(a_2_plus, X_1, K_2_plus, b2f, X_3, a_2_minus, K_2_minus, b2r);  // isVersionOf GO:0015733

  // Unit definitions:
  unit volume = 1e-3 litre;
  unit substance = item;
end
