// SBML level 2 version 4
// dcterms:bibliographicCitation: urn:miriam:pubmed:29574141

function Function_for_Uninfected_To_Refractory_IFN(phi_1, T, F_1, F_2)
  phi_1*T*(F_1 + F_2);
end

function Function_for_Uninfected_Death(d, T)
  d*(1 - T);
end

function Function_for_Uninfected_Infection(beta, V, T)
  beta*V*T;
end

function Function_for_Infected_Killing_Immune(mu_1, s_1, F_1, s_2, F_2, N, mu_2, s_1_prime, s_2_prime, E, I)
  (mu_1*(1 + s_1*F_1 + s_2*F_2)*N + mu_2*(1 + s_1_prime*F_1 + s_2_prime*F_2)*E)*I;
end

function Function_for_IFN_AB_Production_Infected(p_1, I)
  p_1*I;
end

function Function_for_HBV_S_CTL_Proliferation_Antigen(alpha, I, E)
  alpha*I*E;
end

function Function_for_Antibody_Turnover(d_a, A)
  d_a*(1 - A);
end

function Function_for_IFN_G_Production_CTLs(p_2, E)
  p_2*E;
end

function Function_for_NK_Cells_Proliferaton(N)
  N*(1 - N);
end

function Function_for_HBV_S_CTL_Proliferation(r_e, E)
  r_e*E*(1 - E);
end

function Function_for_Antibody_Production_Virus(q, V)
  q*V;
end

function Function_for_Virus_Production(I, p, s_3, F_1, s_4, F_2)
  I*p/(1 + s_3*F_1 + s_4*F_2);
end

function Function_for_NK_Cells_Production_IFN(q_1, F_1, q_2, F_2, N)
  (q_1*F_1 + q_2*F_2)*N;
end

function Function_for_Infected_To_Refractory(psi_2, I, F_2)
  psi_2*I*F_2;
end

function Function_for_IFN_G_Production_NK(p_3, N)
  p_3*N;
end

model FatehiChenar2018___Mathematical_model_of_immune_response_to_hepatitis_B()
  // FatehiChenar2018 - Mathematical model of immune response to hepatitis B
  // This is a mathematical model describing the dynamics of the immune response to hepatitis B, which takes into account contributions form innate and adaptive immune responses, as well as cytokines.
  // isDescribedBy pubmed:29574141
  // isDerivedFrom doi:10.1109/ISB.2012.6314119
  // isDerivedFrom pubmed:8599114
  // isDerivedFrom pubmed:8633078
  // biomodels.db:MODEL1911110001 biomodels.db:BIOMD0000000848
  // hasProperty GO:0006955

  // Compartments:
  compartment compartment = 1;  // isVersionOf ncit:C13041

  // Species:
  species T in compartment = 0.9;  // CL:0000182
  species I in compartment = 0;  // hasPart ncit:C14215; BTO:0000152
  species F_1 in compartment = 0;  // PR:000025848
  species F_2 in compartment = 0;  // PR:000024990
  species N in compartment = 0.1;  // CL:0000623
  species E in compartment = 0.2;  // isVersionOf CL:0000910
  species R in compartment = 0;  // CL:0000182; hasProperty ncit:C38014
  species V in compartment = 0.4;  // ncit:C14215
  species A in compartment = 0.1;  // ncit:C62795

  // Parameters:
  d = 0.003;
  beta = 7;
  rho = 5;
  psi_1 = 14;
  delta = 0.56;
  mu_1 = 5;
  s_1 = 1.5;
  s_2 = 0.6;
  mu_2 = 0.14;
  s_1_prime = 1.9;
  s_2_prime = 2;
  psi_2 = 21;
  p_1 = 1;
  delta_1 = 4.9;
  p_2 = 0.5;
  p_3 = 3;
  delta_2 = 5.16;
  q_1 = 0.8;
  q_2 = 0.6;
  r_e = 0.5;
  alpha = 1;
  p = 20;
  s_3 = 1.7;
  s_4 = 1;
  c = 0.67;
  k = 8;
  d_a = 0.332;
  q = 5;

  // Reactions:
  Uninfected_Death: => T; compartment*Function_for_Uninfected_Death(d, T);  // GO:0008219
  Uninfected_Infection: T => I; compartment*Function_for_Uninfected_Infection(beta, V, T);  // modifiers: V; isVersionOf GO:0046718
  Refractory_To_Uninfected: R => T; compartment*rho*R;  // hasProperty efo:0001460; hasProperty ncit:C75958
  Uninfected_To_Refractory_IFN: T => R; compartment*Function_for_Uninfected_To_Refractory_IFN(psi_1, T, F_1, F_2);  // modifiers: F_1, F_2; hasProperty ncit:C75958; hasProperty ncit:C20493; hasProperty ncit:C38014
  Infected_Death: I => ; compartment*delta*I;  // GO:0008219
  Infected_Killing_Immune: I => ; compartment*Function_for_Infected_Killing_Immune(mu_1, s_1, F_1, s_2, F_2, N, mu_2, s_1_prime, s_2_prime, E, I);  // modifiers: F_1, F_2, N, E; hasProperty GO:0006955; hasProperty GO:0001906
  IFN_AB_Production_Infected: => F_1; compartment*Function_for_IFN_AB_Production_Infected(p_1, I);  // modifiers: I; GO:0032606
  IFN_AB_Degradation: F_1 => ; compartment*delta_1*F_1;
  IFN_G_Production_CTLs: => F_2; compartment*Function_for_IFN_G_Production_CTLs(p_2, E);  // modifiers: E; isVersionOf GO:0032609
  IFN_G_Production_NK: => F_2; compartment*Function_for_IFN_G_Production_NK(p_3, N);  // modifiers: N; isVersionOf GO:0032609
  IFN_G_Degradation: F_2 => ; compartment*delta_2*F_2;
  NK_Cells_Proliferaton: => N; compartment*Function_for_NK_Cells_Proliferaton(N);  // GO:0001787
  NK_Cells_Production_IFN: => N; compartment*Function_for_NK_Cells_Production_IFN(q_1, F_1, q_2, F_2, N);  // modifiers: F_1, F_2; isVersionOf GO:0032819
  HBV_S_CTL_Proliferation: => E; compartment*Function_for_HBV_S_CTL_Proliferation(r_e, E);  // isVersionOf GO:0045065
  HBV_S_CTL_Proliferation_Antigen: => E; compartment*Function_for_HBV_S_CTL_Proliferation_Antigen(alpha, I, E);  // modifiers: I; isVersionOf GO:0045065
  Infected_To_Refractory: I => R; compartment*Function_for_Infected_To_Refractory(psi_2, I, F_2);  // modifiers: F_2; hasProperty ncit:C38014; hasProperty ncit:C75958
  Virus_Production: => V; compartment*Function_for_Virus_Production(I, p, s_3, F_1, s_4, F_2);  // modifiers: I, F_1, F_2; isVersionOf GO:0046753
  Virus_Clearance_Natural: V => ; compartment*c*V;
  Virus_Clearance_Antibodies: V + A => ; compartment*k*V*A;  // hasProperty ncit:C62795; hasProperty ncit:C95533
  Antibody_Turnover: => A; compartment*Function_for_Antibody_Turnover(d_a, A);  // isVersionOf GO:0048305
  Antibody_Production_Virus: => A; compartment*Function_for_Antibody_Production_Virus(q, V);  // modifiers: V; GO:0048305

  // Unit definitions:
  unit volume = 1e-3 litre;
  unit substance = 1e-3 mole;
end
