// SBML level 2 version 4
// dcterms:bibliographicCitation: urn:miriam:pubmed:31400344

function Function_for_Conversion_Uninfected_to_Infected(U, V, I)
  U*V/(U + I);
end

function Function_for_Tumor_Growth(m, K, U)
  m*ln(K/U)*U;
end

model Jenner2019___Oncolytic_virotherapy_for_tumours_following_a_Gompertz_growth_law()
  // Jenner2019 - Oncolytic virotherapy for tumours following a Gompertz growth law
  // This is a mathematical model using a Gompertz growth law to describe the in vivo dynamics of a cancer under treatment with an oncolytic virus.
  // isDescribedBy pubmed:31400344
  // isDerivedFrom pubmed:29644518
  // biomodels.db:MODEL1911120002 biomodels.db:BIOMD0000000850
  // hasProperty ncit:C62713
  // hasProperty mamo:MAMO_0000046

  // Compartments:
  compartment compartment = 1;

  // Species:
  species U in compartment = 75;  // CL:0001063; hasProperty efo:0001460
  species I in compartment = 100;  // CL:0001063; hasProperty BTO:0000152
  species V in compartment = 10;  // ncit:C717

  // Parameters:
  m = 0.1;
  K = 100;
  xi = 0.01;
  gamma = 0.1;

  // Reactions:
  Tumor_Growth: => U; compartment*Function_for_Tumor_Growth(m, K, U);  // ncit:C36294
  Conversion_Uninfected_to_Infected: U => I; compartment*Function_for_Conversion_Uninfected_to_Infected(U, V, I);  // modifiers: V; isVersionOf ncit:C3439
  Tumor_Cell_Death: I => V; compartment*xi*I;  // GO:0008219; hasProperty GO:0044659
  Viral_Decay: V => ; compartment*gamma*V;

  // Unit definitions:
  unit volume = 1e-3 litre;
  unit substance = item;
end
