// SBML level 2 version 4
// dcterms:bibliographicCitation: urn:miriam:pubmed:31128142

function Function_for_Susceptible_Individual_Transmission(beta, I, S)
  beta*I*S;
end

function Function_for_Vaccinated_Population_Growth(r, V_e, A)
  r*(1 - V_e/A);
end

function Function_for_Vaccinated_Population_Infection(k, I, V)
  k*I*V;
end

model Ho2019___Mathematical_models_of_transmission_dynamics_and_vaccine_strategies_in_Hong_Kong_during_the_2017_2018_winter_influenza_season__Simple()
  // Ho2019 - Mathematical models of transmission dynamics and vaccine strategies in Hong Kong during the 2017-2018 winter influenza season (Simple)
  // This is the simple version of the two mathematical models presented by Ho et al. It is a model comprised of simple ordinary differential equations describing the overall epidemic dynamics of
  // influenza infection in the 2017-2018 winter influenza season in Hong Kong.
  // isDescribedBy pubmed:31128142
  // biomodels.db:MODEL1911120003 biomodels.db:BIOMD0000000851
  // hasProperty ncit:C71292
  // hasProperty ncit:C53482
  // hasProperty mamo:MAMO_0000046

  // Compartments:
  compartment compartment = 1;

  // Species:
  species S in compartment = 0.9424;  // ncit:C17005; hasProperty ncit:C16505
  species V in compartment = 0.0565;  // ncit:C17005; hasProperty ncit:C28385
  species V_e in compartment = 0.0565;  // ncit:C17005; hasProperty ncit:C49287; hasProperty ncit:C28385
  species I in compartment = 0.0012;  // ncit:C17005; hasProperty efo:0001669
  species R in compartment = 0;  // ncit:C17005; hasProperty efo:0009785

  // Parameters:
  alpha = 127;
  r = 0.0155;
  A = 0.1155;
  beta = 2.7516;
  gamma = 2.1272;
  w = 0.45;
  T = 3.29;
  R_0 = 1.2935;
  R_0_x = 1.2607;
  Initial_for_beta = beta;
  Initial_for_w = w;

  // Assignment rules:
  k := Initial_for_beta*(1 - Initial_for_w);
  fraction_total := I + R + S + V + V_e;
  fraction_V := V/fraction_total;
  fraction_R := R/fraction_total;
  fraction_I := I/fraction_total;
  fraction_S := S/fraction_total;

  // Reactions:
  Susceptible_Individual_Transmission: S => I; compartment*Function_for_Susceptible_Individual_Transmission(beta, I, S);  // isVersionOf ncit:C3439
  Vaccinated_Population_Growth: S => V + V_e; compartment*Function_for_Vaccinated_Population_Growth(r, V_e, A);  // isVersionOf ncit:C15346
  Vaccinated_Population_Infection: V => I; compartment*Function_for_Vaccinated_Population_Infection(k, I, V);  // isVersionOf ncit:C3439
  Infected_Recovery: I => R; compartment*gamma*I;  // isVersionOf ncit:C25746

  // Unit definitions:
  unit volume = 1e-3 litre;
  unit substance = item;
end
