// SBML level 2 version 4
// dcterms:bibliographicCitation: urn:miriam:pubmed:28859112

function Constant_flux__irreversible(v)
  v;
end
Constant_flux__irreversible is "Constant flux (irreversible)";

function Function_for_MPN_SC_Proliferation_MPN_MC(ay, Ay, y0)
  ay*Ay*y0;
end

function Function_for_Phagocyte_Upregulation_Dead_Cells(rs, a)
  rs*a;
end

function Function_for_HSC_Proliferation_HMC(ax, Ax, x0)
  ax*Ax*x0;
end

function Function_for_MPN_SC_Self_Renewal(ry, psi_y, s, y0)
  ry*psi_y*s*y0;
end

function Function_for_HSC_Self_Renewal(x0, rx, psi_x, s)
  x0*rx*psi_x*s;
end

function Function_for_HSC_MPN_Mutation(rm, s, x0)
  rm*s*x0;
end

function Function_for_Dead_Cells_Elimination_Per_Cytokine(ea, a, s)
  ea*a*s;
end

model Andersen2017___Mathematical_modelling_as_a_proof_of_concept_for_MPNs_as_a_human_inflammation_model_for_cancer_development()
  // Andersen2017 - Mathematical modelling as a proof of concept for MPNs as a human inflammation model for cancer development
  // This is a mathematical model investigating the role of chronic inflammation in the development and progression of myeloproliferative neoplasms (MPNs). The model describes the proliferation from stem
  // cells to mature cells, including mutations of healthy stem cells to become malignant stem cells. The model also features a simple inflammatory coupling coping with cell death and affecting the basic
  // model beneath.
  // isDescribedBy pubmed:28859112
  // biomodels.db:MODEL1911120005 biomodels.db:BIOMD0000000852
  // hasProperty MP:0002499
  // hasProperty ncit:C4345
  // hasProperty mamo:MAMO_0000046

  // Compartments:
  compartment compartment = 1;  // ncit:C12431

  // Species:
  species x0 in compartment = 10100;  // CL:0000037
  species x1 in compartment = 3.84e10;  // isVersionOf CL:0000037; isVersionOf BTO:0002312
  species y0 in compartment = 0;  // isVersionOf ncit:C12922; hasProperty ncit:C4345
  species y1 in compartment = 0;  // isVersionOf ncit:C12922; isVersionOf BTO:0002312; hasProperty ncit:C4345
  species a in compartment = 699;  // isVersionOf CL:0000000; hasProperty ncit:C28554
  species s in compartment = 3.61;  // GO:0006954

  // Parameters:
  rx = 0.00087;
  ax = 1.1e-5;
  Ax = 4.7e13;
  dx0 = 0.002;
  dx1 = 129;
  cxx = 7.5e-5;
  es = 2;
  rm = 2e-8;
  inflammation = 7;
  ry = 0.0013;
  rs = 0.0003;
  ea = 2000000000;
  Initial_for_Ax = Ax;
  Initial_for_ax = ax;
  Initial_for_cxx = cxx;
  Initial_for_cxy = cxy;
  Initial_for_cyx = cyx;
  Initial_for_cyy = cyy;
  Initial_for_dx0 = dx0;
  Initial_for_dx1 = dx1;

  // Assignment rules:
  x0_e4 := x0/10000;
  y0_e4 := y0/10000;
  x0_y0 := x0_e4 + y0_e4;
  dy0 := Initial_for_dx0;
  cyy := Initial_for_cxx;
  cyx := Initial_for_cxx;
  psi_y := 1/(1 + (Initial_for_cyx*x0 + Initial_for_cyy*y0)^2);
  cxy := Initial_for_cxx;
  psi_x := 1/(1 + (Initial_for_cxx*x0 + Initial_for_cxy*y0)^2);
  dy1 := Initial_for_dx1;
  ay := Initial_for_ax;
  Ay := Initial_for_Ax;
  y1_e10 := y1/10000000000;
  x1_e10 := x1/10000000000;
  x1_y1 := x1_e10 + y1_e10;

  // Reactions:
  HSC_Self_Renewal: => x0; compartment*Function_for_HSC_Self_Renewal(x0, rx, psi_x, s);  // modifiers: s; isVersionOf GO:0017145
  HSC_Death: x0 => a; compartment*dx0*x0;  // isVersionOf GO:0008219
  HSC_Proliferation: x0 => ; compartment*ax*x0;  // GO:0071425
  HSC_MPN_Mutation: x0 => y0; compartment*Function_for_HSC_MPN_Mutation(rm, s, x0);  // modifiers: s; isVersionOf ncit:C17212
  HSC_Proliferation_HMC: => x1; compartment*Function_for_HSC_Proliferation_HMC(ax, Ax, x0);  // modifiers: x0; isVersionOf GO:0071425
  HMC_Death: x1 => a; compartment*dx1*x1;  // isVersionOf GO:0008219
  MPN_SC_Self_Renewal: => y0; compartment*Function_for_MPN_SC_Self_Renewal(ry, psi_y, s, y0);  // modifiers: s; isVersionOf GO:0017145
  MPN_SC_Death: y0 => a; compartment*dy0*y0;  // isVersionOf GO:0008219
  MPN_SC_Proliferation: y0 => ; compartment*ay*y0;  // isVersionOf GO:0071425
  MPN_SC_Proliferation_MPN_MC: => y1; compartment*Function_for_MPN_SC_Proliferation_MPN_MC(ay, Ay, y0);  // modifiers: y0; isVersionOf GO:0071425
  MPN_MC_Death: y1 => a; compartment*dy1*y1;  // isVersionOf GO:0008219
  Dead_Cells_Elimination_Per_Cytokine: a => ; compartment*Function_for_Dead_Cells_Elimination_Per_Cytokine(ea, a, s);  // modifiers: s
  Phagocyte_Upregulation_Dead_Cells: => s; compartment*Function_for_Phagocyte_Upregulation_Dead_Cells(rs, a);  // modifiers: a; isVersionOf GO:0006954
  Cytokine_Elimination: s => ; compartment*es*s;
  Cytokines_Inflammation: => s; compartment*Constant_flux__irreversible(inflammation);  // isVersionOf ncit:C20151

  // Unit definitions:
  unit volume = 1e-3 litre;
  unit time = 86400 second;
  unit substance = item;
end
