// SBML level 2 version 4
// dcterms:bibliographicCitation: urn:miriam:pubmed:30138630

function Function_for_LP_Synthesis_ED(kf5, PP, ED)
  kf5*PP^2*ED;
end

function Function_for_EP2_Synthesis_EP1(kf3, STAB, EP1)
  kf3*STAB*EP1;
end

function Function_for_EP1_Synthesis_STIM_BAS_bas(kf1bas, STIM, BAS)
  kf1bas*(1 - STIM)*BAS;
end

function Function_for_EP1_Synthesis_STIM_BAS(kf1, STIM, BAS)
  kf1*STIM*BAS;
end

function Function_for_ED_Synthesis_EP1_UPS(kf2, UPS, LAC, EP1)
  kf2*UPS*(1 - LAC)*EP1;
end

function Function_for_BAS_Synthesis_EP2(kb2, EP2, NP)
  kb2*EP2*NP;
end

function Function_for_ED_Synthesis_EP2(kf4, UPS, LAC, EP2)
  kf4*UPS*(1 - LAC)*EP2;
end

function Constant_flux__irreversible(v)
  v;
end
Constant_flux__irreversible is "Constant flux (irreversible)";

function Function_for_NP_Degradation_UPS(kdeg2, UPS, NP, LAC)
  kdeg2*UPS*NP*(1 - LAC);
end

function Function_for_PP_Synthesis(PSI, ksyn1, STIM, ksyn1bas)
  (1 - PSI)*(ksyn1*STIM + ksyn1bas);
end

function Function_for_STAB_Synthesis_STIM(ksyn3, STIM)
  ksyn3*STIM;
end

function Function_for_NP_Synthesis(PSI, ksyn2, STIM, ksyn2bas)
  (1 - PSI)*(ksyn2*STIM + ksyn2bas);
end

function Function_for_UPS_Activation(kact, STIM)
  kact*STIM;
end

model Smolen2018___Paradoxical_LTP_maintenance_with_inhibition_of_protein_synthesis_and_the_proteasome()
  // Smolen2018 - Paradoxical LTP maintenance with inhibition of protein synthesis and the proteasome
  // This is a mathematical model describing the formation of long-term potentiation (LTP) at the Schaffer collateral of CA1 pyramidal cell synapse. The model consists of nine ordinary differential
  // equations that denote synaptic states associated with different degrees of LTP, as well as the levels of regulatory proteins involved in the formation and maintenance of LTP.
  // isDescribedBy pubmed:30138630
  // biomodels.db:MODEL1911120006 biomodels.db:BIOMD0000000853
  // hasProperty mamo:MAMO_0000046
  // hasProperty PW:0000060
  // hasProperty ncit:C13314

  // Compartments:
  compartment compartment = 1;  // GO:1990021

  // Species:
  species PP in compartment = 0.01;  // ncit:C17021
  species NP in compartment = 0.01;  // ncit:C17021; hasProperty ncit:C154898
  species STAB in compartment = 0.01;  // hasInstance PR:000009238
  species UPS in compartment = 0.001;  // PW:0000144
  species EP1 in compartment = 0.18;  // ncit:C13281; hasProperty ncit:C61589
  species EP2 in compartment = 0.14;  // ncit:C13281; hasProperty ncit:C61589
  species ED in compartment = 0.01;  // ncit:C13281; hasProperty ncit:C61589
  species LP in compartment = 0.01;  // ncit:C13281; hasProperty ncit:C25322
  species BAS in compartment = 0.96;  // ncit:C13281; hasProperty ncit:C90067

  // Parameters:
  ksyn1 = 1;
  ksyn1bas = 0.0035;
  kdeg1 = 0.005;
  ksyn2 = 2;
  ksyn2bas = 0.0014;
  kdeg2 = 0.01;
  kdeg2bas = 0.002;
  ksyn3 = 1;
  ksyn3bas = 0.008;
  kdeg3 = 0.02;
  kact = 0.2;
  kactbas = 0.00214;
  kdeact = 0.0143;
  kf1 = 0.1;
  kf2 = 0.02;
  kb1 = 0.005;
  kf3 = 0.01;
  kf4 = 0.02;
  kb2 = 0.0007;
  kb3 = 0.02;
  kf5 = 0.0005;
  kb4 = 0.001;
  PSI = 0;
  LAC = 0;
  tstimdur = 20;
  kf1bas_value = 0.001;
  Initial_for_kf1bas_value = kf1bas_value;
  Initial_for_tstimdur = tstimdur;

  // Assignment rules:
  kf1bas := piecewise(0, time <= Initial_for_tstimdur, Initial_for_kf1bas_value);
  STIM := piecewise(1, time <= Initial_for_tstimdur, 0);
  W := BAS + 5*EP1 + 8*EP2 + 4*ED + 8*LP;

  // Reactions:
  PP_Synthesis: => PP; compartment*Function_for_PP_Synthesis(PSI, ksyn1, STIM, ksyn1bas);
  PP_Degradation: PP => ; compartment*kdeg1*PP;
  NP_Synthesis: => NP; compartment*Function_for_NP_Synthesis(PSI, ksyn2, STIM, ksyn2bas);
  NP_Degradation_UPS: NP => ; compartment*Function_for_NP_Degradation_UPS(kdeg2, UPS, NP, LAC);  // modifiers: UPS
  NP_Degradation: NP => ; compartment*kdeg2bas*NP;
  STAB_Synthesis_STIM: => STAB; compartment*Function_for_STAB_Synthesis_STIM(ksyn3, STIM);
  STAB_Synthesis_Basal: => STAB; compartment*Constant_flux__irreversible(ksyn3bas);
  STAB_Degradation: STAB => ; compartment*kdeg3*STAB;
  EP1_Synthesis_STIM_BAS: BAS => EP1; compartment*Function_for_EP1_Synthesis_STIM_BAS(kf1, STIM, BAS);
  EP1_Synthesis_STIM_BAS_bas: BAS => EP1; compartment*Function_for_EP1_Synthesis_STIM_BAS_bas(kf1bas, STIM, BAS);
  ED_Synthesis_EP1_UPS: EP1 => ED; compartment*Function_for_ED_Synthesis_EP1_UPS(kf2, UPS, LAC, EP1);  // modifiers: UPS
  BAS_Synthesis_EP1: EP1 => BAS; compartment*kb1*EP1;
  EP2_Synthesis_EP1: EP1 => EP2; compartment*Function_for_EP2_Synthesis_EP1(kf3, STAB, EP1);  // modifiers: STAB
  ED_Synthesis_EP2: EP2 => ED; compartment*Function_for_ED_Synthesis_EP2(kf4, UPS, LAC, EP2);  // modifiers: UPS
  BAS_Synthesis_EP2: EP2 => BAS; compartment*Function_for_BAS_Synthesis_EP2(kb2, EP2, NP);  // modifiers: NP
  BAS_Synthesis_ED: ED => BAS; compartment*kb3*ED;
  LP_Synthesis_ED: ED => LP; compartment*Function_for_LP_Synthesis_ED(kf5, PP, ED);  // modifiers: PP
  BAS_Synthesis_LP: LP => BAS; compartment*kb4*LP;
  UPS_Activation: => UPS; compartment*Function_for_UPS_Activation(kact, STIM);
  UPS_Activation_Basal: => UPS; compartment*Constant_flux__irreversible(kactbas);
  UPS_Deactivation: UPS => ; compartment*kdeact*UPS;

  // Unit definitions:
  unit volume = 1e-3 litre;
  unit time = 60 second;
  unit substance = item;
end
