// SBML level 2 version 4
// dcterms:bibliographicCitation: urn:miriam:pubmed:26992575

function Function_for_AktP_Translocation_Cytosol_PM_Insulin(alpha, kin, Pc)
  alpha*kin*Pc;
end

function Function_for_Akt_Translocation_Cytosol_PM_Insulin(alpha, kin, Ac)
  alpha*kin*Ac;
end

function Function_for_Akt_Phosphorylation_PM_Equilibrium(beta, koff, Ap)
  beta*koff*Ap;
end

model Gray2016___The_Akt_switch_model()
  // Gray2016 - The Akt switch model
  // This is a simple, linear, four-compartment ordinary differential equation (ODE) model Akt activation that tracks both the phosphorylation state and the physical location (cytosol, plasma membrane) of
  // Akt.
  // isDescribedBy pubmed:26992575
  // biomodels.db:MODEL1911130001 biomodels.db:BIOMD0000000854
  // hasProperty GO:0043491
  // hasProperty mamo:MAMO_0000046
  // hasProperty ncit:C39130
  // hasTaxon taxonomy:10090

  // Compartments:
  compartment compartment = 1;  // CL:0000000

  // Species:
  species Ac in compartment = 0.95;  // PR:000029189; occursIn GO:0005829
  species Pc in compartment = 0;  // PR:000029189; isVersionOf PR:000037070; occursIn GO:0005829
  species Ap in compartment = 0.05;  // PR:000029189; occursIn GO:0005886
  species Pp in compartment = 0;  // PR:000029189; isVersionOf PR:000037070; occursIn GO:0005886

  // Parameters:
  kin = 0.55;
  koff = 0.35;
  alpha1 = 0.014;
  alpha100 = 0.023;
  beta1 = 2.2;

  // Assignment rules:
  Akt_Total := Ac + Ap + Pc + Pp;
  Pc_Perc := 100*(Pc/Akt_Total);
  Pp_Perc := 100*(Pp/Akt_Total);
  P_Perc := 100*(Pc + Pp)/Akt_Total;

  // Reactions:
  AktP_Dephosphorylation_Cytosol: Pc => Ac; compartment*koff*Pc;  // GO:0016311; occursIn GO:0005829
  Akt_Translocation_Cytosol_PM_Insulin: Ac => Ap; compartment*Function_for_Akt_Translocation_Cytosol_PM_Insulin(alpha1, kin, Ac);  // isVersionOf ncit:C89777
  Akt_Translocation_PM_Cytosol: Ap => Ac; compartment*kin*Ap;  // ncit:C89777
  AktP_Translocation_PM_Cytosol: Pp => Pc; compartment*kin*Pp;  // ncit:C89777
  AktP_Translocation_Cytosol_PM_Insulin: Pc => Pp; compartment*Function_for_AktP_Translocation_Cytosol_PM_Insulin(alpha1, kin, Pc);  // ncit:C89777
  AktP_Dephosphorylation_PM: Pp => Ap; compartment*koff*Pp;  // GO:0016311; occursIn GO:0005886
  Akt_Phosphorylation_PM_Equilibrium: Ap => Pp; compartment*Function_for_Akt_Phosphorylation_PM_Equilibrium(beta1, koff, Ap);  // GO:0016310

  // Unit definitions:
  unit volume = 1e-3 litre;
  unit time = 60 second;
  unit substance = 1e-9 mole;
end
