// SBML level 2 version 4
// dcterms:bibliographicCitation: urn:miriam:pubmed:25446708

function Constant_flux__irreversible(v)
  v;
end
Constant_flux__irreversible is "Constant flux (irreversible)";

function Function_for_Pathogen_Growth(kpg, P, pinf)
  kpg*P*(1 - P/pinf);
end

function Function_for_Pathogen_Destruction_Neutrophils(kpn, P, N, ken, E)
  kpn*P*N*(1 + ken*E);
end

function Function_for_Pathogen_Destruction_Background_Response(kpb, sb, P, mub, kbp)
  kpb*sb*P/(mub + kbp*P);
end

function Function_for_Macrophage_Recruitment(smr, R1, mumr)
  smr*R1/(mumr + R1);
end

function Function_for_Debris_Destruction_Macrophages(kptm, Pt, fi2, kem, E)
  kptm*Pt*fi2*(1 + kem*E);
end

function Function_for_Debris_Destruction_Neutrophils(kptn, Pt, N, ken)
  kptn*Pt*N*(1 + ken*N);
end

function Function_for_Pathogen_Destruction_Macrophages(kpm, P, fi2, kem, E)
  kpm*P*fi2*(1 + kem*E);
end

function Function_for_Neutrophil_Destruction_Macrophage(knm, N, fi2)
  knm*N*fi2;
end

model Cooper2015___Modeling_the_effects_of_systemic_mediators_on_the_inflammatory_phase_of_wound_healing()
  // Cooper2015 - Modeling the effects of systemic mediators on the inflammatory phase of wound healing
  // This is an ordinary differential equation-based mathematical model describing the inflammatory phase of the wound healing response. The model describes the interactions in the wound between wound
  // debris, pathogens, neutrophils and macrophages, as well as the modulation of these interactions by estrogen and cortisol.
  // isDescribedBy pubmed:25446708
  // isDerivedFrom pubmed:22810171
  // isDerivedFrom pubmed:16584750
  // isDerivedFrom pubmed:16616206
  // biomodels.db:MODEL1911130002 biomodels.db:BIOMD0000000855
  // hasProperty CHEBI:50114

  // Compartments:
  compartment compartment = 1;  // isVersionOf ncit:C13232

  // Species:
  species P in compartment = 0.1;  // ncit:C80324
  species Pt in compartment = 2;  // isVersionOf ncit:C120869
  species M in compartment = 0;  // CL:0000235
  species N in compartment = 0.1;  // CL:0000775

  // Parameters:
  kpn = 35.03;
  kpm = 34.8;
  Ninf = 0.11;
  kptn = 2.03;
  kptm = 3.16;
  mupt = 0.37;
  knp = 17.58;
  knpt = 2.97;
  snr = 0.38;
  munr = 3.3;
  mun = 1.02;
  knm = 6.42;
  kmp = 18.52;
  kmm = 0.06;
  kmn = 10.58;
  kmpt = 41.5;
  smr = 0.17;
  mumr = 0.54;
  mum = 0.5;
  ENinf = 6.8;
  ken = 5.37;
  EMinf = 5;
  kem = 4.97;
  Cn = 175.72;
  Cm1 = 72.84;
  Cm2 = 13.06;
  kpg = 14.4;
  pinf = 20;
  kbp = 0.2;
  sb = 0.12;
  mub = 0.048;
  kpb = 14.4;
  C = 0;
  E = 0;

  // Assignment rules:
  fEM_Kmm_E := kmm/(1 + (E/EMinf)^2);
  fi2 := M/(1 + (N/Ninf)^2 + (C/Cm1)^2);
  R1 := (kmpt*Pt + kmp*P + fEM_Kmm_E*M + kmn*N)/(1 + (C/Cm2)^2);
  R2 := (knpt*Pt + knp*P)/(1 + (C/Cn)^2);
  fEN := snr*R2/(munr + R2)/(1 + (E/ENinf)^2);

  // Reactions:
  Pathogen_Growth: => P; compartment*Function_for_Pathogen_Growth(kpg, P, pinf);  // isVersionOf ncit:C18081
  Pathogen_Destruction_Background_Response: P => ; compartment*Function_for_Pathogen_Destruction_Background_Response(kpb, sb, P, mub, kbp);  // isVersionOf ncit:C40676
  Pathogen_Destruction_Neutrophils: P => ; compartment*Function_for_Pathogen_Destruction_Neutrophils(kpn, P, N, ken, E);  // modifiers: N; isVersionOf GO:0006909
  Pathogen_Destruction_Macrophages: P => ; compartment*Function_for_Pathogen_Destruction_Macrophages(kpm, P, fi2, kem, E);  // isVersionOf GO:0006909
  Debris_Destruction_Neutrophils: Pt => ; compartment*Function_for_Debris_Destruction_Neutrophils(kptn, Pt, N, ken);  // modifiers: N; isVersionOf GO:0006909
  Debris_Destruction_Macrophages: Pt => ; compartment*Function_for_Debris_Destruction_Macrophages(kptm, Pt, fi2, kem, E);  // isVersionOf GO:0006909
  Debris_Neutrophil_Decay: N => Pt; compartment*mun*N;  // hasPart CL:0000775; isVersionOf GO:0008219
  Debris_Decay_Intrinsic: Pt => ; compartment*mupt*Pt;
  Macrophage_Recruitment: => M; compartment*Function_for_Macrophage_Recruitment(smr, R1, mumr);  // isVersionOf GO:0042116
  Macrophage_Activation: M => ; compartment*mum*M;  // isVersionOf GO:0008219
  Neutrophil_Activation: => N; compartment*Constant_flux__irreversible(fEN);  // isVersionOf GO:0042119
  Neutrophil_Destruction_Macrophage: N => ; compartment*Function_for_Neutrophil_Destruction_Macrophage(knm, N, fi2);  // isVersionOf GO:0006909

  // Unit definitions:
  unit volume = 1e-3 litre;
  unit time = 86400 second;
  unit substance = item;
end
