// SBML level 2 version 4
// dcterms:bibliographicCitation: urn:miriam:pubmed:27164436

function Constant_flux__irreversible(v)
  v;
end
Constant_flux__irreversible is "Constant flux (irreversible)";

function Henri_Michaelis_Menten__irreversible(substrate, Km, V)
  V*substrate/(Km + substrate);
end
Henri_Michaelis_Menten__irreversible is "Henri-Michaelis-Menten (irreversible)";

function Function_for_Sucrose_Consumption_Ephe(k9, sucr, Ephe, f_I_phe)
  k9*sucr*Ephe*f_I_phe;
end

function Function_for_Sucrose_Consumption_PCF_Lignin(k14, k15, sucr)
  (k14 + k15)*sucr;
end

function Function_for_Enitrate_Consumption(k27, N, Enitrate, k28)
  k27*N*Enitrate/(k28 + Enitrate);
end

function Function_for_TrioseP_Formation(k29, f_act_trioseP, ECO2)
  k29*f_act_trioseP*ECO2;
end

function Function_for_Sucrose_Formation_Starch(k37, starch, Estarch)
  k37*starch*Estarch;
end

function Function_for_Starch_Formation(k10, trioseP, f_I, k49)
  k10*trioseP*f_I/(k49 + trioseP);
end

function Function_for_ETP_Formation(k53, starch)
  k53*starch;
end

function Function_for_Sucrose_Formation_TrioseP(k4, EtrioseP, trioseP)
  k4*EtrioseP*trioseP;
end

function Function_for_Sucrose_Consumption_PCF(k5, sucr, f_act_pcf)
  k5*sucr*f_act_pcf;
end

function Function_for_Next_Consumption(g, k11, Next, Enitrate)
  g*k11*Next*Enitrate;
end

function Function_for_ECO2_Consumption(k31, trioseP, ECO2, k32)
  k31*trioseP*ECO2/(k32 + ECO2);
end

function Function_for_M1_Formation(k29, k40)
  k29*k40;
end

function Function_for_M1_Consumption(k44, K_I_L, M1, k29)
  k44*K_I_L*M1/(K_I_L + k29);
end

function Function_for_Ephe_Formation_Sucrose(k6, sucr, f_I_E_phe_outfl)
  k6*sucr*f_I_E_phe_outfl;
end

function Function_for_N_Formation(k11, Next, Enitrate)
  k11*Next*Enitrate;
end

function Function_for_M2_Consumption(k29, k40, M2, K_M_M2)
  k29*k40*M2/(K_M_M2 + M2);
end

function Function_for_EtrioseP_Consumption_Sucrose(k2, sucr, EtrioseP, k3)
  k2*sucr*EtrioseP/(k3 + EtrioseP);
end

function Function_for_Estarch_Consumption(k35, sucr, Estarch, k36)
  k35*sucr*Estarch/(k36 + Estarch);
end

model Larbat2016_3___Modeling_the_diversion_of_primary_carbon_flux_into_secondary_metabolism_under_variable_nitrate_and_light_or_dark_conditions__Light_Dark_Cycles_with_Minimum_Starch_Adaption()
  // Larbat2016.3 - Modeling the diversion of primary carbon flux into secondary metabolism under variable nitrate and light or dark conditions (Light Dark Cycles with Minimum Starch Adaption)
  // This is a global mathematical model describing metabolic partitioning of carbon resources in plants between growth and defense, as a function of nitrate fertilization. The model hinges on the
  // dynamics of sucrose inflow/outflow properties. The model also accounts for variations in photosynthetic activity as dictated by a daily light/dark cycle. Furthermore, the adaptive changes in starch
  // metabolism that occur with changing light durations (short days vs long days) are also investigated.
  // isDescribedBy pubmed:27164436
  // biomodels.db:MODEL1911130006 biomodels.db:BIOMD0000000859
  // hasProperty GO:0005982
  // hasProperty mamo:MAMO_0000046
  // hasProperty GO:0018958
  // hasProperty GO:0005985

  // Compartments:
  compartment compartment = 1;  // isVersionOf PO:0009002

  // Species:
  species sucr in compartment = 5.14e-5;  // CHEBI:17992
  species EtrioseP in compartment = 6.012;  // hasProperty ncit:C49887; hasProperty CHEBI:27137
  species Ephe in compartment = 38.677;  // hasProperty ncit:C49887; hasProperty CHEBI:15882
  species N in compartment = 5;  // CHEBI:17632
  species starch in compartment = 1.046e-7;  // CHEBI:28017
  species $Next in compartment = 20;  // CHEBI:17632; occursIn GO:0005576
  species Enitrate in compartment = 18.75;  // hasProperty CHEBI:17632; hasProperty ncit:C49887
  species trioseP in compartment = 0;  // isVersionOf CHEBI:27137; hasProperty PATO:0002220
  species ECO2 in compartment = 2.773;  // hasProperty CHEBI:16526; hasProperty ncit:C49887
  species Estarch in compartment = 55.574;  // hasProperty ncit:C49887; hasProperty CHEBI:28017
  species ETP in compartment = 0;  // hasProperty ncit:C49887
  species M1 in compartment = 0;  // hasProperty efo:0000568; hasProperty ncit:C63905
  species M2 in compartment = 3.342;  // hasProperty efo:0000568; hasProperty ncit:C61366

  // Parameters:
  k1 = 1;
  k2 = 1;
  k3 = 1e-5;
  k4 = 5;
  k6 = 10;
  k7 = 9.8;
  k8 = 1e-6;
  k9 = 1;
  k10 = 10;
  k11 = 0.2;
  k12 = 15;
  k13 = 1;
  k14 = 0.2;
  k15 = 0.2;
  k26 = 0.5;
  k27 = 0.1;
  k28 = 1e-6;
  k30 = 0.1;
  k31 = 2;
  k32 = 1e-6;
  k33 = 1e-11;
  k34 = 9.8;
  k35 = 10;
  k36 = 0.0001;
  k37 = 0.1;
  k38 = 0.02;
  k39 = 1000;
  g = 1;
  k40 = 0.0568;
  k44 = 1000;
  K_I_L = 0.0001;
  K_M_M2 = 1e-6;
  k49 = 0.001;
  k53 = 0.00025;
  k54 = 0.00625;
  k55 = 0.0001;
  k56 = 0.1;
  Daylight_Duration = 16;

  // Assignment rules:
  k5 := M1 + M2 - 0.85;
  f_act_trioseP := N/(k33 + N);
  Light_Dark_Tracker := piecewise(time - 24*ceil(time/24), xor(time < 0, 24 < 0), time - 24*floor(time/24)) - 8;
  k29 := piecewise(10.1, Light_Dark_Tracker < 0, 0);
  f_act_pcf := N/(k13 + N);
  f_I_phe := k38/(k38 + N);
  f_I_E_phe_outfl := k39/(k39 + N);
  f_I := k56/(k56 + ETP);

  // Reactions:
  Sucrose_Formation_TrioseP: trioseP => sucr; compartment*Function_for_Sucrose_Formation_TrioseP(k4, EtrioseP, trioseP);  // modifiers: EtrioseP
  Sucrose_Consumption_Ephe: sucr => ; compartment*Function_for_Sucrose_Consumption_Ephe(k9, sucr, Ephe, f_I_phe);  // modifiers: Ephe
  Sucrose_Consumption_PCF: sucr => ; compartment*Function_for_Sucrose_Consumption_PCF(k5, sucr, f_act_pcf);
  Sucrose_Consumption_PCF_Lignin: sucr => ; compartment*Function_for_Sucrose_Consumption_PCF_Lignin(k14, k15, sucr);
  Sucrose_Formation_Starch: starch => sucr; compartment*Function_for_Sucrose_Formation_Starch(k37, starch, Estarch);  // modifiers: Estarch
  EtrioseP_Formation_Constant: => EtrioseP; compartment*Constant_flux__irreversible(k1);
  EtrioseP_Consumption_Sucrose: EtrioseP => ; compartment*Function_for_EtrioseP_Consumption_Sucrose(k2, sucr, EtrioseP, k3);  // modifiers: sucr
  Ephe_Formation_Sucrose: => Ephe; compartment*Function_for_Ephe_Formation_Sucrose(k6, sucr, f_I_E_phe_outfl);  // modifiers: sucr
  Ephe_Consumption: Ephe => ; compartment*Henri_Michaelis_Menten__irreversible(Ephe, k8, k7);
  N_Formation: => N; compartment*Function_for_N_Formation(k11, Next, Enitrate);  // modifiers: Next, Enitrate
  N_Consumption: N => ; compartment*k12*N;
  Next_Consumption: $Next => ; compartment*Function_for_Next_Consumption(g, k11, Next, Enitrate);  // modifiers: Enitrate
  Starch_Formation: trioseP => starch; compartment*Function_for_Starch_Formation(k10, trioseP, f_I, k49);
  Enitrate_Formation: => Enitrate; compartment*Constant_flux__irreversible(k26);
  Enitrate_Consumption: Enitrate => ; compartment*Function_for_Enitrate_Consumption(k27, N, Enitrate, k28);  // modifiers: N
  TrioseP_Formation: => trioseP; compartment*Function_for_TrioseP_Formation(k29, f_act_trioseP, ECO2);  // modifiers: ECO2; isDescribedBy pubmed:27164436
  ECO2_Formation: => ECO2; compartment*Constant_flux__irreversible(k30);
  ECO2_Consumption: ECO2 => ; compartment*Function_for_ECO2_Consumption(k31, trioseP, ECO2, k32);  // modifiers: trioseP
  Estarch_Formation: => Estarch; compartment*Constant_flux__irreversible(k34);
  Estarch_Consumption: Estarch => ; compartment*Function_for_Estarch_Consumption(k35, sucr, Estarch, k36);  // modifiers: sucr
  ETP_Formation: => ETP; compartment*Function_for_ETP_Formation(k53, starch);  // modifiers: starch
  ETP_Consumption: ETP => ; compartment*Henri_Michaelis_Menten__irreversible(ETP, k55, k54);
  M1_Formation: => M1; compartment*Function_for_M1_Formation(k29, k40);
  M1_Consumption: M1 => M2; compartment*Function_for_M1_Consumption(k44, K_I_L, M1, k29);
  M2_Consumption: M2 => ; compartment*Function_for_M2_Consumption(k29, k40, M2, K_M_M2);

  // Unit definitions:
  unit volume = 1e-3 litre;
  unit time = 3600 second;
  unit substance = 1e-3 mole;
end
