// SBML level 2 version 1
// dcterms:bibliographicCitation: urn:miriam:pubmed:21772264

function Function_for_reaction_4(EpoRActJAK2, EpoRCISInh, EpoRJAK2_CIS, EpoRpJAK2, SOCS3, SOCS3Eqc, SOCS3Inh)
  3*EpoRActJAK2*EpoRpJAK2/((SOCS3Inh*SOCS3/SOCS3Eqc + 1)*(EpoRCISInh*EpoRJAK2_CIS + 1));
end

function Function_for_reaction_8(JAK2EpoRDeaSHP1, SHP1Act, init_SHP1, p2EpoRpJAK2)
  JAK2EpoRDeaSHP1*SHP1Act*p2EpoRpJAK2/init_SHP1;
end

function Function_for_reaction_3(EpoRActJAK2, EpoRpJAK2, SOCS3, SOCS3Eqc, SOCS3Inh)
  EpoRActJAK2*EpoRpJAK2/(SOCS3Inh*SOCS3/SOCS3Eqc + 1);
end

function Function_for_reaction_5(EpoRActJAK2, EpoRCISInh, EpoRJAK2_CIS, SOCS3, SOCS3Eqc, SOCS3Inh, p1EpoRpJAK2)
  3*EpoRActJAK2*p1EpoRpJAK2/((SOCS3Inh*SOCS3/SOCS3Eqc + 1)*(EpoRCISInh*EpoRJAK2_CIS + 1));
end

function Function_for_reaction_6(EpoRActJAK2, SOCS3, SOCS3Eqc, SOCS3Inh, p2EpoRpJAK2)
  EpoRActJAK2*p2EpoRpJAK2/(SOCS3Inh*SOCS3/SOCS3Eqc + 1);
end

function Function_for_reaction_9(JAK2EpoRDeaSHP1, SHP1Act, init_SHP1, p12EpoRpJAK2)
  JAK2EpoRDeaSHP1*SHP1Act*p12EpoRpJAK2/init_SHP1;
end

function Function_for_reaction_10(EpoRCISRemove, EpoRJAK2_CIS, init_EpoRJAK2, p12EpoRpJAK2, p1EpoRpJAK2)
  EpoRCISRemove*EpoRJAK2_CIS*(p12EpoRpJAK2 + p1EpoRpJAK2)/init_EpoRJAK2;
end

function Function_for_reaction_11(EpoRpJAK2, SHP1, SHP1ActEpoR, init_EpoRJAK2, p12EpoRpJAK2, p1EpoRpJAK2, p2EpoRpJAK2)
  SHP1ActEpoR*SHP1*(EpoRpJAK2 + p12EpoRpJAK2 + p1EpoRpJAK2 + p2EpoRpJAK2)/init_EpoRJAK2;
end

function Function_for_reaction_13(EpoRpJAK2, SOCS3, SOCS3Eqc, SOCS3Inh, STAT5, STAT5ActJAK2, init_EpoRJAK2, p12EpoRpJAK2, p1EpoRpJAK2, p2EpoRpJAK2)
  STAT5ActJAK2*STAT5*(EpoRpJAK2 + p12EpoRpJAK2 + p1EpoRpJAK2 + p2EpoRpJAK2)/(init_EpoRJAK2*(SOCS3Inh*SOCS3/SOCS3Eqc + 1));
end

function Function_for_reaction_1(Epo, EpoRJAK2, JAK2ActEpo, SOCS3, SOCS3Eqc, SOCS3Inh)
  JAK2ActEpo*Epo*EpoRJAK2/(SOCS3Inh*SOCS3/SOCS3Eqc + 1);
end

function Function_for_reaction_2(EpoRpJAK2, JAK2EpoRDeaSHP1, SHP1Act, init_SHP1)
  JAK2EpoRDeaSHP1*SHP1Act*EpoRpJAK2/init_SHP1;
end

function Function_for_reaction_7(JAK2EpoRDeaSHP1, SHP1Act, init_SHP1, p1EpoRpJAK2)
  JAK2EpoRDeaSHP1*SHP1Act*p1EpoRpJAK2/init_SHP1;
end

function Function_for_reaction_36(SOCS3Eqc, SOCS3EqcOE, SOCS3Turn, SOCS3oe, cyt)
  SOCS3oe*SOCS3Eqc*SOCS3Turn*SOCS3EqcOE/cyt;
end

function Function_for_reaction_34(SOCS3Eqc, SOCS3RNA, SOCS3RNAEqc, SOCS3Turn)
  SOCS3Eqc*SOCS3Turn*SOCS3RNA/SOCS3RNAEqc;
end

function Function_for_reaction_14(CIS, CISEqc, CISInh, SOCS3, SOCS3Eqc, SOCS3Inh, STAT5, STAT5ActEpoR, init_EpoRJAK2, p12EpoRpJAK2, p1EpoRpJAK2)
  STAT5ActEpoR*STAT5*(p12EpoRpJAK2 + p1EpoRpJAK2)^2/(init_EpoRJAK2^2*(CISInh*CIS/CISEqc + 1)*(SOCS3Inh*SOCS3/SOCS3Eqc + 1));
end

function Function_for_reaction_16(STAT5Exp, npSTAT5, nuc)
  STAT5Exp*npSTAT5*nuc;
end

function Function_for_reaction_17(ActD, CISRNAEqc, CISRNATurn, init_STAT5, npSTAT5, nuc)
  -(CISRNAEqc*CISRNATurn*npSTAT5*(ActD - 1)/init_STAT5*nuc)/nuc;
end

function Function_for_reaction_27(ActD, SOCS3RNAEqc, SOCS3RNATurn, init_STAT5, npSTAT5, nuc)
  -(SOCS3RNAEqc*SOCS3RNATurn*npSTAT5*(ActD - 1)/init_STAT5*nuc)/nuc;
end

function Function_for_reaction_32(SOCS3RNADelay, SOCS3nRNA5, nuc)
  SOCS3RNADelay*SOCS3nRNA5*nuc;
end

function Function_for_reaction_24(CISEqc, CISRNA, CISRNAEqc, CISTurn)
  CISEqc*CISTurn*CISRNA/CISRNAEqc;
end

function Function_for_reaction_15(STAT5Imp, cyt, pSTAT5)
  STAT5Imp*pSTAT5*cyt;
end

function Function_for_reaction_22(CISRNADelay, CISnRNA5, nuc)
  CISRNADelay*CISnRNA5*nuc;
end

function Function_for_reaction_26(CISEqc, CISEqcOE, CISTurn, CISoe, cyt)
  CISoe*CISEqc*CISTurn*CISEqcOE/cyt;
end

model jak2_stat5_feedbacks()
  // Bachmann2011 - Division of labor by dual feedback regulators controls JAK2/STAT5 signaling over broad ligand range
  // This is a dynamic pathway model examining the roles of of the two transcriptional negative feedback regulators of the suppressor of cytokine signaling (SOCS) family, CIS and SOCS3, in JAK/STAT5
  // signaling, within the context of primary erythroid progenitor cells.
  // isDescribedBy pubmed:21772264
  // biomodels.db:MODEL1911140001 biomodels.db:BIOMD0000000861
  // hasProperty GO:0038162
  // hasProperty mamo:MAMO_0000046
  // hasProperty ncit:C17557
  // hasProperty GO:0097678

  // Compartments:
  compartment cyt = 0.4;  // GO:0005829
  compartment nuc = 0.275;  // GO:0005634

  // Species:
  species EpoRJAK2 in cyt = 3.97622;  // hasPart PR:000007142; hasPart PR:000009197
  species EpoRpJAK2 in cyt = 0;  // hasPart PR:000009197; hasPart PR:000007142; hasProperty PATO:0002220
  species p1EpoRpJAK2 in cyt = 0;  // hasPart PR:000007142; hasPart PR:000009197; hasProperty PATO:0002220
  species p2EpoRpJAK2 in cyt = 0;  // hasPart PR:000009197; hasPart PR:000007142; hasProperty PATO:0002220
  species p12EpoRpJAK2 in cyt = 0;  // hasInstance PR:000007142 PATO:0002220 PR:000009197; hasPart PR:000007142; hasProperty PATO:0002220
  species EpoRJAK2_CIS in cyt = 0;  // hasPart PR:000007142; hasPart PR:000009197
  species SHP1 in cyt = 26.7251;  // PR:000013461
  species SHP1Act in cyt = 0;  // isVersionOf PR:000013461; hasProperty ncit:C64382
  species STAT5 in cyt = 79.7535;  // ncit:C28668
  species pSTAT5 in cyt = 0;  // isVersionOf ncit:C28668; hasProperty PATO:0002220
  species npSTAT5 in nuc = 0;  // isVersionOf ncit:C28668; occursIn GO:0005634; hasProperty PATO:0002220
  species CISnRNA1 in nuc = 0;  // encodes uniprot:Q9NSE2; CHEBI:33697
  species CISnRNA2 in nuc = 0;  // encodes uniprot:Q9NSE2; CHEBI:33697
  species CISnRNA3 in nuc = 0;  // encodes uniprot:Q9NSE2; CHEBI:33697
  species CISnRNA4 in nuc = 0;  // encodes uniprot:Q9NSE2; CHEBI:33697
  species CISnRNA5 in nuc = 0;  // encodes uniprot:Q9NSE2; CHEBI:33697
  species CISRNA in cyt = 0;  // encodes uniprot:Q9NSE2; CHEBI:33697
  species CIS in cyt = 0;  // uniprot:Q9NSE2
  species SOCS3nRNA1 in nuc = 0;  // encodes ncit:C97975; CHEBI:33697
  species SOCS3nRNA2 in nuc = 0;  // encodes ncit:C97975; CHEBI:33697
  species SOCS3nRNA3 in nuc = 0;  // encodes ncit:C97975; CHEBI:33697
  species SOCS3nRNA4 in nuc = 0;  // encodes ncit:C97975; CHEBI:33697
  species SOCS3nRNA5 in nuc = 0;  // encodes ncit:C97975; CHEBI:33697
  species SOCS3RNA in cyt = 0;  // CHEBI:33697
  species SOCS3 in cyt = 0;  // ncit:C97975
  species Epo in cyt = 1.24997e-7;  // PR:000007141

  // Parameters:
  ActD = 0;
  CISEqc = 432.871;
  CISEqcOE = 0.530261;
  CISInh = 784653000;
  CISRNADelay = 0.144775;
  CISRNAEqc = 1;
  CISRNATurn = 1000;
  CISTurn = 0.00839842;
  CISoe = 0;
  EpoRActJAK2 = 0.267308;
  EpoRCISInh = 1000000;
  EpoRCISRemove = 5.42932;
  JAK2ActEpo = 633253;
  JAK2EpoRDeaSHP1 = 142.722;
  SHP1ActEpoR = 0.001;
  SHP1Dea = 0.00816391;
  SOCS3Eqc = 173.653;
  SOCS3EqcOE = 0.679157;
  SOCS3Inh = 10.408;
  SOCS3RNADelay = 1.06465;
  SOCS3RNAEqc = 1;
  SOCS3RNATurn = 0.00830844;
  SOCS3Turn = 10000;
  SOCS3oe = 0;
  STAT5ActEpoR = 38.9757;
  STAT5ActJAK2 = 0.0780965;
  STAT5Exp = 0.0745155;
  STAT5Imp = 0.0268889;
  epo_level = 1.24997e-7;
  init_EpoRJAK2 = 3.97622;
  init_SHP1 = 26.7251;
  init_STAT5 = 79.7535;

  // Reactions:
  reaction_1: EpoRJAK2 => EpoRpJAK2; cyt*Function_for_reaction_1(Epo, EpoRJAK2, JAK2ActEpo, SOCS3, SOCS3Eqc, SOCS3Inh);  // modifiers: Epo, SOCS3; isVersionOf GO:0016310
  reaction_2: EpoRpJAK2 => EpoRJAK2; cyt*Function_for_reaction_2(EpoRpJAK2, JAK2EpoRDeaSHP1, SHP1Act, init_SHP1);  // modifiers: SHP1Act
  reaction_3: EpoRpJAK2 => p1EpoRpJAK2; cyt*Function_for_reaction_3(EpoRActJAK2, EpoRpJAK2, SOCS3, SOCS3Eqc, SOCS3Inh);  // modifiers: SOCS3; isVersionOf GO:0016310
  reaction_4: EpoRpJAK2 => p2EpoRpJAK2; cyt*Function_for_reaction_4(EpoRActJAK2, EpoRCISInh, EpoRJAK2_CIS, EpoRpJAK2, SOCS3, SOCS3Eqc, SOCS3Inh);  // modifiers: EpoRJAK2_CIS, SOCS3; isVersionOf GO:0016310
  reaction_5: p1EpoRpJAK2 => p12EpoRpJAK2; cyt*Function_for_reaction_5(EpoRActJAK2, EpoRCISInh, EpoRJAK2_CIS, SOCS3, SOCS3Eqc, SOCS3Inh, p1EpoRpJAK2);  // modifiers: EpoRJAK2_CIS, SOCS3; isVersionOf GO:0016310
  reaction_6: p2EpoRpJAK2 => p12EpoRpJAK2; cyt*Function_for_reaction_6(EpoRActJAK2, SOCS3, SOCS3Eqc, SOCS3Inh, p2EpoRpJAK2);  // modifiers: SOCS3; isVersionOf GO:0016310
  reaction_7: p1EpoRpJAK2 => EpoRJAK2; cyt*Function_for_reaction_7(JAK2EpoRDeaSHP1, SHP1Act, init_SHP1, p1EpoRpJAK2);  // modifiers: SHP1Act
  reaction_8: p2EpoRpJAK2 => EpoRJAK2; cyt*Function_for_reaction_8(JAK2EpoRDeaSHP1, SHP1Act, init_SHP1, p2EpoRpJAK2);  // modifiers: SHP1Act
  reaction_9: p12EpoRpJAK2 => EpoRJAK2; cyt*Function_for_reaction_9(JAK2EpoRDeaSHP1, SHP1Act, init_SHP1, p12EpoRpJAK2);  // modifiers: SHP1Act
  reaction_10: EpoRJAK2_CIS => ; cyt*Function_for_reaction_10(EpoRCISRemove, EpoRJAK2_CIS, init_EpoRJAK2, p12EpoRpJAK2, p1EpoRpJAK2);  // modifiers: p12EpoRpJAK2, p1EpoRpJAK2
  reaction_11: SHP1 => SHP1Act; cyt*Function_for_reaction_11(EpoRpJAK2, SHP1, SHP1ActEpoR, init_EpoRJAK2, p12EpoRpJAK2, p1EpoRpJAK2, p2EpoRpJAK2);  // modifiers: EpoRpJAK2, p12EpoRpJAK2, p1EpoRpJAK2, p2EpoRpJAK2
  reaction_12: SHP1Act => SHP1; cyt*SHP1Dea*SHP1Act;  // isVersionOf GO:0016310
  reaction_13: STAT5 => pSTAT5; cyt*Function_for_reaction_13(EpoRpJAK2, SOCS3, SOCS3Eqc, SOCS3Inh, STAT5, STAT5ActJAK2, init_EpoRJAK2, p12EpoRpJAK2, p1EpoRpJAK2, p2EpoRpJAK2);  // modifiers: EpoRpJAK2, SOCS3, p12EpoRpJAK2, p1EpoRpJAK2, p2EpoRpJAK2; isVersionOf GO:0016310
  reaction_14: STAT5 => pSTAT5; cyt*Function_for_reaction_14(CIS, CISEqc, CISInh, SOCS3, SOCS3Eqc, SOCS3Inh, STAT5, STAT5ActEpoR, init_EpoRJAK2, p12EpoRpJAK2, p1EpoRpJAK2);  // modifiers: CIS, SOCS3, p12EpoRpJAK2, p1EpoRpJAK2; isVersionOf GO:0016310
  reaction_15: pSTAT5 => npSTAT5; Function_for_reaction_15(STAT5Imp, cyt, pSTAT5);  // ncit:C28506
  reaction_16: npSTAT5 => STAT5; Function_for_reaction_16(STAT5Exp, npSTAT5, nuc);
  reaction_17: -> CISnRNA1; nuc*Function_for_reaction_17(ActD, CISRNAEqc, CISRNATurn, init_STAT5, npSTAT5, nuc);  // modifiers: npSTAT5
  reaction_18: CISnRNA1 => CISnRNA2; nuc*CISRNADelay*CISnRNA1;  // isVersionOf ncit:C17019
  reaction_19: CISnRNA2 => CISnRNA3; nuc*CISRNADelay*CISnRNA2;  // isVersionOf ncit:C17019
  reaction_20: CISnRNA3 => CISnRNA4; nuc*CISRNADelay*CISnRNA3;  // isVersionOf ncit:C17019
  reaction_21: CISnRNA4 => CISnRNA5; nuc*CISRNADelay*CISnRNA4;  // isVersionOf ncit:C17019
  reaction_22: CISnRNA5 => CISRNA; Function_for_reaction_22(CISRNADelay, CISnRNA5, nuc);  // isVersionOf ncit:C17019
  reaction_23: CISRNA => ; cyt*CISRNATurn*CISRNA;
  reaction_24: => CIS; cyt*Function_for_reaction_24(CISEqc, CISRNA, CISRNAEqc, CISTurn);  // modifiers: CISRNA
  reaction_25: CIS => ; cyt*CISTurn*CIS;
  reaction_26: => CIS; cyt*Function_for_reaction_26(CISEqc, CISEqcOE, CISTurn, CISoe, cyt);  // isVersionOf ncit:C25513
  reaction_27: -> SOCS3nRNA1; nuc*Function_for_reaction_27(ActD, SOCS3RNAEqc, SOCS3RNATurn, init_STAT5, npSTAT5, nuc);  // modifiers: npSTAT5
  reaction_28: SOCS3nRNA1 => SOCS3nRNA2; nuc*SOCS3RNADelay*SOCS3nRNA1;  // isVersionOf ncit:C17019
  reaction_29: SOCS3nRNA2 => SOCS3nRNA3; nuc*SOCS3RNADelay*SOCS3nRNA2;  // isVersionOf ncit:C17019
  reaction_30: SOCS3nRNA3 => SOCS3nRNA4; nuc*SOCS3RNADelay*SOCS3nRNA3;  // isVersionOf ncit:C17019
  reaction_31: SOCS3nRNA4 => SOCS3nRNA5; nuc*SOCS3RNADelay*SOCS3nRNA4;  // isVersionOf ncit:C17019
  reaction_32: SOCS3nRNA5 => SOCS3RNA; Function_for_reaction_32(SOCS3RNADelay, SOCS3nRNA5, nuc);  // isVersionOf ncit:C17019
  reaction_33: SOCS3RNA => ; cyt*SOCS3RNATurn*SOCS3RNA;
  reaction_34: => SOCS3; cyt*Function_for_reaction_34(SOCS3Eqc, SOCS3RNA, SOCS3RNAEqc, SOCS3Turn);  // modifiers: SOCS3RNA; isVersionOf ncit:C25513
  reaction_35: SOCS3 => ; cyt*SOCS3Turn*SOCS3;
  reaction_36: => SOCS3; cyt*Function_for_reaction_36(SOCS3Eqc, SOCS3EqcOE, SOCS3Turn, SOCS3oe, cyt);  // isVersionOf ncit:C25513

  // Unit definitions:
  unit time = 60 second;
  unit substance = 1e-9 mole;
end
