// SBML level 2 version 4
// dcterms:bibliographicCitation: urn:miriam:pubmed:29486799

function Function_for_Tumor_DSB_Formation(alpha, radiation_Dose, tau, delta, U, TV)
  TV*(alpha*radiation_Dose + 0.2*alpha/(tau*delta^2)*U^2);
end

function Function_for_Tumor_Growth(r, TV, TVmax)
  r*TV*(1 - TV/TVmax);
end

function Function_for_Tumor_Elimination(paramE, dTeff, d0, TV)
  (paramE*dTeff + d0)*TV;
end

function Function_for_NonDiff_T_Cells_Influx(kLN, mu, TVd, TV, n_e, dTeff, d0, Ktcd, S_L)
  kLN*((mu*(TVd/(TV + TVd)) + n_e*dTeff + d0)^2/((mu*(TVd/(TV + TVd)) + n_e*dTeff + d0)^2 + Ktcd^2)*(TV + TVd)/((mu*(TVd/(TV + TVd)) + n_e*dTeff + d0)^2/((mu*(TVd/(TV + TVd)) + n_e*dTeff + d0)^2 + Ktcd^2)*(TV + TVd) + S_L));
end

function Function_for_NonDiff_T_Cells_Immune_Activation_Rate(PDL1, mAb, K_D, mu, TVd, TV, n_e, dTeff, d0, Ktcd, S_R, nTeff, kpro, kdif)
  (1 - PDL1/(1 + mAb/K_D))*(1 - (mu*(TVd/(TV + TVd)) + n_e*dTeff + d0)^2/((mu*(TVd/(TV + TVd)) + n_e*dTeff + d0)^2 + Ktcd^2)*(TV + TVd)/((mu*(TVd/(TV + TVd)) + n_e*dTeff + d0)^2/((mu*(TVd/(TV + TVd)) + n_e*dTeff + d0)^2 + Ktcd^2)*(TV + TVd) + S_R))*nTeff*(kpro - kdif);
end

function Function_for_DSB_Formation(rad, delta)
  rad*delta;
end

function Function_for_PDL1_Production(kpdl, dTeff, Kpdl)
  kpdl*(dTeff/(Kpdl + dTeff));
end

function Function_for_Diff_T_Cells_Immune_Activation_Rate(PDL1, mAb, K_D, mu, TVd, TV, n_e, dTeff, d0, Ktcd, S_R, kdif, nTeff)
  (1 - PDL1/(1 + mAb/K_D))*(1 - (mu*(TVd/(TV + TVd)) + n_e*dTeff + d0)^2/((mu*(TVd/(TV + TVd)) + n_e*dTeff + d0)^2 + Ktcd^2)*(TV + TVd)/((mu*(TVd/(TV + TVd)) + n_e*dTeff + d0)^2/((mu*(TVd/(TV + TVd)) + n_e*dTeff + d0)^2 + Ktcd^2)*(TV + TVd) + S_R))*nTeff*kdif;
end

model New_Model()
  // Kosinsky2018 - Radiation and PD-(L)1 treatment combinations
  // This is a quantitative systems pharmacology (QSP) model that describes key elements of the cancer immunity cycle and the tumor microenvironment, tumor growth, as well as dose-exposure-target modulation features. The model describes the synergistic kinetic effects underlying immune cell interactions as linked to tumor size modulation under immunotherapeutic and radiological treatments.
  // isDescribedBy pubmed:29486799
  // biomodels.db:MODEL1911140003 biomodels.db:BIOMD0000000863
  // isVersionOf ncit:C15313
  // hasProperty mamo:MAMO_0000046
  // hasTaxon taxonomy:10090

  // Compartments:
  compartment compartment = 1;

  // Species:
  species TV in compartment = 15;  // isVersionOf ncit:C94515
  species U in compartment = 0; U is "DSB";  // isVersionOf ncit:C25832
  species nTeff in compartment = 0; nTeff is "TC_ND";  // isVersionOf CL:0002420
  species dTeff in compartment = 0; dTeff is "TC_D";  // isVersionOf CL:0000911
  species PDL1 in compartment = 0;  // isVersionOf ncit:C96024
  species TVd in compartment = 0; TVd is "TVD";  // hasPart ncit:C25832; isVersionOf ncit:C94515

  // Parameters:
  r = 0.4 unit_0;
  TVmax = 2500 unit_1;
  d0 = 0.01 unit_0;
  kLN = 279 unit_0;
  S_L = 8.89;
  omegaSL = 0.696;
  kpro = 3 unit_0;
  kdif = 3.2 unit_0;
  k_el = 0.2 unit_0;
  kapo = 2 unit_0;
  n_e = 0.001 unit_0;
  Kpdl = 478;
  kpdl = 1 unit_0;
  Ktcd = 0.2 unit_0;
  S_R = 30.5;
  alpha = 0.146;
  delta = 19;
  tau = 0.02 unit_2;
  k_a = 0 unit_0;
  V_d = 0.003 unit_3;
  k_el_mAB = 0.15 unit_0;
  K_D = 30 unit_4;
  a = 21.2;
  b = 0.176;
  mu = 0.1725 unit_0;
  mAb = 0;

  // Assignment rules:
  radiation_Dose := 0;

  // Reactions:
  Tumor_Growth: => TV; compartment*Function_for_Tumor_Growth(r, TV, TVmax);
  Tumor_DSB_Formation: TV => TVd; compartment*Function_for_Tumor_DSB_Formation(alpha, radiation_Dose, tau, delta, U, TV);  // modifiers: U; isVersionOf ncit:C25832
  Tumor_DSB_Repair: TVd => ; compartment*mu*TVd;  // isVersionOf GO:0006302
  Tumor_Elimination: TV => ; compartment*Function_for_Tumor_Elimination(n_e, dTeff, d0, TV);  // modifiers: dTeff
  DSB_Formation: => U; compartment*Function_for_DSB_Formation(radiation_Dose, delta);  // isVersionOf ncit:C25832
  DSB_Repair: U => ; compartment*tau*U;  // isVersionOf GO:0006302
  NonDiff_T_Cells_Influx: => nTeff; compartment*Function_for_NonDiff_T_Cells_Influx(kLN, mu, TVd, TV, n_e, dTeff, d0, Ktcd, S_L);  // modifiers: TVd, TV, dTeff; isVersionOf GO:0072683
  NonDiff_T_Cells_Activation: => nTeff; compartment*Function_for_NonDiff_T_Cells_Immune_Activation_Rate(PDL1, mAb, K_D, mu, TVd, TV, n_e, dTeff, d0, Ktcd, S_R, nTeff, kpro, kdif);  // modifiers: PDL1, TVd, TV, dTeff; isVersionOf GO:0042110
  NonDiff_T_Cells_Elimination: nTeff => ; compartment*k_el*nTeff;  // isVersionOf GO:0008219
  Diff_T_Cells_Activation: => dTeff; compartment*Function_for_Diff_T_Cells_Immune_Activation_Rate(PDL1, mAb, K_D, mu, TVd, TV, n_e, dTeff, d0, Ktcd, S_R, kdif, nTeff);  // modifiers: PDL1, TVd, TV, nTeff; isVersionOf GO:0042110
  Diff_T_Cells_Apoptosis: dTeff => ; compartment*kapo*dTeff;  // isVersionOf GO:0070231
  PDL1_Production: => PDL1; compartment*Function_for_PDL1_Production(kpdl, dTeff, Kpdl);  // modifiers: dTeff; isVersionOf GO:0006412
  PDL1_Breakdown: PDL1 => ; compartment*kpdl*PDL1;  // isVersionOf GO:0030163

  // Unit definitions:
  unit volume = 1e-3 litre;
  unit time = 86400 second;
  unit substance = 1e-9 mole;
  unit unit_0 = 1 / (8640 second); unit_0 is "1/d";
  unit unit_1 = (1e-9 dimensionless)^0 * metre^3; unit_1 is "ul";
  unit unit_2 = 8640 second; unit_2 is "d";
  unit unit_3 = litre; unit_3 is "l";
  unit unit_4 = 1e-9 mole / litre; unit_4 is "nmol/l";
end
