// SBML level 2 version 4
// dcterms:bibliographicCitation: urn:miriam:pubmed:30745900

function Function_for_Bcl6_Production(a_c, U, n_c, A_c, M_c, r_c, B, I, C)
  a_c*U^n_c/(A_c^n_c + U^n_c)*(M_c^r_c/(M_c^r_c + B^r_c + I^r_c + C^r_c));
end

function Function_for_IRF4_Production(Phi_L_P, sigma_i, a_i, U, n_i, A_i, k_i, B, m_i, K_i, I, s_i, Q_i, q_i)
  Phi_L_P*(sigma_i + a_i*U^n_i/(A_i^n_i + U^n_i) + k_i*B^m_i/(K_i^m_i + B^m_i) + q_i*I^s_i/(Q_i^s_i + I^s_i));
end

function Function_for_PD1_Production(sigma_p, a_p, U, n_p, A_p, M_p, r_p, B)
  (sigma_p + a_p*U^n_p/(A_p^n_p + U^n_p))*(M_p^r_p/(M_p^r_p + B^r_p));
end

function Function_for_Blimp1_Production(a_b, U, n_b, A_b, k_b, I, m_b, K_b, r_b, M_b, C)
  (a_b*U^n_b/(A_b^n_b + U^n_b) + k_b*I^m_b/(K_b^m_b + I^m_b))*(M_b^r_b/(M_b^r_b + C^r_b));
end

model Nikolaev2019___Immunobiochemical_reconstruction_of_influenza_lung_infection_melanoma_skin_cancer_interactions()
  // Nikolaev2019 - Immunobiochemical reconstruction of influenza lung infection-melanoma skin cancer interactions
  // This is a mathematical mechanistic immunobiochemical model that incorporates T cell pathways that control programmed cell death protein 1 (PD-1) expression. A core component of the model is a kinetic
  // motif, termed a PD-1 Double Incoherent Feed-Forward Loop (DIFFL), which reflects known interactions between IRF4, Blimp-1, and Bcl-6.
  // isDescribedBy pubmed:30745900
  // biomodels.db:MODEL1911180001 biomodels.db:BIOMD0000000865
  // hasProperty mamo:MAMO_0000046
  // hasProperty ncit:C94697
  // hasProperty ncit:C3224
  // hasProperty ncit:C53482

  // Compartments:
  compartment compartment = 1;  // isVersionOf BTO:0000763

  // Species:
  species C in compartment = 1;  // ncit:C26149
  species P in compartment = 1;  // PR:000001919
  species I in compartment = 1;  // ncit:C17926
  species B in compartment = 1;  // PR:000001831

  // Parameters:
  sigma_i = 0.3;
  sigma_p = 0.1;
  a_c = 0.75;
  a_p = 0.75;
  a_i = 75;
  a_b = 100;
  A_c = 0.01;
  A_p = 0.1;
  A_i = 1;
  A_b = 10;
  n_c = 3;
  n_p = 3;
  n_b = 2;
  n_i = 2;
  k_b = 25;
  k_i = 7.5;
  q_i = 7.5;
  K_b = 1;
  K_i = 1;
  Q_i = 1;
  m_b = 2;
  m_i = 2;
  s_i = 2;
  M_b = 10;
  M_c = 10;
  M_p = 10;
  H_p = 0.1;
  H_L = 0.1;
  r_b = 2;
  r_c = 2;
  r_p = 4;
  h_L = 4;
  mu_c = 0.1;
  mu_p = 0.1;
  mu_b = 1;
  mu_i = 1;
  L = 0;
  K_i_nu = 0.001;
  K_p = 0.01;
  gamma_y = 500;
  gamma_p = 500;
  delta = 5000;
  theta = 50000;
  lambda = 10000;
  alpha = 0.0001;
  kappa = 1;
  k_T = 0.5;
  K_T = 1;
  n_T = 2;
  T = 0;

  // Assignment rules:
  sigma_p_tilde := sigma_p + k_T*T^n_T/(K_T^n_T + T^n_T);
  phi_L_P := H_p/(H_p + L*P);
  c_T_a_k := 0.5*(1 + alpha + kappa - ((1 + alpha + kappa)^2 - 4*alpha)^0.5);
  nu_k := K_p/(kappa + K_i_nu)*(kappa/(kappa + K_p));
  y_a_k := (1 + lambda*nu_k*c_T_a_k)/(1 + gamma_y + lambda*nu_k*c_T_a_k);
  mu_a_k := (1 + delta*y_a_k)/(1 + gamma_p + theta*nu_k*c_T_a_k + delta*y_a_k);
  U_a_k_P := mu_a_k*phi_L_P;
  Phi_L_P := H_L^h_L/(H_L^h_L + (L*P)^h_L);

  // Reactions:
  Bcl6_Production: => C; compartment*Function_for_Bcl6_Production(a_c, U_a_k_P, n_c, A_c, M_c, r_c, B, I, C);  // modifiers: B, I; isVersionOf ncit:C112927; hasProperty ncit:C19060
  Bcl6_Degradation: C => ; compartment*mu_c*C;
  PD1_Production: => P; compartment*Function_for_PD1_Production(sigma_p_tilde, a_p, U_a_k_P, n_p, A_p, M_p, r_p, B);  // modifiers: B; isVersionOf ncit:C112927; hasProperty ncit:C19060
  PD1_Degradation: P => ; compartment*mu_p*P;
  IRF4_Production: => I; compartment*Function_for_IRF4_Production(Phi_L_P, sigma_i, a_i, U_a_k_P, n_i, A_i, k_i, B, m_i, K_i, I, s_i, Q_i, q_i);  // modifiers: B; isVersionOf ncit:C112927; hasProperty ncit:C19060
  IRF4_Degradation: I => ; compartment*mu_i*I;
  Blimp1_Degradation: B => ; compartment*mu_b*B;
  Blimp1_Production: => B; compartment*Function_for_Blimp1_Production(a_b, U_a_k_P, n_b, A_b, k_b, I, m_b, K_b, r_b, M_b, C);  // modifiers: I, C; isVersionOf ncit:C112927; hasProperty ncit:C19060

  // Unit definitions:
  unit volume = 1e-3 litre;
  unit time = 86400 second;
  unit substance = item;
end
