// SBML level 2 version 4

function MM_Kcat(E, kcat, S, Km)
  E*kcat*S/(Km + S);
end

model New_Model()
  // NIK-dependent p100 processing into p52, Michaelis-Menten, SBML 2v4
  // This model represents NIK-dependent p100 processing into p52 with Michaelis-Menten kinetics. While this model shows identical dose-response to the mass action representation, when IkBd degradation is included the dose-response is no-longer monotonic in mass action models due to substrate complex competition.

  // Compartments:
  compartment compartment = 1;

  // Species:
  species $p100t in compartment = 2.5;  // ensembl:ENSG00000077150
  species p100 in compartment = 0;  // uniprot:Q00653
  species p52 in compartment = 0;  // uniprot:Q00653
  species NIK in compartment = 10;  // uniprot:Q99558

  // Reactions:
  p100_mRNA_Expressions: $p100t => p100; compartment*p100_mRNA_Expressions_k1*p100t;
    p100_mRNA_Expressions_k1 = 0.2;
  p100_processing: p100 => p52; compartment*MM_Kcat(NIK, kcat, p100, Km);  // modifiers: NIK
    kcat = 0.05; Km = 10;
  p52_degradation: p52 => ; compartment*p52_degradation_k1*p52;
    p52_degradation_k1 = 0.00038;
  p100_degradation: p100 => ; compartment*p100_degradation_k1*p100;
    p100_degradation_k1 = 0.00038;

  // Unit definitions:
  unit volume = 1e-3 litre;
  unit substance = 1e-9 mole;
end
