// SBML level 2 version 4
// dcterms:bibliographicCitation: urn:miriam:pubmed:31681292

function Constant_flux__irreversible(v)
  v;
end
Constant_flux__irreversible is "Constant flux (irreversible)";

function Function_for_STAT3_Activation(a8, k8, y3, k6, rho4, D, y1, rho3, S3)
  (a8 + k8*y3 + k6*(1 - rho4*D)*y1)*(1 - rho3*S3);
end

function Function_for_AKT_Activation_STAT3(kS, y8, n2, xi28)
  kS*y8^n2/(xi28^n2 + y8^n2);
end

function Function_for_mTOR_Activation(a3, k2, y2, alpha1, alpha2, y6, R)
  (a3 + k2*y2)*alpha1*(1 - R)/(alpha2*y6);
end

function Function_for_HIF_1a_Hydroxylation_PHD(k13, K_O2, y4, delta, y6, a11, xi44, rho6, D)
  k13*K_O2*y4*(delta*y6 + a11)*(1 - rho6*D)/(xi44 + y4);
end
Function_for_HIF_1a_Hydroxylation_PHD is "Function_for_HIF-1a_Hydroxylation_PHD";

function Function_for_AKT_Activation_IL_15(k1, y1)
  k1*y1;
end
Function_for_AKT_Activation_IL_15 is "Function_for_AKT_Activation_IL-15";

function Function_for_HIF_1a_Hydroxylation_FIH(k10, K_O2, phi, y4, xi4, rho6, D)
  k10*K_O2*phi*y4*(1 - rho6*D)/(xi4 + y4);
end
Function_for_HIF_1a_Hydroxylation_FIH is "Function_for_HIF-1a_Hydroxylation_FIH";

function Function_for_HIF_1a_aOH_Hydroxylation_PHD(k12, K_O2, y10, delta, y6, a11, xi10)
  k12*K_O2*y10*(delta*y6 + a11)/(xi10 + y10);
end
Function_for_HIF_1a_aOH_Hydroxylation_PHD is "Function_for_HIF-1a-aOH_Hydroxylation_PHD";

model Coulibaly2019___Interleukin_15_Signaling_in_HIF_1a_Regulation_in_Natural_Killer_Cells()
  // Coulibaly2019 - Interleukin-15 Signaling in HIF-1a Regulation in Natural Killer Cells
  // This is a mathematical model comprised of non-linear ordinary differential equations describing the dynamic relationship between hypoxia-inducible factor-1 alpha (HIF-1a) mRNA, HIF-1a protein, and
  // interleukin-15-mediated upstream signalling events in natural killer cells from human blood. Regulatory expressions are also included for mammalian target of rapamycin (mTOR), nuclear factor-kappa
  // beta, and signal transducer and activator of transcription 3 (STAT3).
  // isDescribedBy pubmed:31681292
  // biomodels.db:MODEL1911180002 biomodels.db:BIOMD0000000867
  // hasProperty ncit:C17380
  // hasProperty ncit:C12536
  // hasProperty mamo:MAMO_0000046
  // hasProperty ncit:C20214

  // Compartments:
  compartment compartment = 1;  // CL:0000623

  // Species:
  species y1_IL_15 in compartment = 1; y1_IL_15 is "y1_IL-15";  // ncit:C20517
  species y2_Akt in compartment = 1;  // ncit:C41625
  species y3_mTOR in compartment = 1;  // PR:000003041
  species y4_HIF_1a in compartment = 0.05; y4_HIF_1a is "y4_HIF-1a";  // ncit:C20214
  species y5_HIF_1b in compartment = 1; y5_HIF_1b is "y5_HIF-1b";  // ncit:C28553
  species y6_HIF_1_Complex in compartment = 0.05; y6_HIF_1_Complex is "y6_HIF-1_Complex";  // hasPart ncit:C28553; hasPart ncit:C20214; isVersionOf ncit:C19398
  species y7_NF_KB in compartment = 1; y7_NF_KB is "y7_NF-KB";  // ncit:C17380
  species y8_STAT3 in compartment = 1;  // ncit:C28664
  species y9_HIF_1a_mRNA in compartment = 1; y9_HIF_1a_mRNA is "y9_HIF-1a_mRNA";  // encodes ncit:C20214; ncit:C813
  species y10_HIF_1a_aOH in compartment = 0.9; y10_HIF_1a_aOH is "y10_HIF-1a-aOH";  // isVersionOf ncit:C20214; hasProperty MOD:00677

  // Parameters:
  a1 = 0;
  a2 = 0.848;
  a3 = 0.037;
  a7 = 0;
  a8 = 0;
  a9 = 0;
  a11 = 4.17;
  rho6 = 0.99;
  K_O2 = 0.96;
  k1 = 2e-5;
  k2 = 0.307;
  k5 = 75.895;
  k10 = 421.353;
  k11 = 0.211;
  k12 = 0.061;
  k15 = 0.088;
  kS = 0.0009;
  n2 = 2;
  xi28 = 38.44;
  delta = 200;
  xi4 = 15.018;
  xi44 = 128.022;
  a5 = 0.211;
  d1 = 0.062;
  d2 = 0.848;
  d3 = 0.919;
  d4 = 0.623;
  d5 = 0.196;
  d6 = 0.301;
  d7 = 0.914;
  d9 = 0.934;
  d10 = 0.935;
  rho3 = 1;
  rho4 = 0.863;
  k3 = 0.181;
  k4 = 76.196;
  k6 = 25.001;
  k7 = 2.903;
  k8 = 0.577;
  k9 = 0.753;
  k13 = 12.152;
  k14 = 16.528;
  kalpha = 1.034;
  xi10 = 8.127;
  phi = 0.829;
  alpha1 = 1.163;
  alpha2 = 0.386;
  var IL_15_Fold_Change; IL_15_Fold_Change is "IL-15_Fold_Change";
  D = 1;
  R = 0;
  S3 = 0;
  var HIF_1a_Total_Fold_Change; HIF_1a_Total_Fold_Change is "HIF-1a_Total_Fold_Change";
  Initial_for_y10_HIF_1a_aOH = y10_HIF_1a_aOH; Initial_for_y10_HIF_1a_aOH is "Initial for y10_HIF-1a-aOH";
  Initial_for_y1_IL_15 = y1_IL_15; Initial_for_y1_IL_15 is "Initial for y1_IL-15";
  Initial_for_y4_HIF_1a = y4_HIF_1a; Initial_for_y4_HIF_1a is "Initial for y4_HIF-1a";
  Initial_for_y6_HIF_1_Complex = y6_HIF_1_Complex; Initial_for_y6_HIF_1_Complex is "Initial for y6_HIF-1_Complex";

  // Assignment rules:
  d8 := k8;
  IL_15_Fold_Change := y1_IL_15/Initial_for_y1_IL_15;
  HIF_1a_Total_Fold_Change := (y4_HIF_1a + y6_HIF_1_Complex + y10_HIF_1a_aOH)/(Initial_for_y4_HIF_1a + Initial_for_y6_HIF_1_Complex + Initial_for_y10_HIF_1a_aOH);

  // Reactions:
  IL_15_External_Regulation: => y1_IL_15; compartment*Constant_flux__irreversible(a1); IL_15_External_Regulation is "IL-15_External_Regulation";
  IL_15_Basal_Decay: y1_IL_15 => ; compartment*d1*y1_IL_15; IL_15_Basal_Decay is "IL-15_Basal_Decay";
  AKT_Basal_Activation: => y2_Akt; compartment*Constant_flux__irreversible(a2);  // isVersionOf ncit:C64382
  AKT_Activation_IL_15: => y2_Akt; compartment*Function_for_AKT_Activation_IL_15(k1, y1_IL_15); AKT_Activation_IL_15 is "AKT_Activation_IL-15";  // modifiers: y1_IL_15; isVersionOf ncit:C64382; hasProperty ncit:C20517
  AKT_Activation_STAT3: => y2_Akt; compartment*Function_for_AKT_Activation_STAT3(kS, y8_STAT3, n2, xi28);  // modifiers: y8_STAT3; isVersionOf ncit:C64382; hasProperty ncit:C28664
  AKT_Decay: y2_Akt => ; compartment*d2*y2_Akt;
  mTOR_Activation: => y3_mTOR; compartment*Function_for_mTOR_Activation(a3, k2, y2_Akt, alpha1, alpha2, y6_HIF_1_Complex, R);  // modifiers: y2_Akt, y6_HIF_1_Complex; isVersionOf ncit:C64382
  mTOR_Decay: y3_mTOR => ; compartment*d3*y3_mTOR;
  STAT3_Decay: y8_STAT3 => ; compartment*d8*y8_STAT3;
  NF_KB_Basal_Activation: => y7_NF_KB; compartment*Constant_flux__irreversible(a7); NF_KB_Basal_Activation is "NF-KB_Basal_Activation";  // isVersionOf ncit:C64382
  NF_KB_Decay: y7_NF_KB => ; compartment*d7*y7_NF_KB; NF_KB_Decay is "NF-KB_Decay";
  NF_KB_Activation_IL_15: => y7_NF_KB; compartment*Function_for_AKT_Activation_IL_15(k7, y1_IL_15); NF_KB_Activation_IL_15 is "NF-KB_Activation_IL-15";  // modifiers: y1_IL_15; isVersionOf ncit:C64382; hasProperty ncit:C20517
  NF_KB_Activation_mTOR: => y7_NF_KB; compartment*Function_for_AKT_Activation_IL_15(k15, y3_mTOR); NF_KB_Activation_mTOR is "NF-KB_Activation_mTOR";  // modifiers: y3_mTOR; isVersionOf ncit:C64382
  NF_KB_Activation_HIF_1_Complex: => y7_NF_KB; compartment*Function_for_AKT_Activation_IL_15(k14, y6_HIF_1_Complex); NF_KB_Activation_HIF_1_Complex is "NF-KB_Activation_HIF-1_Complex";  // modifiers: y6_HIF_1_Complex; isVersionOf ncit:C64382
  HIF_1a_mRNA_Synthesis_Basal: => y9_HIF_1a_mRNA; compartment*Constant_flux__irreversible(a9); HIF_1a_mRNA_Synthesis_Basal is "HIF-1a_mRNA_Synthesis_Basal";
  HIF_1a_mRNA_Degradation: y9_HIF_1a_mRNA => ; compartment*d9*y9_HIF_1a_mRNA; HIF_1a_mRNA_Degradation is "HIF-1a_mRNA_Degradation";
  HIF_1a_mRNA_Regulation_NF_KB: => y9_HIF_1a_mRNA; compartment*Function_for_AKT_Activation_IL_15(k9, y7_NF_KB); HIF_1a_mRNA_Regulation_NF_KB is "HIF-1a_mRNA_Regulation_NF-KB";  // modifiers: y7_NF_KB; isVersionOf ncit:C64382
  HIF_1a_mRNA_Regulation_STAT3: => y9_HIF_1a_mRNA; compartment*Function_for_AKT_Activation_IL_15(k3, y8_STAT3); HIF_1a_mRNA_Regulation_STAT3 is "HIF-1a_mRNA_Regulation_STAT3";  // modifiers: y8_STAT3; isVersionOf ncit:C64382; hasProperty ncit:C28664
  HIF_1a_Translation: => y4_HIF_1a; compartment*Function_for_AKT_Activation_IL_15(kalpha, y9_HIF_1a_mRNA); HIF_1a_Translation is "HIF-1a_Translation";  // modifiers: y9_HIF_1a_mRNA
  HIF_1a_Decay: y4_HIF_1a => ; compartment*d4*y4_HIF_1a; HIF_1a_Decay is "HIF-1a_Decay";
  HIF_1a_Association_HIF_1b: y4_HIF_1a + y5_HIF_1b => y6_HIF_1_Complex; compartment*k4*y4_HIF_1a*y5_HIF_1b; HIF_1a_Association_HIF_1b is "HIF-1a_Association_HIF-1b";
  HIF_1_Complex_Dissociation: y6_HIF_1_Complex => y4_HIF_1a + y5_HIF_1b; compartment*k5*y6_HIF_1_Complex; HIF_1_Complex_Dissociation is "HIF-1_Complex_Dissociation";
  HIF_1a_Hydroxylation_PHD: y4_HIF_1a => ; compartment*Function_for_HIF_1a_Hydroxylation_PHD(k13, K_O2, y4_HIF_1a, delta, y6_HIF_1_Complex, a11, xi44, rho6, D); HIF_1a_Hydroxylation_PHD is "HIF-1a_Hydroxylation_PHD";  // modifiers: y6_HIF_1_Complex; ncit:C157205
  HIF_1a_Hydroxylation_FIH: y4_HIF_1a => y10_HIF_1a_aOH; compartment*Function_for_HIF_1a_Hydroxylation_FIH(k10, K_O2, phi, y4_HIF_1a, xi4, rho6, D); HIF_1a_Hydroxylation_FIH is "HIF-1a_Hydroxylation_FIH";  // ncit:C157205
  HIF_1a_aOH_Dehydroxylation: y10_HIF_1a_aOH => y4_HIF_1a; compartment*k11*y10_HIF_1a_aOH; HIF_1a_aOH_Dehydroxylation is "HIF-1a-aOH_Dehydroxylation";  // hasProperty ncit:C64914; hasProperty ncit:C64370
  HIF_1a_aOH_Hydroxylation_PHD: y10_HIF_1a_aOH => ; compartment*Function_for_HIF_1a_aOH_Hydroxylation_PHD(k12, K_O2, y10_HIF_1a_aOH, delta, y6_HIF_1_Complex, a11, xi10); HIF_1a_aOH_Hydroxylation_PHD is "HIF-1a-aOH_Hydroxylation_PHD";  // modifiers: y6_HIF_1_Complex; ncit:C157205
  HIF_1a_aOH_Decay: y10_HIF_1a_aOH => ; compartment*d10*y10_HIF_1a_aOH; HIF_1a_aOH_Decay is "HIF-1a-aOH_Decay";
  HIF_1b_Expression_Constitutive: => y5_HIF_1b; compartment*Constant_flux__irreversible(a5); HIF_1b_Expression_Constitutive is "HIF-1b_Expression_Constitutive";
  HIF_1b_Decay: y5_HIF_1b => ; compartment*d5*y5_HIF_1b; HIF_1b_Decay is "HIF-1b_Decay";
  HIF_1_Complex_Decay: y6_HIF_1_Complex => ; compartment*d6*y6_HIF_1_Complex; HIF_1_Complex_Decay is "HIF-1_Complex_Decay";
  STAT3_Activation: => y8_STAT3; compartment*Function_for_STAT3_Activation(a8, k8, y3_mTOR, k6, rho4, D, y1_IL_15, rho3, S3);  // modifiers: y3_mTOR, y1_IL_15; isVersionOf ncit:C64382

  // Unit definitions:
  unit time = 3600 second;
  unit substance = 1e-9 mole;
end
