// SBML level 2 version 4

model New_Model()
  // NIK-dependent p100 processing into p52 and IkBd degradation, mass action, SBML 2v4
  // This model represents NIK-dependent p100 processing into p52 and NIK-dependent IkBd degradation with mass action kinetics. Compare this mass action representation to the Michaelis-Menten model. In this model the dose-response to increasing p100 mRNA is not monotonic due to substrate complex competition.

  // Compartments:
  compartment compartment = 1;

  // Species:
  species $p100t in compartment = 2.5;  // ensembl:ENSG00000077150
  species p100 in compartment = 0;  // uniprot:Q00653
  species p52 in compartment = 0;  // uniprot:Q00653
  species NIK in compartment = 10;  // uniprot:Q99558
  species IkBd in compartment = 0;  // hasPart uniprot:Q00653
  species IkBd_NIK in compartment = 0; IkBd_NIK is "IkBd:NIK";  // hasPart uniprot:Q00653; hasPart uniprot:Q99558
  species p100_NIK in compartment = 0; p100_NIK is "p100:NIK";  // hasPart uniprot:Q00653; hasPart uniprot:Q99558

  // Reactions:
  p100_mRNA_Expressions: $p100t => p100; compartment*p100_mRNA_Expressions_k1*p100t;
    p100_mRNA_Expressions_k1 = 0.2;
  p100_processing: p100_NIK => p52 + NIK; compartment*p100_processing_k1*p100_NIK;
    p100_processing_k1 = 0.05;
  p52_degradation: p52 => ; compartment*p52_degradation_k1*p52;
    p52_degradation_k1 = 0.00038;
  p100_degradation: p100 => ; compartment*p100_degradation_k1*p100;
    p100_degradation_k1 = 0.00038;
  p100_dimerization: 2 p100 -> IkBd; compartment*(p100_dimerization_k1*p100^2 - p100_dimerization_k2*IkBd);
    p100_dimerization_k1 = 1.6e-5; p100_dimerization_k2 = 0.00024;
  IkBd_degradation: IkBd => ; compartment*IkBd_degradation_k1*IkBd;
    IkBd_degradation_k1 = 0.00038;
  IkBd_degradation_by_NIK: IkBd_NIK => NIK; compartment*IkBd_degradation_by_NIK_k1*IkBd_NIK;
    IkBd_degradation_by_NIK_k1 = 0.05;
  p100_NIK_binding: p100 + NIK -> p100_NIK; compartment*(p100_NIK_binding_k1*p100*NIK - p100_NIK_binding_k2*p100_NIK);
    p100_NIK_binding_k1 = 0.005; p100_NIK_binding_k2 = 0.00024;
  IkBd_NIK_binding: IkBd + NIK -> IkBd_NIK; compartment*(IkBd_NIK_binding_k1*IkBd*NIK - IkBd_NIK_binding_k2*IkBd_NIK);
    IkBd_NIK_binding_k1 = 0.005; IkBd_NIK_binding_k2 = 0.00024;

  // Unit definitions:
  unit volume = 1e-3 litre;
  unit substance = 1e-9 mole;
end
