// SBML level 2 version 4
// dcterms:bibliographicCitation: http://identifiers.org/pubmed/10701304

function Constant_flux__irreversible(v)
  v;
end
Constant_flux__irreversible is "Constant flux (irreversible)";

function Function_for_T_cell_infection_1(T, V_I, k)
  k*V_I*T;
end
Function_for_T_cell_infection_1 is "Function for T-cell infection_1";

function Function_for_release_of_infectious_virions_on_lysis_1(N, T_i, delta, np)
  (1 - np)*N*delta*T_i;
end

function Function_for_clearance_of_infectious_virions(V_I, c)
  c*V_I;
end

function Function_for_release_of_non_infectious_virions_on_lysis(N, T_i, delta, np)
  np*N*delta*T_i;
end

model Nelson2000_HIV_1_general_model_1()
  // Nelson2000- HIV-1 general model 1
  // This is the general model without delay described by the equation system (1) in: A model of HIV-1 pathogenesis that includes an intracellular delay.
  // Nelson PW, Murray JD, Perelson AS; Math Biosci.2000 Feb;163(2):201-15. PMID: 10701304; doi: 10.1016/S0025-5564(99)00055-3
  // Abstract:
  // Mathematical modeling combined with experimental measurements have yielded important insights into HIV-1 pathogenesis. For example, data from experiments in which HIV-infected patients are given potent antiretroviral drugs that perturb the infection process have been used to estimate kinetic parameters underlying HIV infection. Many of the models used to analyze data have assumed drug treatments to be completely efficacious and that upon infection a cell instantly begins producing virus. We consider a model that allows for less then perfect drug effects and which includes a delay in the initiation of virus production. We present detailed analysis of this delay differential equation model and compare the results to a model without delay. Our analysis shows that when drug efficacy is less than 100%, as may be the case in vivo, the predicted rate of decline in plasma virus concentration depends on three factors: the death rate of virus producing cells, the efficacy of therapy, and the length of the delay. Thus, previous estimates of infected cell loss rates can be improved upon by considering more realistic models of viral infection.
  // Author Keywords:HIV; Delay; Viral life cycle; T-cells
  // As there are no results given for this model in the article it cannot be checked for MIRIAM compliance. The SBML file should be equivalent to the described ODE file though.
  // This model originates from BioModels Database: A Database of Annotated Published Models. It is copyright (c) 2005-2011 The BioModels.net Team.
  // To the extent possible under law, all copyright and related or neighbouring rights to this encoded model have been dedicated to the public domain worldwide. Please refer to CC0 Public Domain Dedicationfor more information.
  // In summary, you are entitled to use this encoded model in absolutely any manner you deem suitable, verbatim, or with modification, alone or embedded it in a larger context, redistribute it, commercially or not, in a restricted way or not..
  // To cite BioModels Database, please use: Li C, Donizelli M, Rodriguez N, Dharuri H, Endler L, Chelliah V, Li L, He E, Henry A, Stefan MI, Snoep JL, Hucka M, Le Novère N, Laibe C (2010) BioModels Database: An enhanced, curated and annotated resource for published quantitative kinetic models. BMC Syst Biol., 4:92.
  // isDescribedBy pubmed:10701304
  // biomodels.db:MODEL8268650277 biomodels.db:BIOMD0000000875
  // biomodels.db:MODEL8268650277
  // isVersionOf DOID:526
  // isVersionOf GO:0042493
  // hasProperty mamo:MAMO_0000046

  // Compartments:
  compartment plasma = 1;

  // Species:
  // uninfected T-cells
  species T in plasma = 180000;  // hasInstance efo:0001460
  // infected T-cells
  species T_i in plasma = 1675; T_i is "T*";  // hasProperty BTO:0000152
  // infectious virius (V I)
  species V_I in plasma = 134000;  // hasProperty ncit:C14283
  // non-infectious virus (V NI)
  species V_NI in plasma = 0;

  // Parameters:
  k = 3.43e-8 unit_0;
  delta = 0.5 unit_1;
  // virions released per cell upon lysis
  N = 480 unit_2;
  c = 3 unit_1;
  // protease inhibitor efficacy
  np = 0.5 unit_2;
  // number of both infectious and non-infectous virions per ml
  HIV has unit_3;
  lambda = 10 unit_4;
  delta1 = 0.03 unit_1;

  // Assignment rules:
  HIV := V_I + V_NI;

  // Reactions:
  T_cell_source: => T; plasma*Constant_flux__irreversible(lambda); T_cell_source is "creation of T-cells";
  T_cell_loss: T => ; plasma*delta1*T; T_cell_loss is "loss of uninfected T-cell";
  infection: T => T_i; plasma*Function_for_T_cell_infection_1(T, V_I, k); infection is "T-cell infection";  // modifiers: V_I
  T_i_lysis: T_i => ; plasma*delta*T_i; T_i_lysis is "infected T-cell lysis";
  T_lysis_infect: => V_I; plasma*Function_for_release_of_infectious_virions_on_lysis_1(N, T_i, delta, np); T_lysis_infect is "release of infectious virions on lysis";  // modifiers: T_i
  T_lysis_noninf: => V_NI; plasma*Function_for_release_of_non_infectious_virions_on_lysis(N, T_i, delta, np); T_lysis_noninf is "release of non infectious virions on lysis";  // modifiers: T_i
  V_I_clearance: V_I -> ; plasma*Function_for_clearance_of_infectious_virions(V_I, c); V_I_clearance is "clearance of infectious virions";
  V_NI_clearance: V_NI => ; plasma*c*V_NI; V_NI_clearance is "non-infect. virion clearance";

  // Unit definitions:
  unit volume = 1e-3 litre;
  unit time = 86400 second;
  unit substance = item;
  unit unit_0 = litre / (second * item); unit_0 is "l/(s*#)";
  unit unit_1 = 1 / (1e-3 second); unit_1 is "1/ms";
  unit unit_2 = dimensionless^0; unit_2 is "1";
  unit unit_3 = item / (1000 litre); unit_3 is "#/kl";
  unit unit_4 = item / (litre * second); unit_4 is "#/(l*s)";
end
