// SBML level 2 version 4
// dcterms:bibliographicCitation: urn:miriam:doi:10.1016/j.apm.2019.05.028

function Function_for_CD4_Uninfected_Growth(lambda, C_ast)
  lambda*C_ast;
end

function Function_for_CD4_Infected_Clearance_CTL(rho, F, I)
  rho*F*I;
end

function Function_for_CD4_Uninfected_Infection(beta, C, V)
  beta*C*V;
end

function Function_for_Virus_Production(a, N, I)
  a*N*I;
end

function Function_for_CTL_Stimulation(e, C, V, F, C_ast)
  e*C*V*F/(C_ast + F);
end

model Aavani2019___The_role_of_CD4_T_cells_in_immune_system_activation_and_viral_reproduction_in_a_simple_model_for_HIV_infection()
  // Aavani2019 - The role of CD4 T cells in immune system activation and viral reproduction in a simple model for HIV infection
  // This is a mathematical model comprised of a simple system of four ordinary differential equations that account for the two opposing roles of infected and healthy cytotoxic T lymphocytes within the
  // context of HIV infection, with each type responsible for the production of virus and the activation and stimulation of immune responses, respectively.
  // isDescribedBy doi:10.1016/j.apm.2019.05.028
  // isDerivedFrom pubmed:10588728
  // biomodels.db:MODEL1911270003 biomodels.db:BIOMD0000000876
  // hasProperty ncit:C14219
  // hasProperty ncit:C12543
  // hasProperty mamo:MAMO_0000046

  // Compartments:
  compartment compartment = 1;  // ncit:C13356

  // Species:
  species C_Uninfected_CD4 in compartment = C_ast;  // ncit:C12537; hasProperty EFO:0001460
  species I_Infected_CD4 in compartment = 1;  // ncit:C12537; isVersionOf BTO:0000152
  species F_CTL in compartment = 1;  // CL:0000910
  species V_Virus in compartment = 200;  // ncit:C14219

  // Parameters:
  C_ast = 1000;
  N = 2000;
  beta = 5.75e-5;
  lambda = 0.01;
  a = 1;
  k = 23;
  d_0 = 0.001;
  a_L = 0.1;
  rho = 1;
  b = 0.1;
  e = 0.001;

  // Reactions:
  CD4_Uninfected_Growth: => C_Uninfected_CD4; compartment*Function_for_CD4_Uninfected_Growth(lambda, C_ast);  // ncit:C18081
  CD4_Uninfected_Death: C_Uninfected_CD4 => ; compartment*lambda*C_Uninfected_CD4;  // GO:0008219
  CD4_Infected_Death: I_Infected_CD4 => ; compartment*a*I_Infected_CD4;  // GO:0008219
  CTL_Death: F_CTL => ; compartment*b*F_CTL;  // GO:0008219
  Virus_Degradation: V_Virus => ; compartment*k*V_Virus;
  CD4_Uninfected_Infection: C_Uninfected_CD4 => I_Infected_CD4; compartment*Function_for_CD4_Uninfected_Infection(beta, C_Uninfected_CD4, V_Virus);  // modifiers: V_Virus; isVersionOf ncit:C128320
  CD4_Infected_Clearance_CTL: I_Infected_CD4 => ; compartment*Function_for_CD4_Infected_Clearance_CTL(rho, F_CTL, I_Infected_CD4);  // modifiers: F_CTL; isVersionOf GO:0001913
  CTL_Stimulation: => F_CTL; compartment*Function_for_CTL_Stimulation(e, C_Uninfected_CD4, V_Virus, F_CTL, C_ast);  // modifiers: C_Uninfected_CD4, V_Virus; isVersionOf ncit:C61406
  Virus_Production: => V_Virus; compartment*Function_for_Virus_Production(a, N, I_Infected_CD4);  // modifiers: I_Infected_CD4; GO:0019076

  // Unit definitions:
  unit volume = 1e-3 litre;
  unit time = 86400 second;
  unit substance = item;
end
