// SBML level 2 version 4
// dcterms:bibliographicCitation: urn:miriam:doi:10.1088/1757-899X/546/3/032025

function Constant_flux__irreversible(v)
  v;
end
Constant_flux__irreversible is "Constant flux (irreversible)";

function Function_for_Tumor_Growth(r, U, I, K)
  r*U*(1 - (U + I)/K);
end

function Function_for_Uninfected_Tumor_Lysis_Drug(delta, U, C, K_c)
  delta*U*C/(K_c + C);
end

function Function_for_Tumor_Cell_Infection(beta, U, V, I, alpha)
  beta*U*V/(U + I + alpha);
end

function Function_for_Infected_Tumor_Lysis_Drug(delta_I, I, C, K_c)
  delta_I*I*C/(K_c + C);
end

function Function_for_Virus_Production(b, delta, I)
  b*delta*I;
end

model Ontah2019___Dynamic_analysis_of_a_tumor_treatment_model_using_oncolytic_virus_and_chemotherapy_with_saturated_infection_rate()
  // Ontah2019 - Dynamic analysis of a tumor treatment model using oncolytic virus and chemotherapy with saturated infection rate
  // This is a mathematical model describing the treatment of tumors using oncolytic virus and chemotherapy. The model is comprised of nonlinear ordinary differential equations describing the interactions
  // between uninfected tumor cells, infected tumor cells, an oncolytic virus, and chemotherapy.
  // isDescribedBy doi:10.1088/1757-899X/546/3/032025
  // biomodels.db:MODEL1911270004 biomodels.db:BIOMD0000000877
  // hasProperty mamo:MAMO_0000046
  // hasProperty ncit:C62713
  // hasProperty ncit:C15632
  // hasTaxon taxonomy:9606

  // Compartments:
  compartment compartment = 1;  // isVersionOf ncit:C94498

  // Species:
  species U in compartment = 100;  // CL:0001063
  species I in compartment = 10;  // BTO:0000152; CL:0001063
  species V in compartment = 10;  // ncit:C717
  species C in compartment = 30;  // isInstanceOf ncit:C15681

  // Parameters:
  r = 0.1;
  K = 2139;
  beta = 0.01;
  alpha = 0.5;
  delta_u = 50;
  K_c = 10000;
  delta = 0.5;
  delta_i = 60;
  b = 0.5;
  gamma = 0.1;
  mu = 150;
  psi = 4.17;

  // Reactions:
  Tumor_Growth: => U; compartment*Function_for_Tumor_Growth(r, U, I, K);  // modifiers: I; ncit:C36294
  Tumor_Cell_Infection: U + V => I; compartment*Function_for_Tumor_Cell_Infection(beta, U, V, I, alpha);  // isVersionOf ncit:C128320
  Uninfected_Tumor_Lysis_Drug: U => ; compartment*Function_for_Uninfected_Tumor_Lysis_Drug(delta_u, U, C, K_c);  // modifiers: C; GO:0008219
  Infected_Tumor_Lysis_Drug: I => ; compartment*Function_for_Infected_Tumor_Lysis_Drug(delta_i, I, C, K_c);  // modifiers: C; GO:0008219
  Infected_Tumor_Death: I => ; compartment*delta*I;  // GO:0044659
  Virus_Production: => V; compartment*Function_for_Virus_Production(b, delta, I);  // modifiers: I; GO:0019076
  Virus_Decay: V => ; compartment*gamma*V;
  Drug_Injection: => C; compartment*Constant_flux__irreversible(mu);  // ncit:C149592
  Drug_Decay: C => ; compartment*psi*C;

  // Unit definitions:
  unit volume = 1e-3 litre;
  unit time = 86400 second;
  unit substance = item;
end
