// SBML level 2 version 4
// dcterms:bibliographicCitation: urn:miriam:doi:10.1016/j.amc.2018.12.008

function Constant_flux__irreversible(v)
  v;
end
Constant_flux__irreversible is "Constant flux (irreversible)";

function Function_for_Cancer_Death_Immune(c_1, N, I)
  c_1*N*I;
end

function Function_for_Immune_Death_Cancer(c_2, N, I)
  c_2*N*I;
end

function Function_for_Immune_Growth_Cancer_Stimulation(rho, N, I, gamma)
  rho*N*I/(gamma + N);
end

function Function_for_Immune_Death_Chemotherapy(delta, I, Q, b)
  delta*I*Q/(b + Q);
end

function Function_for_Cancer_Growth(r, N, k)
  r*N*(1 - N/k);
end

function Function_for_Cancer_Death_Chemotherapy(mu, N, Q, a)
  mu*N*Q/(a + Q);
end

model Rodrigues2019___A_mathematical_model_for_chemoimmunotherapy_of_chronic_lymphocytic_leukemia()
  // Rodrigues2019 - A mathematical model for chemoimmunotherapy of chronic lymphocytic leukemia
  // THis is a simple ordinary differential equation model describing chemoimmunotherapy of chronic lymphocytic leukemia, including descriptions of the combinatorial effects of chemotherapy and adoptive
  // cellular immunotherapy.
  // isDescribedBy doi:10.1016/j.amc.2018.12.008
  // isDerivedFrom doi:10.1080/10273660108833067
  // biomodels.db:MODEL1911280001 biomodels.db:BIOMD0000000879
  // hasProperty mamo:MAMO_0000046
  // hasProperty ncit:C15262
  // hasProperty ncit:C3163

  // Compartments:
  compartment compartment = 1;  // ncit:C94498

  // Species:
  species N in compartment = 2e10;  // ncit:C25553
  species I in compartment = 50000000;  // isVersionOf ncit:C12535
  species Q in compartment = 0;  // CHEBI:4027

  // Parameters:
  r = 0.01;
  k = 1e12;
  c_1 = 5e-11;
  c_2 = 1e-13;
  s_0 = 700000;
  d = 0.001;
  rho = 1e-12;
  gamma = 100;
  mu = 8;
  delta = 10000;
  a = 2000;
  b = 5000000;
  lambda = 4.16;
  Immunotherapy_Input = 0;
  Infusion_Dose = 1080;

  // Assignment rules:
  Infusion_Duration := 1/8;
  Infusion_Rate := Infusion_Dose/Infusion_Duration;
  Chemotherapy_Input := piecewise(Infusion_Rate, time <= Infusion_Duration, piecewise(Infusion_Rate, (time >= 21) && (time <= 21 + Infusion_Duration), piecewise(Infusion_Rate, (time >= 42) && (time <= 42 + Infusion_Duration), piecewise(Infusion_Rate, (time >= 63) && (time <= 63 + Infusion_Duration), piecewise(Infusion_Rate, (time >= 84) && (time <= 84 + Infusion_Duration), piecewise(Infusion_Rate, (time >= 105) && (time <= 105 + Infusion_Duration), piecewise(Infusion_Rate, (time >= 126) && (time <= 126 + Infusion_Duration), 0)))))));

  // Reactions:
  Cancer_Growth: => N; compartment*Function_for_Cancer_Growth(r, N, k);  // ncit:C36294
  Cancer_Death_Immune: N => ; compartment*Function_for_Cancer_Death_Immune(c_1, N, I);  // modifiers: I; isVersionOf GO:0001913
  Cancer_Death_Chemotherapy: N => ; compartment*Function_for_Cancer_Death_Chemotherapy(mu, N, Q, a);  // modifiers: Q; isVersionOf GO:0008219
  Immune_Growth_Constant: => I; compartment*Constant_flux__irreversible(s_0);  // isVersionOf ncit:C18081
  Immune_Death_Natural: I => ; compartment*d*I;  // isVersionOf GO:0008219
  Immune_Growth_Cancer_Stimulation: => I; compartment*Function_for_Immune_Growth_Cancer_Stimulation(rho, N, I, gamma);  // modifiers: N; isPropertyOf GO:0006955
  Immune_Death_Cancer: I => ; compartment*Function_for_Immune_Death_Cancer(c_2, N, I);  // modifiers: N; isVersionOf GO:0001906
  Immune_Death_Chemotherapy: I => ; compartment*Function_for_Immune_Death_Chemotherapy(delta, I, Q, b);  // modifiers: Q; isVersionOf GO:0008219
  Chemotherapy_Decay: Q => ; compartment*lambda*Q;
  Immune_Immunotherapy: => I; compartment*Constant_flux__irreversible(Immunotherapy_Input);  // ncit:C15262
  Chemotherapy: => Q; compartment*Constant_flux__irreversible(Chemotherapy_Input);  // ncit:C15632

  // Unit definitions:
  unit volume = 1e-3 litre;
  unit time = 86400 second;
  unit substance = item;
end
