// SBML level 2 version 4
// dcterms:bibliographicCitation: urn:miriam:doi:10.1063/1.5062816

function Constant_flux__irreversible(v)
  v;
end
Constant_flux__irreversible is "Constant flux (irreversible)";

function Function_for_CD4_Growth(a_3, H, b_3)
  a_3*H*(1 - b_3*H);
end

function Function_for_CD4_Inactivation(beta_3, H, L)
  beta_3*H*L;
end

function Function_for_CD8_Inactivation(alpha_2, T, L)
  alpha_2*T*L;
end

function Function_for_DC_Inactivation(beta_2, D, L)
  beta_2*D*L;
end

function Function_for_CD8_Activation(beta_1, D, H, L)
  beta_1*(D + H)*L;
end

function Function_for_Tumor_Growth(a_1, T, b_1)
  a_1*T*(1 - b_1*T);
end

function Function_for_DC_Growth(a_2, D, b_2)
  a_2*D*(1 - b_2*D);
end

function Function_for_Tumor_Death_CD8(alpha_1, T, L)
  alpha_1*T*L;
end

model Trisilowati2018___Optimal_control_of_tumor_immune_system_interaction_with_treatment()
  // Trisilowati2018 - Optimal control of tumor-immune system interaction with treatment
  // This is a mathematical model of a growing tumor and its interaction with the immune system. The model consists of four populations: tumor cells, dendritic cells (representing the innate immune
  // system), cytotoxic T cells, and helper T cells (as the specific immune system). The model is comprised of a system of ordinary differential equations.
  // isDescribedBy doi:10.1063/1.5062816
  // biomodels.db:MODEL1911280003 biomodels.db:BIOMD0000000880
  // hasProperty ncit:C9305
  // hasProperty mamo:MAMO_0000046
  // hasProperty GO:0006955
  // hasTaxon taxonomy:9606

  // Compartments:
  compartment compartment = 1;  // ncit:C94498

  // Species:
  species T_Tumor_Cells in compartment = 1000000;  // CL:0001063
  species L_CD8_T_Cells in compartment = 10;  // CCO:0000910
  species D_Dendritic_Cells in compartment = 10;  // CL:0000451
  species H_CD4_T_Cells in compartment = 5;  // CL:0000912

  // Parameters:
  a_1 = 0.431;
  a_2 = 0.234;
  a_3 = 0.017;
  b_1__1 = 1.02e-9; b_1__1 is "b_1_-1";
  b_2__1 = 1.25e-5; b_2__1 is "b_2_-1";
  b_3__1 = 0.0005; b_3__1 is "b_3_-1";
  e = 1.04e-8;
  alpha_1 = 4.2e-8;
  alpha_2 = 8e-10;
  beta_1 = 2e-5;
  beta_2 = 2e-5;
  beta_3 = 2e-5;
  u_1 = 0;
  u_2 = 0;

  // Reactions:
  Tumor_Growth: => T_Tumor_Cells; compartment*Function_for_Tumor_Growth(a_1, T_Tumor_Cells, b_1__1);  // isVersionOf ncit:C36294
  Tumor_Death_CD8: T_Tumor_Cells => ; compartment*Function_for_Tumor_Death_CD8(alpha_1, T_Tumor_Cells, L_CD8_T_Cells);  // modifiers: L_CD8_T_Cells; GO:0002419
  Tumor_Death_Chemotherapy: T_Tumor_Cells => ; compartment*u_1*T_Tumor_Cells;  // isVersionOf GO:0008219; hasProperty ncit:C15632
  CD8_Activation: => L_CD8_T_Cells; compartment*Function_for_CD8_Activation(beta_1, D_Dendritic_Cells, H_CD4_T_Cells, L_CD8_T_Cells);  // modifiers: D_Dendritic_Cells, H_CD4_T_Cells; isVersionOf GO:0046649
  CD8_Inactivation: L_CD8_T_Cells => ; compartment*Function_for_CD8_Inactivation(alpha_2, T_Tumor_Cells, L_CD8_T_Cells);  // modifiers: T_Tumor_Cells; ncit:C40846
  CD8_Death: L_CD8_T_Cells => ; compartment*e*L_CD8_T_Cells;  // GO:0008219
  DC_Growth: => D_Dendritic_Cells; compartment*Function_for_DC_Growth(a_2, D_Dendritic_Cells, b_2__1);  // isVersionOf ncit:C18081
  DC_Inactivation: D_Dendritic_Cells => ; compartment*Function_for_DC_Inactivation(beta_2, D_Dendritic_Cells, L_CD8_T_Cells);  // modifiers: L_CD8_T_Cells; ncit:C40846
  DC_Immunotherapy: => D_Dendritic_Cells; compartment*Constant_flux__irreversible(u_2);  // ncit:C28976
  CD4_Growth: => H_CD4_T_Cells; compartment*Function_for_CD4_Growth(a_3, H_CD4_T_Cells, b_3__1);  // isVersionOf ncit:C18081
  CD4_Inactivation: H_CD4_T_Cells => ; compartment*Function_for_CD4_Inactivation(beta_3, H_CD4_T_Cells, L_CD8_T_Cells);  // modifiers: L_CD8_T_Cells; ncit:C40846

  // Unit definitions:
  unit volume = 1e-3 litre;
  unit substance = item;
end
