// SBML level 2 version 4
// dcterms:bibliographicCitation: urn:miriam:doi:10.3934/dcdsb.2013.18.1017

function Function_for_IL_10_Production_DC(p_I, a_I, b_I, G)
  p_I*(a_I + (1 - a_I)*b_I/(G + b_I));
end
Function_for_IL_10_Production_DC is "Function_for_IL-10_Production_DC";

function Function_for_Th2_Recruitment(c_2, L, d_1, r_T, b_2, G)
  (c_2 + (1 - c_2)*d_1/(L + d_1))*r_T*b_2/(b_2 + G);
end

function Function_for_IFN_gamma_Production_Th2(q_G, T_1, a_G, b_G, I, e_G, L, f_G)
  q_G*T_1*(a_G + (1 - a_G)*b_G/(I + b_G))*(1 + e_G*L/(L + f_G));
end
Function_for_IFN_gamma_Production_Th2 is "Function_for_IFN-gamma_Production_Th2";

function Function_for_Th1_Recruitment(r_T, b_1, I, c_1, L, d_1)
  (1 + c_1*L/(L + d_1))*r_T*b_1/(b_1 + I);
end

function Function_for_IFN_gamma_Production_NK_CTL(p_G, c_G, L, d_G)
  p_G*(1 + c_G*L/(L + d_G));
end
Function_for_IFN_gamma_Production_NK_CTL is "Function_for_IFN-gamma_Production_NK_CTL";

function Function_for_IL_10_Production_Th1(q_I, T_2)
  q_I*T_2;
end
Function_for_IL_10_Production_Th1 is "Function_for_IL-10_Production_Th1";

model Kogan2013___A_mathematical_model_for_the_immunotherapeutic_control_of_the_TH1_TH2_imbalance_in_melanoma()
  // Kogan2013 - A mathematical model for the immunotherapeutic control of the TH1 TH2 imbalance in melanoma
  // This is a mathematical model describing the imbalance between T helper (Th1/Th2) cell types in melanome patients, together with its regulation via IL-12 treatment. The model focuses on the
  // interactions between the two T helper cell types as mediated by their respective key cytokines, interferon gamma and IL-10.
  // isDescribedBy doi:10.3934/dcdsb.2013.18.1017
  // biomodels.db:MODEL1912020001 biomodels.db:BIOMD0000000881
  // hasProperty mamo:MAMO_0000046
  // hasProperty ncit:C18670
  // hasProperty ncit:C20496
  // hasProperty ncit:C20514

  // Compartments:
  compartment compartment = 1;  // ncit:C94498

  // Species:
  species T_1 in compartment = 500000;  // CL:0000545
  species T_2 in compartment = 1000000;  // CL:0000546
  species G in compartment = 1;  // ncit:C20496
  species I in compartment = 1;  // ncit:C20512

  // Parameters:
  mu_T = 0.001;
  r_T = 1000;
  a_1 = 0;
  b_1 = 0.35;
  a_2 = 0;
  b_2 = 0.18;
  mu_G = 0.6;
  q_G = 1e-7;
  p_G = 0.016;
  a_G = 0.59;
  b_G = 0.13;
  mu_I = 0.36;
  q_I = 1e-7;
  p_I = 0.5;
  a_I = 0.12;
  b_I = 0.025;
  c_1 = 30;
  d_1 = 0.8;
  d_2 = 0.8;
  c_2 = 0.1;
  c_G = 12;
  d_G = 0.05;
  e_G = 5.4;
  f_G = 0.22;
  L = 0;

  // Assignment rules:
  T_1_e5 := T_1/100000;
  T_2_e5 := T_2/100000;

  // Reactions:
  Th1_Recruitment: => T_1; compartment*Function_for_Th1_Recruitment(r_T, b_1, I, c_1, L, d_1);  // modifiers: I; GO:0035687
  Th1_Elimination: T_1 => ; compartment*mu_T*T_1;  // isVersionOf GO:0008219
  Th2_Recruitment: => T_2; compartment*Function_for_Th2_Recruitment(c_2, L, d_1, r_T, b_2, G);  // modifiers: G; isVersionOf GO:0035684
  Th2_Elimination: T_2 => ; compartment*mu_T*T_2;  // isVersionOf GO:0008219
  IFN_gamma_Production_NK_CTL: => G; compartment*Function_for_IFN_gamma_Production_NK_CTL(p_G, c_G, L, d_G); IFN_gamma_Production_NK_CTL is "IFN-gamma_Production_NK_CTL";  // GO:0072643
  IFN_gamma_Production_Th2: => G; compartment*Function_for_IFN_gamma_Production_Th2(q_G, T_1, a_G, b_G, I, e_G, L, f_G); IFN_gamma_Production_Th2 is "IFN-gamma_Production_Th2";  // modifiers: T_1, I; GO:0072643
  IFN_gamma_Elimination: G => ; compartment*mu_G*G; IFN_gamma_Elimination is "IFN-gamma_Elimination";
  IL_10_Production_DC: => I; compartment*Function_for_IL_10_Production_DC(p_I, a_I, b_I, G); IL_10_Production_DC is "IL-10_Production_DC";  // modifiers: G; GO:0072608
  IL_10_Production_Th1: => I; compartment*Function_for_IL_10_Production_Th1(q_I, T_2); IL_10_Production_Th1 is "IL-10_Production_Th1";  // modifiers: T_2; GO:0072608
  IL_10_Elimination: I => ; compartment*mu_I*I; IL_10_Elimination is "IL-10_Elimination";

  // Unit definitions:
  unit volume = 1e-3 litre;
  unit time = 3600 second;
  unit substance = item;
end
