// SBML level 2 version 4
// dcterms:bibliographicCitation: urn:miriam:isbn:ISBN:1607413477

function Function_for_Removal_of_zombie_or_susceptible(beta, Susceptible, Zombie, delta)
  beta*Susceptible*Zombie + delta*Susceptible;
end

function Function_for_resurrection_to_Zombie(zeta, Removal)
  zeta*Removal;
end

function Function_for_Susceptible_to_Zombie_or_death(beta, Susceptible, Zombie, delta)
  beta*Susceptible*Zombie + delta*Susceptible;
end

function Function_for_Death_from_Zombie(alpha, Susceptible, Zombie)
  alpha*Susceptible*Zombie;
end

function Function_for_Zombification(beta, Susceptible, Zombie, zeta, Removal)
  beta*Susceptible*Zombie + zeta*Removal;
end

function Function_for_Birth(p)
  p;
end

model New_Model()
  // Munz2009 - Zombie SIZRC
  // This is the model with an latent infection and cure for zombies described in the article.
  // This model was originally created by libAntimony v1.4 (using libSBML 3.4.1).
  // This model is described in the article:
  // When zombies attack!: Mathematical modelling of an outbreak of zombie infection
  // P. Munz, I. Hudea, J. Imad and R.J. Smith?
  // Infectious Disease Modelling Research Progress 2009, chapter 4, pp 133-150. Editors: Jean Michel Tchuenche and C. Chiyaka; Nova Science Publishers, Inc., NY, USA.
  // Abstract:
  // Zombies are a popular figure in pop culture/entertainment and they are usually portrayed as being brought about through an outbreak or epidemic. Consequently, we model a zombie attack, using
  // biological assumptions based on popular zombie movies. We introduce a basic model for zombie infection, determine equilibria and their stability, and illustrate the outcome with numerical solutions.
  // We then refine the model to introduce a latent period of zombification, whereby humans are infected, but not infectious, before becoming undead. We then modify the model to include the effects of
  // possible quarantine or a cure. Finally, we examine the impact of regular, impulsive reductions in the number of zombies and derive conditions under which eradication can occur. We show that only
  // quick, aggressive attacks can stave off the doomsday scenario: the collapse of society as zombies overtake us all.
  // This model is hosted on BioModels Database and identified by: MODEL1008060001 .
  // To cite BioModels Database, please use: BioModels Database: An enhanced, curated and annotated resource for published quantitative kinetic models .
  // To the extent possible under law, all copyright and related or neighbouring rights to this encoded model have been dedicated to the public domain worldwide. Please refer to CC0 Public Domain
  // Dedication for more information.
  // isDescribedBy ISBN:1607413477
  // biomodels.db:MODEL1008060001 biomodels.db:BIOMD0000000882
  // biomodels.db:MODEL1008060001
  // isVersionOf DOID:0050117
  // isPropertyOf GO:0016032
  // hasTaxon taxonomy:9606

  // Compartments:
  compartment compartment = 1;

  // Species:
  species Susceptible in compartment = 500;  // hasInstance ncit:C16505
  species Zombie in compartment = 1;
  species Removal in compartment = 0;  // hasInstance ncit:C64914

  // Parameters:
  alpha = 0.005;
  beta = 0.0095;
  delta = 0.0001;
  zeta = 0.0001;
  p = 0.05;

  // Reactions:
  Birth: => Susceptible; compartment*Function_for_Birth(p);  // hasProperty ncit:C25155
  Zombification: => Zombie; compartment*Function_for_Zombification(beta, Susceptible, Zombie, zeta, Removal);  // modifiers: Susceptible, Removal
  Susceptible_to_Zombie_or_death: Susceptible => ; compartment*Function_for_Susceptible_to_Zombie_or_death(beta, Susceptible, Zombie, delta);  // modifiers: Zombie; hasProperty ncit:C16505
  Removal_of_zombie_or_susceptible: => Removal; compartment*Function_for_Removal_of_zombie_or_susceptible(alpha, Susceptible, Zombie, delta);  // modifiers: Susceptible, Zombie; hasProperty ncit:C64914
  Resurrection_to_Zombie: Removal => ; compartment*Function_for_resurrection_to_Zombie(zeta, Removal);  // modifiers: Susceptible, Zombie; hasProperty ncit:C37987
  Death_from_Zombie: Zombie => ; compartment*Function_for_Death_from_Zombie(alpha, Susceptible, Zombie);  // modifiers: Susceptible; hasInstance GO:0016265

  // Unit definitions:
  unit volume = 1e-3 litre;
  unit time = 86400 second;
  unit substance = 1e-3 mole;
end
