// SBML level 2 version 4
// dcterms:bibliographicCitation: Optimality of the spontaneous prophage induction rate. urn:miriam:pubmed:31525321

function Function_for_production_of_Lysogens(r, L, p, alpha, U, V)
  r*L + p*alpha*U*V;
end

function Fucntion_for_removal_of_Lysogens(delta, L, phi)
  delta*L + phi*L;
end

function Function_for_production_of_uninfected_cells(g, U)
  g*U;
end

function Function_for_removal_of_uninfected_cells(alpha, U, V, phi)
  alpha*U*V + phi*U;
end

function Function_for_production_of_viruses(p, b, alpha, U, V, L, delta)
  (1 - p)*b*alpha*U*V + b*delta*L;
end

function Function_for_removal_of_viruses(gamma, V, alpha, L)
  gamma*V + alpha*V*L;
end

model New_Model()
  // Cortes2019 - Optimality of the spontaneous prophage induction rate.
  // Optimality of the spontaneous prophage induction rate.
  // Cortes MG1, Krog J2, Balázsi G3.
  // 1 Department of Applied Mathematics and Statistics, Stony Brook University, Stony Brook, NY 11794, USA.
  // 2 The Louis and Beatrice Laufer Center for Physical and Quantitative Biology, Stony Brook University, Stony Brook, NY 11794, USA.
  // 3 Department of Biomedical Engineering, Stony Brook University, Stony Brook, NY 11794, USA. Electronic address: gabor.balazsi@stonybrook.edu.
  // Abstract
  // Lysogens are bacterial cells that have survived after genomically incorporating the DNA of temperate bacteriophages infecting them. If an infection results in lysogeny, the lysogen continues to grow
  // and divide normally, seemingly unaffected by the integrated viral genome known as a prophage. However, the prophage can still have an impact on the host's phenotype and overall fitness in certain
  // environments. Additionally, the prophage within the lysogen can activate the lytic pathway via spontaneous prophage induction (SPI), killing the lysogen and releasing new progeny phages. These new
  // phages can then lyse or lysogenize other susceptible nonlysogens, thereby impacting the competition between lysogens and nonlysogens. In a scenario with differing growth rates, it is not clear
  // whether SPI would be beneficial or detrimental to the lysogens since it kills the host cell but also attacks nonlysogenic competitors, either lysing or lysogenizing them. Here we study the
  // evolutionary dynamics of a mixture of lysogens and nonlysogens and derive general conditions on SPI rates for lysogens to displace nonlysogens. We show that there exists an optimal SPI rate for
  // bacteriophage λ and explain why it is so low. We also investigate the impact of stochasticity and conclude that even at low cell numbers SPI can still provide an advantage to the lysogens. These
  // results corroborate recent experimental studies showing that lower SPI rates are advantageous for phage-phage competition, and establish theoretical bounds on the SPI rate in terms of ecological and
  // environmental variables associated with lysogens having a competitive advantage over their nonlysogenic counterparts.
  // Copyright © 2019 The Author(s). Published by Elsevier Ltd.. All rights reserved.
  // isDescribedBy pubmed:31525321
  // biomodels.db:MODEL1912040001 biomodels.db:BIOMD0000000884
  // biomodels.db:MODEL1912040001
  // isPropertyOf ncit:C61367
  // hasTaxon taxonomy:9606

  // Compartments:
  compartment compartment = 1;

  // Species:
  species L in compartment = 10000;  // hasInstance ncit:C14283
  species U in compartment = 990000;
  species V in compartment = 0;  // hasInstance ncit:C14283

  // Parameters:
  r = 0.99;
  delta = 0.0001;
  p = 0.3;
  alpha = 1e-7;
  g = 1;
  b = 150;
  gamma = 0.001;

  // Assignment rules:
  K := L + U;
  phi := ((r - delta)*L + g*U - alpha*U*V*(1 - p))/K;

  // Reactions:
  Production_of_Lysogens: => L; compartment*Function_for_production_of_Lysogens(r, L, p, alpha, U, V);  // modifiers: U, V
  Removal_of_Lysogens: L => ; compartment*Fucntion_for_removal_of_Lysogens(delta, L, phi);  // hasProperty ncit:C64914
  Production_of_uninfected_cells: => U; compartment*Function_for_production_of_uninfected_cells(g, U);
  Removal_of_uninfected_cells: U => ; compartment*Function_for_removal_of_uninfected_cells(alpha, U, V, phi);  // modifiers: V; hasProperty ncit:C64914
  Production_of_viruses: => V; compartment*Function_for_production_of_viruses(p, b, alpha, U, V, L, delta);  // modifiers: U, L
  Removal_of_viruses: V => ; compartment*Function_for_removal_of_viruses(gamma, V, alpha, L);  // modifiers: L; hasProperty ncit:C64914

  // Unit definitions:
  unit volume = 1e-3 litre;
  unit substance = 1e-3 mole;
end
