// SBML level 2 version 4
// dcterms:bibliographicCitation: Mathematical modeling of cancer-immune system, considering the role of antibodies urn:miriam:pubmed:29572780

function Function_for_removal_of_plasma_cell_from_the_system(mu_1, P)
  mu_1*P;
end

function Function_for_production_of_plasma_cell(b, u, B)
  b*(1 - u)*B;
end

function Function_for_formation_of_B_cell(a, u, B, k_1)
  a*u*B*(1 - B/k_1);
end

function Function_for_Removal_of_B_cell(b, u, B)
  b*(1 - u)*B;
end

function Function_for_Production_of_antibody_against_tumor(r_1, B, r_2, P)
  r_1*B + r_2*P;
end

function Function_for_removal_of_antibody_from_the_system(mu_2, A)
  mu_2*A;
end

function Function_of_removal_of_tumor_cell(beta_1, A, T)
  beta_1*A*T;
end

function Function_for_formation_of_tumor_cell(r, T, k_2)
  r*T*(1 - T/k_2);
end

model Sumana2018___Mathematical_modeling_of_cancer_immune_system__considering_the_role_of_antibodies()
  // Sumana2018 - Mathematical modeling of cancer-immune system, considering the role of antibodies.
  // Mathematical modeling of cancer-immune system, considering the role of antibodies.
  // Ghosh S1, Banerjee S2.
  // Author information
  // 1
  // Department of Mathematics, Indian Institute of Technology Roorkee, Roorkee, Uttaranchal, 247667, India.
  // 2
  // Department of Mathematics, Indian Institute of Technology Roorkee, Roorkee, Uttaranchal, 247667, India. sandofma@iitr.ac.in.
  // Abstract
  // A mathematical model for the quantitative analysis of cancer-immune interaction, considering the role of antibodies has been proposed in this paper. The model is based on the clinical evidence, which
  // states that antibodies can directly kill cancerous cells (Ivano et al. in J Clin Investig 119(8):2143-2159, 2009). The existence of transcritical bifurcation, which has been proved using Sotomayor
  // theorem, provides strong biological implications. Through numerical simulations, it has been illustrated that under certain therapy (like monoclonal antibody therapy), which is capable of altering
  // the parameters of the system, cancer-free state can be obtained.
  // KEYWORDS:
  // Antibodies; B cells; Cancer cells; Global stability; Plasma cells; Transcritical bifurcation
  // hasInstance ncit:C15438 ncit:C16295 taxonomy:9606 ncit:C19691
  // isDescribedBy ncit:C19691 pubmed:29572780
  // biomodels.db:MODEL1912090004 biomodels.db:BIOMD0000000885
  // hasProperty ncit:C15438
  // hasProperty ncit:C16295
  // hasTaxon taxonomy:9606

  // Compartments:
  compartment compartment = 1;

  // Species:
  species B in compartment = 90000;
  species P in compartment = 1000000;  // hasInstance ncit:C13356
  species A in compartment = 150000000;
  species T in compartment = 100000000;  // hasInstance taxonomy:6754

  // Parameters:
  a = 0.1;
  b = 0.01;
  mu_1 = 0.01;
  k_1 = 1000000;
  u = 0.1;
  r_1 = 100;
  r_2 = 1000;
  mu_2 = 6.884;
  r = 0.431;
  k_2 = 980000000;
  beta_1 = 30218000;

  // Reactions:
  B_cell_formation: => B; compartment*Function_for_formation_of_B_cell(a, u, B, k_1);  // hasInstance ncit:C25513
  Removal_of_B_cell: B => ; compartment*Function_for_Removal_of_B_cell(b, u, B);  // hasInstance ncit:C64914
  Production_of_plasma_cell: => P; compartment*Function_for_production_of_plasma_cell(b, u, B);  // modifiers: B; hasInstance ncit:C25513
  Removal_of_plasma_cell_from_system: P => ; compartment*Function_for_removal_of_plasma_cell_from_the_system(mu_1, P);  // hasInstance ncit:C64914
  Production_of_antibody_against_tumor: => A; compartment*Function_for_Production_of_antibody_against_tumor(r_1, B, r_2, P);  // modifiers: B, P; hasInstance ncit:C25513
  Removal_of_antibody_from_the_system: A => ; compartment*Function_for_removal_of_antibody_from_the_system(mu_2, A);  // hasInstance ncit:C64914
  Formation_of_tumor_cell: => T; compartment*Function_for_formation_of_tumor_cell(r, T, k_2);
  Removal_of_tumor_cell_by_immune_cell: T => ; compartment*Function_of_removal_of_tumor_cell(beta_1, A, T);  // modifiers: A; hasInstance ncit:C64914

  // Unit definitions:
  unit volume = 1e-3 litre;
  unit time = 86400 second;
  unit substance = 1e-3 mole;
end
