// SBML level 2 version 4
// dcterms:bibliographicCitation: urn:miriam:pubmed:24583256

function Constant_flux__irreversible(v)
  v;
end
Constant_flux__irreversible is "Constant flux (irreversible)";

function Function_for_Mitotic_Transmission(r, y)
  r*y;
end

function Function_for_Infectious_Transmission(beta, x, y)
  beta*x*y;
end

function Function_for_CTL_Proliferation(nu, y)
  nu*y;
end

function Function_for_CD4AI_Lysis_CTL(gamma, y, z)
  gamma*y*z;
end

model Lim2014___HTLV_I_infection_A_dynamic_struggle_between_viral_persistence_and_host_immunity()
  // Lim2014 - HTLV-I infection A dynamic struggle between viral persistence and host immunity
  // This is a four-dimensional, non-linear system of ordinary differential equations that describes the dynamic interactions among viral expression, infected target cell activation, and the
  // HTLV-I-specific CTL response.
  // isDescribedBy pubmed:24583256
  // biomodels.db:MODEL1912100003 biomodels.db:BIOMD0000000887
  // hasProperty ncit:C14223
  // hasProperty ncit:C17930
  // hasProperty mamo:MAMO_0000046
  // hasTaxon taxonomy:9606

  // Compartments:
  compartment compartment = 1;  // ncit:C13356

  // Species:
  species x in compartment = 850;  // CL:0000492; hasProperty BTO:0000152
  species u in compartment = 0.1;  // CL:0000492
  species y in compartment = 0.5;  // CL:0000492; hasProperty BTO:0000152
  species z in compartment = 0.1;  // CL:0000910

  // Parameters:
  lambda = 10;
  beta = 0.001;
  r = 0.011;
  tau = 0.003;
  gamma = 0.029;
  nu = 0.036;
  mu_1 = 0.012;
  mu_2 = 0.03;
  mu_3 = 0.03;
  mu_4 = 0.03;

  // Reactions:
  CD4_Production: => x; compartment*Constant_flux__irreversible(lambda);  // isVersionOf ncit:C18081
  Infectious_Transmission: x => u; compartment*Function_for_Infectious_Transmission(beta, x, y);  // modifiers: y; isVersionOf GO:0019089
  CD4_Natural_Death: x => ; compartment*mu_1*x;  // GO:0008219
  Mitotic_Transmission: => u; compartment*Function_for_Mitotic_Transmission(r, y);  // modifiers: y; isVersionOf ncit:C16864; hasProperty GO:0019089
  CD4LI_Spontaneous_Activation: u => y; compartment*tau*u;  // isVersionOf GO:0042110
  CD4LI_Natural_Death: u => ; compartment*mu_2*u;  // GO:0008219
  CD4AI_Lysis_CTL: y => ; compartment*Function_for_CD4AI_Lysis_CTL(gamma, y, z);  // modifiers: z; isVersionOf GO:0001913
  CD4AI_Natural_Death: y => ; compartment*mu_3*y;  // GO:0008219
  CTL_Proliferation: => z; compartment*Function_for_CTL_Proliferation(nu, y);  // modifiers: y; ncit:C18081
  CTL_Natural_Death: z => ; compartment*mu_4*z;  // GO:0008219

  // Unit definitions:
  unit time = 86400 second;
  unit substance = item;
end
