// SBML level 2 version 4
// dcterms:bibliographicCitation: Mathematical Modeling, Analysis, and Simulation of Tumor Dynamics with Drug Interventions urn:miriam:pubmed:31687042

function Function_for_impact_on_tumor_cell_growth(c_1, N, j, D, k, L, T)
  (c_1*N + j*D + k*L)*T;
end

function Function_for_production_of_natural_killer_cell(s_1, g_1, N, T, h_1)
  s_1 + g_1*N*T*T/(h_1 + T*T);
end

function Function_for_formation_of_dendritic_cell(s_2)
  s_2;
end

function Function_for_removal_of_cytotoxic_CD8__T_cell(h, L, T, u, N, i)
  h*L*T + u*N*L*L + i*L;
end
Function_for_removal_of_cytotoxic_CD8__T_cell is "Function for removal of cytotoxic CD8+ T cell";

function Function_for_removal_of_natural_killer_cell(c_2, T, d_1, D, N, e)
  (c_2*T + d_1*D)*N + e*N;
end

function Function_for_the_impact_on_dendritic_cell_formation(f_1, L, d_2, N, d_3, T, D, g)
  (f_1*L + d_2*N - d_3*T)*D - g*D;
end

function Function_for_formation_of_cytotoxic_CD8__T_cell(f_2, D, T, r_1, N)
  f_2*D*T + r_1*N*T;
end
Function_for_formation_of_cytotoxic_CD8__T_cell is "Function for formation of cytotoxic CD8+ T cell";

function Function_for_growth_of_tumor_cell(a, T, b)
  a*T*(1 - b*T);
end

model New_Model()
  // Unni2019 - Mathematical Modeling, Analysis, and Simulation of Tumor Dynamics with Drug Interventions
  // Mathematical Modeling, Analysis, and Simulation of Tumor Dynamics with Drug Interventions
  // Pranav Unni 1 and Padmanabhan Seshaiyer
  // Abstract
  // Over the last few decades, there have been significant developments in theoretical, experimental, and clinical approaches to understand the dynamics of cancer cells and their interactions with the
  // immune system. These have led to the development of important methods for cancer therapy including virotherapy, immunotherapy, chemotherapy, targeted drug therapy, and many others. Along with this,
  // there have also been some developments on analytical and computational models to help provide insights into clinical observations. This work develops a new mathematical model that combines important
  // interactions between tumor cells and cells in the immune systems including natural killer cells, dendritic cells, and cytotoxic CD8+ T cells combined with drug delivery to these cell sites. These
  // interactions are described via a system of ordinary differential equations that are solved numerically. A stability analysis of this model is also performed to determine conditions for tumor-free
  // equilibrium to be stable. We also study the influence of proliferation rates and drug interventions in the dynamics of all the cells involved. Another contribution is the development of a novel
  // parameter estimation methodology to determine optimal parameters in the model that can reproduce a given dataset. Our results seem to suggest that the model employed is a robust candidate for
  // studying the dynamics of tumor cells and it helps to provide the dynamic interactions between the tumor cells, immune system, and drug-response systems.
  // hasInstance taxonomy:9606 ncit:C25218 mamo:MAMO_0000046
  // isDescribedBy mamo:MAMO_0000046 pubmed:31687042
  // biomodels.db:MODEL1912100006 biomodels.db:BIOMD0000000888
  // hasProperty taxonomy:9606
  // hasProperty ncit:C25218

  // Compartments:
  compartment compartment = 1;

  // Species:
  species T in compartment = 100;  // hasInstance ncit:C98275
  species N in compartment = 1;  // hasInstance BTO:0000914
  species D in compartment = 1;  // hasInstance BTO:0002042
  species L in compartment = 1;  // hasInstance BTO:0000782

  // Parameters:
  a = 0.431;
  b = 2.17e-8;
  c_1 = 3.5e-6;
  c_2 = 1e-7;
  d_1 = 1e-6;
  d_2 = 4e-6;
  d_3 = 0.0001;
  e = 0.0412;
  f_1 = 1e-8;
  f_2 = 0.01;
  g = 0.024;
  h = 3.42e-10;
  i = 0.02;
  j = 1e-7;
  k = 1e-7;
  s_1 = 13000;
  s_2 = 480;
  u = 1.8e-8;
  r_1 = 0;
  g_1 = 0;
  h_1 = 0;

  // Reactions:
  Growth_of_tumor_cell: => T; compartment*Function_for_growth_of_tumor_cell(a, T, b);  // hasProperty GO:0040007
  Impact_on_the_growth_of_tumor_cell_by_dendritic_cell__natural_killer_cell__CD8__cell: T => ; compartment*Function_for_impact_on_tumor_cell_growth(c_1, N, j, D, k, L, T); Impact_on_the_growth_of_tumor_cell_by_dendritic_cell__natural_killer_cell__CD8__cell is "Impact on the growth of tumor cell by dendritic cell, natural killer cell, CD8+ cell";  // modifiers: N, D, L; hasInstance GO:0040007
  Production_of_Natural_killer_cell: => N; compartment*Function_for_production_of_natural_killer_cell(s_1, g_1, N, T, h_1);  // modifiers: T; hasInstance ncit:C25513
  Removal_of_natural_killer_cell: N => ; compartment*Function_for_removal_of_natural_killer_cell(c_2, T, d_1, D, N, e);  // modifiers: T, D
  Formation_of_Dendritic_cell: => D; compartment*Function_for_formation_of_dendritic_cell(s_2);  // hasProperty ncit:C25513
  Impact_on_the_formation_of_dendritic_cell: D => ; compartment*Function_for_the_impact_on_dendritic_cell_formation(f_1, L, d_2, N, d_3, T, D, g);  // modifiers: L, N, T; hasInstance ncit:C25513
  Formation_of_cytotoxic_CD8__T_cell: => L; compartment*Function_for_formation_of_cytotoxic_CD8__T_cell(f_2, D, T, r_1, N); Formation_of_cytotoxic_CD8__T_cell is "Formation of cytotoxic CD8+ T cell";  // modifiers: D, T, N; hasInstance ncit:C25513
  Removal_of_cytotoxic_CD8__T_cell: L => ; compartment*Function_for_removal_of_cytotoxic_CD8__T_cell(h, L, T, u, N, i); Removal_of_cytotoxic_CD8__T_cell is "Removal of cytotoxic CD8+ T cell";  // modifiers: T, N; hasInstance ncit:C64914

  // Unit definitions:
  unit volume = 1e-3 litre;
  unit time = 86400 second;
  unit substance = 1e-3 mole;
end
