// SBML level 2 version 4
// dcterms:bibliographicCitation: urn:miriam:pubmed:24594370

function Function_for_STATP2n_Formation(k5, TJ, STAT, K_5)
  k5*TJ*STAT/(2*(K_5 + STAT));
end

function Function_for_TNFa_mRNA_Degradation(TNFam, t_9)
  TNFam*(ln(2)/t_9);
end

function Function_for_STAT_mRNA_Induction(r_4, IC1, k_26, STATP2n, IC2)
  (r_4*IC1 + k_26*STATP2n)*IC2;
end

function Function_for_IFNBenv_Turnover(gamma, C, vmax2, IFNBm, K_2)
  gamma*C*vmax2*IFNBm/(K_2 + IFNBm);
end

function Function_for_SOCS_mRNA_Degradation(SOCSm, t_4)
  SOCSm*(ln(2)/t_4);
end

function Function_for_IFNaenv_Translation_Secretion(gamma, C, vmax_17, IFNam, K_17)
  gamma*C*vmax_17*IFNam/(K_17 + IFNam);
end

function Function_for_STATP2n_Dephosphorylation(STATP2n, t3)
  STATP2n*(ln(2)/t3);
end

function Function_for_IFNb_mRNA_Turnover(r0, IC1, k15, IRF7Pn, IC2)
  (r0*IC1 + k15*IRF7Pn)*IC2;
end

function Function_for_SOCS_mRNA_Induction(r_3, IC1, k_8, STATP2n, IC2)
  (r_3*IC1 + k_8*STATP2n)*IC2;
end

function Function_for_IFNa_mRNA_Induction(k_16, IRF7Pn, IC2)
  k_16*IRF7Pn*IC2;
end

function Function_for_IFNb_mRNA_Degradation(IFNBm, t1)
  IFNBm*(ln(2)/t1);
end

function Function_for_STAT_Translation(k_26, STATm)
  k_26*STATm;
end

function Function_for_IRF7_Translation(k_12, IRF7m, IC1)
  k_12*IRF7m*IC1;
end

function Function_for_IFNa_mRNA_Degradation(IFNam, t_8)
  IFNam*(ln(2)/t_8);
end

function Function_for_TNFa_Translation_Secretion(gamma, C, vmax_19, TFNam, K_19)
  gamma*C*vmax_19*TFNam/(K_19 + TFNam);
end

function Function_for_STAT_mRNA_Degradation(STATm, t_12)
  STATm*(ln(2)/t_12);
end

function Function_for_TNFa_mRNA_Induction(IC2, r_1, IC1, r_20, TNFenv, K_20)
  IC2*(r_1*IC1 + r_20*TNFenv/(K_20 + TNFenv));
end

function Function_for_IRF7_mRNA_Degradation(IRF7m, t_6)
  IRF7m*(ln(2)/t_6);
end

function Function_for_IRF7_mRNA_Induction(k_11, STATP2n, k_14, IRF7Pn, IC2)
  (k_11*STATP2n + k_14*IRF7Pn)*IC2;
end

function Function_for_STAT_Degradation(STAT, t_13)
  STAT*(ln(2)/t_13);
end

model Fribourg2014___Model_of_influenza_A_virus_infection_dynamics_of_viral_antagonism_and_innate_immune_response()
  // Fribourg2014 - Model of influenza A virus infection dynamics of viral antagonism and innate immune response.
  // This is an ordinary differential equation mathematical model investigating the early responses of human monocyte-derived dendritic cells to infection by two H1N1 influenza A viruses of different
  // clinical outcomes: pandemic A/California/4/2009 and seasonal A/New Caledonia/20/1999.
  // isDescribedBy pubmed:24594370
  // biomodels.db:MODEL1912120001 biomodels.db:BIOMD0000000889
  // hasProperty ncit:C18011
  // hasProperty mamo:MAMO_0000046
  // hasProperty PR:000044797
  // hasProperty ncit:C20493

  // Compartments:
  compartment compartment = 1;  // isVersionOf ncit:C13356

  // Species:
  species IFNBm in compartment = 1;  // encodes ncit:C20495
  species IFNBenv in compartment = 1;  // ncit:C20495
  species STATP2n in compartment = 1;  // hasPart ncit:C19618
  species SOCSm in compartment = 1;  // encodes ncit:C97796
  species IRF7m in compartment = 1;  // encodes ncit:C128883
  species IRF7Pn in compartment = 1;  // isVersionOf ncit:C128883
  species IFNam in compartment = 1;  // encodes ncit:C20494
  species IFNaenv in compartment = 1;  // ncit:C20494
  species TNFam in compartment = 1;  // encodes PR:000000134
  species TFNenv in compartment = 1;  // PR:000000134
  species STATm in compartment = 1;  // encodes ncit:C19618
  species STAT in compartment = 1;  // ncit:C19618

  // Parameters:
  r_0 = 0.001;
  k_15 = 3.6e-5;
  t_1 = 2.5;
  K_217 = 0.002;
  TJ_tot = 0.0001;
  K_3 = 0.0043;
  d = 0.0003;
  K_9 = 780;
  k_5 = 3600;
  K_5 = 0.01;
  t_3 = 0.56;
  r_3 = 1e-7;
  k_8 = 0.0036;
  t_4 = 0.46;
  k_11 = 0.00036;
  t_6 = 1;
  k_12 = 360;
  k_16 = 0.36;
  t_8 = 2;
  r_1 = 0.0001;
  r_20 = 0.001;
  K_20 = 0.0006;
  t_9 = 2;
  K_19 = 0.004;
  r_4 = 1e-6;
  t_12 = 1;
  k_28 = 360;
  t_13 = 15;
  r_5 = 1;
  n_3 = 5;
  b_m = 6;
  sp = 0.3;
  d_1 = 0.1;
  n_1 = 1;
  d_2 = 0.4;
  n_2 = 5;
  delta = 0.0003;
  delta_1 = 0.1;
  delta_2 = 0.4;
  C = 500000;

  // Assignment rules:
  gamma := 1000000000/6.023e23;
  NS := r_5*time^n_3/(b_m^n_3 + time^n_3);
  IC1 := (1 + sp*(NS/delta_1)^n_1)/(1 + (NS/delta_1)^n_1);
  TJ := TJ_tot/(1 + K_9*SOCSm/delta)*((IFNBenv + IFNaenv)/(K_3 + IFNBenv + IFNaenv));
  v_max19 := 46*3600;
  sv := 0.1/0.3;
  IC2 := (1 + sv*(NS/delta_2)^n_2)/(1 + (NS/delta_2)^n_2);
  k_26 := 3600*5e-6;
  k_14 := 3600*8.9e-11;
  v_max217 := 20.1*3600;

  // Reactions:
  IFNb_mRNA_Induction: => IFNBm; compartment*Function_for_IFNb_mRNA_Turnover(r_0, IC1, k_15, IRF7Pn, IC2);  // modifiers: IRF7Pn
  IFNb_mRNA_Degradation: IFNBm => ; compartment*Function_for_IFNb_mRNA_Degradation(IFNBm, t_1);
  IFNBenv_Translation_Secretion: => IFNBenv; compartment*Function_for_IFNBenv_Turnover(gamma, C, v_max217, IFNBenv, K_217);
  STATP2n_Formation: => STATP2n; compartment*Function_for_STATP2n_Formation(k_5, TJ, STAT, K_5);  // modifiers: STAT; isVersionOf ncit:C97201
  STATP2n_Dephosphorylation: STATP2n => ; compartment*Function_for_STATP2n_Dephosphorylation(STATP2n, t_3);  // ncit:C20612
  SOCS_mRNA_Induction: => SOCSm; compartment*Function_for_SOCS_mRNA_Induction(r_3, IC1, k_8, STATP2n, IC2);  // modifiers: STATP2n
  SOCS_mRNA_Degradation: SOCSm => ; compartment*Function_for_SOCS_mRNA_Degradation(SOCSm, t_4);
  IRF7_mRNA_Induction: => IRF7m; compartment*Function_for_IRF7_mRNA_Induction(k_11, STATP2n, k_14, IRF7Pn, IC2);  // modifiers: STATP2n, IRF7Pn
  IRF7_mRNA_Degradation: IRF7m => ; compartment*Function_for_IRF7_mRNA_Degradation(IRF7m, t_6);
  IRF7_Translation: => IRF7Pn; compartment*Function_for_IRF7_Translation(k_12, IRF7m, IC1);  // modifiers: IRF7m
  IFNa_mRNA_Induction: => IFNam; compartment*Function_for_IFNa_mRNA_Induction(k_16, IRF7Pn, IC2);  // modifiers: IRF7Pn
  IFNa_mRNA_Degradation: IFNam => ; compartment*Function_for_IFNa_mRNA_Degradation(IFNam, t_8);
  IFNaenv_Translation_Secretion: => IFNaenv; compartment*Function_for_IFNaenv_Translation_Secretion(gamma, C, v_max217, IFNam, K_217);  // modifiers: IFNam
  TNFa_mRNA_Induction: => TNFam; compartment*Function_for_TNFa_mRNA_Induction(IC2, r_1, IC1, r_20, TFNenv, K_20);  // modifiers: TFNenv
  TNFa_mRNA_Degradation: TNFam => ; compartment*Function_for_TNFa_mRNA_Degradation(TNFam, t_9);
  TNFa_Translation_Secretion: => TFNenv; compartment*Function_for_TNFa_Translation_Secretion(gamma, C, v_max19, TNFam, K_19);  // modifiers: TNFam
  STAT_mRNA_Induction: => STATm; compartment*Function_for_STAT_mRNA_Induction(r_4, IC1, k_26, STATP2n, IC2);  // modifiers: STATP2n
  STAT_mRNA_Degradation: STATm => ; compartment*Function_for_STAT_mRNA_Degradation(STATm, t_12);
  STAT_Translation: => STAT; compartment*Function_for_STAT_Translation(k_28, STATm);  // modifiers: STATm
  STAT_Degradation: STAT => ; compartment*Function_for_STAT_Degradation(STAT, t_13);

  // Unit definitions:
  unit time = 3600 second;
  unit substance = 1e-6 mole;
end
