// SBML level 2 version 4
// dcterms:bibliographicCitation: urn:miriam:pubmed:24444765

function Function_for_HMGCR_Translation(m)
  m;
end

function Function_for_HMGCR_Transcription(mu_m, kappa_m, c, kappa_c, y, x)
  mu_m/(1 + (kappa_m*(1 + (c/kappa_c)^y))^x);
end

function Function_for_Cholesterol_Synthesis(mu_c, h)
  mu_c*h;
end

model Bhattacharya2014___A_mathematical_model_of_the_sterol_regulatory_element_binding_protein_2_cholesterol_biosynthesis_pathway()
  // Bhattacharya2014 - A mathematical model of the sterol regulatory element binding protein 2 cholesterol biosynthesis pathway
  // This is a deterministic nonlinear ordinary differential equation mathematical model of the sterol regulatory element binding protein 2 (SREBP-2) cholesterol genetic regulatory pathway in a
  // hepatocyte.
  // isDescribedBy pubmed:24444765
  // biomodels.db:MODEL1912120004 biomodels.db:BIOMD0000000890
  // hasProperty ncit:C17207
  // hasProperty mamo:MAMO_0000046
  // hasProperty PR:000015612
  // hasProperty ncit:C21050

  // Compartments:
  compartment compartment = 1;  // CL:0000182

  // Species:
  species m in compartment = 3.65e-8;  // encodes ncit:C54701
  species h in compartment = 1.1e-5;  // ncit:C54701
  species c in compartment = 0.023;  // CHEBI:16113

  // Parameters:
  mu_c = 0.462;
  mu_m = 1.9e-10;
  delta_m = 0.00135;
  delta_h = 0.00193;
  delta_c = 0.0036;
  kappa_m = 0.0001;
  kappa_c = 0.001;
  x = 3;
  y = 4;

  // Assignment rules:
  HMGCR_Rescaled := h/0.001;
  mRNA_Rescaled := m/2e-6;

  // Reactions:
  HMGCR_Transcription: => m; compartment*Function_for_HMGCR_Transcription(mu_m, kappa_m, c, kappa_c, y, x);  // modifiers: c
  HMGCR_mRNA_Degradation: m => ; compartment*delta_m*m;
  HMGCR_Translation: => h; compartment*Function_for_HMGCR_Translation(m);  // modifiers: m
  HMGCR_Degradation: h => ; compartment*delta_h*h;
  Cholesterol_Synthesis: => c; compartment*Function_for_Cholesterol_Synthesis(mu_c, h);  // modifiers: h; GO:0006695
  Cholesterol_Utilisation: c => ; compartment*delta_c*c;

  // Unit definitions:
  unit substance = item;
end
