// SBML level 2 version 4
// dcterms:bibliographicCitation: Stability Analysis of a Mathematical Model forGlioma-Immune Interaction under OptimalTherapy urn:miriam:doi:10.1515/ijnsns-2017-0206

function Function_for_increase_in_density_of_glioma_cell(r_1, u)
  r_1*u*(1 - u);
end

function Function_for_decrease_in_density_of_glioma_specific_CD8__T_cell(mu_1, w, alpha_4, u, k_4)
  mu_1*w + alpha_4*(u*w/(u + k_4));
end
Function_for_decrease_in_density_of_glioma_specific_CD8__T_cell is "Function for decrease in density of glioma specific CD8+ T cell";

function Function_for_decrease_in_density_of_glioma_cell(alpha_1, v, alpha_2, w, u, k_1)
  (alpha_1*v + alpha_2*w)/(u + k_1)*u;
end

function Function_for_decrease_in_population_of_macrophage(alpha_3, u, v, k_2)
  alpha_3*(u*v/(u + k_2));
end

function Function_for_increase_in_population_of_macrophage(r_2, v)
  r_2*v*(1 - v);
end

function Function_for_increase_in_density_of_glioma_specific_CD8__T_cell(gamma_1, u, w, k_3)
  gamma_1*u*w/(k_3 + u);
end
Function_for_increase_in_density_of_glioma_specific_CD8__T_cell is "Function for increase in density of glioma specific CD8+ T cell";

model New_Model()
  // Khajanchi2019 - Stability Analysis of a Mathematical Model forGlioma-Immune Interaction under OptimalTherapy
  // Stability Analysis of a Mathematical Model for Glioma-Immune Interaction under Optimal Therapy
  // Subhas Khajanchi
  // Abstract
  // We investigate a mathematical model using a system of coupled ordinary differential equations, which describes the interplay of malignant glioma cells, macrophages, glioma specific CD8+T cells and
  // the immunotherapeutic drug Adoptive Cellular Immunotherapy (ACI). To better understand under what circumstances the glioma cells can be eliminated, we employ the theory of optimal control. We
  // investigate the dynamics of the system by observing biologically feasible equilibrium points and their stability analysis before administration of the external therapy ACI. We solve an optimal
  // control problem with an objective functional which minimizes the glioma cell burden as well as the side effects of the treatment. We characterize our optimal control in terms of the solutions to the
  // optimality system, in which the state system coupled with the adjoint system. Our model simulation demonstrates that the strength of treatment u1(t) plays an important role to eliminate the glioma
  // cells. Finally, we derive an optimal treatment strategy and then solve it numerically.
  // Keywords: malignant gliomas; stability analysis; optimal control; adoptive cellular immunotherapy
  // isDescribedBy doi:10.1515/ijnsns-2017-0206
  // isDerivedFrom doi:10.1007/s00262-007-0387-z doi:10.1371/journal.pone.0123611 doi:10.1016/S0092-8240(05)80260-5
  // biomodels.db:MODEL1912130001 biomodels.db:BIOMD0000000891
  // hasProperty mamo:MAMO_0000046
  // hasTaxon taxonomy:9606

  // Compartments:
  compartment compartment = 1;

  // Species:
  species u in compartment = 0.1;  // hasInstance BTO:0000526
  species v in compartment = 0.55;  // hasInstance BTO:0000801
  species w in compartment = 0.2;  // hasInstance BTO:0000782

  // Parameters:
  r_1 = 0.4822;
  alpha_1 = 0.069943;
  alpha_2 = 2.74492;
  k_1 = 0.90305;
  r_2 = 0.3307;
  alpha_3 = 0.0194;
  k_2 = 0.030584;
  gamma_1 = 0.1245;
  k_3 = 2.8743;
  mu_1 = 0.0074;
  alpha_4 = 0.01694;
  k_4 = 0.378918;

  // Reactions:
  Increase_in_density_of_glioma_cells: => u; compartment*Function_for_increase_in_density_of_glioma_cell(r_1, u);  // hasInstance ncit:C25533
  Decrease_in_density_of_glioma_cell: u => ; compartment*Function_for_decrease_in_density_of_glioma_cell(alpha_1, v, alpha_2, w, u, k_1);  // modifiers: v, w; hasInstance ncit:C64914
  Increase_in_density_of_macrophage_population: => v; compartment*Function_for_increase_in_population_of_macrophage(r_2, v);  // hasInstance ncit:C25533
  Decrease_in_the_density_of_macrophage_population: v => ; compartment*Function_for_decrease_in_population_of_macrophage(alpha_3, u, v, k_2);  // modifiers: u; hasInstance ncit:C64914
  Increase_in_density_of_glioma_specific_CD8__T_cell: => w; compartment*Function_for_increase_in_density_of_glioma_specific_CD8__T_cell(gamma_1, u, w, k_3); Increase_in_density_of_glioma_specific_CD8__T_cell is "Increase in density of glioma specific CD8+ T cell";  // modifiers: u; hasInstance ncit:C25533
  decrease_in_density_of_glioma_specific_CD8__T_cell: w => ; compartment*Function_for_decrease_in_density_of_glioma_specific_CD8__T_cell(mu_1, w, alpha_4, u, k_4); decrease_in_density_of_glioma_specific_CD8__T_cell is "decrease in density of glioma specific CD8+ T cell";  // modifiers: u; hasInstance ncit:C64914

  // Unit definitions:
  unit volume = 1e-3 litre;
  unit substance = 1e-3 mole;
end
