// SBML level 2 version 4
// dcterms:bibliographicCitation: urn:miriam:pubmed:23820037

function Function_for_x_Formation(A, x, epsilon, z)
  A*(1 - x)/(epsilon + z);
end

function Function_for_y_Formation(x)
  x*x;
end

function Function_for_z_Consumption(C, z, x, epsilon)
  C*z*(1 - x)/(epsilon + z);
end

function Function_for_x_Consumption(B, z, x, delta)
  B*z*x/(delta + x);
end

function Function_for_z_Formation(y)
  y;
end

model GonzalezMiranda2013___The_effect_of_circadian_oscillations_on_biochemical_cell_signaling_by_NF__B()
  // GonzalezMiranda2013 - The effect of circadian oscillations on biochemical cell signaling by NF-κB
  // This is a mathematical model for NF-κB oscillations, described by a set of ordinary nonlinear differential equations, when perturbed by a circadian oscillation.
  // isDescribedBy pubmed:23820037
  // isDerivedFrom pubmed:16829571
  // biomodels.db:MODEL1912160002 biomodels.db:BIOMD0000000893
  // hasProperty ncit:C16348
  // hasProperty mamo:MAMO_0000046
  // hasProperty efo:0004354

  // Compartments:
  compartment compartment = 1;  // isVersionOf CL:0000000

  // Species:
  species x in compartment = 0;  // ncit:C17380
  species y in compartment = 0;  // encodes ncit:C104199
  species z in compartment = 0;  // ncit:C104199

  // Parameters:
  A = 0.007;
  B = 954.5;
  C = 0.035;
  epsilon = 2e-5;
  delta = 0.029;

  // Reactions:
  x_Formation: => x; compartment*Function_for_x_Formation(A, x, epsilon, z);  // modifiers: z
  x_Consumption: x => ; compartment*Function_for_x_Consumption(B, z, x, delta);  // modifiers: z
  y_Formation: => y; compartment*Function_for_y_Formation(x);  // modifiers: x
  y_Consumption: y => ; compartment*k1*y;
    k1 = 1;
  z_Formation: => z; compartment*Function_for_z_Formation(y);  // modifiers: y
  z_Consumption: z => ; compartment*Function_for_z_Consumption(C, z, x, epsilon);  // modifiers: x

  // Unit definitions:
  unit substance = item;
end
