// SBML level 2 version 4
// dcterms:bibliographicCitation: Noise-assisted interactions of tumor and immune cells. urn:miriam:pubmed:21929038

function Function_for_formation_of_tumor_system(R, Dx, tau, Dz, x, z)
  (1 + R*(1 - Dx*tau) + 0.5*Dx*Dz*tau)*x + Dx*(1 + R*tau)*z;
end

function Function_for_Formation_of_effector_cell_against_tumor_cell(y, z)
  y*z;
end

function Function_for_removal_of_tumor_detecting_cell(mu, R, Dx, tau, Dz, z)
  (mu - (R*(1 + Dx*tau) + Dx*(1 + 0.5*Dz*tau)))*z;
end

function Function_for_Removal_of_effector_cell_functioning_against_tumor_cell(p, Dy, y)
  (p - Dy)*y;
end

function Function_for_removal_of_tumor_system(x, y)
  x*x + x*y;
end

function Function_for_formation_of_tumor_detecting_cell(R, Dx, tau, Dz, x)
  (R*(1 - Dx*tau) + Dx*Dz*tau)*x;
end

model Bose2011___Noise_assisted_interactions_of_tumor_and_immune_cells()
  // Bose2011 - Noise-assisted interactions of tumor and immune cells
  // Noise-assisted interactions of tumor and immune cells.
  // Bose T1, Trimper S.
  // Author information
  // 1
  // Institute of Physics, Martin-Luther-University, D-06099 Halle, Germany. thomas.bose@physik.uni-halle.de
  // Abstract
  // We consider a three-state model comprising tumor cells, effector cells, and tumor-detecting cells under the influence of noises. It is demonstrated that inevitable stochastic forces existing in all
  // three cell species are able to suppress tumor cell growth completely. Whereas the deterministic model does not reveal a stable tumor-free state, the auto-correlated noise combined with
  // cross-correlation functions can either lead to tumor-dormant states, tumor progression, as well as to an elimination of tumor cells. The auto-correlation function exhibits a finite correlation time
  // τ, while the cross-correlation functions shows a white-noise behavior. The evolution of each of the three kinds of cells leads to a multiplicative noise coupling. The model is investigated by means
  // of a multivariate Fokker-Planck equation for small τ. The different behavior of the system is, above all, determined by the variation of the correlation time and the strength of the cross-correlation
  // between tumor and tumor-detecting cells. The theoretical model is based on a biological background discussed in detail, and the results are tested using realistic parameters from experimental
  // observations.
  // hasInstance mamo:MAMO_0000046 taxonomy:9606 ncit:C48686
  // isDescribedBy ncit:C48686 pubmed:21929038
  // isDerivedFrom doi.org:10.1103/PhysRevE.79.051903
  // biomodels.db:MODEL1912160003 biomodels.db:BIOMD0000000894
  // hasProperty mamo:MAMO_0000046
  // hasTaxon taxonomy:9606

  // Compartments:
  compartment compartment = 1;

  // Species:
  species x in compartment = 1e-6;  // hasInstance ncit:C12922
  species y in compartment = 0.01;  // hasInstance ncit:C28241
  species z in compartment = 0;  // hasInstance ncit:C12535

  // Parameters:
  t = 1;
  tau = 0.3;
  R = 1;
  Dx = 2.1;
  Dy = 0.01;
  Dz = 1.2;
  p = 0.06;
  mu = 20;

  // Reactions:
  Formation_of_tumor_system: => x; compartment*Function_for_formation_of_tumor_system(R, Dx, tau, Dz, x, z);  // modifiers: z; hasInstance ncit:C25513
  Removal_of_tumor_system: x => ; compartment*Function_for_removal_of_tumor_system(x, y);  // modifiers: y; hasInstance ncit:C64914
  Formation_of_effector_cell_against_tumor_cell: => y; compartment*Function_for_Formation_of_effector_cell_against_tumor_cell(y, z);  // modifiers: z; hasInstance ncit:C25513
  Removal_of_effector_cell_functioning_against_tumor_cell: y => ; compartment*Function_for_Removal_of_effector_cell_functioning_against_tumor_cell(p, Dy, y);  // hasInstance ncit:C64914
  Formation_of_tumor_detecting_cell: => z; compartment*Function_for_formation_of_tumor_detecting_cell(R, Dx, tau, Dz, x);  // modifiers: x; hasInstance ncit:C25513
  Removal_of_tumor_detecting_cell: z => ; compartment*Function_for_removal_of_tumor_detecting_cell(mu, R, Dx, tau, Dz, z);  // hasInstance ncit:C64914

  // Unit definitions:
  unit volume = 1e-3 litre;
  unit substance = 1e-3 mole;
end
