// SBML level 2 version 4
// dcterms:bibliographicCitation: urn:miriam:pubmed:23603730

function Function_for_Si_Proliferation(pSi, Si, N, Mi)
  pSi*Si*(1 - Si/(Si + N*Mi));
end

function Function_for_Mi_Lysis_Si(lMi, CD4, CD8, Mi, cCD4CD8)
  lMi*(CD4 + CD8/Mi)/(CD4 + CD8/Mi + cCD4CD8);
end

function Function_for_CD8_Growth_Boost(gbCD8, CD8, cc1CD8, k2CD8)
  gbCD8*CD8*(1 - CD8/cc1CD8)*(CD8/(CD8 + k2CD8));
end

function Function_for_Mi_Lysis(lMi, CD4, CD8, Mi, cCD4CD8, apop, Si, N)
  (1 - apop*Si/(Si + N + Mi))*lMi*(CD4 + CD8/Mi)/(CD4 + CD8/Mi + cCD4CD8);
end

function Function_for_Mr_Infection_Si(iMr, Mr, Se, cSeMr)
  iMr*Mr*Se/(Se + cSeMr);
end

function Function_for_CD4_Interaction_Naive_Se(CD4n, CD4, Se, ndCD4, kSedCD4)
  CD4n*CD4*Se^ndCD4/(Se^ndCD4 + kSedCD4^ndCD4);
end

function Function_for_CD8_Competition(compCD8, CD8, Se, w1, CD4, ncompcd8, kcompCD4)
  compCD8*CD8*(Se/(Se + w1))*(CD4^ncompcd8/(CD4^ncompcd8 + kcompCD4^ncompcd8));
end

function Function_for_Mi_Bursting(bMi, Mi, Si, mMi, N)
  bMi*Mi*Si^mMi/(Si^mMi + (N*Mi)^mMi);
end

function Function_for_CD4_Recruitment(CD4rec, vrecCD4, Se, kmrecCD4)
  CD4rec*vrecCD4*Se/(Se + kmrecCD4);
end

function Constant_flux__irreversible(v)
  v;
end
Constant_flux__irreversible is "Constant flux (irreversible)";

function Function_for_Mr_Recruitment(Mrrec, vrecMr, Se, kmrecMr)
  Mrrec*vrecMr*Se/(Se + kmrecMr);
end

function Function_for_Mr_Infection(iMr, Mr, Se, cSeMri)
  iMr*Mr*Se/(Se + cSeMri);
end

function Function_for_Mr_Growth_Boost(Mr, ccMr, p1, gbMr)
  gbMr*Mr*(1 - Mr/(ccMr - ccMr*p1));
end

function Function_for_Mr_Activation(aMr, Mr, Se, cSeMr)
  aMr*Mr*Se/(Se + cSeMr);
end

function Function_for_CD4_Growth_Boost(gbCD4, CD4, cc1CD4, ngbCD4, k2CD4)
  gbCD4*CD4*(1 - CD4/cc1CD4)*(CD4^ngbCD4/(CD4^ngbCD4 + k2CD4^ngbCD4));
end

function Function_for_Se_Proliferation(pSe, Se, ccSe)
  pSe*Se*(1 - Se/ccSe);
end

function Function_for_Ma_Deactivation(daMa, Ma, CD4, cdaMA)
  daMa*Ma*CD4/(CD4 + cdaMA);
end

model Schokker2013___A_mathematical_model_representing_cellular_immune_development_and_response_to_Salmonella_of_chicken_intestinal_tissue()
  // Schokker2013 - A mathematical model representing cellular immune development and response to Salmonella of chicken intestinal tissue
  // This is a dynamic mathematical model describing the development of the cellular branch of the intestinal immune system of poultry during the first 42 days of life, and of its response towards an oral
  // infection with Salmonella enterica serovar Enteritidis.
  // isDescribedBy pubmed:23603730
  // biomodels.db:MODEL1912160004 biomodels.db:BIOMD0000000895
  // hasProperty ncit:C17930
  // hasProperty mamo:MAMO_0000046
  // hasProperty ncit:C34082
  // hasProperty ncit:C157974

  // Compartments:
  compartment compartment = 1;  // occursIn ncit:C34082

  // Species:
  species CD4 in compartment = 9000000;  // CL:0000492
  species CD8 in compartment = 7000000;  // ncit:C12542
  species Mr in compartment = 9000000;  // CL:0000864
  species Ma in compartment = 0;  // CL:0000863
  species Mi in compartment = 100;  // ncit:C12558; isVersionOf BTO:0000152
  species Se in compartment = 200;  // ncit:C76380; occursIn GO:0005576
  species Si in compartment = 100;  // ncit:C76380; hasProperty ncit:C28217
  species CD4rec in compartment = 27000000;  // isVersionOf CL:0000492
  species Mrrec in compartment = 20000000;  // isVersionOf ncit:C12558

  // Parameters:
  sMr = 300000;
  drMr = 0.011;
  aMr = 100;
  cSeMr = 1;
  iMr = 0.1;
  cSeMri = 600000;
  kSeMr = 5e-8;
  gbMr = 1.2;
  ccMr = 25000000;
  p1 = 0.65;
  vrecMr = 1;
  kmrecMr = 1000;
  drMa = 0.08;
  kSeMa = 2.6e-7;
  daMa = 40;
  cdaMa = 30000000;
  N = 30;
  bMi = 0.4;
  mMi = 2;
  lMi = 0.8;
  cCD4CD8 = 10;
  apop = 0.7;
  drMi = 0.011;
  sCD4 = 490000;
  drCD4 = 0.016;
  gbCD4 = 0.19;
  cc1CD4 = 82000000;
  ngbCD4 = 2;
  k2CD4 = 8700000;
  kmrecCD4 = 1;
  vrecCD4 = 100;
  CD4n = 0.4;
  ndCD4 = 8;
  kSedCD4 = 4200;
  kSeCD4 = 1e-9;
  drCD8 = 0.001;
  sCD8 = 430000;
  gbCD8 = 1.44;
  cc1CD8 = 13000000;
  k2CD8 = 47000000;
  ncompCD4 = 0.5;
  kcompCD4 = 34000000;
  compCD8 = 0.85;
  w1 = 1e-25;
  drSe = 27.8;
  pSe = 35;
  ccSe = 500000;
  drSi = 0.05;
  pSi = 4.1;

  // Reactions:
  Mr_Source: => Mr; compartment*Constant_flux__irreversible(sMr);  // isVersionOf GO:0045123
  Mr_Growth_Boost: => Mr; compartment*Function_for_Mr_Growth_Boost(Mr, ccMr, p1, gbMr);  // isVersionOf ncit:C18081
  Mr_Recruitment: Mrrec => Mr; compartment*Function_for_Mr_Recruitment(Mrrec, vrecMr, Se, kmrecMr);  // modifiers: Se; isVersionOf GO:0045123
  Ma_Deactivation: Ma => Mr; compartment*Function_for_Ma_Deactivation(daMa, Ma, CD4, cdaMa);  // modifiers: CD4; isVersionOf ncit:C40846
  Mr_Infection: Mr + Se => Mi; compartment*Function_for_Mr_Infection(iMr, Mr, Se, cSeMri);  // isVersionOf ncit:C2890
  Mr_Activation: Mr => Ma; compartment*Function_for_Mr_Activation(aMr, Mr, Se, cSeMr);  // modifiers: Se; GO:0042116
  Se_Killing_Mr: Mr + Se => ; compartment*kSeMr*Mr*Se;  // isVersionOf GO:0001906
  Mr_Death: Mr => ; compartment*drMr*Mr;  // isVersionOf GO:0008219
  CD4_Source: => CD4; compartment*Constant_flux__irreversible(sCD4);  // isVersionOf GO:0045123
  CD4_Growth_Boost: => CD4; compartment*Function_for_CD4_Growth_Boost(gbCD4, CD4, cc1CD4, ngbCD4, k2CD4);  // isVersionOf ncit:C18081
  CD4_Recruitment: CD4rec => CD4; compartment*Function_for_CD4_Recruitment(CD4rec, vrecCD4, Se, kmrecCD4);  // modifiers: Se; isVersionOf GO:0045123
  Se_Killing_CD4: CD4 + Se => ; compartment*kSeCD4*CD4*Se;  // isVersionOf GO:0001906
  CD4_Interaction_Naive_Se: CD4 => ; compartment*Function_for_CD4_Interaction_Naive_Se(CD4n, CD4, Se, ndCD4, kSedCD4);  // modifiers: Se; hasPart ncit:C97350
  CD4_Death: CD4 => ; compartment*drCD4*CD4;  // isVersionOf GO:0008219
  CD8_Source: => CD8; compartment*Constant_flux__irreversible(sCD8);  // isVersionOf GO:0045123
  CD8_Growth_Boost: => CD8; compartment*Function_for_CD8_Growth_Boost(gbCD8, CD8, cc1CD8, k2CD8);  // isVersionOf ncit:C18081
  CD8_Competition: CD8 => ; compartment*Function_for_CD8_Competition(compCD8, CD8, Se, w1, CD4, ncompCD4, kcompCD4);  // modifiers: Se, CD4; isVersionOf GO:0035212
  CD8_Death: CD8 => ; compartment*drCD8*CD8;  // isVersionOf GO:0008219
  Ma_Death: Ma => ; compartment*drMa*Ma;  // isVersionOf GO:0008219
  Se_Killing_Ma: Ma + Se => ; compartment*kSeMa*Ma*Se;  // isVersionOf GO:0001906
  Mi_Bursting: Si + Mi => Se; compartment*Function_for_Mi_Bursting(bMi, Mi, Si, mMi, N);  // isVersionOf ncit:C129692
  Mi_Lysis: Mi => ; compartment*Function_for_Mi_Lysis(lMi, CD4, CD8, Mi, cCD4CD8, apop, Si, N);  // modifiers: CD4, CD8, Si; isVersionOf ncit:C129692
  Mi_Death: Mi => ; compartment*drMi*Mi;  // isVersionOf GO:0008219
  Se_Proliferation: => Se; compartment*Function_for_Se_Proliferation(pSe, Se, ccSe);  // ncit:C18081
  Se_Death: Se => ; compartment*drSe*Se;  // isVersionOf GO:0008219
  Si_Death: Si => ; compartment*drSi*Si;  // isVersionOf GO:0008219
  Si_Proliferation: => Si; compartment*Function_for_Si_Proliferation(pSi, Si, N, Mi);  // modifiers: Mi; ncit:C18081
  Mr_Infection_Si: => Si; compartment*Function_for_Mr_Infection_Si(iMr, Mr, Si, cSeMr);  // modifiers: Mr; isVersionOf ncit:C2890
  Mi_Lysis_Si: Si => ; compartment*Function_for_Mi_Lysis_Si(lMi, CD4, CD8, Mi, cCD4CD8);  // modifiers: CD4, CD8, Mi; isVersionOf ncit:C129692

  // Unit definitions:
  unit volume = 1e-3 litre;
  unit substance = item;
  unit time = 86400 second;
end
