// SBML level 2 version 4
// dcterms:bibliographicCitation: urn:miriam:pubmed:19327370

function Constant_flux__irreversible(v)
  v;
end
Constant_flux__irreversible is "Constant flux (irreversible)";

function Function_for_Trimer_Formation(k_3, HSF)
  k_3*HSF^3;
end

function Function_for_mRNA_Transcription(k_8, HSF_3_HSE)
  k_8*HSF_3_HSE;
end

model Szymanska2009___Mathematical_modeling_of_heat_shock_protein_synthesis_in_response_to_temperature_change()
  // Szymanska2009 - Mathematical modeling of heat shock protein synthesis in response to temperature change
  // This is a mathematical model of heat shock protein synthesis induced by an external temperature stimulus. The model consists of a system of nine nonlinear ordinary differential equations describing
  // the temporal evolution of key variables involved in the regulation of HSP synthesis.
  // isDescribedBy pubmed:19327370
  // biomodels.db:MODEL1912160005 biomodels.db:BIOMD0000000896
  // hasProperty ncit:C16672
  // hasProperty ncit:C17132
  // hasProperty mamo:MAMO_0000046
  // hasProperty ncit:C21065

  // Compartments:
  compartment compartment = 1;

  // Species:
  species Hsp70 in compartment = 2.73546;  // ncit:C17765
  species HSF in compartment = 0.332019;  // hasInstance ncit:C71446
  species S in compartment = 3.09e-17;  // isVersionOf ncit:C120264; hasProperty MI:0908
  species Hsp70_HSF in compartment = 76.4593;  // hasPart ncit:C71446; hasPart ncit:C17765
  species Hsp70_S in compartment = 1.74782e-14;  // hasPart ncit:C17765; hasPart ncit:C120264
  species HSF_3 in compartment = 0.0535203;  // hasPart ncit:C71446
  species HSE in compartment = 18.984;  // SO:0001850
  species HSF_3_HSE in compartment = 1.01603;  // hasPart SO:0001850; hasPart ncit:C71446
  species mRNA in compartment = 1.01603;  // encodes ncit:C17765; isVersionOf ncit:C813

  // Parameters:
  k_1 = 0.42;
  l_1 = 0.005;
  k_2 = 0.42;
  l_2 = 0.005;
  k_3 = 0.023;
  l_3 = 0.00575;
  k_4 = 0.035;
  k_6 = 0.023;
  l_6 = 0.00036;
  k_10 = 0.014;
  l_10 = 0.013;
  k_8 = 0.035;
  k_7 = 0.035;
  l_7 = 0.035;
  F_T_Scale = 5.5;

  // Assignment rules:
  Temperature := piecewise(37, time <= 10, 42);
  V_den := (1 - 0.4/exp(Temperature - 37))*0.03*1.4^(Temperature - 37);
  F_T := V_den*F_T_Scale;

  // Reactions:
  Hsp70_Substrate_Association: Hsp70 + HSF => Hsp70_HSF; compartment*k_1*Hsp70*HSF;
  Hsp70_Substrate_Dissociation: Hsp70_HSF => Hsp70 + HSF; compartment*l_1*Hsp70_HSF;
  Hsp70_S_Association: Hsp70 + S => Hsp70_S; compartment*k_2*Hsp70*S;
  Hsp70_S_Dissociation: Hsp70_S => Hsp70 + S; compartment*l_2*Hsp70_S;
  Trimer_Formation: 3 HSF => HSF_3; compartment*Function_for_Trimer_Formation(k_3, HSF);
  Trimer_Dissociation: HSF_3 + Hsp70 => 2 HSF + Hsp70_HSF; compartment*l_3*HSF_3*Hsp70;
  Hsp70_Synthesis: mRNA => Hsp70; compartment*k_4*mRNA;
  Hsp70_S_Substrate_Refolding: Hsp70_S => Hsp70; compartment*k_10*Hsp70_S;  // isVersionOf ncit:C17568
  Hsp70_Degradation: Hsp70 => ; compartment*l_10*Hsp70;
  Hsp70_S_Formation: S + Hsp70_HSF => Hsp70_S + HSF; compartment*k_6*S*Hsp70_HSF;
  Hsp70_S_Substrate_Dissociation: Hsp70_S + HSF => Hsp70_HSF + S; compartment*l_6*Hsp70_S*HSF;
  HSF_HSE_Association: HSF_3 + HSE => HSF_3_HSE; compartment*k_7*HSF_3*HSE;
  HSF_HSE_Dissociation: HSF_3_HSE => HSE + HSF_3; compartment*l_7*HSF_3_HSE;
  mRNA_Transcription: => mRNA; compartment*Function_for_mRNA_Transcription(k_8, HSF_3_HSE);  // modifiers: HSF_3_HSE
  Protein_Denaturation: => S; compartment*Constant_flux__irreversible(F_T);  // GO:0030164

  // Unit definitions:
  unit volume = 1e-3 litre;
  unit time = 60 second;
  unit substance = 1e-3 mole;
end
