// SBML level 2 version 4
// dcterms:bibliographicCitation: The combined effects of optimal control in cancer remission urn:miriam:doi:10.1016/j.amc.2015.09.012

function Function_for_removal_of_activated_tumor_immune_cell(m, E, T, d)
  m*E*T + d*E;
end

function Function_for_formation_of_immune_effector_cell(s, e1, p, E, T, g)
  s*e1 + p*E*T/(g + T);
end

function Function_for_removal_of_tumor_cell(n, E, T, e2)
  n*E*T + e2*T;
end

function Function_for_formation_of_tumor_cell(a, T, b)
  a*T*(1 - b*T);
end

model New_Model()
  // Khajanchi2015 - The combined effects of optimal control in cancer remission
  // The combined effects of optimal control in cancer remission
  // SubhasKhajanchi
  // DibakarGhosh
  // Abstract
  // We investigate a mathematical model depicting the nonlinear dynamics of immunogenic tumors as envisioned by Kuznetsov et al. [1]. To understand the dynamics under what circumstances the cancer cells
  // can be eliminated, we implement the theory of optimal control. We design two types of external treatment strategies, one is Adoptive Cellular Immunotherapy and another is interleukin-2. Our aim is to
  // establish the treatment regimens that maximize the effector cell count and minimize the tumor cell burden and the deleterious effects of the total amount of drugs. We derive the existence of an
  // optimal control by using the boundedness of solutions. We characterize the optimality system, in which the state system is coupled with co-states. The uniqueness of an optimal control of our problem
  // is also analyzed. Finally, we demonstrate the numerical illustrations that the optimal regimens reduce the tumor burden under different scenarios.
  // isDescribedBy doi:10.1016/j.amc.2015.09.012
  // isDerivedFrom doi:10.1080/10273660108833067 doi:10.3934/mbe.2005.2.499
  // biomodels.db:MODEL1912170001 biomodels.db:BIOMD0000000897
  // hasProperty mamo:MAMO_0000046
  // hasTaxon taxonomy:9606

  // Compartments:
  compartment compartment = 1;

  // Species:
  species E in compartment = 1708110;  // hasProperty ncit:C28241
  species T in compartment = 8286380;  // hasProperty ncit:C12922

  // Parameters:
  s = 13000;
  p = 0.1245;
  g = 20190000;
  m = 3.422e-10;
  d = 0.0412;
  a = 0.18;
  b = 2e-9;
  n = 1.101e-7;
  e1 = 1;
  e2 = 0;

  // Reactions:
  Fomation_of_activated_immune_effector_cell: => E; compartment*Function_for_formation_of_immune_effector_cell(s, e1, p, E, T, g);  // modifiers: T; hasProperty ncit:C25513
  Removal_of_activated_tumor_immune_cell: E => ; compartment*Function_for_removal_of_activated_tumor_immune_cell(m, E, T, d);  // modifiers: T; hasProperty ncit:C64914
  Formation_of_tumor_cell: => T; compartment*Function_for_formation_of_tumor_cell(a, T, b);  // hasProperty ncit:C25513
  Removal_of_tumor_cell: T => ; compartment*Function_for_removal_of_tumor_cell(n, E, T, e2);  // modifiers: E; hasProperty ncit:C64914

  // Unit definitions:
  unit volume = 1e-3 litre;
  unit substance = 1e-3 mole;
end
