// SBML level 2 version 4
// dcterms:bibliographicCitation: urn:miriam:pubmed:29745850

function Function_for_LSC_Differentiation(p_30, v_30, L)
  (1 - p_30)*v_30*L;
end

function Function_for_PC_Differentiation(p_2_D, v_2_D, A)
  (1 - p_2_D)*v_2_D*A;
end

function Function_for_HSC_Self_Renewal(p_1_D, K_1, Z_1, v_1_D, S)
  p_1_D*(K_1 - Z_1)*v_1_D*S;
end

function Function_for_HSC_Differentiation(p_1_D, v_1_D, S)
  (1 - p_1_D)*v_1_D*S;
end

function Function_for_PC_Self_Renewal(p_2_D, K_2, Z_2, v_2_D, A)
  p_2_D*(K_2 - Z_2)*v_2_D*A;
end

function Function_for_LSC_Self_Renewal(p_30, K_2, Z_2, v_30, L)
  p_30*(K_2 - Z_2)*v_30*L;
end

model Jiao2018___Feedback_regulation_in_a_stem_cell_model_with_acute_myeloid_leukaemia()
  // Jiao2018 - Feedback regulation in a stem cell model with acute myeloid leukaemia
  // This is a mathematical model describing the hematopoietic lineages with leukemia lineages, as controlled by end-product negative feedback inhibition. Variables include hematopoietic stem cells,
  // progenitor cells, terminally differentiated HSCs, leukemia stem cells, and terminally differentiated leukemia stem cells.
  // isDescribedBy pubmed:29745850
  // biomodels.db:MODEL1912170002 biomodels.db:BIOMD0000000898
  // hasProperty ncit:C82652
  // hasProperty ncit:C3171
  // hasProperty ncit:C12551
  // hasProperty mamo:MAMO_0000046

  // Compartments:
  compartment compartment = 1;  // ncit:C12431

  // Species:
  species S_HSC in compartment = 10;  // ncit:C12551
  species A_PC in compartment = 0;  // isVersionOf ncit:C12662
  species D_TDSC in compartment = 0;  // isVersionOf ncit:C12551; hasProperty EFO:0002954
  species L_LSC in compartment = 10;  // ncit:C41069
  species T_TDLC in compartment = 0;  // hasProperty EFO:0002954; isPropertyOf ncit:C41069

  // Parameters:
  p_10 = 0.45;
  p_20 = 0.68;
  p_30 = 0.8;
  v_10 = 0.5;
  v_20 = 0.72;
  v_30 = 0.7;
  d_1 = 0.275;
  d_2 = 0.3;
  g_1 = 0.03;
  g_2 = 0.025;
  h_1 = 0.2;
  h_2 = 0.11;
  m = 1;
  n = 1;
  K_1 = 1;
  K_2 = 1;

  // Assignment rules:
  v_2_D := v_20/(1 + h_2*D_TDSC^n);
  v_1_D := v_10/(1 + h_1*D_TDSC^n);
  Z_1 := S_HSC;
  Z_2 := A_PC + L_LSC;
  p_2_D := p_20/(1 + g_2*D_TDSC^n);
  p_1_D := p_10/(1 + g_1*D_TDSC^n);

  // Reactions:
  HSC_Self_Renewal: => S_HSC; compartment*Function_for_HSC_Self_Renewal(p_1_D, K_1, Z_1, v_1_D, S_HSC);  // isVersionOf ncit:C18081
  HSC_Differentiation: S_HSC => 2 A_PC; compartment*Function_for_HSC_Differentiation(p_1_D, v_1_D, S_HSC);  // isVersionOf ncit:C19045
  PC_Self_Renewal: => A_PC; compartment*Function_for_PC_Self_Renewal(p_2_D, K_2, Z_2, v_2_D, A_PC);  // isVersionOf ncit:C18081
  PC_Differentiation: A_PC => 2 D_TDSC; compartment*Function_for_PC_Differentiation(p_2_D, v_2_D, A_PC);  // isVersionOf ncit:C19045
  TDC_Apoptosis: D_TDSC => ; compartment*d_1*D_TDSC;  // ncit:C17557
  LSC_Self_Renewal: => L_LSC; compartment*Function_for_LSC_Self_Renewal(p_30, K_2, Z_2, v_30, L_LSC);  // isVersionOf ncit:C18081
  LSC_Differentiation: L_LSC => 2 T_TDLC; compartment*Function_for_LSC_Differentiation(p_30, v_30, L_LSC);  // isVersionOf ncit:C19045
  TDL_Apoptosis: T_TDLC => ; compartment*d_2*T_TDLC;  // ncit:C17557

  // Unit definitions:
  unit substance = item;
end
