// SBML level 2 version 4
// dcterms:bibliographicCitation: Persistence analysis in a Kolmogorov-type model for cancer-immune system competition urn:miriam:doi:10.1063/1.4825874

function Function_for_formation_of_cancer_cell(alpha_1, C, beta_1)
  alpha_1*C*(1 - C/beta_1);
end

function Function_for_removal_of_B_cell(delta_1, B)
  delta_1*B;
end

function Function_for_removal_of_cancer_cell(gamma_1, C, B, gamma_2, T)
  gamma_1/(1 + gamma_1*C)*C*B + gamma_2/(1 + gamma_2*C)*C*T;
end

function Function_for_activation_of_B_cell_induced_by_cancer_cell(alpha_2, C, B, bata_2, gamma_1)
  alpha_2*C*B*(1 - B/bata_2)*(gamma_1/(1 + gamma_1*C));
end

function Function_for_activation_of_T_cell_induced_by_cancer_cell(alpha_3, C, T, beta_3, gamma_2)
  alpha_3*C*T*(1 - T/beta_3)*(gamma_2/(1 + gamma_2*C));
end

function Function_for_removal_of_T_cell(delta_2, T)
  delta_2*T;
end

model New_Model()
  // Bianca2013 - Persistence analysis in a Kolmogorov-type model for cancer-immune system competition
  // Persistence analysis in a Kolmogorov-type model for cancer-immune system competition
  // AIP Conference Proceedings 1558, 1797 (2013); https://doi.org/10.1063/1.4825874
  // C. Bianca
  // Dipartimento di Scienze Matematiche, Politecnico di Torino, Torino, Italy
  // F. Pappalardo
  // Dipartimento di Scienza del Farmaco, Università degli Studi di Catania, Catania, Italy
  // M. Pennisi and M. A. Ragusa
  // Dipartimento di Matematica e Informatica, Università degli Studi di Catania, Catania, Italy
  // isDescribedBy doi:10.1063/1.4825874
  // isDerivedFrom doi.org:10.4039/entm9745fv
  // hasProperty mamo:MAMO_0000046
  // hasProperty GO:0006955
  // hasTaxon taxonomy:9606
  // biomodels.db:MODEL1912180002 biomodels.db:BIOMD0000000900

  // Compartments:
  compartment compartment = 1;

  // Species:
  species C in compartment = 1;  // hasInstance efo:0000311
  species B in compartment = 1;  // hasProperty BTO:0000776
  species T in compartment = 1;  // hasProperty BTO:0000782

  // Parameters:
  alpha_1 = 0.05;
  alpha_2 = 0.31;
  alpha_3 = 0.5;
  gamma_1 = 0.5;
  gamma_2 = 0.65;
  beta_1 = 10;
  beta_2 = 3;
  beta_3 = 3;

  // Assignment rules:
  delta_2 := ln(2)/4;
  delta_1 := ln(2)/7;

  // Reactions:
  Formation_of_cancer_cell: => C; compartment*Function_for_formation_of_cancer_cell(alpha_1, C, beta_1);  // hasInstance ncit:C25513
  Removal_of_cancer_cell_by_the_action_of_B_cell_and_T_cell: C => ; compartment*Function_for_removal_of_cancer_cell(gamma_1, C, B, gamma_2, T);  // modifiers: B, T; hasProperty ncit:C64914
  activation_of_B_cell_induced_by_cancer_cell: => B; compartment*Function_for_activation_of_B_cell_induced_by_cancer_cell(alpha_2, C, B, beta_2, gamma_1);  // modifiers: C; hasProperty ncit:C64382
  Removal_of_B_cell: B => ; compartment*Function_for_removal_of_B_cell(delta_1, B);  // hasProperty ncit:C64914
  Activation_of_T_cell_induced_by_cancer_cell: => T; compartment*Function_for_activation_of_T_cell_induced_by_cancer_cell(alpha_3, C, T, beta_3, gamma_2);  // modifiers: C; hasProperty ncit:C64382
  Removal_of_T_cell: T => ; compartment*Function_for_removal_of_T_cell(delta_2, T);  // hasProperty ncit:C64914

  // Unit definitions:
  unit volume = 1e-3 litre;
  unit substance = 1e-3 mole;
end
