// SBML level 2 version 4
// dcterms:bibliographicCitation: A fractional mathematical model of breast cancer competition model urn:miriam:doi:10.1016/j.chaos.2019.06.027

function Function_for_removal_of_stem_cell_from_the_system(gamma1, I, C)
  gamma1*I*C;
end

function Function_for_formation_of_Stem_cell(k1, C, M1, p1, E, a1)
  k1*C*(1 - C/M1) + p1*C*E/(a1 + C);
end

function Function_for_increase_in_healthy_cell_in_the_system(q, H, M3)
  q*H*(1 - H/M3);
end

function Function_for_decrease_in_healthy_cell(delta, H, T, p3, E, a3)
  delta*H*T + p3*H*E/(a3 + H);
end

function Function_for_induction_of_tumor_cell(k2, C, M1, T, M2, p2, E, a2)
  k2*C*(C/M1)*(1 - T/M2) + p2*T*E/(a2 + T);
end

function Function_for_removal_of_tumor_cell(n1, T, gamma2, I)
  n1*T + gamma2*I*T;
end

function Function_for_increase_in_excess_strogen(tau)
  tau;
end

function Function_for_decrease_in_strogen_content(mu, d1, C, a1, d2, T, a2, d3, H, a3, E)
  (mu + d1*C/(a1 + C) + d2*T/(a2 + T) + d3*H/(a3 + H))*E;
end

function Function_for_increase_in_tumor_cell_against_cancer(s, p, I, T, w)
  s + p*I*T/(w + T);
end

function Function_for_decrease_in_immune_cell(gamma3, I, T, n2, u, E, v)
  gamma3*I*T + n2*I + u*I*E/(v + E);
end

model Solis_perez2019___A_fractional_mathematical_model_of_breast_cancer_competition_model()
  // Solis-perez2019 - A fractional mathematical model of breast cancer competition model
  // A fractional mathematical model of breast cancer competition model
  // Author links open overlay panelJ.E.Solís-PérezaJ.F.Gómez-Aguilar
  // bA.Atanganac
  // a
  // Tecnológico Nacional de México/CENIDET. Interior Internado Palmira S/N, Col. Palmira, C.P. 62490, Cuernavaca, Morelos, México
  // b
  // CONACyT-Tecnológico Nacional de México/CENIDET. Interior Internado Palmira S/N, Col. Palmira, C.P. 62490, Cuernavaca, Morelos, México
  // c
  // Institute for Groundwater Studies, Faculty of Natural and Agricultural Sciences, University of the Free State, Bloemfontein 9300, South Africa
  // Abstract
  // In this paper, a mathematical model which considers population dynamics among cancer stem cells, tumor cells, healthy cells, the effects of excess estrogen and the body’s natural immune response on
  // the cell populations was considered. Fractional derivatives with power law and exponential decay law in Liouville–Caputo sense were considered. Special solutions using an iterative scheme via Laplace
  // transform were obtained. Furthermore, numerical simulations of the model considering both derivatives were obtained using the Atangana–Toufik numerical method. Also, random model described by a
  // system of random differential equations was presented. The use of fractional derivatives provides more useful information about the complexity of the dynamics of the breast cancer competition model.
  // hasInstance mamo:MAMO_0000046 taxonomy:9606 ncit:C4872
  // isDescribedBy ncit:C4872 doi:10.1016/j.chaos.2019.06.027
  // isDerivedFrom doi:10.1007/s12591-017-0346-x
  // biomodels.db:MODEL1912180005 biomodels.db:BIOMD0000000903
  // hasProperty mamo:MAMO_0000046
  // hasTaxon taxonomy:9606

  // Compartments:
  compartment compartment = 1;

  // Species:
  species C in compartment = 737100;  // hasInstance BTO:0006293
  species T in compartment = 7616700;  // hasInstance ncit:C12922
  species H in compartment = 25000000;  // hasProperty ncit:C115935
  species I in compartment = 0;  // hasInstance ncit:C132890
  species E in compartment = 0;

  // Parameters:
  k1 = 0.75;
  k2 = 0.514;
  q = 0.7;
  M1 = 2270000;
  M2 = 22700000;
  M3 = 25000000;
  gamma1 = 3e-7;
  gamma2 = 3e-6;
  gamma3 = 1e-7;
  p1 = 600;
  p2 = 0;
  p3 = 100;
  a1 = 1135000;
  a2 = 11350000;
  a3 = 1250000;
  n1 = 0.01;
  n2 = 0.29;
  delta = 6e-8;
  s = 13000;
  p = 0.2;
  w = 300000;
  u = 0.2;
  v = 400;
  tau = 2700;
  d1 = 0.01;
  d2 = 0.01;
  d3 = 0.01;
  mu = 0.97;

  // Reactions:
  Formation_of_Stem_cell: => C; compartment*Function_for_formation_of_Stem_cell(k1, C, M1, p1, E, a1);  // modifiers: E; hasInstance ncit:C25513
  Removal_of_stem_cell_from_the_system: C => ; compartment*Function_for_removal_of_stem_cell_from_the_system(gamma1, I, C);  // modifiers: I; hasInstance ncit:C64914
  Induction_of_tumor_cell: => T; compartment*Function_for_induction_of_tumor_cell(k2, C, M1, T, M2, p2, E, a2);  // modifiers: C, E; hasInstance ncit:C25533
  Removal_of_tumor_cell_y_immune_cell_and_other_immune_response: T => ; compartment*Function_for_removal_of_tumor_cell(n1, T, gamma2, I);  // modifiers: I
  Increase_in_the_healthy_cell_in_the_system: => H; compartment*Function_for_increase_in_healthy_cell_in_the_system(q, H, M3);  // hasInstance ncit:C25533
  Decrase_of_healthy_cell_due_to_cancer: H => ; compartment*Function_for_decrease_in_healthy_cell(delta, H, T, p3, E, a3);  // modifiers: T, E; hasInstance ncit:C25640
  Increase_in_immune_cell_against_tumor: => I; compartment*Function_for_increase_in_tumor_cell_against_cancer(s, p, I, T, w);  // modifiers: T; hasInstance ncit:C25533
  Decrease_in_the_density_of_immune_cell_that_provide_immune_response: I => ; compartment*Function_for_decrease_in_immune_cell(gamma3, I, T, n2, u, E, v);  // modifiers: T, E; hasInstance ncit:C25640
  Increase_in_Excess_strogen: => E; compartment*Function_for_increase_in_excess_strogen(tau);  // hasInstance ncit:C25533
  Decrease_in_strogen_content: E => ; compartment*Function_for_decrease_in_strogen_content(mu, d1, C, a1, d2, T, a2, d3, H, a3, E);  // modifiers: C, T, H; hasInstance ncit:C25640

  // Unit definitions:
  unit volume = 1e-3 litre;
  unit time = 86400 second;
  unit substance = 1e-3 mole;
end
