// SBML level 2 version 4
// dcterms:bibliographicCitation: Modelling tumor growth with immune response and drug using ordinary differential equations urn:miriam:doi:10.11113/jt.v79.9791

function Function_for_increase_in_the_population_of_tumor_cell_during_interphase(a4, Tm)
  2*a4*Tm;
end

function Function_for_decrease_in_the_population_of_tumor_cell_during_mitosis(d3, Tm, a4, c3, I, k1, k2, u)
  d3*Tm + a4*Tm + c3*Tm*I + k1*(-exp(-k2*u))*Tm;
end

function Function_for_decrease_in_the_population_of_immune_response(c2, I, c4, Tm, d1, k3, k4, u, Ti)
  c2*I*Ti + c4*Tm*I + d1*I + k3*(1 - exp(-k4*u))*I;
end

function Function_for_decrease_in_the_population_of_tumor_cell_during_interphase(c1, I, d2, Ti, a1)
  (c1*I + d2)*Ti + a1*Ti;
end

function Function_for_increase_in_the_population_of_tumor_cell_during_mitosis(a1, Ti)
  a1*Ti;
end

function Function_for_formation_of_immune_response(k, p, I, Ti, Tm, n, alpha)
  k + p*I*(Ti + Tm)^n/(alpha + (Ti + Tm)^n);
end

function Function_for_decrease_in_drug(gamma, u)
  gamma*u;
end

model Admon2017___Modelling_tumor_growth_with_immune_response_and_drug_using_ordinary_differential_equations()
  // Admon2017 - Modelling tumor growth with immune response and drug using ordinary differential equations
  // Modelling tumor growth with immune response and drug using ordinary differential equations
  // Mohd Rashid Admon, Normah Maan
  // This is a mathematical study about tumor growth from a different perspective, with the aim of predicting and/or controlling the disease. The focus is on the effect and interaction of tumor cell with
  // immune and drug. This paper presents a mathematical model of immune response and a cycle phase specific drug using a system of ordinary differential equations. Stability analysis is used to produce
  // stability regions for various values of certain parameters during mitosis. The stability region of the graph shows that the curve splits the tumor decay and growth regions in the absence of immune
  // response. However, when immune response is present, the tumor growth region is decreased. When drugs are considered in the system, the stability region remains unchanged as the system with the
  // presence of immune response but the population of tumor cells at interphase and metaphase is reduced with percentage differences of 1.27 and 1.53 respectively. The combination of immunity and drug to
  // fight cancer provides a better method to reduce tumor population compared to immunity alone.
  // isDescribedBy doi:10.11113/jt.v79.9791
  // biomodels.db:MODEL1912180006 biomodels.db:BIOMD0000000904
  // hasProperty mamo:MAMO_0000046
  // hasTaxon taxonomy:9606

  // Compartments:
  compartment compartment = 1;

  // Species:
  species Ti in compartment = 1.3;  // hasInstance ncit:C12922
  species Tm in compartment = 1.2;  // hasInstance ncit:C12922
  species I in compartment = 0.9;  // hasProperty GO:0006955
  species u in compartment = 0;

  // Parameters:
  a1 = 1;
  a4 = 0.8;
  d1 = 0.29;
  d2 = 0.11;
  d3 = 0.4;
  c1 = 0.9;
  c3 = 0.9;
  c2 = 0.085;
  c4 = 0.085;
  k = 0.029;
  k1 = 0;
  k2 = 0.57;
  k3 = 0;
  k4 = 0.061;
  alpha = 0.2;
  p = 0.1;
  n = 3;
  gamma = 0;

  // Assignment rules:
  d := 2*a1*a4/(a1 + d2);

  // Reactions:
  Increase_in_the_population_of_tumor_cell_during_interphase: => Ti; compartment*Function_for_increase_in_the_population_of_tumor_cell_during_interphase(a4, Tm);  // modifiers: Tm; hasInstance ncit:C25533
  Decrease_in_the_population_of_tumor_cell_during_interphase: Ti => ; compartment*Function_for_decrease_in_the_population_of_tumor_cell_during_interphase(c1, I, d2, Ti, a1);  // modifiers: I; hasInstance ncit:C157203
  Increase_in_population_of_tumor_cell_during_mitosis: => Tm; compartment*Function_for_increase_in_the_population_of_tumor_cell_during_mitosis(a1, Ti);  // modifiers: Ti; hasInstance ncit:C25533
  Decrease_in_the_population_of_tumor_cell_during_mitosis: Tm => ; compartment*Function_for_decrease_in_the_population_of_tumor_cell_during_mitosis(d3, Tm, a4, c3, I, k1, k2, u);  // modifiers: I, u; hasInstance ncit:C157203
  induction_of_immune_response_due_to_tumor_cell_formation: => I; compartment*Function_for_formation_of_immune_response(k, p, I, Ti, Tm, n, alpha);  // modifiers: Ti, Tm; hasInstance ncit:C25533
  Decrease_in_the_popoulation_of_immune_response: I => ; compartment*Function_for_decrease_in_the_population_of_immune_response(c2, I, c4, Tm, d1, k3, k4, u, Ti);  // modifiers: Tm, u, Ti; hasInstance ncit:C157203
  Decrease_in_drug: u => ; compartment*Function_for_decrease_in_drug(gamma, u);  // hasInstance ncit:C157203

  // Unit definitions:
  unit volume = 1e-3 litre;
  unit substance = 1e-3 mole;
end
