// SBML level 2 version 4
// dcterms:bibliographicCitation: Mathematical modeling of regulatory T cell effects on renal cell carcinoma treatment urn:miriam:doi:10.3934/dcdsb.2013.18.915

function Function_for_increase_in_the_number_of_Treg_cells_per_litre_of_blood(u, C, R, p_R, I, g_R, w_u)
  u*(w_u*C - R) + p_R*R*I/(g_R + I);
end

function Function_for_increase_in_the_total_tumor_cell_population_in_number_of_cells(a, T, b)
  a*T*(1 - b*T);
end

function Function_for_increase_in_the_concentration_of_lymphocyte(beta, C, alpha_beta)
  beta*(alpha_beta - C);
end

function Function_for_increase_in_the_concentration_of_IL_2_per_litre_of_blood(phi, C, w, L, I, zeta)
  phi*C + w*L*I/(zeta + I);
end
Function_for_increase_in_the_concentration_of_IL_2_per_litre_of_blood is "Function for increase in the concentration of IL-2 per litre of blood";

function Function_of_removal_of_natural_killer_cell(p, N, T)
  p*N*T;
end

function Function_for_increase_in_the_number_of_natural_killer_cell_per_litre_of_blood(f, C, N, p_N, I, g_N, e_f)
  f*(e_f*C - N) + p_N*N*I/(g_N + I);
end

function Function_for_decrease_in_the_number_of_CD8__T_cell(m, L, q, T, z, R, I, kappa)
  m*L + q*L*T + z*L*L*R*I/(kappa + I);
end
Function_for_decrease_in_the_number_of_CD8__T_cell is "Function for decrease in the number of CD8+ T cell";

function Function_for_removal_of_tumor_cell_from_the_system_by_immune_cells(c, delta_T, R, N, T, D)
  c*exp(-delta_T*R)*N*T + D*T;
end

function Function_for_decrease_in_the_concentration_of_IL_2_per_litre_of_blood(mu_I, I)
  mu_I*I;
end
Function_for_decrease_in_the_concentration_of_IL_2_per_litre_of_blood is "Function for decrease in the concentration of IL-2 per litre of blood";

function Function_for_Sunitinib_not_working_per_litre_of_body_volume(n, S)
  -n*S;
end

function Function_for_injecting_the_concentration_of_sunitinib_per_litre_of_body_volume(vs)
  vs;
end

function Function_for_Increase_in_the_number_of_CD8__T_cell_per_litre_of_blood(r1, N, r2, C, T, p_I, L, I, g_I, j, k)
  (r1*N + r2*C)*T + p_I*L*I/(g_I + I) + j*(T/(k + T))*L;
end
Function_for_Increase_in_the_number_of_CD8__T_cell_per_litre_of_blood is "Function for Increase in the number of CD8+ T cell per litre of blood";

function Function_for_decrease_in_the_number_of_Treg_cells(H_R, delta_R, S, R)
  H_R*(1 - exp(-delta_R*S))*R;
end

model dePillis2013___Mathematical_modeling_of_regulatory_T_cell_effects_on_renal_cell_carcinoma_treatment()
  // dePillis2013 - Mathematical modeling of regulatory T cell effects on renal cell carcinoma treatment
  // Mathematical modeling of regulatory T cell effects on renal cell carcinoma treatment
  // Lisette dePillis 1, , Trevor Caldwell 2, , Elizabeth Sarapata 2, and Heather Williams 2,
  // 1.
  // Department of Mathematics, Harvey Mudd College, Claremont, CA 91711
  // 2.
  // Harvey Mudd College, Claremont, CA 91711, United States, United States, United States
  // Abstract
  // We present a mathematical model to study the effects of the regulatory T cells (Treg) on Renal Cell Carcinoma (RCC) treatment with sunitinib. The drug sunitinib inhibits the natural self-regulation
  // of the immune system, allowing the effector components of the immune system to function for longer periods of time. This mathematical model builds upon our non-linear ODE model by de Pillis et al.
  // (2009) [13] to incorporate sunitinib treatment, regulatory T cell dynamics, and RCC-specific parameters. The model also elucidates the roles of certain RCC-specific parameters in determining key
  // differences between in silico patients whose immune profiles allowed them to respond well to sunitinib treatment, and those whose profiles did not.
  // Simulations from our model are able to produce results that reflect clinical outcomes to sunitinib treatment such as: (1) sunitinib treatments following standard protocols led to improved tumor
  // control (over no treatment) in about 40% of patients; (2) sunitinib treatments at double the standard dose led to a greater response rate in about 15% the patient population; (3) simulations of
  // patient response indicated improved responses to sunitinib treatment when the patient's immune strength scaling and the immune system strength coefficients parameters were low, allowing for a
  // slightly stronger natural immune response.
  // Keywords: Renal cell carcinoma, mathematical modeling., sunitinib, immune system, regulatory T cells.
  // hasInstance mamo:MAMO_0000046 taxonomy:9606 ncit:C17837
  // isDescribedBy ncit:C17837 doi:10.3934/dcdsb.2013.18.915
  // isDescribedBy doi:10.1080/17486700802216301
  // biomodels.db:MODEL2001060001 biomodels.db:BIOMD0000000908
  // hasProperty mamo:MAMO_0000046
  // hasTaxon taxonomy:9606

  // Compartments:
  compartment compartment = 1;

  // Species:
  species T in compartment = 4.662e9;  // hasInstance ncit:C12922
  species N in compartment = 250000000;  // hasInstance BTO:0000914
  species L in compartment = 526800;  // hasInstance ncit:C12543
  species R in compartment = 352000000;  // hasInstance ncit:C78829
  species C in compartment = 2140000000;  // hasInstance ncit:C12922
  species I in compartment = 1173;  // hasInstance ncit:C20507
  species S in compartment = 0;  // hasInstance ncit:C71622

  // Parameters:
  d = 1.7;
  l = 1.7;
  s = 0.035;
  a = 0.2065;
  b = 2.145e-10;
  c = 8.68e-10;
  delta_T = 1.59e-9;
  e_f = 0.1168;
  f = 0.0125;
  p = 6.682e-14;
  p_N = 0.0668;
  C_0 = 2140000000;
  g_N = 250360;
  m = 0.009;
  q = 3.422e-10;
  r_1 = 6.682e-12;
  r_2 = 1e-15;
  p_I = 1.111;
  g_I = 2503.6;
  z = 2.3085e-13;
  kappa = 2503.6;
  j = 0.1245;
  k = 20190000;
  w_u = 0.0122;
  u = 0.03851;
  p_R = 0.03598;
  g_R = 11.027;
  H_R = 0.227;
  delta_R = 50.02;
  alpha_beta = 2140000000;
  beta = 0.0063;
  mu_I = 11.7427;
  w = 0.05314;
  phi = 3.594e-7;
  zeta = 2503.6;
  n = 0.277;
  vs = 0;
  Initial_for_L = L;
  Initial_for_T = T;
  Initial_for_d = d;
  Initial_for_l = l;
  Initial_for_s = s;

  // Assignment rules:
  D := Initial_for_d*((Initial_for_L/Initial_for_T)^Initial_for_l/(Initial_for_s + (Initial_for_L/Initial_for_T)^Initial_for_l));

  // Reactions:
  Increase_in_total_tumor_cell_population_in_number_of_cells: => T; compartment*Function_for_increase_in_the_total_tumor_cell_population_in_number_of_cells(a, T, b);  // hasInstance ncit:C25533
  Removal_of_tumor_cell_from_the_system_by_immune_cells: T => ; compartment*Function_for_removal_of_tumor_cell_from_the_system_by_immune_cells(c, delta_T, R, N, T, D);  // modifiers: R, N; hasInstance ncit:C64914
  Increase_in_number_of_Natural_killer_cell_per_litre_of_blood: => N; compartment*Function_for_increase_in_the_number_of_natural_killer_cell_per_litre_of_blood(f, C, N, p_N, I, g_N, e_f);  // modifiers: C, I; hasInstance ncit:C25533
  Removal_of_natural_killer_cell_from_the_system: N => ; compartment*Function_of_removal_of_natural_killer_cell(p, N, T);  // modifiers: T; hasInstance ncit:C64914
  Increase_in_the_number_of_CD8__T_cell_per_litre_of_blood: => L; compartment*Function_for_Increase_in_the_number_of_CD8__T_cell_per_litre_of_blood(r_1, N, r_2, C, T, p_I, L, I, g_I, j, k); Increase_in_the_number_of_CD8__T_cell_per_litre_of_blood is "Increase in the number of CD8+ T cell per litre of blood";  // modifiers: N, C, T, I; hasInstance ncit:C25533
  Decrease_in_the_number_of_CD8__T_cell: L => ; compartment*Function_for_decrease_in_the_number_of_CD8__T_cell(m, L, q, T, z, R, I, kappa); Decrease_in_the_number_of_CD8__T_cell is "Decrease in the number of CD8+ T cell";  // modifiers: T, R, I; hasInstance ncit:C64914
  Increase_in_the_number_of_Treg_cells_per_litre_of_blood: => R; compartment*Function_for_increase_in_the_number_of_Treg_cells_per_litre_of_blood(u, C, R, p_R, I, g_R, w_u);  // modifiers: C, I; hasInstance ncit:C25533
  Decrease_in_the_number_of_Treg_cells: R => ; compartment*Function_for_decrease_in_the_number_of_Treg_cells(H_R, delta_R, S, R);  // modifiers: S; hasInstance ncit:C64914
  Increase_in_the_concentration_of_lymphocyte_per_litre_of_blood_not_including_NK_cells__CD8__T_cells_and_regulatory_T_cells: => C; compartment*Function_for_increase_in_the_concentration_of_lymphocyte(beta, C, alpha_beta); Increase_in_the_concentration_of_lymphocyte_per_litre_of_blood_not_including_NK_cells__CD8__T_cells_and_regulatory_T_cells is "Increase in the concentration of lymphocyte per litre of blood not including NK cells, CD8+ T cells and regulatory T cells";  // hasInstance ncit:C25533
  Increase_in_the_concentration_of_IL_2_per_litre_of_blood: => I; compartment*Function_for_increase_in_the_concentration_of_IL_2_per_litre_of_blood(phi, C, w, L, I, zeta); Increase_in_the_concentration_of_IL_2_per_litre_of_blood is "Increase in the concentration of IL-2 per litre of blood";  // modifiers: C, L; hasInstance ncit:C25533
  Decrease_in_the_concentration_of_IL_2_per_lite_of_blood: I => ; compartment*Function_for_decrease_in_the_concentration_of_IL_2_per_litre_of_blood(mu_I, I); Decrease_in_the_concentration_of_IL_2_per_lite_of_blood is "Decrease in the concentration of IL-2 per lite of blood";  // hasInstance ncit:C64914
  Injecting_the_concentration_of_sunitinib_per_litre_of_body_volume: => S; compartment*Function_for_injecting_the_concentration_of_sunitinib_per_litre_of_body_volume(vs);  // hasInstance ncit:C25533
  Sunitinib_not_working_per_day_per_litre_of_body_volume: S => ; compartment*Function_for_Sunitinib_not_working_per_litre_of_body_volume(n, S);  // hasInstance ncit:C25533

  // Unit definitions:
  unit volume = 1e-3 litre;
  unit substance = 1e-3 mole;
end
