// SBML level 2 version 4
// dcterms:bibliographicCitation: Tumour suppression by immune system urn:miriam:pubmed:20580640

function Function_for_removal_of_the_tumor(a, T, g2, V, E)
  a*T/(g2*V + T)*E;
end

function Function_for_induction_of_tumor(r, T, b, V)
  r*T*(1 - b/V*T);
end

function Function_for_deactivation_of_interleukin_2(mu3, I)
  mu3*I;
end

function Function_for_activation_of_interleukin_2(p2, V, T, E, g3, s2)
  p2/V*(T*E/(g3*V + T)) + s2;
end

function Function_for_activation_and_transfer_of_effector_cells_to_the_tumor_site(p1, I, g1, E, c, T, V, s1)
  p1*I/(g1*I)*E + c*T + V*s1;
end

function Function_for_deactivation_and_removal_of_effector_cells_from_the_site_of_tumor(mu2, E)
  mu2*E;
end

model Caravagna2010___Tumour_suppression_by_immune_system()
  // Caravagna2010 - Tumour suppression by immune system
  // Tumour suppression by immune system through stochastic oscillations
  // GiulioCaravagnaa
  // Albertod’Onofriob
  // PaoloMilazzoa
  // RobertoBarbutia
  // https://doi.org/10.1016/j.jtbi.2010.05.013
  // Abstract
  // The well-known Kirschner–Panetta model for tumour–immune System interplay [Kirschner, D., Panetta, J.C., 1998. Modelling immunotherapy of the tumour–immune interaction. J. Math. Biol. 37 (3), 235–2
  // 52] reproduces a number of features of this essential interaction, but it excludes the possibility of tumour suppression by the immune system in the absence of therapy. Here we present a hybrid–s
  // tochastic version of that model. In this new framework, we show that in reality the model is also able to reproduce the suppression, through stochastic extinction after the first spike of an
  // oscillation.
  // isDerivedFrom mamo:MAMO_0000046 taxonomy:9606 biomodels.db:BIOMD0000000732
  // isDescribedBy biomodels.db:BIOMD0000000732 pubmed:20580640
  // biomodels.db:MODEL2001200001 biomodels.db:BIOMD0000000912
  // hasTaxon taxonomy:9606
  // hasProperty mamo:MAMO_0000046

  // Compartments:
  compartment compartment = 1;

  // Species:
  species T in compartment = 1;  // isVersionOf efo:0000616
  species E in compartment = 1;  // hasProperty ncit:C132890
  species I in compartment = 1;  // hasProperty uniprot:P60568

  // Parameters:
  r2 = 0.18;
  b = 1e-9;
  a = 1;
  g2 = 100000;
  p1 = 0.1245;
  g1 = 20000000;
  mu2 = 0.03;
  c = 0.02;
  p2 = 5;
  g3 = 1000;
  mu3 = 10;
  V = 3.2;
  s1 = 0;
  s2 = 0;

  // Reactions:
  Induction_of_tumor: => T; compartment*Function_for_induction_of_tumor(r2, T, b, V);  // isVersionOf GO:0002355
  Removal_of_tumor_from_the_system_by_the_action_of_immune_response: T => ; compartment*Function_for_removal_of_the_tumor(a, T, g2, V, E);  // modifiers: E
  Activation_and_transfer_of_effector_cells_to_the_action_site: => E; compartment*Function_for_activation_and_transfer_of_effector_cells_to_the_tumor_site(p1, I, g1, E, c, T, V, s1);  // modifiers: I, T; isVersionOf GO:0002418
  Deactivation_and_removal_of_effector_cells_from_the_site_of_tumor: E => ; compartment*Function_for_deactivation_and_removal_of_effector_cells_from_the_site_of_tumor(mu2, E);  // isVersionOf GO:0002837
  Activation_of_interleukin_2: => I; compartment*Function_for_activation_of_interleukin_2(p2, V, T, E, g3, s2);  // modifiers: T, E; isVersionOf GO:0070970
  Deactivation_of_interleukin2: I => ; compartment*Function_for_deactivation_of_interleukin_2(mu3, I);  // isVersionOf GO:0070970

  // Unit definitions:
  unit volume = 1e-3 litre;
  unit time = 86400 second;
  unit substance = 1e-3 mole;
end
