// SBML level 2 version 4
// dcterms:bibliographicCitation: urn:miriam:doi:10.1142/S0218339008002435

function Function_for_formation_of_tumor_cell_population(a, T, b)
  a*T*(1 - b*T);
end

function Function_for_removal_of_circulating_lymphocyte_population(beta, C, K_C, M)
  beta*C + K_C*M*C;
end

function Function_for_increase_in_circulating_lymphocyte_population(alpha_2)
  alpha_2;
end

function Function_for_elimunation_of_non_specific_effector_cell_population(f, N, p, T, K_N, M)
  f*N + p*N*T + K_N*M*N;
end

function Function_for_elimination_of_tumor_cell(c1, N, T, D, K_T, M)
  c1*N*T + D*T + K_T*M*T;
end

function Function_for_activation_and_transfer_of_CTL_at_site_of_tumor(r2, C, T, p_I, L, I, g_I, V_L)
  r2*C*T + p_I*L*I/(g_I + I) + V_L;
end

function Function_for_elimination_of_CTL(m, L, q, T, u, K_L, M)
  m*L + q*L*T + u*L*L + K_L*M*L;
end

function Function_for_increase_in_chemotherapy_drug_in_the_blood(V_M)
  V_M;
end

function Function_for_activation_of_non_specific_effector_cell_population(alpha_1, g, T, eta, h, N)
  alpha_1 + g*(T^eta/(h + T^eta))*N;
end

function Function_for_increase_in_IL_2_population(p_T, T, g_T, L, w, I, V_I)
  p_T*T/(g_T + T)*L + w*L*I + V_I;
end
Function_for_increase_in_IL_2_population is "Function for increase in IL-2 population";

function Function_for_decrease_in_IL2_production(mu_I, I)
  mu_I*I;
end

function Function_for_decrease_in_chemotherapy_drug_in_the_blood(gamma, M)
  gamma*M;
end

model dePillis2008___Optimal_control_of_mixed_immunotherapy_and_chemotherapy_of_tumors()
  // dePillis2008 - Optimal control of mixed immunotherapy and chemotherapy of tumors
  // &lt;notes xmlns=&quot;http://www.sbml.org/sbml/level2/version4&quot;&gt; &lt;body xmlns=&quot;http://www.w3.org/1999/xhtml&quot;&gt; &lt;pre&gt;Optimal control of mixed immunotherapy and chemotherapy of tumors Lisette Depillis, K. R. Fister , W. Gu, Tiffany Head, Kenny Maples, Todd Neal, Anand Murugan and Kenji Kozai Abstract We investigate a mathematical population model of tumor-immune interactions. Thepopulations involved are tumor cells, specific and non-specific immune cells, and con-centrations of therapeutic treatments. We establish the existence of an optimal con-trol for this model and provide necessary conditions for the optimal control triple forsimultaneous application of chemotherapy, tumor infiltrating lymphocyte (TIL) ther-apy, and interleukin-2 (IL-2) treatment. We discuss numerical results for the combina-tion of the chemo-immunotherapy regimens. We find that the qualitative nature of ourresults indicates that chemotherapy is the dominant intervention with TIL interactingin a complementary fashion with the chemotherapy. However, within the optimal con-trol context, the interleukin-2 treatment does not become activated for the estimatedparameter ranges.
  // isDerivedFrom mamo:MAMO_0000046 taxonomy:9606 biomodels.db:MODEL2001160001
  // isDescribedBy biomodels.db:MODEL2001160001 doi:10.1142/S0218339008002435
  // biomodels.db:MODEL2001200003 biomodels.db:BIOMD0000000913
  // hasTaxon taxonomy:9606
  // hasProperty mamo:MAMO_0000046

  // Compartments:
  compartment compartment = 1;

  // Species:
  species T in compartment = 10000000;  // hasProperty efo:0000616
  species L in compartment = 2000;  // isVersionOf BTO:0000289
  species N in compartment = 500000;  // hasProperty ncit:C132890
  species C in compartment = 4.17e10;  // hasProperty ncit:C120462
  species I in compartment = 2000;  // isVersionOf uniprot:P60568
  species M in compartment = 0;  // hasProperty ncit:C191

  // Parameters:
  d = 5;
  s = 0.3;
  l = 2;
  a = 0.002;
  b = 1.02e-9;
  c1 = 3.23e-7;
  f = 0.0412;
  g = 0.025;
  g_I = 20000000;
  g_T = 100000;
  h = 600;
  K_C = 0.6;
  K_L = 0.6;
  K_N = 0.6;
  K_T = 0.8;
  m = 0.02;
  p = 1e-7;
  p_I = 0.125;
  p_T = 0.6;
  q = 3.42e-10;
  r2 = 3e-11;
  s_1 = 0.3;
  u = 3;
  w = 0.0002;
  alpha_1 = 13000;
  alpha_2 = 500000000;
  beta = 0.012;
  gamma = 0.9;
  eta = 1;
  mu_I = 10;
  Initial_for_d = d;
  Initial_for_l = l;
  Initial_for_s = s;

  // Assignment rules:
  D := Initial_for_d*((L/T)^Initial_for_l/(Initial_for_s + (L/T)^Initial_for_l));

  // Reactions:
  Detection_and_induction_of_tumor_cell_population: => T; compartment*Function_for_formation_of_tumor_cell_population(a, T, b);  // isVersionOf GO:0002355
  Elimination_of_tumor_by_the_action_of_immune_response: T => ; compartment*Function_for_elimination_of_tumor_cell(c1, N, T, D, K_T, M);  // modifiers: N, M; isVersionOf GO:0002418
  Activation_and_transfer_of_tumor_specific_CTL_at_the_site_of_tumor: => L; compartment*Function_for_activation_and_transfer_of_CTL_at_site_of_tumor(r2, C, T, p_I, L, I, g_I, V_L);  // modifiers: C, T, I; isVersionOf GO:0072676
    V_L = 0;
  Elimination_of_tumor_specific_CLT: L => ; compartment*Function_for_elimination_of_CTL(m, L, q, T, u, K_L, M);  // modifiers: T, M; isVersionOf GO:0045583
  Activation_of_nonspecific_effector_immune_cell_population: => N; compartment*Function_for_activation_of_non_specific_effector_cell_population(alpha_1, g, T, eta, h, N);  // modifiers: T; isVersionOf GO:0002697; isVersionOf GO:0002252
  Inactivation_and_elimination_of_non_specific_effector_immune_cell_population: N => ; compartment*Function_for_elimunation_of_non_specific_effector_cell_population(f, N, p, T, K_N, M);  // modifiers: T, M; isVersionOf GO:0002697
  Activation_and_increase_of_circulating_lymphocyte_population: => C; compartment*Function_for_increase_in_circulating_lymphocyte_population(alpha_2);  // isVersionOf GO:0046649
  Removal_of_ciruclating_lymphocyte_population: C => ; compartment*Function_for_removal_of_circulating_lymphocyte_population(beta, C, K_C, M);  // modifiers: M
  Increase_in_IL_2_concentration: => I; compartment*Function_for_increase_in_IL_2_population(p_T, T, g_T, L, w, I, V_I); Increase_in_IL_2_concentration is "Increase in IL-2 concentration";  // modifiers: T, L; isVersionOf GO:0070970
    V_I = 0;
  Decrease_in_IL_2_production: I => ; compartment*Function_for_decrease_in_IL2_production(mu_I, I); Decrease_in_IL_2_production is "Decrease in IL-2 production";  // isVersionOf GO:0032663
  Increase_of_chemotherapy_drug_in_the_blood: => M; compartment*Function_for_increase_in_chemotherapy_drug_in_the_blood(V_M);  // isVersionOf GO:0015893
    V_M = 0;
  Decrease_in_chemotherapy_Drug_in_the_blood: M => ; compartment*Function_for_decrease_in_chemotherapy_drug_in_the_blood(gamma, M);  // isVersionOf GO:0015893

  // Unit definitions:
  unit volume = 1e-3 litre;
  unit substance = 1e-3 mole;
end
