// SBML level 2 version 4
// dcterms:bibliographicCitation: urn:miriam:pubmed:23605806

function Function_for_removal_of_CyaA_E7_vaccine(k1, VAC)
  k1*VAC;
end
Function_for_removal_of_CyaA_E7_vaccine is "Function for removal of CyaA-E7 vaccine";

function Function_for_triggering_of_intermediate_transit_compartment(k1, VAC)
  k1*VAC;
end

function Function_for_increase_in_vaccine_signal_to_reduce_tumor_size(k1, TRAN)
  k1*TRAN;
end

function Function_for_elimination_of_intermediate_transit_compartment(k1, TRAN)
  k1*TRAN;
end

function Function_for_reduction_of_vaccine_signal(k2, SVAC)
  k2*SVAC;
end

function Function_for_increase_in_tumor_size(gamma)
  gamma;
end

function Function_for_reglator_compartment_to_decrease_vaccine_response(k4, Ts)
  k4*Ts;
end

function Function_for_reduction_of_tumor_size(k3, REG_50, gamma, REG, Ts, SVAC)
  k3*(REG_50^gamma/(REG_50^gamma + REG^gamma))*Ts*SVAC;
end

function Function_for_decrease_in_the_regulator_compartment(k4, REG)
  k4*REG;
end

model Parra_Guillen2013____Mathematical_model_approach_to_describe_tumour_response_in_mice_after_vaccine_administration_model1()
  // Parra_Guillen2013 - Mathematical model approach to describe tumour response in mice after vaccine administration_model1
  // Mathematical model approach to describe tumour response in mice after vaccine administration and its applicability to immune-stimulatory cytokine-based strategies.
  // Parra-Guillen ZP1, Berraondo P, Grenier E, Ribba B, Troconiz IF.
  // Author information
  // Abstract
  // Immunotherapy is a growing therapeutic strategy in oncology based on the stimulation of innate and adaptive immune systems to induce the death of tumour cells. In this paper, we have developed a
  // population semi-mechanistic model able to characterize the mechanisms implied in tumour growth dynamic after the administration of CyaA-E7, a vaccine able to target antigen to dendritic cells, thus
  // triggering a potent immune response. The mathematical model developed presented the following main components: (1) tumour progression in the animals without treatment was described with a linear
  // model, (2) vaccine effects were modelled assuming that vaccine triggers a non-instantaneous immune response inducing cell death. Delayed response was described with a series of two transit
  // compartments, (3) a resistance effect decreasing vaccine efficiency was also incorporated through a regulator compartment dependent upon tumour size, and (4) a mixture model at the level of the
  // elimination of the induced signal vaccine (k 2) to model tumour relapse after treatment, observed in a small percentage of animals (15.6%). The proposed model structure was successfully applied to
  // describe antitumor effect of IL-12, suggesting its applicability to different immune-stimulatory therapies. In addition, a simulation exercise to evaluate in silico the impact on tumour size of
  // possible combination therapies has been shown. This type of mathematical approaches may be helpful to maximize the information obtained from experiments in mice, reducing the number of animals and
  // the cost of developing new antitumor immunotherapies.
  // isDescribedBy pubmed:23605806
  // biomodels.db:MODEL2001220002 biomodels.db:BIOMD0000000914
  // hasTaxon taxonomy:10090
  // hasProperty mamo:MAMO_0000046

  // Compartments:
  compartment compartment = 1;

  // Species:
  species VAC in compartment = 1;  // hasProperty ncit:C923
  species TRAN in compartment = 0;
  species SVAC in compartment = 0;  // hasInstance ncit:C43382 ncit:C923; hasProperty ncit:C43382
  species Ts in compartment = 0.324;  // hasProperty ncit:C98275
  species REG in compartment = 0;  // hasProperty ncit:C48806

  // Parameters:
  lamda = 0.354;
  k1 = 0.0907;
  P = 0.844;
  k2_pop1 = 0;
  k3 = 1.08;
  k4 = 0.039;
  REG_50 = 3.18;
  gamma = 5.24;
  Residual_error = 0.206;
  k2_pop2 = 0.0907;

  // Reactions:
  Removal_of_CyaA_E7_vaccine: VAC => ; compartment*Function_for_removal_of_CyaA_E7_vaccine(k1, VAC); Removal_of_CyaA_E7_vaccine is "Removal of CyaA-E7 vaccine";
  Triggering_of_intermediate_transit_compartment_TRAN: => TRAN; compartment*Function_for_triggering_of_intermediate_transit_compartment(k1, VAC);  // modifiers: VAC
  Elimination_of_intermeidate_transit_compartment: TRAN => ; compartment*Function_for_elimination_of_intermediate_transit_compartment(k1, TRAN);
  Increase_in_vaccine_signal_to_reduce_tumor_size: => SVAC; compartment*Function_for_increase_in_vaccine_signal_to_reduce_tumor_size(k1, TRAN);  // modifiers: TRAN
  Reduction_of_vaccine_signal: SVAC => ; compartment*Function_for_reduction_of_vaccine_signal(k2_pop2, SVAC);
  Increase_in_tumor_size: => Ts; compartment*Function_for_increase_in_tumor_size(gamma);  // isVersionOf GO:0002355
  Reduction_of_tumor_size: Ts => ; compartment*Function_for_reduction_of_tumor_size(k3, REG_50, gamma, REG, Ts, SVAC);  // modifiers: REG, SVAC; isVersionOf GO:0002347
  REguilator_compartment_to_decrease_vaccine_response: => REG; compartment*Function_for_reglator_compartment_to_decrease_vaccine_response(k4, Ts);  // modifiers: Ts
  Decrease_in_the_regulator_comparment: REG => ; compartment*Function_for_decrease_in_the_regulator_compartment(k4, REG);

  // Unit definitions:
  unit volume = 1e-3 litre;
  unit substance = 1e-3 mole;
end
