// SBML level 2 version 4
// dcterms:bibliographicCitation: urn:miriam:pubmed:30463617

function Function_for_mutation(myu_j, p_j)
  myu_j*p_j;
end

model New_Model()
  // Sun2018 - Instantaneous mutation rate in cancer initiation and progression
  // Background Cancer is one of the leading causes for the morbidity and mortality worldwide. Although substantial studies have been conducted theoretically and experimentally in recent years, it is still a challenge to explore the mechanisms of cancer initiation and progression. The investigation for these problems is very important for the diagnosis of cancer diseases and development of treatment schemes. Results To accurately describe the process of cancer initiation, we propose a new concept of gene initial mutation rate based on our recently designed mathematical model using the non-constant mutation rate. Unlike the widely-used average gene mutation rate that depends on the number of mutations, the gene initial mutation rate can be used to describe the initiation process of a single patient. In addition, we propose the instantaneous tumour doubling time that is a continuous function of time based on the non-constant mutation rate. Our proposed concepts are supported by the clinic data of seven patients with advanced pancreatic cancer. The regression results suggest that, compared with the average mutation rate, the estimated initial mutation rate has a larger value of correlation coefficient with the patient survival time. We also provide the estimated tumour size of these seven patients over time. Conclusions The proposed concepts can be used to describe the cancer initiation and progression for different patients more accurately. Since a quantitative understanding of cancer progression is important for clinical treatment, our proposed model and calculated results may provide insights into the development of treatment schemes and also have other clinic implications.
  // hasProperty mamo:MAMO_0000046
  // hasProperty efo:0000311
  // hasProperty ncit:C94346
  // hasProperty VariO:0139
  // isDescribedBy pubmed:30463617

  // Compartments:
  compartment compartment = 1;  // isVersionOf ncit:C13413

  // Species:
  species p_0 in compartment = 1;  // isVersionOf efo:0000311
  species p_1 in compartment = 0;  // isVersionOf efo:0000311
  species p_2 in compartment = 0;  // isVersionOf efo:0000311
  species p_3 in compartment = 0;  // isVersionOf efo:0000311
  species p_4 in compartment = 0;  // isVersionOf efo:0000311
  species p_5 in compartment = 0;  // isVersionOf efo:0000311
  species p_6 in compartment = 0;  // isVersionOf efo:0000311
  species p_7 in compartment = 0;  // isVersionOf efo:0000311
  species p_8 in compartment = 0;  // isVersionOf efo:0000311
  species $p in compartment;  // isVersionOf efo:0000311

  // Parameters:
  a = 1e-6;
  b = 3e-5;

  // Assignment rules:
  p := p_0 + p_1 + p_2 + p_3 + p_4 + p_5 + p_6 + p_7 + p_8;
  myu := a*exp(b*time);

  // Reactions:
  mutation_1_2: p_1 => p_2; compartment*Function_for_mutation(myu, p_1); mutation_1_2 is "mutation 1-2";
  mutation_2_3: p_2 => p_3; compartment*Function_for_mutation(myu, p_2); mutation_2_3 is "mutation 2-3";
  mutation_3_4: p_3 => p_4; compartment*Function_for_mutation(myu, p_3); mutation_3_4 is "mutation 3-4";
  mutation_4_5: p_4 => p_5; compartment*Function_for_mutation(myu, p_4); mutation_4_5 is "mutation 4-5";
  mutation_5_6: p_5 => p_6; compartment*Function_for_mutation(myu, p_5); mutation_5_6 is "mutation 5-6";
  mutation_6_7: p_6 => p_7; compartment*Function_for_mutation(myu, p_6); mutation_6_7 is "mutation 6-7";
  mutation_7_8: p_7 => p_8; compartment*Function_for_mutation(myu, p_7); mutation_7_8 is "mutation 7-8";
  mutation_0_1: p_0 => p_1; compartment*Function_for_mutation(myu, p_0); mutation_0_1 is "mutation 0-1";

  // Unit definitions:
  unit volume = 1e-3 litre;
  unit substance = 1e-3 mole;
end
