// SBML level 2 version 4
// dcterms:bibliographicCitation: urn:miriam:pubmed:30463617

model Sun2018___Instantaneous_mutation_rate_in_cancer_initiation_and_progression_1()
  // Sun2018 - Instantaneous mutation rate in cancer initiation and progression
  // Background Cancer is one of the leading causes for the morbidity and mortality worldwide. Although substantial studies have been conducted theoretically and experimentally in recent years, it is still a challenge to explore the mechanisms of cancer initiation and progression. The investigation for these problems is very important for the diagnosis of cancer diseases and development of treatment schemes. Results To accurately describe the process of cancer initiation, we propose a new concept of gene initial mutation rate based on our recently designed mathematical model using the non-constant mutation rate. Unlike the widely-used average gene mutation rate that depends on the number of mutations, the gene initial mutation rate can be used to describe the initiation process of a single patient. In addition, we propose the instantaneous tumour doubling time that is a continuous function of time based on the non-constant mutation rate. Our proposed concepts are supported by the clinic data of seven patients with advanced pancreatic cancer. The regression results suggest that, compared with the average mutation rate, the estimated initial mutation rate has a larger value of correlation coefficient with the patient survival time. We also provide the estimated tumour size of these seven patients over time. Conclusions The proposed concepts can be used to describe the cancer initiation and progression for different patients more accurately. Since a quantitative understanding of cancer progression is important for clinical treatment, our proposed model and calculated results may provide insights into the development of treatment schemes and also have other clinic implications.
  // isDerivedFrom biomodels.db:MODEL1909300002 ncit:C12393 VariO:0139 ncit:C94346 mamo:MAMO_0000046 efo:0002618
  // isDescribedBy DOI:10.1109/BIBM.2017.8217639 pubmed:30463617
  // biomodels.db:MODEL1909300002
  // occursIn ncit:C12393
  // hasTaxon taxonomy:9606
  // hasProperty VariO:0139 ncit:C94346 efo:0002618 efo:0000311 mamo:MAMO_0000046

  // Compartments:
  compartment compartment = 1; compartment is "Cell";  // isVersionOf ncit:C12917

  // Species:
  species patient_0 in compartment = 1;  // hasVersion efo:0002618; ncit:C19700
  species patient_1 in compartment = 0;  // hasVersion efo:0002618; ncit:C19700
  species patient_2 in compartment = 0;  // ncit:C19700; isVersionOf efo:0002618
  species patient_3 in compartment = 0;  // ncit:C19700; isVersionOf efo:0002618
  species patient_4 in compartment = 0;  // ncit:C19700; isVersionOf efo:0002618
  species patient_5 in compartment = 0;  // ncit:C19700; isVersionOf efo:0002618
  species patient_6 in compartment = 0;  // ncit:C19700; isVersionOf efo:0002618
  species patient_7 in compartment = 0;  // ncit:C19700; isVersionOf efo:0002618
  species patient_8 in compartment = 0;  // ncit:C19700; isVersionOf efo:0002618

  // Parameters:
  a = 40.74; a is "a*";
  b = 0; b is "b*";
  var c; c is "DB";  // hasProperty ncit:C94346
  K = 62.04;
  Mo_1 = 49;
  M0_2 = 35;
  M0_3 = 28;
  M0_4 = 34;
  M0_5 = 28;
  M0_6 = 50;
  M0_7 = 35;
  b1 = 1e-5; b1 is "b1*";
  b2 = 1.8e-5; b2 is "b2*";
  b3 = 3e-5; b3 is "b3*";
  b4 = 1.9e-5; b4 is "b4*";
  b5 = 2.9e-5; b5 is "b5*";
  b6 = 1e-5; b6 is "b6*";
  b7 = 1.8e-5; b7 is "b7*";
  var b_AVG; b_AVG is "b_AVG*";
  a_0 = 0.001;
  b_0 = 0;

  // Assignment rules:
  myu := a_0*exp(b_0*time);
  c := a*time/(K + time);
  M0_AVG := (Mo_1 + M0_2 + M0_3 + M0_4 + M0_5 + M0_6 + M0_7)/7;
  b_AVG := (b1 + b2 + b3 + b4 + b5 + b6 + b7)/7;
  DT1 := Mo_1/M0_AVG*exp((b1 - b_AVG)*time)*(a*time/(K + time));
  DT2 := M0_2/M0_AVG*exp((b2 - b_AVG)*time)*(a*time/(K + time));
  DT3 := M0_3/M0_AVG*exp((b3 - b_AVG)*time)*(a*time/(K + time));
  DT4 := M0_4/M0_AVG*exp((b4 - b_AVG)*time)*(a*time/(K + time));
  DT5 := M0_5/M0_AVG*exp((b5 - b_AVG)*time)*(a*time/(K + time));
  DT6 := M0_6/M0_AVG*exp((b6 - b_AVG)*time)*(a*time/(K + time));
  DT7 := M0_7/M0_AVG*exp((b7 - b_AVG)*time)*(a*time/(K + time));

  // Reactions:
  mutation_1_2: patient_1 => patient_2; compartment*myu*patient_1; mutation_1_2 is "mutation 1-2";  // hasProperty VariO:0139
  mutation_2_3: patient_2 => patient_3; compartment*myu*patient_2; mutation_2_3 is "mutation 2-3";  // hasProperty VariO:0139
  mutation_3_4: patient_3 => patient_4; compartment*myu*patient_3; mutation_3_4 is "mutation 3-4";  // hasProperty VariO:0139
  mutation_4_5: patient_4 => patient_5; compartment*myu*patient_4; mutation_4_5 is "mutation 4-5";  // hasProperty VariO:0139
  mutation_5_6: patient_5 => patient_6; compartment*myu*patient_5; mutation_5_6 is "mutation 5-6";  // hasProperty VariO:0139
  mutation_6_7: patient_6 => patient_7; compartment*myu*patient_6; mutation_6_7 is "mutation 6-7";  // hasProperty VariO:0139
  mutation_7_8: patient_7 => patient_8; compartment*myu*patient_7; mutation_7_8 is "mutation 7-8";  // hasProperty VariO:0139
  mutation_0_1: patient_0 => patient_1; compartment*myu*patient_0; mutation_0_1 is "mutation 0-1";  // hasProperty VariO:0139

  // Unit definitions:
  unit volume = 1e-3 litre;
  unit time = 86400 second;
  unit substance = 1e-3 mole;
end
