// SBML level 2 version 4
// dcterms:bibliographicCitation: urn:miriam:pubmed:1567783
// dcterms:bibliographicCitation: urn:miriam:doi:10.1016/0960-0760(92)90025-E

function Rate_Law_for_R1(K3, X1)
  K3*X1;
end

function Rate_Law_for_R2(X4, K4, K5, X5)
  K4*X4 - K5*X5;
end

function Rate_Law_for_R3(K2, X5)
  K2*X5;
end

function Rate_Law_for_R4(K1, X4)
  K1*X4;
end

model New_Model()
  // Kraan199_Kinetics of Cortisol Metabolism and Excretion.
  // A new model is proposed to study the kinetics of [3H]cortisol metabolism by using urinary data only. The model consists of 5 pools, in which changes of the fractions of dose are given by a system of
  // 5 ordinary differential equations. After i.v. administration of [3H]cortisol to 8 multiple pituitary deficient (MPD) patients (group I) the urines from each patient were collected in 9-15 portions
  // during the following 3 days. From the urinary data the rate constants of cortisol metabolism were calculated. A published set of urinary data from patients with a normal cortisol metabolism (group
  // II) was used for comparison. The overall half-life of the label in the circulation was 30 min for both groups; the half-life of the label excretion by both groups was 6 h and the time of maximal
  // activity in the main metabolizing pool was 1.8 h in group I and 1.5 h in group II. The 20% of normal cortisol production rate (CPR) in the 8 MPD patients amounted to 7.2 + 1.9/zmol/(m2*d). Therefore,
  // the low CPR but normal rate constants, i.e. a normal metabolic clearance rate of cortisol, in the MPD patients suggest a sensitive adjustment of the cortisol response in the target organs.
  // biomodels.db:MODEL2002280001 biomodels.db:BIOMD0000000916
  // occursIn BTO:0003092
  // hasTaxon taxonomy:9606
  // isDescribedBy pubmed:1567783
  // isDescribedBy doi:10.1016/0960-0760(92)90025-E
  // hasProperty GO:0034650 ncit:C17054 mamo:MAMO_0000046

  // Compartments:
  compartment compartment = 1;  // hasProperty BTO:0003092

  // Species:
  species The_FOD_in_the_circulation__X1 in compartment = 1; The_FOD_in_the_circulation__X1 is "The FOD in the circulation (X1)";  // occursIn BTO:0003092
  species The_FOD_in_the_metabolizing_tissues__X4 in compartment = 0; The_FOD_in_the_metabolizing_tissues__X4 is "The FOD in the metabolizing tissues (X4)";  // occursIn BTO:0003092; occursIn BTO:0000759; occursIn BTO:0005937
  species The_cumulative_FOD_excreted_in_the_non_urinary_pool__X3 in compartment = 0; The_cumulative_FOD_excreted_in_the_non_urinary_pool__X3 is "The cumulative FOD excreted in the non-urinary pool (X3)";  // occursIn BTO:0003092
  species The_FOD_in_the_gallbladder___intestinal_lumen__X5 in compartment = 0; The_FOD_in_the_gallbladder___intestinal_lumen__X5 is "The FOD in the gallbladder + intestinal lumen (X5)";  // occursIn BTO:0000647; occursIn BTO:0000493
  species The_cumulative_FOD_excreted_in_the_urine__X2 in compartment = 0; The_cumulative_FOD_excreted_in_the_urine__X2 is "The cumulative FOD excreted in the urine (X2)";  // occursIn BTO:0003092

  // Parameters:
  K1 = 3.6;
  K2 = 1.2;
  K3 = 26.6;
  K4 = 1.2;
  K5 = 1.2;

  // Reactions:
  R1: The_FOD_in_the_circulation__X1 => The_FOD_in_the_metabolizing_tissues__X4; compartment*Rate_Law_for_R1(K3, The_FOD_in_the_circulation__X1);  // hasProperty GO:0034650
  R2: The_FOD_in_the_metabolizing_tissues__X4 -> The_FOD_in_the_gallbladder___intestinal_lumen__X5; compartment*Rate_Law_for_R2(The_FOD_in_the_metabolizing_tissues__X4, K4, K5, The_FOD_in_the_gallbladder___intestinal_lumen__X5);  // hasProperty GO:0034650
  R3: The_FOD_in_the_gallbladder___intestinal_lumen__X5 => The_cumulative_FOD_excreted_in_the_non_urinary_pool__X3; compartment*Rate_Law_for_R3(K2, The_FOD_in_the_gallbladder___intestinal_lumen__X5);  // hasProperty GO:0043400
  R4: The_FOD_in_the_metabolizing_tissues__X4 => The_cumulative_FOD_excreted_in_the_urine__X2; compartment*Rate_Law_for_R4(K1, The_FOD_in_the_metabolizing_tissues__X4);  // hasProperty GO:0043400

  // Unit definitions:
  unit volume = 1e-3 litre;
  unit substance = 1e-3 mole;
  unit time = 86400 second;
end
