// SBML level 3 version 1
// dcterms:bibliographicCitation: http://identifiers.org/pubmed/17440218

function Rate_Law_for_R_Vm(v_maQao, v_mv, Qv, Vm, tau_m)
  (v_maQao + v_mv*Qv - Vm)/(tau_m/3600);
end

function Rate_Law_for_R_Vv(v_vm, Qm, D, Vv, tau_v)
  (v_vm*Qm + D - Vv)/(tau_v/3600);
end

function Rate_Law_for_R_H(mu, Qm, H, chi)
  (mu*Qm - H)/chi;
end

model Phillips2007_AscendingArousalSystem_SleepWakeDynamics()
  // This a model from the article:
  // A quantitative model of sleep-wake dynamics based on the physiology of the brainstem ascending arousal system.
  // Phillips AJ, Robinson PA. J Biol Rhythms2007 Apr;22(2):167-79 17440218,
  // Abstract:
  // A quantitative, physiology-based model of the ascending arousal system is developed, using continuum neuronal population modeling, which involves averaging properties such as firing rates across neurons in each population. The model includes the ventrolateral preoptic area (VLPO), where circadian and homeostatic drives enter the system, the monoaminergic and cholinergic nuclei of the ascending arousal system, and their interconnections. The human sleep-wake cycle is governed by the activities of these nuclei, which modulate the behavioral state of the brain via diffuse neuromodulatory projections. The model parameters are not free since they correspond to physiological observables. Approximate parameter bounds are obtained by requiring consistency with physiological and behavioral measures, and the model replicates the human sleep-wake cycle, with physiologically reasonable voltages and firing rates. Mutual inhibition between the wake-promoting monoaminergic group and sleep-promoting VLPO causes ;;flip-flop'' behavior, with most time spent in 2 stable steady states corresponding to wake and sleep, with transitions between them on a timescale of a few minutes. The model predicts hysteresis in the sleep-wake cycle, with a region of bistability of the wake and sleep states. Reducing the monoaminergic-VLPO mutual inhibition results in a smaller hysteresis loop. This makes the model more prone to wake-sleep transitions in both directions and makes the states less distinguishable, as in narcolepsy. The model behavior is robust across the constrained parameter ranges, but with sufficient flexibility to describe a wide range of observed phenomena.
  // This model was taken from the CellML repositoryand automatically converted to SBML.
  // The original model was: Phillips AJ, Robinson PA. (2007) - version=1.0
  // The original CellML model was created by:
  // Catherine Lloyd
  // c.lloyd@auckland.ac.nz
  // The University of Auckland
  // This model originates from BioModels Database: A Database of Annotated Published Models (http://www.ebi.ac.uk/biomodels/). It is copyright (c) 2005-2011 The BioModels.net Team.
  // To the extent possible under law, all copyright and related or neighbouring rights to this encoded model have been dedicated to the public domain worldwide. Please refer to CC0 Public Domain Dedicationfor more information.
  // In summary, you are entitled to use this encoded model in absolutely any manner you deem suitable, verbatim, or with modification, alone or embedded it in a larger context, redistribute it, commercially or not, in a restricted way or not..
  // To cite BioModels Database, please use: Li C, Donizelli M, Rodriguez N, Dharuri H, Endler L, Chelliah V, Li L, He E, Henry A, Stefan MI, Snoep JL, Hucka M, Le Novère N, Laibe C (2010) BioModels Database: An enhanced, curated and annotated resource for published quantitative kinetic models. BMC Syst Biol., 4:92.
  // hasTaxon taxonomy:9606
  // biomodels.db:MODEL1006230025 biomodels.db:BIOMD0000000917
  // biomodels.db:MODEL1006230025
  // isVersionOf GO:0022410
  // occursIn BTO:0000146
  // hasTaxon taxonomy:9606
  // model units - substance: substance, time: time, volume: volume, area: area, length: length, extent: substance

  // Compartments:
  compartment COMpartment = 1 volume;

  // Species:
  species Monoaminergic__MA__voltage in COMpartment = 1; Monoaminergic__MA__voltage is "Monoaminergic (MA) voltage";  // hasProperty ncit:C70813; hasProperty omit:OMIT_0026787; hasProperty ncit:C73238; hasProperty ncit:C62025
  species Ventrolateral_preopticarea__VLPO__voltage in COMpartment = -10; Ventrolateral_preopticarea__VLPO__voltage is "Ventrolateral preopticarea (VLPO) voltage";  // occursIn omit:OMIT_0027571; hasProperty omit:OMIT_0026787; hasProperty ncit:C43382; hasProperty ncit:C70813
  species Somnogen_level_H in COMpartment = 10;  // hasProperty ncit:C207

  // Parameters:
  tau_v = 10;
  v_vm = -1.9;
  Vao = 1;
  tau_m = 10;
  v_mv = -1.9;
  v_maQao = 1;
  chi = 10.8;
  mu = 3.6;
  c0 = 1;
  v_vc = -6.3;
  v_vh = 0.19;
  Qmax = 100;
  theta = 10;
  sigma = 3;

  // Assignment rules:
  Qv := Qmax/(1 + exp(-(Ventrolateral_preopticarea__VLPO__voltage - theta)/sigma));
  Va := Vao;
  Qa := Qmax/(1 + exp(-(Va - theta)/sigma));
  Qm := Qmax/(1 + exp(-(Monoaminergic__MA__voltage - theta)/sigma));
  omega := 2*pi/24;
  C := c0 + cos(omega*time);
  D := v_vc*C + v_vh*Somnogen_level_H;

  // Reactions:
  Reaction_for_Monoaminergic__MA__voltage: => Monoaminergic__MA__voltage; COMpartment*Rate_Law_for_R_Vm(v_maQao, v_mv, Qv, Monoaminergic__MA__voltage, tau_m); Reaction_for_Monoaminergic__MA__voltage is "Reaction for Monoaminergic (MA) voltage";  // hasProperty ncit:C2321; hasProperty ncit:C62025; hasProperty ncit:C73238
  Reaction_for_Ventrolateral_preopticarea__VLPO__voltage: => Ventrolateral_preopticarea__VLPO__voltage; COMpartment*Rate_Law_for_R_Vv(v_vm, Qm, D, Ventrolateral_preopticarea__VLPO__voltage, tau_v); Reaction_for_Ventrolateral_preopticarea__VLPO__voltage is "Reaction for Ventrolateral preopticarea (VLPO) voltage";
  Reaction_for_homeostatic_sleep: => Somnogen_level_H; COMpartment*Rate_Law_for_R_H(mu, Qm, Somnogen_level_H, chi);  // hasProperty ncit:C207

  // Unit definitions:
  unit length = metre;
  unit area = metre^2;
  unit volume = litre;
  unit time = 3600 second;
  unit substance = mole;
end
