// SBML level 2 version 4
// dcterms:bibliographicCitation: urn:miriam:pubmed:29351845

function Rate_Law_for_for_RE__1__1__1(CycD, CycE, KCD, KCE, Rb_E2F_complex, dRE, kP1, kP2, kRE)
  kRE - kP1*CycD*Rb_E2F_complex/(KCD + Rb_E2F_complex) + kP2*CycE*Rb_E2F_complex/(KCE + Rb_E2F_complex) - dRE*Rb_E2F_complex;
end
Rate_Law_for_for_RE__1__1__1 is "Rate Law for for RE [1]_1 [1]";

function Rate_Law_for_For_E__1__1(CycD, CycE, E2F, KCD, KCE, KE, KM, Myc, Rb, Rb_E2F_complex, dE, kE, kP1, kP2, kRE, kb, kpfb)
  kE*(kpfb + Myc/(KM + Myc))*(E2F/(KE + E2F)) + kb*Myc/(KM + Myc) + kP1*CycD*Rb_E2F_complex/(KCD + Rb_E2F_complex) + kP2*CycE*Rb_E2F_complex/(KCE + Rb_E2F_complex) - dE*E2F - kRE*Rb*E2F;
end
Rate_Law_for_For_E__1__1 is "Rate Law for For E [1]_1";

function Rate_Law_for_for_CE_1(CycE, E2F, KE, dCE, kCE)
  kCE*E2F/(KE + E2F) - dCE*CycE;
end

function Rate_Law_for_For_CD_1(CycD, KM, KS, Myc, dCD, kCD, kCDS, serum)
  kCD*Myc/(KM + Myc) + kCDS*serum/(KS + serum) - dCD*CycD;
end

function Rate_Law_for_For_R_1(CycD, CycE, E2F, KCD, KCE, KRP, Phosphorylated_Rb, Rb, dR, kDP, kP1, kP2, kR, kRE)
  kR + kDP*Phosphorylated_Rb/(KRP + Phosphorylated_Rb) - kRE*Rb*E2F - kP1*CycD*Rb/(KCD + Rb) - kP2*CycE*Rb/(KCE + Rb) - dR*Rb;
end

function Rate_Law_for_for_RP__1__1__1(CycD, CycE, KCD, KCE, Phosphorylated_Rb, Rb, Rb_E2F_complex, dRP, kP1, kP2)
  kP1*CycD*Rb/(KCD + Rb) + kP2*CycE*Rb/(KCE + Rb_E2F_complex) + kP1*CycD*Rb_E2F_complex/(KCD + Rb_E2F_complex) + kP2*CycE*Rb_E2F_complex/(KCE + Rb_E2F_complex) - dRP*Phosphorylated_Rb;
end
Rate_Law_for_for_RP__1__1__1 is "Rate Law for for RP [1]_1 [1]";

function Rate_Law_for_For_M__1__1__1(KS, Myc, dM, kM, serum)
  kM*Myc/(KS + serum) - dM*Myc;
end
Rate_Law_for_For_M__1__1__1 is "Rate Law for For M [1]_1 [1]";

model Schwarz2018_Cdk_Activity_Threshold_Determines_Passage_through_the_Restriction_Point()
  // Schwarz2018-Cdk Activity Threshold Determines Passage through the Restriction Point
  // At the restriction point (R), mammalian cells irreversibly commit to divide. R has been viewed as a point in G1 that is passed when growth factor signaling initiates a positive feedback loop of Cdk
  // activity. However, recent studies have cast doubt on this model by claiming R occurs prior to positive feedback activation in G1 or even before completion of the previous cell cycle. Here we
  // reconcile these results and show that whereas many commonly used cell lines do not exhibit a G1 R, primary fibroblasts have a G1 R that is defined by a precise Cdk activity threshold and the
  // activation of cell-cycle-dependent transcription. A simple threshold model, based solely on Cdk activity, predicted with more than 95% accuracy whether individual cells had passed R. That a single
  // measurement accurately predicted cell fate shows that the state of complex regulatory networks can be assessed using a few critical protein activities.
  // hasProperty mamo:MAMO_0000046
  // hasProperty ncit:C18689
  // hasTaxon bao:0000362
  // isDerivedFrom pubmed:18364697
  // biomodels.db:MODEL2003030001 biomodels.db:BIOMD0000000918
  // biomodels.db:MODEL2003030001

  // Compartments:
  compartment Cell = 1;

  // Species:
  species Myc in Cell = 0;  // hasProperty ncit:C18538; hasProperty ncit:C18538
  species E2F in Cell = 0;  // hasProperty ncit:C129647; hasProperty ncit:C129647
  species CycD in Cell = 0;  // hasProperty ncit:C104194; hasProperty ncit:C104194
  species CycE in Cell = 0;  // hasProperty ncit:C104197; hasProperty ncit:C104197
  species Rb in Cell = 55;  // hasProperty omit:0016708; hasProperty omit:0016708
  species Phosphorylated_Rb in Cell = 0;  // hasProperty omit:0016708; hasProperty bao:0002007; hasProperty omit:0016708; hasProperty bao:0002007
  species Rb_E2F_complex in Cell = 0; Rb_E2F_complex is "Rb-E2F complex";  // hasProperty GO:0035189; hasProperty GO:0035189
  species serum in Cell = 2;  // hasProperty ncit:C13325; hasProperty ncit:C13325

  // Parameters:
  kE = 0.4;
  kM = 1;
  kCD = 0.03;
  kCDS = 0.45;
  kR = 0.18;
  kRE = 180;
  kb = 0.003;
  KS = 0.5;
  kCE = 0.35;
  dM = 0.7;
  dE = 0.25;
  dCD = 1.5;
  dCE = 1.5;
  dR = 0.06;
  dRP = 0.06;
  dRE = 0.03;
  kP1 = 18;
  kP2 = 18;
  kDP = 3.6;
  KM = 0.15;
  KE = 0.15;
  KCD = 0.92;
  KCE = 0.92;
  KRP = 0.01;
  kpfb = 4;

  // Reactions:
  For_Myc: => Myc; Cell*Rate_Law_for_For_M__1__1__1(KS, Myc, dM, kM, serum);  // modifiers: serum; hasProperty ncit:C75947; hasProperty ncit:C61408; hasProperty ncit:C75947; hasProperty ncit:C61408
  For_E2F: => E2F; Cell*Rate_Law_for_For_E__1__1(CycD, CycE, E2F, KCD, KCE, KE, KM, Myc, Rb, Rb_E2F_complex, dE, kE, kP1, kP2, kRE, kb, kpfb);  // modifiers: Myc, CycD, Rb_E2F_complex, CycE, Rb; hasProperty ncit:C75947; hasProperty ncit:C61408; hasProperty ncit:C75947; hasProperty ncit:C61408
  For_CycD: => CycD; Cell*Rate_Law_for_For_CD_1(CycD, KM, KS, Myc, dCD, kCD, kCDS, serum);  // modifiers: Myc, serum; hasProperty ncit:C75947; hasProperty ncit:C61408; hasProperty ncit:C61408; hasProperty ncit:C75947
  for_CycE: => CycE; Cell*Rate_Law_for_for_CE_1(CycE, E2F, KE, dCE, kCE);  // modifiers: E2F; hasProperty ncit:C75947; hasProperty ncit:C61408; hasProperty ncit:C61408; hasProperty ncit:C75947
  For_Rb: => Rb; Cell*Rate_Law_for_For_R_1(CycD, CycE, E2F, KCD, KCE, KRP, Phosphorylated_Rb, Rb, dR, kDP, kP1, kP2, kR, kRE);  // modifiers: Phosphorylated_Rb, E2F, CycD, CycE; hasProperty ncit:C75947; hasProperty ncit:C61408; hasProperty ncit:C61408; hasProperty ncit:C75947
  for_Phosphorylated_Rb: => Phosphorylated_Rb; Cell*Rate_Law_for_for_RP__1__1__1(CycD, CycE, KCD, KCE, Phosphorylated_Rb, Rb, Rb_E2F_complex, dRP, kP1, kP2);  // modifiers: CycD, Rb, CycE, Rb_E2F_complex; hasProperty GO:0016310; hasProperty ncit:C75947; hasProperty GO:0016311; hasProperty GO:0016311
  for_Rb_E2F_complex: => Rb_E2F_complex; Cell*Rate_Law_for_for_RE__1__1__1(CycD, CycE, KCD, KCE, Rb_E2F_complex, dRE, kP1, kP2, kRE); for_Rb_E2F_complex is "for Rb-E2F complex";  // modifiers: CycD, CycE; hasProperty ncit:C75947; hasProperty ncit:C75947

  // Events:
  Serum_Pulse: at (time > 10): serum = 0;

  // Unit definitions:
  unit time = 3600 second;
  unit substance = 1e-6 mole;
end
