// SBML level 2 version 4
// dcterms:bibliographicCitation: urn:miriam:pubmed:23906150

function Function_for_a_constant_rate_of_influx_of_T_cells_generated_through_the_primary_organs(alpha)
  alpha;
end

function Function_for_elimination_of_effects_of_the_tumor_immune_interaction_on_the_cancer_volume(gamma, x, y)
  gamma*x*y;
end

function Function_for_increase_in_tumor_volume(mu_C, x, x_inf, v)
  mu_C*x*(1 - (x/x_inf)^v);
end

function Function_for_natural_death_of_T_cells(delta, y)
  delta*y;
end

function Function_for_tumor_immune_interaction_on_the_immune_system(mu_I, beta, x, y)
  mu_I*(1 - beta*x)*x*y;
end

model Ledzewicz2013___On_optimal_chemotherapy_with_a_strongly_targeted_agent_for_a_model_of_tumor_immune_system_interactions_with_generalized_logistic_growth()
  // Ledzewicz2013 - On optimal chemotherapy with a strongly targeted agent for a model of tumor immune system interactions with generalized logistic growth
  // On optimal chemotherapy with a strongly targeted agent for a model of tumor-immune system interactions with generalized logistic growth.
  // Ledzewicz U1, Olumoye O, Schättler H.
  // 1
  // Dept. of Mathematics and Statistics, Southern Illinois University Edwardsville, Edwardsville, Illinois 62026-1653, USA. uledzew@siue.edu
  // Abstract
  // In this paper, a mathematical model for chemotherapy that takes tumor immune-system interactions into account is considered for a strongly targeted agent. We use a classical model originally
  // formulated by Stepanova, but replace exponential tumor growth with a generalised logistic growth model function depending on a parameter v. This growth function interpolates between a Gompertzian
  // model (in the limit v → 0) and an exponential model (in the limit v → ∞). The dynamics is multi-stable and equilibria and their stability will be investigated depending on the parameter v. Except for
  // small values of v, the system has both an asymptotically stable microscopic (benign) equilibrium point and an asymptotically stable macroscopic (malignant) equilibrium point. The corresponding
  // regions of attraction are separated by the stable manifold of a saddle. The optimal control problem of moving an initial condition that lies in the malignant region into the benign region is
  // formulated and the structure of optimal singular controls is determined
  // isInstanceOf mamo:MAMO_0000046 taxonomy:9606
  // isDescribedBy pubmed:23906150
  // biomodels.db:MODEL2003060003 biomodels.db:BIOMD0000000919
  // hasTaxon taxonomy:9606
  // hasProperty mamo:MAMO_0000046

  // Compartments:
  compartment compartment = 1;

  // Species:
  species y in compartment = 0.1;
  species x in compartment = 600;  // isInstanceOf ncit:C94515

  // Parameters:
  alpha = 0.1181;
  beta = 0.00264;
  gamma = 1;
  delta = 0.37451;
  mu_C = 0.5599;
  mu_I = 0.00484;
  x_inf = 780;
  kappa = 1;
  v = 1;

  // Reactions:
  a_constant_rate_of_influx_of_T_cells_generated_through_the_primary_organs: => y; compartment*Function_for_a_constant_rate_of_influx_of_T_cells_generated_through_the_primary_organs(alpha);  // isInstanceOf GO:0045066
  Natural_death_of_T_cells: y => ; compartment*Function_for_natural_death_of_T_cells(delta, y);  // isVersionOf GO:0006924
  Tumor_immune_interaction_on_the_immune_system: => y; compartment*Function_for_tumor_immune_interaction_on_the_immune_system(mu_I, beta, x, y);  // modifiers: x
  Elimination_effect_of_the_tumor_immune_interaction_on_the_cancer_volume: x => ; compartment*Function_for_elimination_of_effects_of_the_tumor_immune_interaction_on_the_cancer_volume(gamma, x, y);  // modifiers: y; isInstanceOf GO:0002418
  Increase_in_tumor_volume: => x; compartment*Function_for_increase_in_tumor_volume(mu_C, x, x_inf, v);  // isInstanceOf GO:0002413

  // Unit definitions:
  unit volume = 1e-3 litre;
  unit substance = 1e-3 mole;
end
