// SBML level 2 version 4
// dcterms:bibliographicCitation: urn:miriam:doi:10.1142/S1793048017500114

function Function_for_The_limited_interaction_between_glioma_and_macrophage(alpha3, G, k2, M)
  alpha3*(G/(G + k2))*M;
end

function Function_The_natural_death_of_CTL(mu_1, C_T)
  mu_1*C_T;
end

function Function_for_Decay_term_of_IFN_gamma(mu3, I_gamma)
  mu3*I_gamma;
end
Function_for_Decay_term_of_IFN_gamma is "Function for Decay term of IFN-gamma";

function function_for_The_degradation_of_TGF_beta(mu2, T_beta)
  mu2*T_beta;
end
function_for_The_degradation_of_TGF_beta is "function for The degradation of TGF-beta";

function Function_for_The_proliferative_enhancement_effect_of_macrophagesby_IFN_gama_and_negative_effect_of_TGF_beta(a1, I_gamma, k4, T_beta, e2)
  a1*(I_gamma/(k4 + I_gamma))*(1/(T_beta + e2));
end
Function_for_The_proliferative_enhancement_effect_of_macrophagesby_IFN_gama_and_negative_effect_of_TGF_beta is "Function for The proliferative enhancement effect of macrophagesby IFN-gama and negative effect of TGF-beta";

function Function_for_Natural_production_of_bioactive_TGF__beta_in_the_central_nervous_system(s1)
  s1;
end
Function_for_Natural_production_of_bioactive_TGF__beta_in_the_central_nervous_system is "Function for Natural production of bioactive TGF- beta in the central nervous system";

function Function_for_linear_production_of_inteferon_gamma_by_CTL(b2, C_T)
  b2*C_T;
end

function Function_for_Clearance_of_CTL_due_to_their_interaction_with_glioma_cells(alpha4, G, k3, C_T)
  alpha4*(G/(G + k3))*C_T;
end

function Function_for_Glioma_secrete_the_cytokine_TGF_beta_to_suppress_the_immune_activity(b1, G)
  b1*G;
end
Function_for_Glioma_secrete_the_cytokine_TGF_beta_to_suppress_the_immune_activity is "Function for Glioma secrete the cytokine TGF-beta to suppress the immune activity";

function Function_for_Elimination_of_glioma_due_to_interaction_with_CTL_and_macrophage(T_beta, e1, alpha1, M, alpha2, C_T, G, k1)
  1/(T_beta + e1)*(alpha1*M + alpha2*C_T)*(G/(G + k1));
end

function Function_for_The_rate_of_change_of_glioma_whose_growth_follows_the_logistic_fashion_without_any_immune_intervention(r1, G, G_max)
  r1*G*(1 - G/G_max);
end

function Function_for_The_rate_of_change_of_CTL_whose_stimulation_is_followed_by_glioma_cell(a2, G, k5, T_beta)
  a2*G/(k5 + T_beta);
end

function Function_for_logistic_growth_term_for_macrophage(r2, M, M_max)
  r2*M*(1 - M/M_max);
end

model Khajanchi2017___Uniform_Persistence_and_Global_Stability_for_a_Brain_Tumor_and_Immune_System_Interaction()
  // Khajanchi2017 - Uniform Persistence and Global Stability for a Brain Tumor and Immune System Interaction
  // This paper describes the synergistic interaction between the growth of malignant gliomas and the immune system interactions using a system of coupled ordinary di®erential equations (ODEs). The proposed mathematical model comprises the interaction of glioma cells, macrophages, activated Cytotoxic T-Lymphocytes (CTLs), the immunosuppressive factor TGF- and the immuno-stimulatory factor IFN-. The dynamical behavior of the proposed system both analytically and numerically is investigated from the point of view of stability. By constructing Lyapunov functions, the global behavior of the glioma-free and the interior equilibrium point have been analyzed under some assumptions. Finally, we perform numerical simulations in order to illustrate our analytical ¯ndings by varying the system parameters.
  // isDerivedFrom mamo:MAMO_0000046 taxonomy:9606
  // isDescribedBy doi:10.1142/S1793048017500114
  // hasTaxon taxonomy:9606
  // hasProperty mamo:MAMO_0000046
  // biomodels.db:MODEL2003110001 biomodels.db:BIOMD0000000921

  // Compartments:
  compartment compartment = 1;

  // Species:
  species G in compartment = 100000;  // isInstanceOf BTO:0000526
  species M in compartment = 100000;  // isInstanceOf BTO:0000801
  species C_T in compartment = 1;  // isInstanceOf ncit:C12543
  species T_beta in compartment = 5000;  // isInstanceOf ncit:C30098
  species I_gamma in compartment = 9000;  // isInstanceOf ncit:C20496

  // Parameters:
  r1 = 0.01;
  G_max = 882650;
  e1 = 10000;
  alpha1 = 1.5;
  alpha2 = 0.12;
  k1 = 27000;
  r2 = 0.3307;
  m1 = 1000000;
  a1 = 0.1163;
  k4 = 10500;
  e2 = 10000;
  alpha3 = 0.0194;
  k2 = 27000;
  a2 = 0;
  k5 = 2000;
  mu1 = 0.007;
  alpha4 = 0.1694;
  k3 = 334450;
  s1 = 63305;
  b1 = 5.75e-6;
  mu2 = 6.93;
  b2 = 0.000102;
  mu3 = 0.102;
  M_max = 1;

  // Reactions:
  The_rate_of_change_of_glioma_whose_growth_follows_the_logistic_fashion_without_any_immune_intervention: => G; compartment*Function_for_The_rate_of_change_of_glioma_whose_growth_follows_the_logistic_fashion_without_any_immune_intervention(r1, G, G_max);  // isInstanceOf PW:0000711
  Elimination_of_glioma_due_to_interaction_with_CTL_and_macrophage: G => ; compartment*Function_for_Elimination_of_glioma_due_to_interaction_with_CTL_and_macrophage(T_beta, e1, alpha1, M, alpha2, C_T, G, k1);  // modifiers: T_beta, M, C_T; isInstanceOf BTO:0000526
  Logistic_growth_term_for_macrophage: => M; compartment*Function_for_logistic_growth_term_for_macrophage(r2, M, M_max);  // hasInstance GO:0061517
  The_proliferative_enhancement_effect_of_macrophagesby_IFN_gama_and_negative_effect_of_TGF_beta: => M; compartment*Function_for_The_proliferative_enhancement_effect_of_macrophagesby_IFN_gama_and_negative_effect_of_TGF_beta(a1, I_gamma, k4, T_beta, e2); The_proliferative_enhancement_effect_of_macrophagesby_IFN_gama_and_negative_effect_of_TGF_beta is "The proliferative enhancement effect of macrophagesby IFN-gama and negative effect of TGF-beta";  // modifiers: I_gamma, T_beta; isInstanceOf GO:0061517
  The_limited_interaction_between_glioma_and_macrophage: M => ; compartment*Function_for_The_limited_interaction_between_glioma_and_macrophage(alpha3, G, k2, M);  // modifiers: G; isInstanceOf GO:0002281
  The_rate_of_change_of_CTL_whose_stimulation_is_followed_by_glioma_cell: => C_T; compartment*Function_for_The_rate_of_change_of_CTL_whose_stimulation_is_followed_by_glioma_cell(a2, G, k5, T_beta);  // modifiers: G, T_beta; isInstanceOf GO:0043319
  The_natural_death_of_CTL: C_T => ; compartment*Function_The_natural_death_of_CTL(mu1, C_T);  // isInstanceOf GO:1902483
  Clearance_of_CTL_due_to_their_interaction_with_glioma_cells: C_T => ; compartment*Function_for_Clearance_of_CTL_due_to_their_interaction_with_glioma_cells(alpha4, G, k3, C_T);  // modifiers: G; isInstanceOf GO:0043316
  Natural_production_of_bioactive_TGF__beta_in_the_central_nervous_system: => T_beta; compartment*Function_for_Natural_production_of_bioactive_TGF__beta_in_the_central_nervous_system(s1); Natural_production_of_bioactive_TGF__beta_in_the_central_nervous_system is "Natural production of bioactive TGF- beta in the central nervous system";  // isInstanceOf GO:0071604
  Glioma_secrete_the_cytokine_TGF_beta_to_suppress_the_immune_activity: => T_beta; compartment*Function_for_Glioma_secrete_the_cytokine_TGF_beta_to_suppress_the_immune_activity(b1, G); Glioma_secrete_the_cytokine_TGF_beta_to_suppress_the_immune_activity is "Glioma secrete the cytokine TGF-beta to suppress the immune activity";  // modifiers: G; isInstanceOf BTO:0000526
  The_degradation_of_TGF_beta: T_beta => ; compartment*function_for_The_degradation_of_TGF_beta(mu2, T_beta); The_degradation_of_TGF_beta is "The degradation of TGF-beta";  // isInstanceOf GO:1901389
  Linear_production_of_interferon_gamma_by_CTL: => I_gamma; compartment*Function_for_linear_production_of_inteferon_gamma_by_CTL(b2, C_T);  // modifiers: C_T; isInstanceOf GO:0032609
  Decay_term_of_IFN_gamma: I_gamma => ; compartment*Function_for_Decay_term_of_IFN_gamma(mu3, I_gamma); Decay_term_of_IFN_gamma is "Decay term of IFN-gamma";  // isInstanceOf GO:1902714

  // Unit definitions:
  unit volume = 1e-3 litre;
  unit substance = 1e-3 mole;
end
