// SBML level 2 version 4
// dcterms:bibliographicCitation: http://identifiers.org/doi/10.1109/SECON.2015.7132968

function Rate_Law_for_reaction_for_E_1(Ar, Me, Population_of_Eggs, Te, ep)
  Ar*ep - Population_of_Eggs*(Te + Me);
end

function Rate_Law_for_reaction_for_L_1(K0, Ml, Population_of_Eggs, Population_of_Larvae, Te, Tl)
  Population_of_Eggs*Te - Population_of_Larvae*(Tl + Ml) - K0*Population_of_Larvae^2;
end

function Rate_Law_for_reaction_for_P_1(Mp, Population_of_Larvae, Population_of_Pupae, Tl, Tp)
  Population_of_Larvae*Tl - Population_of_Pupae*(Tp + Mp);
end

model Turner2015_Human_Mosquito_ELP_Model()
  // Turner2015-Human/Mosquito ELP Model
  // the growth of the mosquito population is directly related to the spread of malaria, the Four Stage Life Cycle is incorporated to model the effects of climate change and interspecies competition
  // within the mosquito life cycle stages of Egg, Larvae, and Pupae.
  // hasProperty ncit:C17214
  // hasProperty ncit:C70833
  // hasProperty omit:0009103
  // hasProperty ncit:C34797
  // hasTaxon taxonomy:53533
  // biomodels.db:MODEL2003130001 biomodels.db:BIOMD0000000922

  // Compartments:
  compartment compartment = 1;

  // Species:
  species Population_of_Eggs in compartment = 10000;
  species Population_of_Larvae in compartment = 5000;
  species Population_of_Pupae in compartment = 3000;

  // Parameters:
  Ar = 20;
  ep = 30;
  Te = 0.361;
  Me = 0.05;
  K0 = 0.0002;
  Tl = 0.134;
  Tp = 0.342;
  Mp = 0.0025;
  Ml = 0.0501;

  // Reactions:
  reaction_for_E: => Population_of_Eggs; compartment*Rate_Law_for_reaction_for_E_1(Ar, Me, Population_of_Eggs, Te, ep);
  reaction_for_L: => Population_of_Larvae; compartment*Rate_Law_for_reaction_for_L_1(K0, Ml, Population_of_Eggs, Population_of_Larvae, Te, Tl);  // modifiers: Population_of_Eggs
  reaction_for_P: => Population_of_Pupae; compartment*Rate_Law_for_reaction_for_P_1(Mp, Population_of_Larvae, Population_of_Pupae, Tl, Tp);  // modifiers: Population_of_Larvae

  // Unit definitions:
  unit volume = 1e-3 litre;
  unit substance = 1e-3 mole;
end
