// SBML level 2 version 4
// dcterms:bibliographicCitation: urn:miriam:pubmed:23095605

function MAX(a, b)
  piecewise(a, a >= b, b);
end

function Rate_Law_for_reaction_for_O_b(alpha2, O_c, g12, f12, B, s, O_b, g22, f22, beta2)
  alpha2*O_c^(g12*(1 + f12*(B/s)))*O_b^(g22 - f22*(B/s)) - beta2*O_b;
end

function Rate_Law_for_reaction_for_O_c(alpha1, O_c, g11, f11, B, s, O_b, g21, f21, beta1)
  alpha1*O_c^(g11*(1 + f11*(B/s)))*O_b^(g21*(1 + f21*(B/s))) - beta1*O_c;
end

function Rate_Law_for_reaction_fo_z(K1, O_c, O_cbar, k2, O_b, O_bbar)
  -K1*MAX(O_c - O_cbar, 0) + k2*MAX(O_b - O_bbar, 0);
end

function Rate_Law_for_reaction_for_B(gamma_B, V, B, s)
  (gamma_B - V)*B*log10(s/B);
end

model Li_2012_Modelling_osteomyelitis_Control_Model()
  // Liò2012_Modelling osteomyelitis_Control Model
  // Background
  // This work focuses on the computational modelling of osteomyelitis, a bone pathology caused by bacteria infection (mostly Staphylococcus aureus). The infection alters the RANK/RANKL/OPG signalling
  // dynamics that regulates osteoblasts and osteoclasts behaviour in bone remodelling, i.e. the resorption and mineralization activity. The infection rapidly leads to severe bone loss, necrosis of the
  // affected portion, and it may even spread to other parts of the body. On the other hand, osteoporosis is not a bacterial infection but similarly is a defective bone pathology arising due to imbalances
  // in the RANK/RANKL/OPG molecular pathway, and due to the progressive weakening of bone structure.
  // Results
  // Since both osteoporosis and osteomyelitis cause loss of bone mass, we focused on comparing the dynamics of these diseases by means of computational models. Firstly, we performed meta-analysis on a
  // gene expression data of normal, osteoporotic and osteomyelitis bone conditions. We mainly focused on RANKL/OPG signalling, the TNF and TNF receptor superfamilies and the NF-kB pathway. Using
  // information from the gene expression data we estimated parameters for a novel model of osteoporosis and of osteomyelitis. Our models could be seen as a hybrid ODE and probabilistic verification
  // modelling framework which aims at investigating the dynamics of the effects of the infection in bone remodelling. Finally we discuss different diagnostic estimators defined by formal verification
  // techniques, in order to assess different bone pathologies (osteopenia, osteoporosis and osteomyelitis) in an effective way.
  // Conclusions
  // We present a modeling framework able to reproduce aspects of the different bone remodeling defective dynamics of osteomyelitis and osteoporosis. We report that the verification-based estimators are
  // meaningful in the light of a feed forward between computational medicine and clinical bioinformatics
  // Model is encoded by Ruby and submitted and curated to BioModels by Ahmad Zyoud
  // isDerivedFrom pubmed:14499354
  // isDescribedBy pubmed:23095605
  // biomodels.db:MODEL2003170001 biomodels.db:BIOMD0000000923
  // occursIn BTO:0000140
  // hasTaxon taxonomy:9606
  // hasProperty ncit:C27577 mamo:MAMO_0000046

  // Compartments:
  compartment compartment = 1;

  // Species:
  species Bone_Density__z in compartment = 100; Bone_Density__z is "Bone Density (z)";  // hasProperty omit:0016250
  species Osteoblasts__O_b in compartment = 316; Osteoblasts__O_b is "Osteoblasts (O_b)";  // hasProperty omit:0011012
  species Osteoclasts__O_c in compartment = 15; Osteoclasts__O_c is "Osteoclasts (O_c)";  // hasProperty omit:0011016
  species B in compartment = 1;  // hasProperty ncit:C50921

  // Parameters:
  alpha1 = 3;
  alpha2 = 4;
  beta1 = 0.2;
  beta2 = 0.02;
  g11 = 1.1;
  g12 = 1;
  g22 = 0;
  g21 = -0.5;
  k1 = 0.0748;
  k2 = 0.0006395;
  g_ageing = 2;
  g_por = 0.1;
  gamma_B = 0.005;
  s = 100;
  V = 0.007;
  t_treat = 200;
  f11 = 0.005;
  f12 = 0;
  f22 = 0.2;
  f21 = 0.005;
  O_cbar = 1.78;
  O_bbar = 177.91;

  // Reactions:
  reaction_fo_z: => Bone_Density__z; compartment*Rate_Law_for_reaction_fo_z(k1, Osteoclasts__O_c, O_cbar, k2, Osteoblasts__O_b, O_bbar);  // modifiers: Osteoclasts__O_c, Osteoblasts__O_b
  reaction_for_O_b: => Osteoblasts__O_b; compartment*Rate_Law_for_reaction_for_O_b(alpha2, Osteoclasts__O_c, g12, f12, B, s, Osteoblasts__O_b, g22, f22, beta2);  // modifiers: Osteoclasts__O_c, B
  reaction_for_O_c: => Osteoclasts__O_c; compartment*Rate_Law_for_reaction_for_O_c(alpha1, Osteoclasts__O_c, g11, f11, B, s, Osteoblasts__O_b, g21, f21, beta1);  // modifiers: B, Osteoblasts__O_b
  reaction_for_B: => B; compartment*Rate_Law_for_reaction_for_B(gamma_B, V, B, s);  // hasProperty ncit:C122576

  // Unit definitions:
  unit volume = 1e-3 litre;
  unit time = 86400 second;
  unit substance = 1e-3 mole;
end
