// SBML level 2 version 4
// dcterms:bibliographicCitation: urn:miriam:pubmed:21300073

model New_Model()
  // Smith2011 - Three Stage Innate Immune Response to a Pneumococcal Lung Infection
  // biomodels.db:MODEL1808280007
  // isDescribedBy pubmed:21300073

  // Compartments:
  compartment compartment = 1;

  // Species:
  species $P in compartment = 100000;
  species $E_U in compartment = 100000000;
  species $E_A in compartment = 0;
  species $C in compartment = 0;
  species $N in compartment = 0;
  species $D in compartment = 0;

  // Parameters:
  r = 1.13;
  K_P = 230000000;
  gamma_M_A = 5.6e-6;
  n = 5;
  x = 2;
  d = 0.001;
  M_Astar = 1000000;
  gamma_N = 1e-5;
  theta_M = 4.2e-8;
  kappa = 0.042;
  v = 0.029;
  omega = 2.1e-8;
  d_E = 0.167;
  alpha = 0.021;
  k_n = 1.4e-5;
  d_C = 0.83;
  N_max = 180000;
  eta = 1.33;
  d_N = 0.063;
  d_NP = 1.76e-7;
  rho1 = 0.15;
  rho2 = 0.001;
  rho3 = 1e-5;
  d_D = 1.4e-7;
  k_d = 5e-9;
  s = 1000;

  // Assignment rules:
  f_P_M_A := n^x*M_Astar/(P^x + n^x*M_Astar);

  // Rate rules:
  P' = r*P*(1 - P/K_P) - gamma_M_A*f_P_M_A/(1 + k_d*D*M_Astar)*M_Astar*P - gamma_N*N*P;
  E_U' = -omega*P*E_U;
  E_A' = omega*P*E_U - d_E*E_A;
  C' = alpha*(E_A/(1 + k_n*N)) + v*(theta_M*P*M_Astar/((d + kappa + theta_M*P)*(1 + k_n*N))) - d_C*C;
  N' = eta*C*(1 - N/N_max) - d_NP*N*P - d_N*N;
  D' = rho1*d_NP*N*P + rho2*d_N*N + rho3*d_E*E_A - d_D*D*M_Astar;

  // Events:
  event: at (E_U < 0): E_U = 0;
  event_1: at (P < 0): P = 0;

  // Unit definitions:
  unit volume = 1e-3 litre;
  unit time = 3600 second;
end
