// SBML level 2 version 3

model MODEL1706070000()
  // Grigolon2018 - Feedback Loop in ARF and IAA Response
  // This model is described in the article:
  // Responses to auxin signals: an operating principle for dynamical sensitivity yet high resilience.
  // Grigolon S, Bravi B, Martin OC.
  // R Soc Open Sci 2018 Jan; 5(1): 172098
  // Abstract:
  // Plants depend on the signalling of the phytohormone auxin for their development and for responding to environmental perturbations. The associated biomolecular signalling network involves a negative feedback on Aux/IAA proteins which mediate the influence of auxin (the signal) on the auxin response factor (ARF) transcription factors (the drivers of the response). To probe the role of this feedback, we consider alternative in silico signalling networks implementing different operating principles. By a comparative analysis, we find that the presence of a negative feedback allows the system to have a far larger sensitivity in its dynamical response to auxin and that this sensitivity does not prevent the system from being highly resilient. Given this insight, we build a new biomolecular signalling model for quantitatively describing such Aux/IAA and ARF responses.
  // This model is hosted on BioModels Database and identified by: MODEL1706070000.
  // To cite BioModels Database, please use: Chelliah V et al. BioModels: ten-year anniversary. Nucl. Acids Res. 2015, 43(Database issue):D542-8.
  // To the extent possible under law, all copyright and related or neighbouring rights to this encoded model have been dedicated to the public domain worldwide. Please refer to CC0 Public Domain Dedication for more information.
  // biomodels.db:MODEL1706070000

  // Compartments:
  compartment Cell = 1 volume;

  // Species:
  species aux in Cell = 0;
  species IAAm in Cell = 0;
  species IAAp in Cell = 0;
  species ARF in Cell = 10;
  species $null in Cell = 0;
  species ARFIAA in Cell = 0;
  species ARF2 in Cell = 0;
  species auxTIR1 in Cell = 0;
  species auxTIR1IAA in Cell = 0;
  species TIR1 in Cell = 18.51;
  species IAAstar in Cell = 0;

  // Parameters:
  Sauxin = 0.02;
  muaux = 0.1;
  lambda1 = 0.48;
  thetaARF = 100;
  thetaARF2 = 100;
  thetaARFIAA = 100;
  muIAAm = 0.003;
  muIAA = 0.003;
  delta = 4;
  qa = 0.5;
  qd = 0.44;
  pa = 1;
  pd = 0.072;
  ka = 0.00082;
  kd = 0.33;
  la = 5.75;
  ld = 0.045;
  lm = 0.9;
  muIAAstar = 0.1;

  // Reactions:
  auxin_production: $null -> aux; Sauxin;
  auxin_degradation: aux -> $null; aux*muaux;
  mRNA_production: $null -> IAAm; ARF*lambda1*(thetaARF*(ARF*thetaARF^(-1) + ARF2*thetaARF2^(-1) + ARFIAA*thetaARFIAA^(-1) + 1))^(-1);  // modifiers: ARF, ARF2, ARFIAA
  mRNA_degradation: IAAm -> $null; IAAm*muIAAm;
  IAA_degradation: IAAp -> $null; IAAp*muIAA;
  mRNA_translation: IAAm -> IAAm + IAAp; delta*IAAm;
  ARF2_formation: 2 ARF -> ARF2; ARF^2*qa;
  ARF2_dissociation: ARF2 -> 2 ARF; ARF2*qd;
  ARFIAA_formation: ARF + IAAp -> ARFIAA; ARF*IAAp*pa;
  ARFIAA_dissociation: ARFIAA -> ARF + IAAp; ARFIAA*pd;
  auxTIR1_formation: aux + TIR1 -> auxTIR1; aux*ka*TIR1;
  auxTIR1_dissociation: auxTIR1 -> aux + TIR1; auxTIR1*kd;
  auxTIR1IAA_formation: auxTIR1 + IAAp -> auxTIR1IAA; auxTIR1*IAAp*la;
  auxTIR1IAA_dissociation: auxTIR1IAA -> auxTIR1 + IAAp; auxTIR1IAA*ld;
  IAA_ubiquitination: auxTIR1IAA -> auxTIR1 + IAAstar; auxTIR1IAA*lm;
  IAAstar_degradation: IAAstar -> $null; IAAstar*muIAAstar;
end
