// SBML level 2 version 4
// dcterms:bibliographicCitation: urn:miriam:pubmed:28213682

function Function_for_R_4(Mbp, compartmentOne)
  Mbp/compartmentOne;
end

function Function_for_R_1(Fdam, compartmentOne)
  Fdam/compartmentOne;
end

function Function_for_R_13(Gamma_p, compartmentOne, solution0)
  Gamma_p*solution0/compartmentOne;
end

function Function_for_R_12(Pfp, compartmentOne, solution1, solution3)
  1/(1 + solution1^2)*(Pfp/(1 + solution3^2))*solution3^2/compartmentOne;
end

function Function_for_R_6(Gamma_m, compartmentOne, solution2)
  Gamma_m*solution2/compartmentOne;
end

function Function_for_R_3(Gamma_f, compartmentOne, solution3)
  Gamma_f*solution3/compartmentOne;
end

function Function_for_R_7(Aph, App, compartmentOne, solution0)
  App*(1/(Aph^2 + solution0^2))*solution0^2/compartmentOne;
end

function Function_for_R_9(compartmentOne, solution1)
  solution1/compartmentOne;
end

function Function_for_R_10(Pbp, compartmentOne, solution1)
  Pbp/(1 + solution1^2)/compartmentOne;
end

function Function_for_R_8(Afh, Afp, compartmentOne, solution3)
  Afp*(1/(Afh^2 + solution3^2))*solution3^2/compartmentOne;
end

function Function_for_R_11(Ppp, compartmentOne, solution0, solution1)
  1/(1 + solution1^2)*(Ppp/(1 + solution0^2))*solution0^2/compartmentOne;
end

function Function_for_R_5(Mph, Mpp, compartmentOne, solution0)
  Mpp*(1/(Mph^2 + solution0^2))*solution0^2/compartmentOne;
end

function Function_for_R_2(compartmentOne, solution2)
  solution2/compartmentOne;
end

model Baker2017___The_role_of_cytokines__MMPs_and_fibronectin_fragments_osteoarthritis()
  // Baker2017 - The role of cytokines, MMPs and fibronectin fragments osteoarthritis
  // This model is described in the article:
  // Mathematical modelling of cytokines, MMPs and fibronectin fragments in osteoarthritic cartilage.
  // Baker M, Brook BS, Owen MR.
  // J Math Biol 2017 Feb; :
  // Abstract:
  // Osteoarthritis (OA) is a degenerative disease which causes pain and stiffness in joints. OA progresses through excessive degradation of joint cartilage, eventually leading to significant joint degeneration and loss of function. Cytokines, a group of cell signalling proteins, present in raised concentrations in OA joints, can be classified into pro-inflammatory and anti-inflammatory groups. They mediate cartilage degradation through several mechanisms, primarily the up-regulation of matrix metalloproteinases (MMPs), a group of collagen-degrading enzymes. In this paper we show that the interactions of cytokines within cartilage have a crucial role to play in OA progression and treatment. We develop a four-variable ordinary differential equation model for the interactions between pro- and anti-inflammatory cytokines, MMPs and fibronectin fragments (Fn-fs), a by-product of cartilage degradation and up-regulator of cytokines. We show that the model has four classes of dynamic behaviour: homoeostasis, bistable inflammation, tristable inflammation and persistent inflammation. We show that positive and negative feedbacks controlling cytokine production rates can determine either a pre-disposition to OA or initiation of OA. Further, we show that manipulation of cytokine, MMP and Fn-fs levels can be used to treat OA, but we suggest that multiple treatment targets may be essential to halt or slow disease progression.
  // This model is hosted on BioModels Database and identified by: MODEL1704120000.
  // To cite BioModels Database, please use: BioModels Database: An enhanced, curated and annotated resource for published quantitative kinetic models.
  // To the extent possible under law, all copyright and related or neighbouring rights to this encoded model have been dedicated to the public domain worldwide. Please refer to CC0 Public Domain Dedication for more information.
  // biomodels.db:MODEL1704120000
  // isVersionOf ncit:C39129
  // isDescribedBy pubmed:28213682
  // hasProperty ncit:C3293 mamo:MAMO_0000046
  // biomodels.db:MODEL1704120000 biomodels.db:BIOMD0000000928

  // Compartments:
  compartment compartmentOne = 1; compartmentOne is "Cartilage";  // isVersionOf BTO:0000206

  // Species:
  species solution0 in compartmentOne = 0.18; solution0 is "p-Cytokines";  // isVersionOf ncit:C20464; hasProperty ncit:C3137
  species solution1 in compartmentOne = 5; solution1 is "a-Cytokines";  // isVersionOf ncit:C20464; hasProperty ncit:C28347
  species solution2 in compartmentOne = 0.55; solution2 is "MMP";  // isVersionOf ncit:C18164
  species solution3 in compartmentOne = 0.75; solution3 is "Fragments";  // isVersionOf ncit:C16581

  // Parameters:
  Afh = 1;
  Afp = 10;
  Aph = 1;
  App = 10;
  Fdam = 0;
  Gamma_f = 1;
  Gamma_m = 1;
  Gamma_p = 1;
  Mbp = 0.01;
  Mph = 1;
  Mpp = 10;
  Pbp = 0.01;
  Pfp = 10;
  Ppp = 10;

  // Reactions:
  R_1: => solution3; compartmentOne*Function_for_R_1(Fdam, compartmentOne);  // isInstanceOf ncit:C41580
  R_2: solution2 => solution2 + solution3; compartmentOne*Function_for_R_2(compartmentOne, solution2);  // isInstanceOf ncit:C41580
  R_3: solution3 => ; compartmentOne*Function_for_R_3(Gamma_f, compartmentOne, solution3);
  R_4: => solution2; compartmentOne*Function_for_R_4(Mbp, compartmentOne);
  R_5: solution0 => solution0 + solution2; compartmentOne*Function_for_R_5(Mph, Mpp, compartmentOne, solution0);  // isInstanceOf urn:miriam:unknown:SIO:010295
  R_6: solution2 => ; compartmentOne*Function_for_R_6(Gamma_m, compartmentOne, solution2);
  R_7: solution0 => solution0 + solution1; compartmentOne*Function_for_R_7(Aph, App, compartmentOne, solution0);  // isInstanceOf urn:miriam:unknown:SIO:010295
  R_8: solution3 => solution1 + solution3; compartmentOne*Function_for_R_8(Afh, Afp, compartmentOne, solution3);  // isInstanceOf urn:miriam:unknown:SIO:010295
  R_9: solution1 => ; compartmentOne*Function_for_R_9(compartmentOne, solution1);
  R_10: solution1 => solution0 + solution1; compartmentOne*Function_for_R_10(Pbp, compartmentOne, solution1);  // isInstanceOf ncit:C61559
  R_11: solution0 + solution1 => 2 solution0 + solution1; compartmentOne*Function_for_R_11(Ppp, compartmentOne, solution0, solution1);  // isInstanceOf GO:0001819
  R_12: solution1 + solution3 => solution0 + solution1 + solution3; compartmentOne*Function_for_R_12(Pfp, compartmentOne, solution1, solution3);  // isInstanceOf GO:0001819
  R_13: solution0 => ; compartmentOne*Function_for_R_13(Gamma_p, compartmentOne, solution0);  // isInstanceOf ncit:C40678

  // Events:
  event: at (time == 20): solution0 = 0.1*solution0;
end
