// SBML level 2 version 4
// dcterms:bibliographicCitation: urn:miriam:pubmed:27338302

function Function_for_reaction_8(c_t, T, C)
  c_t*T*C;
end

function Function_for_reaction_3(d_c, T, C, l, s)
  d_c*((T/C)^l/(s + (T/C)^l))*C;
end

function Function_for_reaction_4(a_p, P, b_p)
  a_p*P*(1 - b_p*P);
end

function Function_for_reaction_9(d_t, T)
  d_t*T^2;
end

function Constant_flux__irreversible(v)
  v;
end
Constant_flux__irreversible is "Constant flux (irreversible)";

function Function_for_reaction_1(a_c, C, b_c)
  a_c*C*(1 - b_c*C);
end

function Function_for_reaction_2(c_c, N, C)
  c_c*N*C;
end

function Function_for_reaction_10(e_t, N, C)
  e_t*N*C;
end

function Function_for_reaction_11_16_21(H, tau1_alpha1, p, prod, g)
  p*H*prod/(g*tau1_alpha1 + H);
end
Function_for_reaction_11_16_21 is "Function for reaction 11,16,21";

function Function_for_reaction_12_17_22(f, alpha2_tau2, T, beta2_tau2, N, gamma2_tau2, H, prod, h)
  f*(alpha2_tau2*T + beta2_tau2*N + gamma2_tau2*H)*prod/(h + alpha2_tau2*T + beta2_tau2*N + gamma2_tau2*H);
end
Function_for_reaction_12_17_22 is "Function for reaction 12,17,22";

function Function_for_reaction_20(c_h, H)
  c_h*H^2;
end

function Function_for_reaction_23(mu_c, P, C, b_C)
  mu_c*P*C*(1 - b_C*C);
end

function Function_for_reaction_24(f_p, C, mu_p, P, b_p)
  f_p*C/(mu_p + C)*P*(1 - b_p*P);
end

model Li2016___Model_for_pancreatic_cancer_patients_receiving_immunotherapy()
  // Li2016 - Model for pancreatic cancer patients receiving immunotherapy
  // immunotherapy offers a better prognosis for pancreatic cancer patients. As a direct extension of this work, various new therapy methods that are under exploration and clinical trials could be
  // assessed or evaluated using the newly developed mathematical prognosis model.
  // isDescribedBy pubmed:27338302
  // biomodels.db:MODEL2004060001 biomodels.db:BIOMD0000000929
  // hasTaxon taxonomy:9606
  // hasProperty DOID:1793 DOID:162 ncit:C15438 mamo:MAMO_0000046

  // Compartments:
  compartment Pancreas = 1;  // ncit:C12393

  // Species:
  species Pancreatic_cancer_cells__C in Pancreas = 1000000000; Pancreatic_cancer_cells__C is "Pancreatic cancer cells (C)";  // isVersionOf BTO:0000584
  species Pancreatic_stellate_cells__P in Pancreas = 5600000; Pancreatic_stellate_cells__P is "Pancreatic stellate cells (P)";  // isVersionOf ncit:C107531
  species CD8__T_cells__T in Pancreas = 700000000; CD8__T_cells__T is "CD8+ T cells (T)";  // isVersionOf efo:0004219
  species NK_cells__N in Pancreas = 352800000; NK_cells__N is "NK cells (N)";  // isVersionOf ncit:C12536
  species helper_T_cells__H in Pancreas = 1881600000; helper_T_cells__H is "helper T cells (H)";

  // Parameters:
  a_c = 0.0195;
  b_c = 1.02e-11;
  c_c = 1.5e-11;
  d_c = 0.005;
  s = 0.3;
  b_p = 1.7857e-9;
  f_p = 0.125;
  mu_p = 56000000;
  lambda_p = 0.015;
  a_t = 3500;
  b_t = 0.02;
  c_t = 3.42e-12;
  d_t = 3e-10;
  e_t = 5e-12;
  p_t = 0.125;
  g_t = 0.3;
  f_t = 0.125;
  h_t = 0.3;
  a_n = 130000;
  b_n = 0.015;
  c_n = 1e-13;
  p_n = 0.125;
  g_n = 0.3;
  f_n = 0.125;
  h_n = 0.3;
  a_h = 9600;
  b_h = 0.0012;
  c_h = 5e-11;
  p_h = 0.125;
  g_h = 0.3;
  f_h = 0.125;
  h_h = 0.3;
  tau1_alpha1 = 2.2483e11;
  alpha2_tau2 = 4.4691e-13;
  beta2_tau2 = 4.4691e-13;
  gamma2_tau2 = 4.4691e-13;

  // Assignment rules:
  mu_c := 0.1*a_c*b_p;
  l := 2/3;
  a_p := 0.1*a_c;

  // Reactions:
  Logistic_growth_of_cancer_cells: => Pancreatic_cancer_cells__C; Pancreas*Function_for_reaction_1(a_c, Pancreatic_cancer_cells__C, b_c);  // hasProperty GO:0016049
  Interaction_between_cancer_cells_and_NK_cells: Pancreatic_cancer_cells__C => ; Pancreas*Function_for_reaction_2(c_c, NK_cells__N, Pancreatic_cancer_cells__C);  // modifiers: NK_cells__N; hasProperty GO:0002418
  Lysis_of_cancer_cells_by_CD8__T_cells: Pancreatic_cancer_cells__C => ; Pancreas*Function_for_reaction_3(d_c, CD8__T_cells__T, Pancreatic_cancer_cells__C, l, s); Lysis_of_cancer_cells_by_CD8__T_cells is "Lysis of cancer cells by CD8+ T cells";  // modifiers: CD8__T_cells__T; isVersionOf OBI:0302894
  Basal_growth_of_stellate_cells: => Pancreatic_stellate_cells__P; Pancreas*Function_for_reaction_4(a_p, Pancreatic_stellate_cells__P, b_p);  // hasProperty GO:0016049
  Death_of_stellate_cells: Pancreatic_stellate_cells__P => ; Pancreas*lambda_p*Pancreatic_stellate_cells__P;  // isVersionOf GO:0008219
  Production_of_CD8__T_cells: => CD8__T_cells__T; Pancreas*Constant_flux__irreversible(a_t); Production_of_CD8__T_cells is "Production of CD8+ T cells";
  Death_of_CD8__T_cells: CD8__T_cells__T => ; Pancreas*b_t*CD8__T_cells__T; Death_of_CD8__T_cells is "Death of CD8+ T cells";  // isVersionOf GO:0008219
  Inactivation_of_CD8__T_cells_by_cancer_cells: CD8__T_cells__T => ; Pancreas*Function_for_reaction_8(c_t, CD8__T_cells__T, Pancreatic_cancer_cells__C); Inactivation_of_CD8__T_cells_by_cancer_cells is "Inactivation of CD8+ T cells by cancer cells";  // modifiers: Pancreatic_cancer_cells__C
  Self__regulation_of_CD8__T_cells: CD8__T_cells__T => ; Pancreas*Function_for_reaction_9(d_t, CD8__T_cells__T); Self__regulation_of_CD8__T_cells is "Self- regulation of CD8+ T cells";  // isVersionOf GO:0065007
  Recruitment_of_CD8__cells_by_debris_from_cancer_cells_lysed: => CD8__T_cells__T; Pancreas*Function_for_reaction_10(e_t, NK_cells__N, Pancreatic_cancer_cells__C); Recruitment_of_CD8__cells_by_debris_from_cancer_cells_lysed is "Recruitment of CD8+ cells by debris from cancer cells lysed";  // modifiers: NK_cells__N, Pancreatic_cancer_cells__C; hasProperty ncit:C78343
  // The name of this reaction is according to the full model stated in the reference paper.
  Proliferation_of_CD8__T_cells_by_IL_2: => CD8__T_cells__T; Pancreas*Function_for_reaction_11_16_21(helper_T_cells__H, tau1_alpha1, p_t, CD8__T_cells__T, g_t); Proliferation_of_CD8__T_cells_by_IL_2 is "Proliferation of CD8+ T cells by IL-2";  // modifiers: helper_T_cells__H; isVersionOf ncit:C18081
  // The name of this reaction is according to the full model stated in the reference paper.
  Proliferation_of_CD8__T_cells_by_IFN_gamma: => CD8__T_cells__T; Pancreas*Function_for_reaction_12_17_22(f_t, alpha2_tau2, CD8__T_cells__T, beta2_tau2, NK_cells__N, gamma2_tau2, helper_T_cells__H, CD8__T_cells__T, h_t); Proliferation_of_CD8__T_cells_by_IFN_gamma is "Proliferation of CD8+ T cells by IFN-gamma";  // modifiers: NK_cells__N, helper_T_cells__H; isVersionOf ncit:C18081
  Production_of_NK_cells: => NK_cells__N; Pancreas*Constant_flux__irreversible(a_n);
  Death_of_NK_cells: NK_cells__N => ; Pancreas*b_n*NK_cells__N;  // isVersionOf GO:0008219
  Inactivation_of_NK_cells_after_interaction_with_cancer_cells: NK_cells__N => ; Pancreas*Function_for_reaction_2(c_n, Pancreatic_cancer_cells__C, NK_cells__N);  // modifiers: Pancreatic_cancer_cells__C
  // The name of this reaction is according to the full model stated in the reference paper.
  Proliferation_of_NK_cells_by_IL_2: => NK_cells__N; Pancreas*Function_for_reaction_11_16_21(helper_T_cells__H, tau1_alpha1, p_n, NK_cells__N, g_n); Proliferation_of_NK_cells_by_IL_2 is "Proliferation of NK cells by IL-2";  // modifiers: helper_T_cells__H; isVersionOf ncit:C18081
  // The name of this reaction is according to the full model stated in the reference paper.
  Proliferation_of_NK_cells_by_IFN_gamma: => NK_cells__N; Pancreas*Function_for_reaction_12_17_22(f_n, alpha2_tau2, CD8__T_cells__T, beta2_tau2, NK_cells__N, gamma2_tau2, helper_T_cells__H, NK_cells__N, h_n); Proliferation_of_NK_cells_by_IFN_gamma is "Proliferation of NK cells by IFN-gamma";  // modifiers: CD8__T_cells__T, helper_T_cells__H; isVersionOf ncit:C18081
  Production_of_helper_T_cells: => helper_T_cells__H; Pancreas*Constant_flux__irreversible(a_h);
  Death_of_helper_T_cells: helper_T_cells__H => ; Pancreas*b_h*helper_T_cells__H;  // isVersionOf GO:0008219
  Inactivation_of_helper_T_cells: helper_T_cells__H => ; Pancreas*Function_for_reaction_20(c_h, helper_T_cells__H);
  // The name of this reaction is according to the full model stated in the reference paper.
  Proliferation_of_helper_T_cells_by_IL_2: => helper_T_cells__H; Pancreas*Function_for_reaction_11_16_21(helper_T_cells__H, tau1_alpha1, p_h, helper_T_cells__H, g_h); Proliferation_of_helper_T_cells_by_IL_2 is "Proliferation of helper T cells by IL-2";  // isVersionOf ncit:C18081
  // The name of this reaction is according to the full model stated in the reference paper.
  Proliferation_of_helper_T_cells_by_IFN_gamma: => helper_T_cells__H; Pancreas*Function_for_reaction_12_17_22(f_h, alpha2_tau2, CD8__T_cells__T, beta2_tau2, NK_cells__N, gamma2_tau2, helper_T_cells__H, helper_T_cells__H, h_h); Proliferation_of_helper_T_cells_by_IFN_gamma is "Proliferation of helper T cells by IFN-gamma";  // modifiers: CD8__T_cells__T, NK_cells__N; isVersionOf ncit:C18081
  Stellate_cells_promotes_cancer_growth_through_cytokines: => Pancreatic_cancer_cells__C; Pancreas*Function_for_reaction_23(mu_c, Pancreatic_stellate_cells__P, Pancreatic_cancer_cells__C, b_c);  // modifiers: Pancreatic_stellate_cells__P; hasProperty GO:0016049
  // The name of this reaction is according to the full model stated in the reference paper.
  TGF_beta__induced_growth_of_stellate_cells: => Pancreatic_stellate_cells__P; Pancreas*Function_for_reaction_24(f_p, Pancreatic_cancer_cells__C, mu_p, Pancreatic_stellate_cells__P, b_p); TGF_beta__induced_growth_of_stellate_cells is "TGF-beta induced growth of stellate cells";  // modifiers: Pancreatic_cancer_cells__C; hasProperty GO:0016049

  // Unit definitions:
  unit volume = 1e-3 litre;
  unit time = 86400 second;
  unit substance = 1e-3 mole;
end
