// SBML level 2 version 4
// dcterms:bibliographicCitation: urn:miriam:doi:10.1016/j.chaos.2017.03.002

function Function_for_reaction_1(a, T, b)
  a*T*(1 - b*T);
end

function Function_for_reaction_3(Kt, M, T)
  Kt*M*T;
end

function Function_for_reaction_2(c1, N, T)
  c1*N*T;
end

function Function_for_reaction_5(g, T, s, N)
  g*(T/(s + T))*N;
end

function Function_for_reaction_7(p, T, N)
  p*T*N;
end

function Function_for_reaction_8(Kn, eta, M, N)
  Kn*(1 - eta)*M*N;
end

function Function_for_reaction_11(Kc, eta, M, C)
  Kc*(1 - eta)*M*C;
end

function Function_for_reaction_14(kt, T, M)
  kt*T*M;
end

function Constant_flux__irreversible(v)
  v;
end
Constant_flux__irreversible is "Constant flux (irreversible)";

model Liu2017___chemotherapy_targeted_model_of_tumor_immune_system()
  // Liu2017 - chemotherapy targeted model of tumor immune system
  // Its a mathematical model reflecting chemotherapy response in tumor immune interaction system. Model encoded by Sarubini Kananathan and annotated+submitted to Biomodels by Krishna Tiwari
  // isDescribedBy doi:10.1016/j.chaos.2017.03.002
  // occursIn ncit:C94498
  // hasTaxon taxonomy:9606
  // hasProperty GO:0002418 mamo:MAMO_0000046
  // biomodels.db:MODEL2004060002 biomodels.db:BIOMD0000000930

  // Compartments:
  compartment Tumor_Microenvironment = 1;  // ncit:C94498

  // Species:
  species Tumor_Cell_Population__T in Tumor_Microenvironment = 10000000; Tumor_Cell_Population__T is "Tumor Cell Population (T)";  // hasProperty ncit:C12922
  species Effector_immune_cell_population__N in Tumor_Microenvironment = 300000; Effector_immune_cell_population__N is "Effector immune cell population (N)";  // hasProperty obi:OBI_1110016
  species Circulating_lymphocyte_population__C in Tumor_Microenvironment = 6.25e10; Circulating_lymphocyte_population__C is "Circulating lymphocyte population (C)";  // hasProperty BTO:0000775; hasProperty obi:OBI_0000181
  species Chemotherapeutic_drug_concentration__M in Tumor_Microenvironment = 0.45; Chemotherapeutic_drug_concentration__M is "Chemotherapeutic drug concentration (M)";  // hasProperty CHEBI:23888

  // Parameters:
  a = 0.431;
  b = 1.02e-14;
  c1 = 3.41e-10;
  mu = 0.0412;
  g = 0.015;
  s = 20.2;
  Kc = 0.6;
  Kn = 0.6;
  Kt = 0.8;
  kt = 3.2e-9;
  p = 2e-11;
  alpha1 = 12000;
  alpha2 = 750000000;
  beta = 0.012;
  gamma = 0.9;
  Vm = 0.45;
  eta = 0;

  // Reactions:
  reaction_1: => Tumor_Cell_Population__T; Tumor_Microenvironment*Function_for_reaction_1(a, Tumor_Cell_Population__T, b);
  reaction_2: Tumor_Cell_Population__T => ; Tumor_Microenvironment*Function_for_reaction_2(c1, Effector_immune_cell_population__N, Tumor_Cell_Population__T);  // modifiers: Effector_immune_cell_population__N
  reaction_3: Tumor_Cell_Population__T => ; Tumor_Microenvironment*Function_for_reaction_3(Kt, Chemotherapeutic_drug_concentration__M, Tumor_Cell_Population__T);  // modifiers: Chemotherapeutic_drug_concentration__M
  reaction_4: => Effector_immune_cell_population__N; Tumor_Microenvironment*Constant_flux__irreversible(alpha1);
  reaction_5: => Effector_immune_cell_population__N; Tumor_Microenvironment*Function_for_reaction_5(g, Tumor_Cell_Population__T, s, Effector_immune_cell_population__N);  // modifiers: Tumor_Cell_Population__T
  reaction_6: Effector_immune_cell_population__N => ; Tumor_Microenvironment*mu*Effector_immune_cell_population__N;
  reaction_7: Effector_immune_cell_population__N => ; Tumor_Microenvironment*Function_for_reaction_7(p, Tumor_Cell_Population__T, Effector_immune_cell_population__N);  // modifiers: Tumor_Cell_Population__T
  reaction_8: Effector_immune_cell_population__N => ; Tumor_Microenvironment*Function_for_reaction_8(Kn, eta, Chemotherapeutic_drug_concentration__M, Effector_immune_cell_population__N);  // modifiers: Chemotherapeutic_drug_concentration__M
  reaction_9: => Circulating_lymphocyte_population__C; Tumor_Microenvironment*Constant_flux__irreversible(alpha2);
  reaction_10: Circulating_lymphocyte_population__C => ; Tumor_Microenvironment*beta*Circulating_lymphocyte_population__C;
  reaction_11: Circulating_lymphocyte_population__C => ; Tumor_Microenvironment*Function_for_reaction_11(Kc, eta, Chemotherapeutic_drug_concentration__M, Circulating_lymphocyte_population__C);  // modifiers: Chemotherapeutic_drug_concentration__M
  reaction_12: Chemotherapeutic_drug_concentration__M => ; Tumor_Microenvironment*gamma*Chemotherapeutic_drug_concentration__M;
  reaction_13: => Chemotherapeutic_drug_concentration__M; Tumor_Microenvironment*Constant_flux__irreversible(Vm);
  reaction_14: Chemotherapeutic_drug_concentration__M => ; Tumor_Microenvironment*Function_for_reaction_14(kt, Tumor_Cell_Population__T, Chemotherapeutic_drug_concentration__M);  // modifiers: Tumor_Cell_Population__T

  // Unit definitions:
  unit volume = 1e-3 litre;
  unit time = 86400 second;
  unit substance = 1e-3 mole;
end
