// SBML level 2 version 4
// dcterms:bibliographicCitation: urn:miriam:pubmed:31645462

function Constant_flux__irreversible(v)
  v;
end
Constant_flux__irreversible is "Constant flux (irreversible)";

model Voliotis2019_GnRH_Pulse_Generation()
  // Voliotis2019-GnRH Pulse Generation
  // Fertility critically depends on the gonadotropin-releasing hormone (GnRH) pulse generator, a neural construct comprised of hypothalamic neurons coexpressing kisspeptin, neurokoinin-B and dynorphin.
  // Here, using mathematical modeling and in vivo optogenetics we reveal for the first time how this neural construct initiates and sustains the appropriate ultradian frequency essential for
  // reproduction. Prompted by mathematical modeling, we show experimentally using female estrous mice that robust pulsatile release of luteinizing hormone, a proxy for GnRH, emerges abruptly as we
  // increase the basal activity of the neuronal network using continuous low-frequency optogenetic stimulation. Further increase in basal activity markedly increases pulse frequency and eventually leads
  // to pulse termination. Additional model predictions that pulsatile dynamics emerge from nonlinear positive and negative feedback interactions mediated through neurokinin-B and dynorphin signaling
  // respectively are confirmed neuropharmacologically. Our results shed light on the long-elusive GnRH pulse generator offering new horizons for reproductive health and wellbeing.SIGNIFICANCE STATEMENT
  // The gonadotropin-releasing hormone (GnRH) pulse generator controls the pulsatile secretion of the gonadotropic hormones LH and FSH and is critical for fertility. The hypothalamic arcuate kisspeptin
  // neurons are thought to represent the GnRH pulse generator, since their oscillatory activity is coincident with LH pulses in the blood; a proxy for GnRH pulses. However, the mechanisms underlying GnRH
  // pulse generation remain elusive. We developed a mathematical model of the kisspeptin neuronal network and confirmed its predictions experimentally, showing how LH secretion is frequency-modulated as
  // we increase the basal activity of the arcuate kisspeptin neurons in vivo using continuous optogenetic stimulation. Our model provides a quantitative framework for understanding the reproductive
  // neuroendocrine system and opens new horizons for fertility regulation
  // Model is encoded by Johannes and submitted to BioModels by Ahmad Zyoud.
  // biomodels.db:MODEL2003190007 biomodels.db:BIOMD0000000931
  // hasTaxon taxonomy:10088
  // isDescribedBy pubmed:31645462
  // hasProperty ncit:C16578 ncit:C41064 ncit:C2270 mamo:MAMO_0000046

  // Compartments:
  compartment compartment = 1;

  // Species:
  species D in compartment = 2.348;
  species N in compartment = 0.07764;
  species v in compartment = 300;

  // Parameters:
  d_D = 0.25;
  d_N = 1;
  d_v = 10;
  k_D = 4.5;
  k_N = 320;
  k_D0 = 0.175;
  k_N0 = 0;
  p_v = 1;
  v_0 = 30000;
  K_D = 0.3;
  K_N = 32;
  K_v1 = 1200;
  K_v2 = 1200;
  I_0 = 0.2;
  n_1 = 2;
  n_2 = 2;
  n_3 = 2;
  n_4 = 2;

  // Assignment rules:
  I := I_0 + p_v*v*(N^n_4/(N^n_4 + K_N^n_4));
  f_v := v_0*((1 - exp(-I))/(1 + exp(-I)));
  f_N := k_N0 + k_N*(v^n_2/(v^n_2 + K_v2^n_2))*(K_D^n_3/(D^n_3 + K_D^n_3));
  f_D := k_D0 + k_D*v^n_1/(v^n_1 + K_v1^n_1);

  // Reactions:
  Dyn_Secretion: => D; compartment*Constant_flux__irreversible(f_D);
  NKB_Secretion: => N; compartment*Constant_flux__irreversible(f_N);
  Firing_Rate: => v; compartment*Constant_flux__irreversible(f_v);
  Dyn_Decay: D => ; compartment*d_D*D;
  NKB_Decay: N => ; compartment*d_N*N;
  FR_Decay: v => ; compartment*d_v*v;

  // Unit definitions:
  unit volume = 1e-3 litre;
  unit time = 60 second;
  unit substance = item;
end
