// SBML level 2 version 4
// dcterms:bibliographicCitation: urn:miriam:pubmed:32257302

function Rate_Law_for_reaction_for_Gp_consumbtion1(k4, Gp)
  k4*Gp;
end

function Rate_Law_for_reaction_Gp_production(K1, GE, Gp, K2, A)
  K1*GE*Gp - K2*A*Gp;
end

function Rate_Law_for_reaction_for_A_consumbtion(K3, A)
  K3*A;
end

function Rate_Law_for_reaction_Gi_consumbtion(K5, Gi)
  K5*Gi;
end

function Rate_Law_for_reaction_for_Biomass(b, A, Gp, B)
  b*A*Gp*B;
end

model Garde2020_Minimal_model_describing_metabolic_oscillations_in_Bacillus_subtilis_biofilms()
  // Garde2020-Minimal model describing metabolic oscillations in Bacillus subtilis biofilms
  // Biofilms offer an excellent example of ecological interaction among bacteria. Temporal and spatial oscillations in biofilms are an emerging topic. In this paper, we describe the metabolic
  // oscillations in Bacillus subtilis biofilms by applying the smallest theoretical chemical reaction system showing Hopf bifurcation proposed by Wilhelm and Heinrich in 1995. The system involves three
  // differential equations and a single bilinear term. We specifically select parameters that are suitable for the biological scenario of biofilm oscillations. We perform computer simulations and a
  // detailed analysis of the system including bifurcation analysis and quasi-steady-state approximation. We also discuss the feedback structure of the system and the correspondence of the simulations to
  // biological observations. Our theoretical work suggests potential scenarios about the oscillatory behaviour of biofilms and also serves as an application of a previously described chemical oscillator
  // to a biological system.
  // isDerivedFrom GO:0006536 ENVO:00002034 mamo:MAMO_0000046 ncit:C28240 biomodels.teddy:TEDDY_0000072 taxonomy:1423
  // biomodels.db:MODEL2004140001 biomodels.db:BIOMD0000000932
  // hasTaxon taxonomy:1423
  // isDescribedBy https://link.springer.com/article/10.1007%2FBF01165134 pubmed:32257302
  // hasProperty GO:0006536 ENVO:00002034 ncit:C28240 biomodels.teddy:TEDDY_0000072 mamo:MAMO_0000046

  // Compartments:
  compartment compartment = 1;

  // Species:
  species Gp in compartment = 1;  // hasProperty CHEBI:32484; hasProperty ncit:C25233
  species Gi in compartment = 1;  // hasProperty CHEBI:32484; hasProperty ncit:C25234
  species A in compartment = 1;  // hasProperty CHEBI:16134
  species B in compartment = 1e11;

  // Parameters:
  k1 = 0.3426;
  k2 = 5.3;
  k3 = 4;
  k4 = 2;
  k5 = 2.3;
  GE = 30;
  b = 0.1;

  // Reactions:
  The_uptake_of_glutamate_and_Consumption_of_glutamate_and_ammonia: => Gp; compartment*Rate_Law_for_reaction_Gp_production(k1, GE, Gp, k2, A);  // modifiers: A; hasProperty ncit:C71688
  Diffusion_of_glutamate: Gp => Gi; compartment*Rate_Law_for_reaction_for_Gp_consumbtion1(k4, Gp);  // hasProperty ncit:C82333
  Consumption_of_glutamate_to_produce_ammonia: Gi => A; compartment*Rate_Law_for_reaction_Gi_consumbtion(k5, Gi);
  Diffusion_of_ammonia: A => ; compartment*Rate_Law_for_reaction_for_A_consumbtion(k3, A);  // hasProperty ncit:C82333
  The_synthesis_of_biomass_from_ammonia_and_glutamate: => B; compartment*Rate_Law_for_reaction_for_Biomass(b, A, Gp, B);  // modifiers: A, Gp; hasProperty ncit:C61408

  // Unit definitions:
  unit time = 3600 second;
  unit substance = 1e-3 mole;
end
