// SBML level 2 version 4
// dcterms:bibliographicCitation: urn:miriam:pubmed:26100376

function Rate_Law_for_reaction_for_Cyclin__C(X, C)
  1/4*(1 - X - C);
end
Rate_Law_for_reaction_for_Cyclin__C is "Rate Law for reaction for Cyclin (C)";

function Rate_Law_for_reaction_for__active_cdc2_kinase__M(M, C, epislon)
  6*C/(1 + 2*C)*((1 - M)/(epislon + 1 - M)) - 3/2*(M/(epislon + M));
end
Rate_Law_for_reaction_for__active_cdc2_kinase__M is "Rate Law for reaction for active cdc2 kinase (M)";

function Rate_Law_for_reaction_for_active_cyclin_protease__X(X, M, epislon)
  M*((1 - X)/(epislon + 1 - X)) - 7/10*(X/(epislon + X));
end
Rate_Law_for_reaction_for_active_cyclin_protease__X is "Rate Law for reaction for active cyclin protease (X)";

model Kosiuk2015_Geometric_analysis_of_the_Goldbeter_minimal_model_for_the_embryonic_cell_cycle()
  // Kosiuk2015-Geometric analysis of the Goldbeter minimal model for the embryonic cell cycle
  // A minimal model describing the embryonic cell division cycle at the molecular level in eukaryotes is analyzed mathematically. It is known from numerical simulations that the corresponding
  // three-dimensional system of ODEs has periodic solutions in certain parameter regimes. We prove the existence of a stable limit cycle and provide a detailed description on how the limit cycle is
  // generated. The limit cycle corresponds to a relaxation oscillation of an auxiliary system, which is singularly perturbed and has the same orbits as the original model. The singular perturbation
  // character of the auxiliary problem is caused by the occurrence of small Michaelis constants in the model. Essential pieces of the limit cycle of the auxiliary problem consist of segments of slow
  // motion close to several branches of a two dimensional critical manifold which are connected by fast jumps. In addition, a new phenomenon of exchange of stability occurs at lines, where the branches
  // of the two-dimensional critical manifold intersect. This novel type of relaxation oscillations is studied by combining standard results from geometric singular perturbation with several suitable
  // blow-up transformations.
  // isDerivedFrom https://www.ncbi.nlm.nih.gov/pubmed/1833774
  // isDescribedBy pubmed:26100376
  // biomodels.db:MODEL2004240001 biomodels.db:BIOMD0000000933
  // occursIn BTO:0000379
  // hasTaxon taxonomy:42452
  // hasProperty ncit:C20626 ncit:C16864 GO:0007049 mamo:MAMO_0000046

  // Compartments:
  compartment compartment = 1;

  // Species:
  species C in compartment = 0.3;  // hasProperty ncit:C17349
  species M in compartment = 0;  // hasProperty omit:0016746
  species X in compartment = 0;  // hasProperty bao:0000652

  // Parameters:
  kd = 0.25;
  vi = 0.25;
  Kc = 0.5;
  Kd = 0;
  VM1 = 3;
  V2 = 1.5;
  VM3 = 1;
  V4 = 0.7;
  vd = 0.25;
  kj = 0.001;
  j = 1;
  epislon = 0.001;

  // Assignment rules:
  V1C := VM1*C/(Kc + C);
  V3M := VM3*M;

  // Reactions:
  Production_of_Cyclin: => C; compartment*Rate_Law_for_reaction_for_Cyclin__C(X, C);  // modifiers: X; hasProperty ncit:C61408
  Cdc2_kinase_activation: => M; compartment*Rate_Law_for_reaction_for__active_cdc2_kinase__M(M, C, epislon);  // modifiers: C; hasProperty GO:0072376
  activation_of_cyclin_protease: => X; compartment*Rate_Law_for_reaction_for_active_cyclin_protease__X(X, M, epislon);  // modifiers: M; hasProperty GO:0072376

  // Unit definitions:
  unit volume = 1e-3 litre;
  unit substance = 1e-3 mole;
end
