// SBML level 2 version 3
// dcterms:bibliographicCitation: urn:miriam:pubmed:28649434

function Constant_flux__irreversible_0(v)
  v;
end
Constant_flux__irreversible_0 is "Constant flux (irreversible)";

function Function_for_Sic1_degradation_1(Cdk1_Clb1or2, Cdk1_Clb3or4, Cdk1_Clb5or6, Cdk1_Clb5or6_Sic1, k5)
  k5*Cdk1_Clb5or6_Sic1*(1 + Cdk1_Clb5or6 + Cdk1_Clb3or4 + Cdk1_Clb1or2);
end

function Function_for_Cdk1_Clb3_4_production_1(Cdk1_Clb5or6, k7, kA)
  k7*(1 + kA*Cdk1_Clb5or6);
end
Function_for_Cdk1_Clb3_4_production_1 is "Function for Cdk1-Clb3,4 production_1";

function Function_for_Cd1_Clb12_production_1(Cdk1_Clb1or2, Cdk1_Clb3or4, Cdk1_Clb5or6, k9, kB, kC, kD)
  k9*(1 + kD*Cdk1_Clb1or2 + kB*Cdk1_Clb3or4 + kC*Cdk1_Clb5or6);
end

function Function_for_Sic1_degradation_2(Cdk1_Clb1or2, Cdk1_Clb1or2_Sic1, Cdk1_Clb3or4, Cdk1_Clb5or6, k14)
  k14*Cdk1_Clb1or2_Sic1*(1 + Cdk1_Clb5or6 + Cdk1_Clb3or4 + Cdk1_Clb1or2);
end

function Function_for_Sic1_degradation_3(Cdk1_Clb1or2, Cdk1_Clb3or4, Cdk1_Clb3or4_Sic1, Cdk1_Clb5or6, k18)
  k18*Cdk1_Clb3or4_Sic1*(1 + Cdk1_Clb5or6 + Cdk1_Clb3or4 + Cdk1_Clb1or2);
end

model Linke2017___Synchronization_of_Cyclins__expression_by_the_Fkh2_transcription_factor_in_the_budding_yeast_cell_cycle()
  // Linke2017 - Synchronization of Cyclins' expression by the Fkh2 transcription factor in the budding yeast cell cycle
  // Modeling of the expression of cyclin B2 and B3 in the budding yeast cell cycle
  // hasProperty mamo:MAMO_0000046
  // hasTaxon ncit:C14271
  // biomodels.db:MODEL1809050002 biomodels.db:BIOMD0000000934
  // hasPart GO:0051726
  // hasTaxon ncit:C14271
  // isDescribedBy pubmed:28649434

  // Compartments:
  compartment cell = 1;  // GO:0005623

  // Species:
  species Sic1 in cell = 5;  // isVersionOf uniprot:P38634
  species Cdk1_Clb5or6 in cell = 0;  // hasProperty GO:0032991; hasPart uniprot:P00546; hasPart uniprot:P30283; hasProperty GO:0032991
  species Cdk1_Clb5or6_Sic1 in cell = 0;  // hasProperty GO:0032991; hasPart uniprot:P38634; hasPart uniprot:P00546; hasPart uniprot:P30283
  species Clb5or6_degraded in cell = 0;  // hasProperty ncit:C25650; isVersionOf uniprot:P30283; hasProperty ncit:C25650
  species Cdk1_Clb3or4 in cell = 0;  // hasProperty GO:0032991; hasPart uniprot:P24870; hasPart uniprot:P00546; hasProperty GO:0032991
  species Cdk1_Clb3or4_Sic1 in cell = 0;  // hasProperty GO:0032991; hasPart uniprot:P24870; hasPart uniprot:P00546; hasPart uniprot:P38634
  species Clb3or4_degraded in cell = 0;  // hasProperty ncit:C25650; isVersionOf uniprot:P24870; hasProperty ncit:C25650
  species Cdk1_Clb1or2 in cell = 0;  // hasProperty GO:0032991; hasPart uniprot:P24869; hasPart uniprot:P00546; hasProperty GO:0032991
  species Cdk1_Clb1or2_Sic1 in cell = 0;  // hasProperty GO:0032991; hasPart uniprot:P00546; hasPart uniprot:P38634; hasPart uniprot:P24869
  species Clb1or2_degraded in cell = 0;  // hasProperty ncit:C25650; isVersionOf uniprot:P24869; hasProperty ncit:C25650
  species Sic1_degraded_re14 in cell = 0;  // hasProperty ncit:C25650; isVersionOf uniprot:P38634; hasProperty ncit:C25650
  species Sic1_degraded_re18 in cell = 0;  // hasProperty ncit:C25650; isVersionOf uniprot:P38634; hasProperty ncit:C25650
  species Sic1_degraded_re5 in cell = 0;  // hasProperty ncit:C25650; isVersionOf uniprot:P38634; hasProperty ncit:C25650
  species $Clb34_total in cell;  // isVersionOf uniprot:P24870
  species $Clb12_total in cell;  // isVersionOf uniprot:P24869
  species $Clb56_total in cell;  // isVersionOf uniprot:P30283

  // Parameters:
  k1 = 0.1;
  k2 = 5;
  k3 = 0.5;
  k4 = 0.01;
  k5 = 0.05;
  k6 = 0.7;
  k7 = 0.01;
  k8 = 0.7;
  k9 = 0.001;
  k10 = 0.7;
  k11 = 5;
  k12 = 0.5;
  k13 = 0.01;
  k14 = 0.05;
  k15 = 5;
  k16 = 0.5;
  k17 = 0.01;
  k18 = 0.05;
  k26 = 0.001;
  kA = 100;
  kB = 1000;
  kC = 100;
  kD = 100;

  // Assignment rules:
  Clb34_total := Cdk1_Clb3or4 + Cdk1_Clb3or4_Sic1;
  Clb12_total := Cdk1_Clb1or2 + Cdk1_Clb1or2_Sic1;
  Clb56_total := Cdk1_Clb5or6 + Cdk1_Clb5or6_Sic1;

  // Reactions:
  Cdk1_Clb5_6_production: => Cdk1_Clb5or6; cell*Constant_flux__irreversible_0(k1); Cdk1_Clb5_6_production is "Cdk1-Clb5,6 production";  // isVersionOf ncit:C61408
  Sic1_binding_to_Cdk1_Clb5_6: Sic1 + Cdk1_Clb5or6 => Cdk1_Clb5or6_Sic1; cell*k2*Sic1*Cdk1_Clb5or6; Sic1_binding_to_Cdk1_Clb5_6 is "Sic1 binding to Cdk1-Clb5,6";  // isVersionOf GO:0044877
  Cdk1_Clb5_6_Sic1_dissociation: Cdk1_Clb5or6_Sic1 => Sic1 + Cdk1_Clb5or6; cell*k3*Cdk1_Clb5or6_Sic1; Cdk1_Clb5_6_Sic1_dissociation is "Cdk1-Clb5,6-Sic1 dissociation";
  Clb5_6_degradation__ternary: Cdk1_Clb5or6_Sic1 => Clb5or6_degraded; cell*k4*Cdk1_Clb5or6_Sic1; Clb5_6_degradation__ternary is "Clb5,6 degradation (ternary)";  // isVersionOf ncit:C18104
  Sic1_degradation__Clb_regulated: Cdk1_Clb5or6_Sic1 => Cdk1_Clb5or6 + Sic1_degraded_re5; cell*Function_for_Sic1_degradation_1(Cdk1_Clb1or2, Cdk1_Clb3or4, Cdk1_Clb5or6, Cdk1_Clb5or6_Sic1, k5); Sic1_degradation__Clb_regulated is "Sic1 degradation (Clb-regulated)";  // modifiers: Cdk1_Clb3or4, Cdk1_Clb1or2
  Clb5_6_degradation__binary: Cdk1_Clb5or6 => Clb5or6_degraded; cell*k6*Cdk1_Clb5or6; Clb5_6_degradation__binary is "Clb5,6 degradation (binary)";  // isVersionOf ncit:C18104
  Cdk1_Clb3_4_production: => Cdk1_Clb3or4; cell*Function_for_Cdk1_Clb3_4_production_1(Cdk1_Clb5or6, k7, kA); Cdk1_Clb3_4_production is "Cdk1-Clb3,4 production";  // modifiers: Cdk1_Clb5or6; isVersionOf ncit:C61408
  Clb3_4_degradation__binary: Cdk1_Clb3or4 => Clb3or4_degraded; cell*k8*Cdk1_Clb3or4; Clb3_4_degradation__binary is "Clb3,4 degradation (binary)";  // isVersionOf ncit:C18104
  Cdk1_Clb1_2_production: => Cdk1_Clb1or2; cell*Function_for_Cd1_Clb12_production_1(Cdk1_Clb1or2, Cdk1_Clb3or4, Cdk1_Clb5or6, k9, kB, kC, kD); Cdk1_Clb1_2_production is "Cdk1-Clb1,2 production";  // modifiers: Cdk1_Clb3or4, Cdk1_Clb5or6; isVersionOf ncit:C61408
  Clb1_2_degradation__binary: Cdk1_Clb1or2 => Clb1or2_degraded; cell*k10*Cdk1_Clb1or2; Clb1_2_degradation__binary is "Clb1,2 degradation (binary)";  // isVersionOf ncit:C18104
  Sic1_binding_to_Cdk1_Clb1_2: Sic1 + Cdk1_Clb1or2 => Cdk1_Clb1or2_Sic1; cell*k11*Sic1*Cdk1_Clb1or2; Sic1_binding_to_Cdk1_Clb1_2 is "Sic1 binding to Cdk1-Clb1,2";  // isVersionOf GO:0044877
  Cdk1_Clb1_2_Sic1_dissociation: Cdk1_Clb1or2_Sic1 => Sic1 + Cdk1_Clb1or2; cell*k12*Cdk1_Clb1or2_Sic1; Cdk1_Clb1_2_Sic1_dissociation is "Cdk1-Clb1,2-Sic1 dissociation";
  Clb1_2_degradation__ternary: Cdk1_Clb1or2_Sic1 => Clb1or2_degraded; cell*k13*Cdk1_Clb1or2_Sic1; Clb1_2_degradation__ternary is "Clb1,2 degradation (ternary)";  // isVersionOf ncit:C18104
  Sic1_degradation__Clb_regulated__1: Cdk1_Clb1or2_Sic1 => Sic1_degraded_re14; cell*Function_for_Sic1_degradation_2(Cdk1_Clb1or2, Cdk1_Clb1or2_Sic1, Cdk1_Clb3or4, Cdk1_Clb5or6, k14); Sic1_degradation__Clb_regulated__1 is "Sic1 degradation (Clb-regulated)_1";  // modifiers: Cdk1_Clb5or6, Cdk1_Clb3or4, Cdk1_Clb1or2
  Sic1_binding_to_Cdk1_Clb3_4: Sic1 + Cdk1_Clb3or4 => Cdk1_Clb3or4_Sic1; cell*k15*Sic1*Cdk1_Clb3or4; Sic1_binding_to_Cdk1_Clb3_4 is "Sic1 binding to Cdk1-Clb3,4";  // isVersionOf GO:0044877
  Cdk1_Clb3_4_Sic1_dissociation: Cdk1_Clb3or4_Sic1 => Sic1 + Cdk1_Clb3or4; cell*k16*Cdk1_Clb3or4_Sic1; Cdk1_Clb3_4_Sic1_dissociation is "Cdk1-Clb3,4-Sic1 dissociation";
  Clb3_4_degradation__ternary: Cdk1_Clb3or4_Sic1 => Clb3or4_degraded; cell*k17*Cdk1_Clb3or4_Sic1; Clb3_4_degradation__ternary is "Clb3,4 degradation (ternary)";  // isVersionOf ncit:C18104
  Sic1_degradation__Clb_regulated__2: Cdk1_Clb3or4_Sic1 => Sic1_degraded_re18; cell*Function_for_Sic1_degradation_3(Cdk1_Clb1or2, Cdk1_Clb3or4, Cdk1_Clb3or4_Sic1, Cdk1_Clb5or6, k18); Sic1_degradation__Clb_regulated__2 is "Sic1 degradation (Clb-regulated)_2";  // modifiers: Cdk1_Clb5or6, Cdk1_Clb3or4, Cdk1_Clb1or2
  Sic1_degradation__basal: Sic1 => ; cell*k26*Sic1; Sic1_degradation__basal is "Sic1 degradation (basal)";

  // Unit definitions:
  unit volume = 1e-3 litre;
  unit time = 60 second;
  unit substance = 1e-3 mole;
end
