// SBML level 2 version 4
// dcterms:bibliographicCitation: urn:miriam:pubmed:21414480

function Constant_flux__irreversible(v)
  v;
end
Constant_flux__irreversible is "Constant flux (irreversible)";

function function_for_cdk1_inactivation_1(CDK1_active, b1, k1, n1)
  b1*CDK1_active^(n1 + 1)/(k1^n1 + CDK1_active^n1);
end

model ferrel2011___autonomous_biochemical_oscillator_in_cell_cycle_in_Xenopus_laevis_v2()
  // ferrel2011 - autonomous biochemical oscillator in cell cycle in Xenopus laevis v2
  // Computational modeling and the theory of nonlinear dynamical systems allow one to not simply describe the events of the cell cycle, but also to understand why these events occur, just as the theory
  // of gravitation allows one to understand why cannonballs fly in parabolic arcs. The simplest examples of the eukaryotic cell cycle operate like autonomous oscillators. Here, we present the basic
  // theory of oscillatory biochemical circuits in the context of the Xenopus embryonic cell cycle. We examine Boolean models, delay differential equation models, and especially ordinary differential
  // equation (ODE) models. For ODE models, we explore what it takes to get oscillations out of two simple types of circuits (negative feedback loops and coupled positive and negative feedback loops).
  // Finally, we review the procedures of linear stability analysis, which allow one to determine whether a given ODE model and a particular set of kinetic parameters will produce oscillations.
  // biomodels.db:MODEL1809040002 biomodels.db:BIOMD0000000936
  // hasPart GO:0051726
  // hasTaxon taxonomy:8355
  // isDescribedBy pubmed:21414480
  // hasProperty mamo:MAMO_0000046
  // hasProperty mamo:MAMO_0000046

  // Compartments:
  compartment compartment = 1;

  // Species:
  species CDK1_active in compartment = 0;  // isVersionOf uniprot:P35567; hasProperty PATO:0002354; hasProperty PATO:0002354

  // Parameters:
  a1 = 0.1;
  b1 = 1;
  k1 = 0.5;
  n1 = 8;

  // Reactions:
  R1_Cdk1_activation_by_cyclin_synthesis: => CDK1_active; compartment*Constant_flux__irreversible(a1);  // isVersionOf ncit:C64382
  R2_Cdk1_inactivation_by_APC_active: CDK1_active => ; compartment*function_for_cdk1_inactivation_1(CDK1_active, b1, k1, n1);

  // Unit definitions:
  unit volume = 1e-3 litre;
  unit substance = 1e-3 mole;
end
