// SBML level 2 version 4
// dcterms:bibliographicCitation: http://identifiers.org/doi/10.1016/j.bpj.2013.02.012
// dcterms:bibliographicCitation: http://identifiers.org/pubmed/23528096

function Constant_flux__irreversible(v)
  v;
end
Constant_flux__irreversible is "Constant flux (irreversible)";

function Function_for_APC_dephosphorylation_1(Anaphase_promoting_complex_Phosphorylated, K_1APC, V_1APC)
  V_1APC*Anaphase_promoting_complex_Phosphorylated/(K_1APC + Anaphase_promoting_complex_Phosphorylated);
end

function Function_for_APC_phosphorylation_1(Anaphase_promoting_complex, Cdk, K_2APC, k_2APC)
  k_2APC*Cdk*Anaphase_promoting_complex/(K_2APC + Anaphase_promoting_complex);
end

function Function_degradation_by_modifier_1(Anaphase_promoting_complex_Phosphorylated, Cdk, K_dcdk, K_dsec, Securin, k_dcdk)
  k_dcdk*Anaphase_promoting_complex_Phosphorylated*Cdk/(K_dcdk*(1 + Securin/K_dsec) + Cdk);
end

function Function_for_Securin_degradation_mediated_by_APC_P_1(Anaphase_promoting_complex_Phosphorylated, Cdk, K_dcdk, K_dsec, Securin, k_dsec)
  k_dsec*Anaphase_promoting_complex_Phosphorylated*Securin/(K_dsec*(1 + Cdk/K_dcdk) + Securin);
end

model Gerard2013___Model_3___Embryonic_type_eukaryotic_Cell_Cycle_regulation_based_on_negative_feedback_between_Cdk_cyclin_and_APC_and_competitive_inhibition_between_Cdk_cyclin_and_securin_for_polyubiquitylation_1()
  // Gerard2013 - Model 3 - Embryonic-type eukaryotic Cell Cycle regulation based on negative feedback between Cdk/cyclin and APC and competitive inhibition between Cdk/cyclin and securin for polyubiquitylation_1
  // The eukaryotic cell cycle is characterized by alternating oscillations in the activities of cyclin-dependent kinase (Cdk) and the anaphase-promoting complex (APC). Successful completion of the cell
  // cycle is dependent on the precise, temporally ordered appearance of these activities. A modest level of Cdk activity is sufficient to initiate DNA replication, but mitosis and APC activation require
  // an elevated Cdk activity. In present-day eukaryotes, this temporal order is provided by a complex network of regulatory proteins that control both Cdk and APC activities via sharp thresholds,
  // bistability, and time delays. Using simple computational models, we show here that these dynamical features of cell-cycle organization could emerge in a control system driven by a single Cdk/cyclin
  // complex and APC wired in a negative-feedback loop. We show that ordered phosphorylation of cellular proteins could be explained by multisite phosphorylation/dephosphorylation and competition of
  // substrates for interconverting kinase (Cdk) and phosphatase. In addition, the competition of APC substrates for ubiquitylation can create and maintain sustained oscillations in cyclin levels. We
  // propose a sequence of models that gets closer and closer to a realistic model of cell-cycle control in yeast. Since these models lack the elaborate control mechanisms characteristic of modern
  // eukaryotes, they suggest that bistability and time delay
  // biomodels.db:MODEL1809050001 biomodels.db:BIOMD0000000938
  // hasPart GO:0051726
  // hasTaxon taxonomy:10090
  // isDescribedBy doi:10.1016/j.bpj.2013.02.012
  // isDescribedBy pubmed:23528096
  // hasProperty mamo:MAMO_0000046

  // Compartments:
  compartment nuclear = 1;  // ncit:C13361

  // Species:
  species Cdk in nuclear = 0.3;  // isHomologTo uniprot:P11440
  species Anaphase_promoting_complex_Phosphorylated in nuclear = 0;  // isVersionOf GO:0005680; hasProperty PATO:0002220; hasProperty PATO:0002220
  species Securin in nuclear = 0.35;  // isHomologTo uniprot:Q9CQJ7
  species $Anaphase_promoting_complex in nuclear;  // isVersionOf GO:0005680
  species $Anaphase_promoting_complex_total in nuclear = 1;  // isVersionOf GO:0005680

  // Parameters:
  V_scdk = 0.06;
  k_d1cdk = 0.01;
  k_dcdk = 0.35;
  K_dcdk = 0.01;
  K_dsec = 0.001;
  k_2APC = 0.3;
  K_2APC = 0.01;
  V_1APC = 0.15;
  K_1APC = 0.01;
  V_ssec = 0.1;
  k_d1sec = 0.01;
  k_dsec = 0.4;

  // Assignment rules:
  Anaphase_promoting_complex := Anaphase_promoting_complex_total - Anaphase_promoting_complex_Phosphorylated;

  // Reactions:
  Synthesis_Cdk: => Cdk; nuclear*Constant_flux__irreversible(V_scdk);  // isVersionOf ncit:C61408
  Degradation_Cdk: Cdk => ; nuclear*k_d1cdk*Cdk;
  Degradation_Cdk_mediated_by_APC_P: Cdk => ; nuclear*Function_degradation_by_modifier_1(Anaphase_promoting_complex_Phosphorylated, Cdk, K_dcdk, K_dsec, Securin, k_dcdk);  // modifiers: Anaphase_promoting_complex_Phosphorylated, Securin
  Phosphorylation_of_APC: => Anaphase_promoting_complex_Phosphorylated; nuclear*Function_for_APC_phosphorylation_1(Anaphase_promoting_complex, Cdk, K_2APC, k_2APC);  // modifiers: Cdk, Anaphase_promoting_complex; isVersionOf GO:0016310
  Dephosphorylation_of_APC: Anaphase_promoting_complex_Phosphorylated => ; nuclear*Function_for_APC_dephosphorylation_1(Anaphase_promoting_complex_Phosphorylated, K_1APC, V_1APC);  // isVersionOf GO:0016311
  Synthesis_of_Securin: => Securin; nuclear*Constant_flux__irreversible(V_ssec);  // isVersionOf ncit:C61408
  Degradation_of_Sec: Securin => ; nuclear*k_d1sec*Securin;
  Degradation_of_Sec_mediated_by_APC_P: Securin => ; nuclear*Function_for_Securin_degradation_mediated_by_APC_P_1(Anaphase_promoting_complex_Phosphorylated, Cdk, K_dcdk, K_dsec, Securin, k_dsec);  // modifiers: Anaphase_promoting_complex_Phosphorylated, Cdk

  // Unit definitions:
  unit volume = 1e-3 litre;
  unit substance = 1e-3 mole;
end
