// SBML level 2 version 4
// dcterms:bibliographicCitation: urn:miriam:pubmed:31312514

function Constant_flux__irreversible(v)
  v;
end
Constant_flux__irreversible is "Constant flux (irreversible)";

function Mass_action_modifier_1(k1, substrate, modifier, const)
  k1*substrate*modifier*const;
end

function Mass_action_modifier(k1, substrate, modifier)
  k1*substrate*modifier;
end

function Linear_modi(k, M)
  k*M;
end

model Tang2019___Pharmacology_modelling_of_AURKB_and_ZAK_interaction_in_TNBC()
  // Tang2019 - Pharmacology modelling of AURKB and ZAK interaction in TNBC
  // Aurora Kinase B and ZAK interaction model
  // Equivalent of the stochastic model used in "Network pharmacology model predicts combined Aurora B and ZAK inhibition in MDA-MB-231 breast cancer cells" by Tang et. al. 2018. The only difference is cell division and partitioning of the components, which are available in the original model for SGNS2.
  // isDescribedBy pubmed:31312514
  // isEncodedBy biomodels.db:MODEL2004230001
  // occursIn BTO:0000356
  // hasTaxon taxonomy:9606
  // hasProperty GO:0023052 NCIT:C16974 mamo:MAMO_0000046
  // biomodels.db:MODEL2004230001 biomodels.db:BIOMD0000000940

  // Compartments:
  compartment Cell = 1;  // NCIT:C48694

  // Species:
  species PKN1 in Cell = 0;  // uniprot:Q16512
  species ZAK in Cell = 0;  // isVersionOf uniprot:Q75JK0
  species MAP2K3 in Cell = 0;  // uniprot:P46734
  species MAPK14 in Cell = 0;  // uniprot:Q16539
  species MAP2K4 in Cell = 0;  // uniprot:P45985
  species TP53 in Cell = 0;  // uniprot:P04637
  species ATM in Cell = 1;  // uniprot:Q13315
  species MAPK13 in Cell = 1;  // uniprot:O15264
  species PRKACA in Cell = 1;  // uniprot:P17612
  species SRC in Cell = 1;  // uniprot:P12931
  species BAD in Cell = 1;  // uniprot:Q92934
  species PTEN in Cell = 1;  // uniprot:P60484
  species SHC1 in Cell = 1;  // uniprot:P29353
  species PIK3R1 in Cell = 1;  // uniprot:P27986
  species PARP1 in Cell = 1;  // uniprot:P09874
  species AURKB in Cell = 1;  // uniprot:Q96GD4
  species BRCA1 in Cell = 1;  // uniprot:P38398
  species YWHAZ in Cell = 1;  // uniprot:P63104
  species TGFBR1 in Cell = 1;  // uniprot:P36897
  species CSF1R in Cell = 1;  // unipathway.compound:P07333

  // Parameters:
  k_pkn1 = 0.5;
  kd_pkn1 = 0.005;
  k_zak = 0.1;
  kd_zak = 0.5;
  k_map2k3 = 0.2;
  kd_map2k3 = 0.6;
  k_mapk14 = 2;
  kd_mapk14 = 5;
  k_map2k4 = 0.2;
  kd_map2k4 = 0.6;
  k_tp53 = 0.6;
  k_atm = 0.1;
  kd_tp53 = 2;
  kd_atm = 3;
  k_mapk13 = 2;
  kd_mapk13 = 1.4;
  k_prkaca = 2;
  kd_prkaca = 6;
  k_src = 0.2;
  kd_src = 1;
  k_bad = 5;
  kd_bad = 0.04;
  k_pik3r1 = 2;
  kd_pik3r1 = 10;
  k_csf1r = 2;
  kd_csf1r = 30;
  k_shc1 = 2;
  kd_shc1 = 0.06;
  k_pten = 0.2;
  kd_pten = 0.5;
  k_parp1 = 0.5;
  kd_parp1 = 0.005;
  k_aurkb = 3;
  kd_aurkb = 4.5;
  k_brca1 = 2;
  kd_brca1 = 20;
  k_ywhaz = 0.9;
  kd_ywhaz = 0.072;
  k_tgfbr1 = 0.5;
  kd_tgfbr1 = 0.45;

  // Reactions:
  PKN1_Prod: => PKN1; Cell*Constant_flux__irreversible(k_pkn1);
  PKN1_Degrad: PKN1 => ; Cell*kd_pkn1*PKN1;
  ZAK_Prod: => ZAK; Cell*Linear_modi(k_zak, PKN1);  // modifiers: PKN1
  ZAK_Degrad: ZAK => ; Cell*kd_zak*ZAK;
  MAP2K3_Prod: => MAP2K3; Cell*Linear_modi(k_map2k3, PKN1);  // modifiers: PKN1
  MAP2K3_Degrad: MAP2K3 => ; Cell*kd_map2k3*MAP2K3;
  MAPK14_Prod: => MAPK14; Cell*Linear_modi(k_mapk14, MAP2K3);  // modifiers: MAP2K3
  MAPK14_Degrad: MAPK14 => ; Cell*kd_mapk14*MAPK14;
  MAP2K4_Prod: => MAP2K4; Cell*Linear_modi(k_map2k4, MAP2K3);  // modifiers: MAP2K3
  MAP2K4_Degrad: MAP2K4 => ; Cell*kd_map2k4*MAP2K4;
  TP53_Prod: => TP53; Cell*Linear_modi(k_tp53, MAPK14);  // modifiers: MAPK14
  TP53_Degrad: TP53 => ; Cell*kd_tp53*TP53;
  ATM_Prod: => ATM; Cell*Linear_modi(k_atm, MAPK14);  // modifiers: MAPK14
  ATM_Degrad: ATM => ; Cell*kd_atm*ATM;
  MAPK14_Prod2: => MAPK14; Cell*Linear_modi(k_mapk14, MAP2K4);  // modifiers: MAP2K4
  MAPK13_Prod: => MAPK13; Cell*Linear_modi(k_mapk13, MAP2K4);  // modifiers: MAP2K4
  MAPK13_Degrad: MAPK13 => ; Cell*kd_mapk13*MAPK13;
  PRKACA_Prod: => PRKACA; Cell*Linear_modi(k_prkaca, MAPK13);  // modifiers: MAPK13
  PRKACA_Degrad: PRKACA => ; Cell*kd_prkaca*PRKACA;
  SRC_Prod: => SRC; Cell*Linear_modi(k_src, PRKACA);  // modifiers: PRKACA
  SRC_Degrad: SRC => ; Cell*kd_src*SRC;
  BAD_Prod: => BAD; Cell*Constant_flux__irreversible(k_bad);
  BAD_Degrad: BAD => ; Cell*kd_bad*BAD;
  TP53_Prod2: => TP53; Cell*Linear_modi(k_tp53, SRC);  // modifiers: SRC
  TP53_Prod3: => TP53; Cell*Linear_modi(k_tp53, BAD);  // modifiers: BAD
  PTEN_Prod: => PTEN; Cell*Linear_modi(k_pten, TP53);  // modifiers: TP53
  PTEN_Degrad: PTEN => ; Cell*kd_pten*PTEN;
  SHC1_Prod: => SHC1; Cell*Linear_modi(k_shc1, TGFBR1);  // modifiers: TGFBR1
  SHC1_Degrad: SHC1 => ; Cell*Mass_action_modifier(kd_shc1, SHC1, PTEN);  // modifiers: PTEN
  PIK3R1_Degrad: PIK3R1 => ; Cell*Mass_action_modifier(kd_pik3r1, PIK3R1, PTEN);  // modifiers: PTEN
  PARP1_Prod: => PARP1; Cell*Constant_flux__irreversible(k_parp1);
  PARP1_Degrad: PARP1 => ; Cell*kd_parp1*PARP1;
  AURKB_Prod: => AURKB; Cell*Linear_modi(k_aurkb, PARP1);  // modifiers: PARP1
  AURKB_Degrad: AURKB => ; Cell*kd_aurkb*AURKB;
  ATM_Prod2: => ATM; Cell*Linear_modi(k_atm, PARP1);  // modifiers: PARP1
  TP53_Prod4: => TP53; Cell*Linear_modi(k_tp53, PARP1);  // modifiers: PARP1
  BRCA1_Prod: => BRCA1; Cell*Linear_modi(k_brca1, PARP1);  // modifiers: PARP1
  BRCA1_Degrad: BRCA1 => ; Cell*kd_brca1*BRCA1;
  TP53_Prod5: => TP53; Cell*Linear_modi(k_tp53, ATM);  // modifiers: ATM
  TP53_Prod6: => TP53; Cell*Linear_modi(k_tp53, BRCA1);  // modifiers: BRCA1
  BRCA1_Prod2: => BRCA1; Cell*Linear_modi(k_brca1, ATM);  // modifiers: ATM
  SRC_Prod2: => SRC; Cell*Linear_modi(k_src, CSF1R);  // modifiers: CSF1R
  YWHAZ_Prod: => YWHAZ; Cell*Linear_modi(k_ywhaz, ZAK);  // modifiers: ZAK
  YWHAZ_Degrad: YWHAZ => ; Cell*kd_ywhaz*YWHAZ;
  MAP2K3_Prod2: => MAP2K3; Cell*Linear_modi(k_map2k3, ZAK);  // modifiers: ZAK
  MAP2K4_Prod2: => MAP2K4; Cell*Linear_modi(k_map2k4, ZAK);  // modifiers: ZAK
  TGFBR1_Prod: => TGFBR1; Cell*Linear_modi(k_tgfbr1, ZAK);  // modifiers: ZAK
  TGFBR1_Degrad: TGFBR1 => ; Cell*kd_tgfbr1*TGFBR1;
  BAD_Degrad2: BAD => ; Cell*Mass_action_modifier_1(kd_bad, BAD, YWHAZ, BAD_Degrad2_const);  // modifiers: YWHAZ
    BAD_Degrad2_const = 0.0133;
  PIK3R1_Prod: => PIK3R1; Cell*Linear_modi(k_pik3r1, YWHAZ);  // modifiers: YWHAZ
  CSF1R_Prod: => CSF1R; Cell*Linear_modi(k_csf1r, PIK3R1);  // modifiers: PIK3R1
  TGFBR1_Prod2: => TGFBR1; Cell*Linear_modi(k_tgfbr1, PIK3R1);  // modifiers: PIK3R1
  MAPK14_Prod3: => MAPK14; Cell*Linear_modi(k_mapk14, TGFBR1);  // modifiers: TGFBR1
  MAPK14_Prod4: => MAPK14; Cell*Linear_modi(k_mapk14, SHC1);  // modifiers: SHC1
  PIK3R1_Prod2: => PIK3R1; Cell*Linear_modi(k_pik3r1, SHC1);  // modifiers: SHC1
  CSF1R_Prod2: => CSF1R; Cell*Linear_modi(k_csf1r, SHC1);  // modifiers: SHC1
  CSF1R_Degrad: CSF1R => ; Cell*kd_csf1r*CSF1R;
  ATM_Prod3: => ATM; Cell*Linear_modi(k_atm, AURKB);  // modifiers: AURKB
  PRKACA_Prod2: => PRKACA; Cell*Linear_modi(k_prkaca, AURKB);  // modifiers: AURKB
  TP53_Degrad2: TP53 => ; Cell*Mass_action_modifier_1(kd_tp53, TP53, AURKB, TP53_Degrad2_const);  // modifiers: AURKB
    TP53_Degrad2_const = 0.0067;

  // Unit definitions:
  unit volume = 1e-3 litre;
  unit substance = 1e-3 mole;
end
