// SBML level 2 version 4
// dcterms:bibliographicCitation: urn:miriam:doi:10.1098/rsfs.2010.0008
// dcterms:bibliographicCitation: urn:miriam:pubmed:22419972

function Function_for_R1(v_sd, GF, K_gf)
  v_sd*GF/(K_gf + GF);
end

function Function_for_R2(Vdd, Md, K_dd)
  Vdd*Md/(K_dd + Md);
end

function Function_for_R3(V_le2f, E2F_total, E2F, Kle2f, Md, Me)
  V_le2f*((E2F_total - E2F)/(Kle2f + E2F_total - E2F))*(Md + Me);
end

function Function_for_R12(V2cdc20, Cdc20, K_2cdc20)
  V2cdc20*Cdc20/(K_2cdc20 + Cdc20);
end

function Function_for_R5_7_9(v, modifier)
  v*modifier;
end

function Function_for_R4(V2e2f, E2F, K2e2f, Ma)
  V2e2f*E2F/(K2e2f + E2F)*Ma;
end

function Function_for_R6_8_10(V, modifier, substrate, K)
  V*modifier*substrate/(K + substrate);
end

function Function_for_R11(V1cdc20, Mb, Cdc20_total, Cdc20, K1cdc20)
  V1cdc20*Mb*(Cdc20_total - Cdc20)/(K1cdc20 + (Cdc20_total - Cdc20));
end

model Gerard2010___Progression_of_mammalian_cell_cycle_by_successive_activation_of_various_cyclin_cdk_complexes()
  // Gerard2010 - Progression of mammalian cell cycle by successive activation of various cyclin cdk complexes
  // We previously proposed a detailed, 39-variable model for the network of cyclin-dependent kinases (Cdks) that controls progression along the successive phases of the mammalian cell cycle. Here, we
  // propose a skeleton, 5-variable model for the Cdk network that can be seen as the backbone of the more detailed model for the mammalian cell cycle. In the presence of sufficient amounts of growth
  // factor, the skeleton model also passes from a stable steady state to sustained oscillations of the various cyclin/Cdk complexes. This transition corresponds to the switch from quiescence to cell
  // proliferation. Sequential activation of the cyclin/Cdk complexes allows the ordered progression along the G1, S, G2 and M phases of the cell cycle. The 5-variable model can also account for the
  // existence of a restriction point in G1, and for endoreplication. Like the detailed model, it contains multiple oscillatory circuits and can display complex oscillatory behaviour such as
  // quasi-periodic oscillations and chaos. We compare the dynamical properties of the skeleton model with those of the more detailed model for the mammalian cell cycle.
  // biomodels.db:MODEL1809060001 biomodels.db:BIOMD0000000941
  // hasPart GO:0051726
  // hasTaxon taxonomy:40674
  // isDescribedBy doi:10.1098/rsfs.2010.0008
  // isDescribedBy pubmed:22419972
  // hasProperty mamo:MAMO_0000046

  // Compartments:
  compartment nuclear = 1;  // ncit:C13361

  // Species:
  species cyclin_D_Cdk4_6 in nuclear = 0.7205; cyclin_D_Cdk4_6 is "cyclin D Cdk4-6";  // hasPart uniprot:P24385; hasPart uniprot:P11802; hasProperty GO:0032991
  species transcription_factor_E2F_active in nuclear = 2.4855;  // isVersionOf uniprot:Q01094; hasProperty PATO:0002354
  species cyclin_E_Cdk2 in nuclear = 2;  // hasPart uniprot:P24864; hasPart uniprot:P24941; hasProperty GO:0032991
  species cyclin_A_Cdk2 in nuclear = 2.6;  // hasPart uniprot:P24941; hasPart uniprot:P20248; hasProperty GO:0032991
  species cyclin_B_Cdk1 in nuclear = 1;  // hasPart uniprot:P06493; hasPart uniprot:P14635; hasProperty GO:0032991
  species Cdc20_active in nuclear = 0.5;  // isVersionOf uniprot:Q12834; hasProperty PATO:0002354; hasProperty PATO:0002220
  species E2F_total in nuclear = 3;  // isVersionOf uniprot:Q01094
  species Cdc20_total in nuclear = 5;  // isVersionOf uniprot:Q12834

  // Parameters:
  GF = 1;
  Kda = 0.1;
  Kdb = 0.005;
  Kdd = 0.1;
  Kde = 0.1;
  Kgf = 0.1;
  K1cdc20 = 1;
  K2cdc20 = 1;
  K1e2f = 0.01;
  K2e2f = 0.01;
  Vda = 0.245;
  Vdb = 0.28;
  Vdd = 0.245;
  Vde = 0.35;
  vsa = 0.175;
  vsb = 0.21;
  vsd = 0.175;
  vse = 0.21;
  V1cdc20 = 0.21;
  V2cdc20 = 0.35;
  V1e2f = 0.805;
  V2e2f = 0.7;

  // Reactions:
  R1_Synthesis_of_cyclin_D_Cdk4_6: => cyclin_D_Cdk4_6; nuclear*Function_for_R1(vsd, GF, Kgf); R1_Synthesis_of_cyclin_D_Cdk4_6 is "R1 Synthesis of cyclin D Cdk4-6";  // isVersionOf ncit:C61408
  R2_Degradation_of_cyclin_D_Cdk4_6: cyclin_D_Cdk4_6 => ; nuclear*Function_for_R2(Vdd, cyclin_D_Cdk4_6, Kdd); R2_Degradation_of_cyclin_D_Cdk4_6 is "R2 Degradation of cyclin D Cdk4-6";
  R3_E2F_activation: => transcription_factor_E2F_active; nuclear*Function_for_R3(V1e2f, E2F_total, transcription_factor_E2F_active, K1e2f, cyclin_D_Cdk4_6, cyclin_E_Cdk2);  // modifiers: E2F_total, cyclin_D_Cdk4_6, cyclin_E_Cdk2
  R4_E2F_inactivation: transcription_factor_E2F_active => ; nuclear*Function_for_R4(V2e2f, transcription_factor_E2F_active, K2e2f, cyclin_A_Cdk2);  // modifiers: cyclin_A_Cdk2
  R5_Synthesis_of_cyclin_E_Cdk2: => cyclin_E_Cdk2; nuclear*Function_for_R5_7_9(vse, transcription_factor_E2F_active);  // modifiers: transcription_factor_E2F_active; isVersionOf ncit:C61408
  R6_Degradation_of_cyclin_E_Cdk2: cyclin_E_Cdk2 => ; nuclear*Function_for_R6_8_10(Vde, cyclin_A_Cdk2, cyclin_E_Cdk2, Kde);  // modifiers: cyclin_A_Cdk2
  R7_Synthesis_of_cyclin_A_Cdk2: => cyclin_A_Cdk2; nuclear*Function_for_R5_7_9(vsa, transcription_factor_E2F_active);  // modifiers: transcription_factor_E2F_active; isVersionOf ncit:C61408
  R8_Degradation_of_cyclin_A_Cdk2: cyclin_A_Cdk2 => ; nuclear*Function_for_R6_8_10(Vda, Cdc20_active, cyclin_A_Cdk2, Kda);  // modifiers: Cdc20_active
  R9_Synthesis_of_cyclin_B_Cdk1: => cyclin_B_Cdk1; nuclear*Function_for_R5_7_9(vsb, cyclin_A_Cdk2);  // modifiers: cyclin_A_Cdk2
  R10_Degradation_of_cyclin_B_Cdk1: cyclin_B_Cdk1 => ; nuclear*Function_for_R6_8_10(Vdb, Cdc20_active, cyclin_B_Cdk1, Kdb);  // modifiers: Cdc20_active
  R11_Phosphorylation_and_activation_of_Cdc20: => Cdc20_active; nuclear*Function_for_R11(V1cdc20, cyclin_B_Cdk1, Cdc20_total, Cdc20_active, K1cdc20);  // modifiers: cyclin_B_Cdk1, Cdc20_total; isVersionOf PATO:0002262
  R12_Dephosphorylation_and_inactivation_of_Cdc20: Cdc20_active => ; nuclear*Function_for_R12(V2cdc20, Cdc20_active, K2cdc20);

  // Unit definitions:
  unit volume = 1e-3 litre;
  unit time = 3600 second;
  unit substance = 1e-3 mole;
end
