// SBML level 2 version 4
// dcterms:bibliographicCitation: urn:miriam:pubmed:23892075

function Rate_Law_for_reaction_for_M_production(V1, M, K1)
  V1*((1 - M)/(K1 + (1 - M)));
end

function Rate_Law_for_reaction_for_C_production(vs)
  vs;
end

function Rate_Law_for_reaction_for_C_decay(vd, X, C, Kd, kd)
  vd*X*(C/(Kd + C)) + kd*C;
end

function Rate_Law_for_reaction_for_X_production(V3, X, K3)
  V3*((1 - X)/(K3 + (1 - X)));
end

function Rate_Law_for_reaction_for_M_decay(V2, M, K2)
  V2*(M/(K2 + M));
end

function Rate_Law_for_reaction_for_X_decay(V4, X, K4)
  V4*(X/(K4 + X));
end

model Goldbeter2013_Oscillatory_activity_of_cyclin_dependent_kinases_in_the_cell_cycle()
  // Goldbeter2013-Oscillatory activity of cyclin-dependent kinases in the cell cycle
  // A model for oscillations of Cdc2 kinase in embryonic cell cycles based on Michaelis–Menten phosphorylation–dephosphorylation kinetics shows that the occurrence and amplitude of the oscillations
  // strongly depend on the ultrasensitivity of the enzymatic cascade that controls the activity of the cyclin-dependent kinase.
  // isDerivedFrom pubmed:1833774
  // isDescribedBy pubmed:23892075
  // biomodels.db:MODEL2005050002 biomodels.db:BIOMD0000000944
  // occursIn ncit:C13054
  // hasTaxon omit:0002077
  // hasProperty biomodels.teddy:TEDDY_0000006 GO:0007049 mamo:MAMO_0000046

  // Compartments:
  compartment compartment = 1;

  // Species:
  species Cyclin in compartment = 0.01;  // hasProperty ncit:C17349
  species Active_Cdc2_kinase in compartment = 0.01;  // hasProperty omit:0016746
  species Active_APC in compartment = 0.01;  // hasProperty GO:0005680

  // Parameters:
  K1 = 0.002;
  K3 = 0.01;
  K4 = 0.01;
  Kc = 0.5;
  Kd = 0.001;
  kd = 0.046;
  V2 = 2;
  V4 = 0.7;
  vs = 0.06;
  vd = 0.25;
  Vm1 = 4;
  Vm3 = 1;

  // Assignment rules:
  K2 := K1;
  V1 := Cyclin/(Kc + Cyclin)*Vm1;
  V3 := Active_Cdc2_kinase*Vm3;

  // Reactions:
  reaction_for_C_production: => Cyclin; compartment*Rate_Law_for_reaction_for_C_production(vs);  // hasProperty ncit:C112927
  reaction_for_C_decay: Cyclin => ; compartment*Rate_Law_for_reaction_for_C_decay(vd, Active_APC, Cyclin, Kd, kd);  // modifiers: Active_APC; hasProperty ncit:C75947
  reaction_for_M_production: => Active_Cdc2_kinase; compartment*Rate_Law_for_reaction_for_M_production(V1, Active_Cdc2_kinase, K1);  // hasProperty ncit:C112927
  reaction_for_M_decay: Active_Cdc2_kinase => ; compartment*Rate_Law_for_reaction_for_M_decay(V2, Active_Cdc2_kinase, K2);  // hasProperty ncit:C75947
  reaction_for_X_production: => Active_APC; compartment*Rate_Law_for_reaction_for_X_production(V3, Active_APC, K3);  // hasProperty ncit:C112927
  reaction_for_X_decay: Active_APC => ; compartment*Rate_Law_for_reaction_for_X_decay(V4, Active_APC, K4);  // hasProperty ncit:C75947

  // Unit definitions:
  unit volume = 1e-3 litre;
  unit substance = 1e-3 mole;
end
