// SBML level 2 version 4
// dcterms:bibliographicCitation: urn:miriam:pubmed:15094319

model Evans2004___Cell_based_mathematical_model_of_topotecan()
  // Evans2004 - Cell based mathematical model of topotecan
  // A two compartment mathematical model of the antineoplastic compound topotecan
  // biomodels.db:MODEL1805170002 biomodels.db:BIOMD0000000945
  // hasPart CHEBI:63632
  // hasPart CHEBI:70727
  // isVersionOf PW:0002367
  // occursIn efo:0006492
  // hasTaxon taxonomy:9606

  // Compartments:
  compartment human_lymphoma_cells = 1;  // isVersionOf BTO:0000785; isVersionOf efo:0006492

  // Species:
  species $L_m in human_lymphoma_cells = D;  // hasPart CHEBI:25000; isVersionOf kegg.compound:C11158; occursIn GO:0005576; hasProperty CHEBI:35610
  species $H_m in human_lymphoma_cells = 0;  // hasPart CHEBI:35868; isVersionOf kegg.compound:C11158; occursIn GO:0005576; hasProperty PATO:0002355
  species $L_c in human_lymphoma_cells = 0;  // hasPart CHEBI:25000; isVersionOf kegg.compound:C11158; occursIn GO:0005622; hasProperty CHEBI:35610
  species $H_c in human_lymphoma_cells = 0;  // hasPart CHEBI:35868; isVersionOf kegg.compound:C11158; occursIn GO:0005622; hasProperty PATO:0002355
  species $L_n in human_lymphoma_cells = 0;  // hasPart CHEBI:16991; hasPart CHEBI:25000; isVersionOf kegg.compound:C11158; occursIn GO:0005634

  // Parameters:
  k_0_m = 0.0289; k_0_m is "k_0,m";
  k_i = 0.000309;
  k_e = 1.014;  // encodes GO:0015562
  k_o_c = 0.026553; k_o_c is "k_o,c";
  k_c_c = 0.18637; k_c_c is "k_c,c";
  k_d = 4.4489;
  k_c_m = 0.000106; k_c_m is "k_c,m";
  k_b = 0.00085341;  // encodes GO:0005488
  B_T = 28.9;
  V_m = 2e12;
  V_c = 829;
  V_n = 326;
  D = 10;  // isVersionOf EFO:0000428

  // Assignment rules:
  v_1 := V_m/(V_c*400000)*0.001;
  v_2 := V_n/V_c;

  // Rate rules:
  L_m' = -(k_0_m + k_i)*L_m + k_c_m*H_m + k_e*v_1*L_c;
  H_m' = k_0_m*L_m - k_c_m*H_m;
  L_c' = k_i*v_1*L_m - (k_e + k_o_c)*L_c + k_c_c*H_c - k_b*(B_T - L_n)*L_c + v_2*k_d*L_n;
  H_c' = k_o_c*L_c - k_c_c*H_c;
  L_n' = k_b*v_2*(B_T - L_n)*L_c - k_d*L_n;

  // Unit definitions:
  unit volume = 1e-3 litre;
  unit time = 60 second;
  unit substance = 1e-6 mole;
end
