// SBML level 2 version 4
// dcterms:bibliographicCitation: urn:miriam:pubmed:29116458

model Lee2017___Paracetamol_first_pass_metabolism_PK_model()
  // Lee2017 - Paracetamol first-pass metabolism PK model
  // biomodels.db:MODEL1803050002 biomodels.db:BIOMD0000000947
  // hasPart kegg.drug:D00217
  // isVersionOf ncit:C49663
  // occursIn BTO:0000195
  // occursIn BTO:0000599
  // hasTaxon taxonomy:9606

  // Compartments:
  compartment Apical = 1;
  compartment Caco_2 = 1; Caco_2 is "Caco-2";  // isVersionOf BTO:0000195
  compartment Basolateral___HepG2 = 1; Basolateral___HepG2 is "Basolateral + HepG2";  // isVersionOf BTO:0000599

  // Species:
  species $C_para_Apical in Apical = 2500;  // isVersionOf kegg.drug:D00217; isVersionOf CHEBI:46195
  species $C_para_Caco_2 in Caco_2 = 1e-15;  // isVersionOf CHEBI:46195; isVersionOf kegg.drug:D00217
  species $C_para__Basolateral___HepG2_ in Basolateral___HepG2 = 5;  // isVersionOf CHEBI:46195; isVersionOf kegg.drug:D00217
  species $C_sulf_Apical in Apical = 1e-15;  // isVersionOf CHEBI:32635
  species $C_sulf_Caco_2 in Caco_2 = 1e-15;  // isVersionOf CHEBI:32635
  species $C_sulf__Basolateral___HepG2_ in Basolateral___HepG2 = 1e-15;  // isVersionOf CHEBI:32635
  species $C_glu_Apical in Apical = 1e-15;  // isVersionOf CHEBI:46195; isVersionOf kegg.drug:D00217; isVersionOf ncit:C63812
  species $C_glu_Caco_2 in Caco_2 = 1e-15;  // isVersionOf ncit:C63812; isVersionOf CHEBI:46195; isVersionOf kegg.drug:D00217
  species $C_glu__Basolateral___HepG2_ in Basolateral___HepG2 = 1e-15;  // isVersionOf kegg.drug:D00217; isVersionOf CHEBI:46195; isVersionOf ncit:C63812

  // Parameters:
  P_para = 103.8;  // encodes ncit:C82333
  Ai = 0.33;  // isVersionOf ncit:C25157
  Mp_s_caco = 14.9;  // encodes ncit:C26633
  Mp_g_caco = 17.6;  // encodes ncit:C26633
  Mp_s_HepG2 = 0.35;  // encodes ncit:C26633
  P_sulf = 49.9;  // encodes ncit:C82333
  P_glu = 58.9;  // encodes ncit:C82333
  Mp_g_HepG2 = 0.59;  // encodes ncit:C26633
  time_threshold = 6;  // encodes ncit:C25662

  // Assignment rules:
  V_api := piecewise(500, time <= time_threshold, 400);
  V_caco := piecewise(0.33, time <= time_threshold, 0.33);
  V_basol := piecewise(380, time <= time_threshold, 280);

  // Rate rules:
  C_para_Apical' = -1*P_para*Ai*(C_para_Apical - C_para_Caco_2)/V_api;
  C_para_Caco_2' = (P_para*Ai*(C_para_Apical - C_para_Caco_2) - P_para*Ai*(C_para_Caco_2 - C_para__Basolateral___HepG2_) - Mp_s_caco*C_para_Caco_2*V_caco - Mp_g_caco*C_para_Caco_2*V_caco)/V_caco;
  C_para__Basolateral___HepG2_' = (P_para*Ai*(C_para_Caco_2 - C_para__Basolateral___HepG2_) - Mp_s_HepG2*C_para__Basolateral___HepG2_*V_basol - Mp_g_HepG2*C_para__Basolateral___HepG2_*V_basol)/V_basol;
  C_sulf_Apical' = -1*P_sulf*Ai*(C_sulf_Apical - C_sulf_Caco_2)/V_api;
  C_sulf_Caco_2' = (P_sulf*Ai*(C_sulf_Apical - C_sulf_Caco_2) - P_sulf*Ai*(C_sulf_Caco_2 - C_sulf__Basolateral___HepG2_) + Mp_s_caco*C_para_Caco_2*V_caco)/V_caco;
  C_sulf__Basolateral___HepG2_' = (P_sulf*Ai*(C_sulf_Caco_2 - C_sulf__Basolateral___HepG2_) + Mp_s_HepG2*C_para__Basolateral___HepG2_*V_basol)/V_basol;
  C_glu_Apical' = -1*P_glu*Ai*(C_glu_Apical - C_glu_Caco_2)/V_api;
  C_glu_Caco_2' = (P_glu*Ai*(C_glu_Apical - C_glu_Caco_2) - P_glu*Ai*(C_glu_Caco_2 - C_glu__Basolateral___HepG2_) + Mp_g_caco*C_para_Caco_2*V_caco)/V_caco;
  C_glu__Basolateral___HepG2_' = (P_glu*Ai*(C_glu_Caco_2 - C_glu__Basolateral___HepG2_) + Mp_g_HepG2*C_para__Basolateral___HepG2_*V_basol)/V_basol;

  // Unit definitions:
  unit volume = 1e-3 litre;
  unit time = 3600 second;
  unit substance = 1e-6 mole;
end
