// SBML level 2 version 4
// dcterms:bibliographicCitation: urn:miriam:pubmed:19056600

function Constant_flux__irreversible(v)
  v;
end
Constant_flux__irreversible is "Constant flux (irreversible)";

function modifier_function(modifier, drug)
  modifier*drug;
end

model Landberg2009___Alkylresorcinol_Dose_Response()
  // Landberg2009 - Alkylresorcinol Dose Response
  // biomodels.db:MODEL1803050001 biomodels.db:BIOMD0000000948
  // hasPart kegg.compound:C01751
  // hasPart CHEBI:52679
  // efo:0001757
  // isDescribedBy pubmed:19056600
  // hasProperty mamo:MAMO_0000046

  // Compartments:
  compartment compartment = 1;
  compartment A1 = 1;
  compartment A2 = 1;
  compartment Central = 1;

  // Species:
  species AR_A1 in A1 = 0;  // isVersionOf kegg.compound:C01751; isVersionOf CHEBI:52679
  species AR_A2 in A2 = 0;  // isVersionOf CHEBI:52679; isVersionOf kegg.compound:C01751
  species AR_Central in Central = 0.01;  // isVersionOf kegg.compound:C01751; isVersionOf CHEBI:52679
  species AR_Dose in compartment = 485;  // isVersionOf CHEBI:52679; isVersionOf kegg.compound:C01751
  // This was made a species so that it could behave as a modifier in a reaction. 52% of the dose is absorbed into A1 for t > lag_time_2.
  species $F1 in compartment;
  // This was made a species so that it could behave as a modifier in a reaction. 48% of the dose is absorbed into A2 for t > lag_time_2.
  species $F2 in compartment;

  // Parameters:
  Lag_time_1 = 0.9;
  Lag_time_2 = 4.7;
  k_a_1 = 0.3;
  k_a_2 = 1.8;
  base = 0.32;
  CL_V = 20; CL_V is "CL/V";

  // Assignment rules:
  F1 := piecewise(0, time < Lag_time_1, piecewise(0.1, (time >= Lag_time_1) && (time < Lag_time_2), 0.052));
  F2 := piecewise(0, time < Lag_time_2, 0.048);

  // Reactions:
  reaction: AR_Dose => AR_A1; modifier_function(F1, AR_Dose);  // modifiers: F1
  reaction_1: AR_Dose => AR_A2; modifier_function(F2, AR_Dose);  // modifiers: F2
  reaction_2: AR_A1 => AR_Central; k_a_1*AR_A1;
  reaction_3: AR_A2 => AR_Central; k_a_2*AR_A2;
  reaction_4: => AR_Central; Central*Constant_flux__irreversible(base);
  reaction_5: AR_Central => ; Central*CL_V*AR_Central;

  // Unit definitions:
  unit volume = 1e-3 litre;
  unit time = 3600 second;
  unit substance = 1e-9 mole;
end
