// SBML level 2 version 4
// dcterms:bibliographicCitation: urn:miriam:pubmed:30713074

function rateOf(a)
  NaN;
end

function Constant_flux__irreversible(v)
  v;
end
Constant_flux__irreversible is "Constant flux (irreversible)";

function function_for_cdk1a_degradation_by_apc_2(APC_C_active, Cyclin_B1_Cdk1_complex_phosphorylated, k_dest)
  k_dest*APC_C_active*Cyclin_B1_Cdk1_complex_phosphorylated;
end

function function_for_cdk1a_degradation_by_apc_1(APC_C_active, Cyclin_B1_Cdk1_complex_unphosphorylated, k_dest)
  k_dest*APC_C_active*Cyclin_B1_Cdk1_complex_unphosphorylated;
end

function function_for_plx1_activation_1(Cyclin_B1_Cdk1_complex_phosphorylated, Plx1_active, Plx1_total, ec50_plx, k_plxon, n_plx)
  k_plxon/(1 + (ec50_plx/Cyclin_B1_Cdk1_complex_phosphorylated)^n_plx)*(Plx1_total - Plx1_active);
end

function Rate_Law_for_reaction_for_S(Kcdk_off, SCdk1, K_cdk_on, S, Cdk1a, Kcatpp2, SPPP2A)
  Kcdk_off*SCdk1 - K_cdk_on*S*Cdk1a + Kcatpp2*SPPP2A;
end

function function_for_cdk1_activation_1(Cyclin_B1_Cdk1_complex_phosphorylated, Cyclin_B1_Cdk1_complex_unphosphorylated, ec50_cdc25, k_cdk1_on, n_cdc25, p, r)
  1/r^(1/2)*k_cdk1_on*(1 + p/(1 + (ec50_cdc25/Cyclin_B1_Cdk1_complex_phosphorylated)^n_cdc25))*Cyclin_B1_Cdk1_complex_unphosphorylated;
end

function Rate_Law_for_reaction_for_SCdk1(Kcdkon, S, Cdk1a, Kcatcdk, Kcdkoff, SCdk1)
  Kcdkon*S*Cdk1a - (Kcatcdk + Kcdkoff)*SCdk1;
end

function Rate_Law_for_reaction_for_SPPP2A(Kcatpp2, Kpp2off, SPPP2A, Kpp2on, SP, PP2A)
  -(Kcatpp2 + Kpp2off)*SPPP2A + Kpp2on*SP*PP2A;
end

function function_for_cdk_inactivation_1(Cyclin_B1_Cdk1_complex_phosphorylated, ec50_wee1, k_cdk1_off, n_wee1, p, r)
  r^(1/2)*k_cdk1_off*(1 + p/((Cyclin_B1_Cdk1_complex_phosphorylated/ec50_wee1)^n_wee1 + 1))*Cyclin_B1_Cdk1_complex_phosphorylated;
end

function function_for_apc_activation_1(APC_C_active, APC_C_total, Plx1_active, ec50_apc, k_apc_on, n_apc)
  k_apc_on/(1 + (ec50_apc/Plx1_active)^n_apc)*(APC_C_total - APC_C_active);
end

function Rate_Law_for_reaction_for_heat_flow(SPPP2A, Vembryo, delta_Hdephos, Kcat_pp2, Kcatpp2, Kpp2off, Kpp2on, SP, PP2A)
  (-(Kcatpp2 + Kpp2off)*SPPP2A + Kpp2on*SP*PP2A)*Vembryo*delta_Hdephos*Kcat_pp2;
end

function Rate_Law_for_reaction_for_SP(Kcatcdk, SCdk1, Kpp2on, SP, PP2A, Kpp2off, SPPP2A)
  Kcatcdk*SCdk1 - Kpp2on*SP*PP2A + Kpp2off*SPPP2A;
end

function Rate_Law_for_reaction_for_PP2A(Kpp2off, SPPP2A, Kcatpp2, Kpp2on, SP, PP2A)
  Kpp2off*SPPP2A + Kcatpp2*SPPP2A - Kpp2on*SP*PP2A;
end

model Rodenfels2019___Heat_Oscillations_Driven_by_the_Embryonic_Cell_Cycle_Reveal_the_Energetic_Costs_of_Signaling()
  // Rodenfels2019 - Heat Oscillations Driven by the Embryonic Cell Cycle Reveal the Energetic Costs of Signaling
  // All living systems function out of equilibrium and exchange energy in the form of heat with their environment. Thus, heat flow can inform on the energetic costs of cellular processes, which are
  // largely unknown. Here, we have repurposed an isothermal calorimeter to measure heat flow between developing zebrafish embryos and the surrounding medium. Heat flow increased over time with cell
  // number. Unexpectedly, a prominent oscillatory component of the heat flow, with periods matching the synchronous early reductive cleavage divisions, persisted even when DNA synthesis and mitosis were
  // blocked by inhibitors. Instead, the heat flow oscillations were driven by the phosphorylation and dephosphorylation reactions catalyzed by the cell-cycle oscillator, the biochemical network
  // controlling mitotic entry and exit. We propose that the high energetic cost of cell-cycle signaling reflects the significant thermodynamic burden of imposing accurate and robust timing on cell
  // proliferation during development.
  // hasProperty mamo:MAMO_0000046
  // hasTaxon taxonomy:7955
  // isDerivedFrom https://www.ncbi.nlm.nih.gov/pubmed/24523664
  // isDescribedBy pubmed:30713074
  // biomodels.db:MODEL2004170001 biomodels.db:BIOMD0000000952
  // hasPart GO:0051726

  // Compartments:
  compartment nuclear = 1; nuclear is "Nuclear";  // isVersionOf ncit:C13361
  compartment Embryo = 6e-10;

  // Species:
  // cdk1a in the publication
  species Cyclin_B1_Cdk1_complex_phosphorylated in nuclear = 60; Cyclin_B1_Cdk1_complex_phosphorylated is "Cyclin B1 Cdk1 complex phosphorylated( Active)";  // hasPart uniprot:Q7ZU21; hasPart uniprot:Q7T3L7; hasPart PATO:0002354; GO:0032991
  // _named cdk1i in the publication
  species Cyclin_B1_Cdk1_complex_unphosphorylated in nuclear = 0;  // hasPart uniprot:Q7T3L7; hasPart uniprot:Q7ZU21; GO:0032991
  species Plx1_active in nuclear = 0;  // hasProperty PATO:0002354; isVersionOf uniprot:Q4KMI8; hasProperty PATO:0002354
  species APC_C_active in nuclear = 0; APC_C_active is "APC/C active";  // hasProperty PATO:0002354; hasPart uniprot:Q561X1; hasProperty PATO:0002354
  species $Plx1_total in nuclear = 1;  // isVersionOf uniprot:Q4KMI8
  species APC_C_total in nuclear = 1; APC_C_total is "APC/C total";  // hasPart uniprot:Q561X1
  species $Cyclin_B1_Cdk1_complex_total in nuclear;  // hasPart uniprot:Q7ZU21; hasPart uniprot:Q7T3L7; GO:0032991
  species SCdk1 in nuclear = 0; SCdk1 is "Substrate/Cdk1 complex";  // hasPart uniprot:Q7T3L7; hasPart ncit:C120264; GO:0032991
  species S in nuclear = 60; S is "Substrate";  // hasPart ncit:C120264
  species SP in nuclear = 0; SP is "Phosphorylated Substrate(SP)";  // hasPart PATO:0002220; hasPart ncit:C120264
  species PP2A in nuclear = 60;  // hasPart uniprot:Q6NY64; GO:0032991
  species SPPP2A in nuclear = 0; SPPP2A is "Phosphorylated Substrate Phosphatase Complex(SP-PP2A)";  // GO:0032991
  species $Stotal in nuclear = 60;  // hasPart ncit:C120264
  species $cdk1a in nuclear;
  species Q in nuclear = 0; Q is "Heat(Q)";  // GO:0031649

  // Parameters:
  k_synth = 2.85;
  k_dest = 0.76;
  ec50_cdc25 = 30;
  n_cdc25 = 11;
  ec50_wee1 = 35;
  n_wee1 = 3.5;
  k_cdk1_on = 0.06726;
  k_cdk1_off = 0.06726;
  p = 5;
  ec50_plx = 60;
  ec50_apc = 0.5;
  n_apc = 4;
  n_plx = 5;
  k_plxon = 2.85;
  k_plx_off = 0.2375;
  k_apc_on = 1.5;
  k_apc_off = 0.15;
  r = 0.03125;
  tau = 4;
  Kcdk_on = 10;
  Kcdk_off = 1;
  Kcatcdk1 = 180;
  Kpp2_on = 100;
  Kpp2_off = 0.01;
  Kcatpp2 = 1800;
  delta_Hdesphos = 40000;

  // Assignment rules:
  Cyclin_B1_Cdk1_complex_total := Cyclin_B1_Cdk1_complex_unphosphorylated + Cyclin_B1_Cdk1_complex_phosphorylated;
  cdk1a := Cyclin_B1_Cdk1_complex_phosphorylated;

  // Rate rules:
  Stotal' = rateOf(S) + rateOf(SP) + rateOf(SCdk1) + rateOf(SPPP2A);

  // Reactions:
  Cyclin_B1_Cdk1_phosphorylated_synthesis: => Cyclin_B1_Cdk1_complex_phosphorylated; nuclear*Constant_flux__irreversible(k_synth);  // isVersionOf ncit:C61408
  Cyclin_B1_Cdk1_unphosphorylated_degradation: Cyclin_B1_Cdk1_complex_unphosphorylated => ; nuclear*function_for_cdk1a_degradation_by_apc_1(APC_C_active, Cyclin_B1_Cdk1_complex_unphosphorylated, k_dest);  // modifiers: APC_C_active
  Cyclin_B1_Cdk1_phosphorylated_degradation: Cyclin_B1_Cdk1_complex_phosphorylated => ; nuclear*function_for_cdk1a_degradation_by_apc_2(APC_C_active, Cyclin_B1_Cdk1_complex_phosphorylated, k_dest);  // modifiers: APC_C_active
  Cyclin_B1_Cdk1_phosphorylated_dephosphorylation: Cyclin_B1_Cdk1_complex_phosphorylated => Cyclin_B1_Cdk1_complex_unphosphorylated; nuclear*function_for_cdk_inactivation_1(Cyclin_B1_Cdk1_complex_phosphorylated, ec50_wee1, k_cdk1_off, n_wee1, p, r);  // isVersionOf GO:0016311
  Cyclin_B1_Cdk1_phosphorylated_phosphorylation: Cyclin_B1_Cdk1_complex_unphosphorylated => Cyclin_B1_Cdk1_complex_phosphorylated; nuclear*function_for_cdk1_activation_1(Cyclin_B1_Cdk1_complex_phosphorylated, Cyclin_B1_Cdk1_complex_unphosphorylated, ec50_cdc25, k_cdk1_on, n_cdc25, p, r);  // isVersionOf GO:0016310
  Plx1_activation_by_active_Cdk1: => Plx1_active; nuclear*function_for_plx1_activation_1(Cyclin_B1_Cdk1_complex_phosphorylated, Plx1_active, Plx1_total, ec50_plx, k_plxon, n_plx);  // modifiers: Cyclin_B1_Cdk1_complex_phosphorylated, Plx1_total
  Plx1_inactivation_after_Cdk1_inactivated: Plx1_active => ; nuclear*k_plx_off*Plx1_active;
  Activation_of_APC_CCdc20_by_active_Plx1: => APC_C_active; nuclear*function_for_apc_activation_1(APC_C_active, APC_C_total, Plx1_active, ec50_apc, k_apc_on, n_apc); Activation_of_APC_CCdc20_by_active_Plx1 is "Activation of APC/CCdc20 by active Plx1";  // modifiers: Plx1_active, APC_C_total
  inactivation_of_APC_CCdc20_after_Plx1_is_inactivated: APC_C_active => ; nuclear*k_apc_off*APC_C_active; inactivation_of_APC_CCdc20_after_Plx1_is_inactivated is "inactivation of APC/CCdc20 after Plx1 is inactivated";
  reaction_for_SCdk1: => SCdk1; nuclear*Rate_Law_for_reaction_for_SCdk1(Kcdk_on, S, cdk1a, Kcatcdk1, Kcdk_off, SCdk1);  // modifiers: S, cdk1a
  reaction_for_S: => S; nuclear*Rate_Law_for_reaction_for_S(Kcdk_off, SCdk1, Kcdk_on, S, cdk1a, Kcatpp2, SPPP2A);  // modifiers: SCdk1, cdk1a, SPPP2A
  reaction_for_SP: => SP; nuclear*Rate_Law_for_reaction_for_SP(Kcatcdk1, SCdk1, Kpp2_on, SP, PP2A, Kpp2_off, SPPP2A);  // modifiers: SCdk1, PP2A, SPPP2A
  reaction_for_PP2A: => PP2A; nuclear*Rate_Law_for_reaction_for_PP2A(Kpp2_off, SPPP2A, Kcatpp2, Kpp2_on, SP, PP2A);  // modifiers: SPPP2A, SP
  reaction_for_SPPP2A: => SPPP2A; nuclear*Rate_Law_for_reaction_for_SPPP2A(Kcatpp2, Kpp2_off, SPPP2A, Kpp2_on, SP, PP2A);  // modifiers: SP, PP2A
  reaction_for_heat_flow: => Q; nuclear*Rate_Law_for_reaction_for_heat_flow(SPPP2A, Embryo, delta_Hdesphos, Kcatpp2, Kcatpp2, Kpp2_off, Kpp2_on, SP, PP2A);  // modifiers: SPPP2A, SP, PP2A

  // Unit definitions:
  unit volume = 1e-3 litre;
  unit substance = 1e-3 mole;
end
