// SBML level 2 version 4
// dcterms:bibliographicCitation: urn:miriam:pubmed:32341628

function Rate_Law_for_R4(kappa, rho1, E)
  kappa*rho1*E;
end

function Rate_Law_for_R3(kappa, rho2, E)
  kappa*rho2*E;
end

function Rate_Law_for_R1(beta, I, S, N, l, H, beta_prime, P)
  beta*I*S/N + l*beta*H*S/N + beta_prime*P*S/N;
end

function Rate_Law_for_R2(kappa, rho1, rho2, E)
  kappa*(1 - rho1 - rho2)*E;
end

model Ndairou2020___early_stage_transmission_of_dynamics_of_COVID_19_in_Wuhan()
  // Ndairou2020 - early-stage transmission of dynamics of COVID-19 in Wuhan
  // We propose a compartmental mathematical model for the spread of the COVID-19 disease with special focus on the transmissibility of super-spreaders individuals. We compute the basic reproduction number threshold, we study the local stability of the disease free equilibrium in terms of the basic reproduction number, and we investigate the sensitivity of the model with respect to the variation of each one of its parameters. Numerical simulations show the suitability of the proposed COVID-19 model for the outbreak that occurred in Wuhan, China
  // isDescribedBy pubmed:32341628
  // isVersionOf DOID:0080600
  // hasTaxon taxonomy:2697049 taxonomy:9606
  // hasProperty mamo:MAMO_0000028
  // biomodels.db:MODEL2008140001 biomodels.db:BIOMD0000000958

  // Compartments:
  compartment Wuhan = 1;  // isVersionOf ncit:C16428; isVersionOf ncit:C25632

  // Species:
  species Susceptible in Wuhan = N - Infectious - Super_spreaders;  // isVersionOf ido:0000514; isVersionOf ncit:C171133
  species Exposed in Wuhan = 0;  // isVersionOf ncit:C171133; isVersionOf ido:0000597
  species Infectious in Wuhan = 1;  // isVersionOf ido:0000463; isVersionOf ncit:C171133; isVersionOf ido:0000511; isVersionOf ncit:C171549
  species Super_spreaders in Wuhan = 5;  // isVersionOf ido:0000463; isVersionOf ncit:0000511; isVersionOf ncit:C171133; isVersionOf ncit:C49508
  species Asymptomatic in Wuhan = 0;  // isVersionOf ncit:C171133; isVersionOf ido:0000569
  species Hospitalised in Wuhan = 0;  // isVersionOf ncit:C171133; isVersionOf ncit:C25179
  species Recovered in Wuhan = 0;  // isVersionOf ncit:C25746; isVersionOf ncit:C171133
  species Fatalities in Wuhan = 0;  // isVersionOf ncit:C171133; isVersionOf ncit:C28554

  // Parameters:
  beta = 2.8 unit_0;
  beta_prime = 7.65 unit_0;
  rho1 = 0.58 unit_1;
  rho2 = 0.001 unit_1;
  l = 1.56 unit_1;
  kappa = 0.25 unit_0;
  gamma_a = 0.94 unit_0;
  gamma_i = 0.27 unit_0;
  gamma_r = 0.5 unit_0;
  delta_i = 0.035 unit_0;
  delta_p = 1 unit_0;
  delta_h = 0.085 unit_0;
  N = 44000 unit_2;

  // Assignment rules:
  Confimed_cases := Infectious + Super_spreaders + Hospitalised;

  // Reactions:
  Susceptible_to_Exposed: Susceptible => Exposed; Wuhan*Rate_Law_for_R1(beta, Infectious, Susceptible, N, l, Hospitalised, beta_prime, Super_spreaders);  // modifiers: Infectious, Hospitalised, Super_spreaders; isVersionOf ido:0000597; isVersionOf ncit:C171133
  Exposed_to_Asymptomatic: Exposed => Asymptomatic; Wuhan*Rate_Law_for_R2(kappa, rho1, rho2, Exposed);  // isVersionOf ncit:C128320; isVersionOf ido:0000569; isVersionOf ncit:C171133
  Exposed_to_Superspreaders: Exposed => Super_spreaders; Wuhan*Rate_Law_for_R3(kappa, rho2, Exposed);  // isVersionOf ncit:C171133; isVersionOf ido:0000463; isVersionOf ncit:C128320; hasProperty ncit:C25227
  Exposed_to_Infectious: Exposed => Infectious; Wuhan*Rate_Law_for_R4(kappa, rho1, Exposed);  // isVersionOf ido:0000463; isVersionOf ncit:C128320; isVersionOf ncit:C171133
  Superspreaders_to_Fatalities: Super_spreaders => Fatalities; Wuhan*delta_p*Super_spreaders;  // isVersionOf ncit:C171133; isVersionOf ncit:C28554
  Superspreaders_to_Hospitalised: Super_spreaders => Hospitalised; Wuhan*gamma_a*Super_spreaders;  // isVersionOf ncit:C171133; isVersionOf ncit:C25179
  Superspreaders_to_Recovered: Super_spreaders => Recovered; Wuhan*gamma_i*Super_spreaders;  // isVersionOf ncit:C171133; isVersionOf ncit:C25746
  Infectious_to_Fatalities: Infectious => Fatalities; Wuhan*delta_i*Infectious;  // isVersionOf ncit:C28554; isVersionOf ncit:C171133
  Infectious_to_Hospitalised: Infectious => Hospitalised; Wuhan*gamma_a*Infectious;  // isVersionOf ncit:C171133; isVersionOf ncit:C25179
  Infectious_To_Recovered: Infectious => Recovered; Wuhan*gamma_i*Infectious;  // isVersionOf ncit:C171133; isVersionOf ncit:C25746
  Hospitalised_to_Recovered: Hospitalised => Recovered; Wuhan*gamma_r*Hospitalised;  // isVersionOf ncit:C25746; isVersionOf ncit:C171133
  Hospitalised_to_Fatalities: Hospitalised => Fatalities; Wuhan*delta_h*Hospitalised;  // isVersionOf ncit:C171133; isVersionOf ncit:C28554

  // Unit definitions:
  unit length = metre;
  unit area = metre^2;
  unit volume = 1e-3 litre;
  unit time = 86400 second;
  unit substance = item;
  unit unit_0 = 1 / (86400 second); unit_0 is "1/d";
  unit unit_1 = dimensionless^0; unit_1 is "dimensionless";
  unit unit_2 = item; unit_2 is "#";
end
