// SBML level 2 version 4
// dcterms:bibliographicCitation: urn:miriam:pubmed:32382154

function Rate_Law_for_reaction(beta, S, I, alpha, R)
  beta*S*I/(1 + alpha*R);
end

model Weitz2020___SIR_model_of_COVID_19_transmission_with_shielding()
  // Weitz2020 - SIR model of COVID-19 transmission with shielding
  // The COVID-19 pandemic has precipitated a global crisis, with more than 1,430,000 confirmed cases and more than 85,000 confirmed deaths globally as of 9 April 2020. Mitigation and suppression of new infections have emerged as the two predominant public health control strategies. Both strategies focus on reducing new infections by limiting human-to-human interactions, which could be both socially and economically unsustainable in the long term. We have developed and analyzed an epidemiological intervention model that leverages serological tests to identify and deploy recovered individuals as focal points for sustaining safer interactions via interaction substitution, developing what we term ‘shield immunity’ at the population scale. The objective of a shield immunity strategy is to help to sustain the interactions necessary for the functioning of essential goods and services while reducing the probability of transmission. Our shield immunity approach could substantively reduce the length and reduce the overall burden of the current outbreak, and can work synergistically with social distancing. The present model highlights the value of serological testing as part of intervention strategies, in addition to its well-recognized roles in estimating prevalence and in the potential development of plasma-based therapies.
  // isDescribedBy pubmed:32382154
  // biomodels.db:MODEL2009160002 biomodels.db:BIOMD0000000963
  // isVersionOf DOID:0080600
  // isVersionOf ido:0000503
  // hasTaxon taxonomy:9606 taxonomy:2697049
  // hasProperty mamo:MAMO_0000028

  // Compartments:
  compartment Country = 1;  // isVersionOf ncit:C25464

  // Species:
  species Susceptible in Country = 0.999;  // isVersionOf ncit:C171133; isVersionOf ido:0000514
  species Infected in Country = 0.001;  // isVersionOf ncit:C171133; isVersionOf ido:0000511
  species Recovered in Country = 0;  // isVersionOf ido:0000621; isVersionOf ncit:C171133

  // Parameters:
  alpha = 0;
  beta = 0.25;
  gamma = 0.1;
  Epidemic_size = 0;
  Uninfected = 0;

  // Reactions:
  Susceptible_to_Infected: Susceptible => Infected; Country*Rate_Law_for_reaction(beta, Susceptible, Infected, alpha, Recovered);  // modifiers: Recovered; isVersionOf ncit:C171133; isVersionOf ncit:C128320
  Infected_to_Recovered: Infected => Recovered; Country*k1*Infected;  // isVersionOf ncit:C171133; isVersionOf ncit:C25746
    k1 = 0.1;

  // Events:
  Simulation_end: at (time == 199): Epidemic_size = Recovered, Uninfected = Susceptible;

  // Unit definitions:
  unit length = metre;
  unit area = metre^2;
  unit volume = 1e-3 litre;
  unit time = 86400 second;
  unit substance = item;
end
