// SBML level 3 version 1
// dcterms:bibliographicCitation: urn:miriam:pubmed:32243599

function Rate_Law_for_reaction(r1, beta1, I, S, r2, beta2, E, N)
  (r1*beta1*I*S + r2*beta2*E*S)/N;
end

model Hou2020___SEIR_model_of_COVID_19_transmission_in_Wuhan()
  // Hou2020 - SEIR model of COVID-19 transmission in Wuhan
  // A novel coronavirus pneumonia, first identified in Wuhan City and referred to as COVID-19 by the World Health Organization, has been quickly spreading to other cities and countries. To control the epidemic, the Chinese government mandated a quarantine of the Wuhan city on January 23, 2020. To explore the effectiveness of the quarantine of the Wuhan city against this epidemic, transmission dynamics of COVID-19 have been estimated. A well-mixed "susceptible exposed infectious recovered" (SEIR) compartmental model was employed to describe the dynamics of the COVID-19 epidemic based on epidemiological characteristics of individuals, clinical progression of COVID-19, and quarantine intervention measures of the authority. Considering infected individuals as contagious during the latency period, the well-mixed SEIR model fitting results based on the assumed contact rate of latent individuals are within 6-18, which represented the possible impact of quarantine and isolation interventions on disease infections, whereas other parameter were suppose as unchanged under the current intervention. The present study shows that, by reducing the contact rate of latent individuals, interventions such as quarantine and isolation can effectively reduce the potential peak number of COVID-19 infections and delay the time of peak infection.
  // isDescribedBy pubmed:32243599
  // biomodels.db:MODEL2010280001 biomodels.db:BIOMD0000000970
  // DOID:0080600
  // hasTaxon taxonomy:9606 taxonomy:2697049
  // hasProperty mamo:MAMO_0000028
  // model units - substance: substance, time: time, volume: volume, area: area, length: length, extent: substance

  // Compartments:
  compartment Wuhan = 1 volume;  // isVersionOf ncit:C25160; isVersionOf ncit:C16428; isVersionOf ncit:C25632

  // Species:
  species Susceptible in Wuhan = Total_Population - Exposed - Infected - Recovered;  // ido:0000514; ncit:C171133
  species Exposed in Wuhan = 193;  // ncit:C171133; ido:0000597; isVersionOf ido:0000514
  species Infected in Wuhan = 27;  // ido:0000511; ncit:C171133
  species Recovered in Wuhan = 2;  // ncit:C171133; hasProperty ido:0000621
  species $Total_Population in Wuhan = 11081000;

  // Parameters:
  r_1 = 6;
  r_2 = 18;
  beta_1 = 0.04;
  beta_2 = 0.02;
  alpha = 0.14;
  gamma = 0.048;

  // Reactions:
  Susceptible_to_Exposed: Susceptible => Exposed; Wuhan*Rate_Law_for_reaction(r_1, beta_1, Infected, Susceptible, r_2, beta_2, Exposed, Total_Population);  // modifiers: Infected, Total_Population; ido:0000597; ncit:C171133
  Exposed_to_Infected: Exposed => Infected; Wuhan*alpha*Exposed;  // ncit:C171133; ncit:C128320
  Infected_to_Recovered: Infected => Recovered; Wuhan*gamma*Infected;  // ncit:C171133; ncit:C25746

  // Unit definitions:
  unit length = metre;
  unit area = metre^2;
  unit volume = 1e-3 litre;
  unit time = 86400 second;
  unit substance = item;
end
