// SBML level 3 version 1
// dcterms:bibliographicCitation: urn:miriam:pubmed:32099934

function Rate_Law_for_reaction_4(sigma, rho, E)
  sigma*(1 - rho)*E;
end

function Rate_Law_for_reaction_3(sigma, rho, E)
  sigma*rho*E;
end

function Rate_Law_for_reaction(beta, c, S, I, theta, A, q)
  beta*c*(1 - q)*S*(I + theta*A);
end

function Rate_Law_for_reaction_1(c, q, beta, S, I, theta, A)
  c*q*(1 - beta)*S*(I + theta*A);
end

function Rate_Law_for_reaction_11(beta, c, q, S, I, theta, A)
  beta*c*q*S*(I + theta*A);
end

model Tang2020___Estimation_of_transmission_risk_of_COVID_19_and_impact_of_public_health_interventions___update()
  // Tang2020 - Estimation of transmission risk of COVID-19 and impact of public health interventions - update
  // The basic reproduction number of an infectious agent is the average number of infections one case can generate over the course of the infectious period, in a naïve, uninfected population. It is well-known that the estimation of this number may vary due to several methodological issues, including different assumptions and choice of parameters, utilized models, used datasets and estimation period. With the spreading of the novel coronavirus (2019-nCoV) infection, the reproduction number has been found to vary, reflecting the dynamics of transmission of the coronavirus outbreak as well as the case reporting rate. Due to significant variations in the control strategies, which have been changing over time, and thanks to the introduction of detection technologies that have been rapidly improved, enabling to shorten the time from infection/symptoms onset to diagnosis, leading to faster confirmation of the new coronavirus cases, our previous estimations on the transmission risk of the 2019-nCoV need to be revised. By using time-dependent contact and diagnose rates, we refit our previously proposed dynamics transmission model to the data available until January 29th, 2020 and re-estimated the effective daily reproduction ratio that better quantifies the evolution of the interventions. We estimated when the effective daily reproduction ratio has fallen below 1 and when the epidemics will peak. Our updated findings suggest that the best measure is persistent and strict self-isolation. The epidemics will continue to grow, and can peak soon with the peak time depending highly on the public health interventions practically implemented.
  // isDerivedFrom DOID:0080600 mamo:MAMO_0000046 mamo:MAMO_0000028 taxonomy:2697049 taxonomy:9606 biomodels.db:BIOMD0000000971
  // isDescribedBy pubmed:32099934
  // biomodels.db:MODEL2011030001 biomodels.db:BIOMD0000000972
  // DOID:0080600
  // hasTaxon taxonomy:2697049 taxonomy:9606
  // isDescribedBy biomodels.db:BIOMD0000000971
  // model units - substance: substance, time: time, volume: volume, area: area, length: length, extent: substance

  // Compartments:
  compartment Wuhan = 1 volume;  // ncit:C25632; isPartOf ncit:C16428

  // Species:
  species Susceptible in Wuhan = 11081000;  // ido:0000514; isVersionOf ncit:C171133
  species Exposed in Wuhan = 23382.31;  // ido:0000514; isVersionOf ncit:C171133; hasProperty ido:0000597
  species Infected in Wuhan = 2200;  // ido:0000511; isVersionOf ncit:C171133
  species Asymptomatic in Wuhan = 531.176;  // ido:0000511; ido:0000569; isVersionOf ncit:C171133
  species Susceptible_quarantined in Wuhan = 163804;  // ido:0000514; ncit:C71902; isVersionOf ncit:C171133
  species Exposed_quarantined in Wuhan = 0.378022;  // ido:0000514; ncit:C71902; isVersionOf ncit:C171133; hasProperty ido:0000597
  species Hospitalised in Wuhan = 515.168;  // isVersionOf ido:0000511; isVersionOf ncit:C171133; hasProperty ncit:C25179
  species Recovered in Wuhan = 1898.36;  // hasProperty ido:0000621

  // Parameters:
  beta = 2.1011e-8;
  q = 1.2858e-5;
  sigma = 0.142857;
  lambda = 0.0714285;
  rho = 0.86834;
  delta_q = 0.1259;
  gamma_I = 0.33029;
  gamma_A = 0.13978;
  gamma_H = 0.11624;
  alpha = 1.7826e-5;
  theta = 1;
  c_lockdown = 14.781;
  q_lockdown = 1.2858e-5;
  var Infected_0;
  c_0 = 14.781;
  c_b = 2.9253;
  r_1 = 1.3768;
  r_2 = 0.3283;
  delta_I_0 = 0.13266;
  delta_I_f = 2.7367;

  // Assignment rules:
  c := (c_0 - c_b)*exp(-r_1*time) + c_b;
  delta_I := delta_I_f*delta_I_0/((delta_I_f - delta_I_0)*exp(-r_2*time) + delta_I_0);
  Infected_0 := Infected + Asymptomatic;

  // Reactions:
  Susceptible_to_Exposed: Susceptible => Exposed; Wuhan*Rate_Law_for_reaction(beta, c, Susceptible, Infected, theta, Asymptomatic, q);  // modifiers: Infected, Asymptomatic; ido:0000597; isVersionOf ncit:C171133
  Susceptible_to_Susceptible_quarantined: Susceptible => Susceptible_quarantined; Wuhan*Rate_Law_for_reaction_1(c, q, beta, Susceptible, Infected, theta, Asymptomatic);  // modifiers: Infected, Asymptomatic; ncit:C71902; isVersionOf ncit:C171133
  Quarantined_to_Susceptible: Susceptible_quarantined => Susceptible; Wuhan*lambda*Susceptible_quarantined;
  Exposed_to_Infected: Exposed => Infected; Wuhan*Rate_Law_for_reaction_3(sigma, rho, Exposed);  // ncit:C171133
  Exposed_to_Asymptomatic: Exposed => Asymptomatic; Wuhan*Rate_Law_for_reaction_4(sigma, rho, Exposed);  // ncit:C171133; ncit:C168121
  Infected_to_Hospitalised: Infected => Hospitalised; Wuhan*delta_I*Infected;  // ncit:C25179; isVersionOf ncit:C171133
  Infected_to_Recovered: Infected => Recovered; Wuhan*gamma_I*Infected;  // ncit:C25746
  Asymptomatic_to_Recovered: Asymptomatic => Recovered; Wuhan*gamma_A*Asymptomatic;  // ncit:C25746
  Hospitalised_to_Recovered: Hospitalised => Recovered; Wuhan*gamma_H*Hospitalised;  // ncit:C25746
  Infected_to_Deceased: Infected => ; Wuhan*alpha*Infected;  // ncit:C28554; isVersionOf ncit:C171133
  Hospitalised_to_Deceased: Hospitalised => ; Wuhan*alpha*Hospitalised;  // ncit:C28554; isVersionOf ncit:C171133
  Susceptible_to_Exposed_quarantined: Susceptible => Exposed_quarantined; Wuhan*Rate_Law_for_reaction_11(beta, c, q, Susceptible, Infected, theta, Asymptomatic);  // modifiers: Infected, Asymptomatic; ido:0000597; ncit:C71902; isVersionOf ncit:C171133
  Exposed_quarantined_to_Hospitalised: Exposed_quarantined => Hospitalised; Wuhan*delta_q*Exposed_quarantined;  // ncit:C25179; isVersionOf ncit:C171133

  // Unit definitions:
  unit length = metre;
  unit area = metre^2;
  unit volume = 1e-3 litre;
  unit time = 86400 second;
  unit substance = item;
end
