// SBML level 2 version 4
// dcterms:bibliographicCitation: urn:miriam:pubmed:32604803

function R2_flux(k2, p)
  2*k2*p^2;
end

function R3_flux(k_1, n)
  k_1*n;
end

function R4_flux(k2, p)
  k2*p^2;
end

function R5_flux(k_2, n)
  k_2*n^2;
end

function R1_flux(k1, n, p)
  k1*n*p;
end

model Dasgupta2020___Reduced_model_of_receptor_clusturing_and_aggregation()
  // Dasgupta2020 - Reduced model of receptor clusturing and aggregation
  // a simple kinetic mass-action-law-based model could be utilized to adequately describe clustering in response to activation both in 2D and in 3D
  // isDescribedBy pubmed:32604803
  // biomodels.db:MODEL2011030002 biomodels.db:BIOMD0000000973
  // occursIn ncit:C77681
  // hasTaxon taxonomy:9606
  // hasProperty GO:0007596 GO:0070527 mamo:MAMO_0000046

  // Compartments:
  compartment Cell = 1;

  // Species:
  // Concentration of single receptor/particle
  species P in Cell = 10000;  // isVersionOf ncit:C18106
  // Concentration of receptor aggregate
  species N in Cell = 0;  // isVersionOf ncit:C62344; hasProperty ncit:C18106

  // Parameters:
  k1 = 0.00021;
  k2 = 7.5e-6;
  k_1 = 6.6e-9;
  k_2 = 0.03;
  k3 = 1.16;
  p0 = 10000;
  Initial_for_p0 = p0;

  // Assignment rules:
  s := (Initial_for_p0 - P)/N;

  // Reactions:
  R1: P => ; Cell*R1_flux(k1, N, P);  // modifiers: N; isInstanceOf ncit:C61470
  R2: P => ; Cell*R2_flux(k2, P);  // isInstanceOf ncit:C62344
  R3: => P; Cell*R3_flux(k_1, N);  // modifiers: N
  R4: => N; Cell*R4_flux(k2, P);  // modifiers: P; isInstanceOf ncit:C62344
  R5: N => ; Cell*R5_flux(k_2, N);
  R6: N => ; Cell*k3*N;  // isInstanceOf ncit:C62344

  // Unit definitions:
  unit length = metre;
  unit area = metre^2;
  unit volume = litre;
  unit time = second;
  unit substance = mole;
end
