// SBML level 3 version 1
// dcterms:bibliographicCitation: urn:miriam:pubmed:32834603

function Rate_Law_for_Susceptible_to_Susceptible_quarantined(beta_s, rho_s, epsilon_s, S, I, n)
  rho_s*(1 - beta_s)*epsilon_s*S*I/n;
end

function Rate_Law_for_Susceptible_to_Infected_quarantined(beta_s, epsilon_S, rho_s, S, I, n)
  beta_s*epsilon_S*rho_s*S*I/n;
end

function Rate_Law_for_Susceptible_to_Asymptomatic(beta_s, rho_s, epsilon_s, S, I, n)
  beta_s*(1 - rho_s)*epsilon_s*S*I/n;
end

model Sarkar2020___SAIR_model_of_COVID_19_transmission_with_quarantine_measures_in_India()
  // Sarkar2020 - SAIR model of COVID-19 transmission with quarantine measures in India
  // In India, 100,340 confirmed cases and 3155 confirmed deaths due to COVID-19 were reported as of May 18, 2020. Due to absence of specific vaccine or therapy, non-pharmacological interventions including so- cial distancing, contact tracing are essential to end the worldwide COVID-19. We propose a mathematical model that predicts the dynamics of COVID-19 in 17 provinces of India and the overall India. A complete scenario is given to demonstrate the estimated pandemic life cycle along with the real data or history to date, which in turn divulges the predicted inflection point and ending phase of SARS-CoV-2. The proposed model monitors the dynamics of six compartments, namely susceptible (S), asymptomatic (A), recovered (R), infected (I), isolated infected ( I q ) and quarantined susceptible ( S q ), collectively expressed SARII q S q . A sensitivity analysis is conducted to determine the robustness of model predictions to parameter values and the sensitive parameters are estimated from the real data on the COVID-19 pandemic in India. Our re- sults reveal that achieving a reduction in the contact rate between uninfected and infected individuals by quarantined the susceptible individuals, can effectively reduce the basic reproduction number. Our model simulations demonstrate that the elimination of ongoing SARS-CoV-2 pandemic is possible by combining the restrictive social distancing and contact tracing. Our predictions are based on real data with reason- able assumptions, whereas the accurate course of epidemic heavily depends on how and when quaran- tine, isolation and precautionary measures are enforced.
  // isDescribedBy pubmed:32834603
  // biomodels.db:MODEL2011300001 biomodels.db:BIOMD0000000977
  // DOID:0080600
  // hasTaxon taxonomy:9606 taxonomy:2697049
  // hasProperty mamo:MAMO_0000028
  // model units - substance: substance, time: time, volume: volume, area: area, length: length, extent: substance

  // Compartments:
  compartment Wuhan = 1 volume; Wuhan is "India";  // ncit:C16727

  // Species:
  species Susceptible in Wuhan = 902654;  // ido:0000514; isVersionOf ncit:C171133
  species Infected in Wuhan = 1;  // ido:0000511; isVersionOf ncit:C171133
  species Asymptomatic in Wuhan = 114;  // ido:0000569; ido:0000511; isVersionOf ncit:C171133
  species Susceptible_quarantined in Wuhan = 10785;  // ido:0000514; ncit:C71902; isVersionOf ncit:C171133
  species Exposed_quarantined in Wuhan = 0; Exposed_quarantined is "Infected_quarantined";  // ido:0000511; ncit:C71902; isVersionOf ncit:C171133
  species Recovered in Wuhan = 0;  // hasProperty ido:0000621

  // Parameters:
  lambda_s = 0;
  beta_s = 0.8799;
  rho_s = 0.3199;
  epsilon_s = 14.83;
  delta = 0;
  m_s = 0.04167;
  gamma_a = 0.0168;
  xi_a = 0.71;
  gamma_i = 0.07151;
  xi_i = 0.0286;
  xi_q = 0.13369;

  // Assignment rules:
  Cumulative_cases := Exposed_quarantined;
  Total_population := Asymptomatic + Infected + Exposed_quarantined + Recovered + Susceptible + Susceptible_quarantined;

  // Reactions:
  Susceptible_to_Susceptible_quarantined: Susceptible => Susceptible_quarantined; Wuhan*Rate_Law_for_Susceptible_to_Susceptible_quarantined(beta_s, rho_s, epsilon_s, Susceptible, Infected, Total_population);  // modifiers: Infected; ncit:C71902; isVersionOf ncit:C171133
  Infected_to_Recovered: Infected => Recovered; Wuhan*xi_i*Infected;  // ncit:C25746
  Susceptible_quarantined_to_Susceptible: Susceptible_quarantined => Susceptible; Wuhan*m_s*Susceptible_quarantined;
  Susceptible_to_Deceased: Susceptible => ; Wuhan*delta*Susceptible;  // ncit:C28554
  Susceptible_quarantined_to_Deceased: Susceptible_quarantined => ; Wuhan*delta*Susceptible_quarantined;  // ncit:C28554
  Susceptible_to_Asymptomatic: Susceptible => Asymptomatic; Wuhan*Rate_Law_for_Susceptible_to_Asymptomatic(beta_s, rho_s, epsilon_s, Susceptible, Infected, Total_population);  // modifiers: Infected; ncit:C128320; ncit:C168447; ncit:C171133
  Susceptible_to_Infected_quarantined: Susceptible => Exposed_quarantined; Wuhan*Rate_Law_for_Susceptible_to_Infected_quarantined(beta_s, epsilon_s, rho_s, Susceptible, Infected, Total_population);  // modifiers: Infected; ncit:C171133; ncit:C128320; ncit:C71902
  Asymptomatic_to_Infected: Asymptomatic => Infected; Wuhan*gamma_a*Asymptomatic;  // ncit:C128320; ncit:C168447; ncit:C171133
  Asymptomatic_to_Recovered: Asymptomatic => Recovered; Wuhan*xi_a*Asymptomatic;  // ncit:C25746
  Asymptomatic_to_Deceased: Asymptomatic => ; Wuhan*delta*Asymptomatic;  // ncit:C28554
  Infected_to_Deceased: Infected => ; Wuhan*delta*Infected;  // ncit:C28554
  Infected_to_Infected_quarantined: Infected => Exposed_quarantined; Wuhan*gamma_i*Infected;  // ncit:C171133; ncit:C71902
  Infected_quarantined_to_Recovered: Exposed_quarantined => Recovered; Wuhan*xi_q*Exposed_quarantined;  // ncit:C25746
  Infected_quarantined_to_Deceased: Exposed_quarantined => ; Wuhan*delta*Exposed_quarantined;  // ncit:C28554
  Recovered_to_Deceased: Recovered => ; Wuhan*delta*Recovered;  // ncit:C28554

  // Unit definitions:
  unit length = metre;
  unit area = metre^2;
  unit volume = 1e-3 litre;
  unit time = 86400 second;
  unit substance = item;
end
