// SBML level 3 version 1
// dcterms:bibliographicCitation: urn:miriam:pubmed:32982082

function Rate_Law_for_reaction(beta, S, N, I)
  beta*S*I/N;
end

model Malkov2020___SEIRS_model_of_COVID_19_transmission_with_reinfection()
  // Malkov2020 - SEIRS model of COVID-19 transmission with time-varying R values and reinfection
  // Epidemiological models of COVID-19 transmission assume that recovered individuals have a fully pro- tected immunity. To date, there is no definite answer about whether people who recover from COVID-19 can be reinfected with the severe acute respiratory syndrome coronavirus 2 (SARS-CoV-2). In the absence of a clear answer about the risk of reinfection, it is instructive to consider the possible scenarios. To study the epidemiological dynamics with the possibility of reinfection, I use a Susceptible-Exposed-Infectious- Resistant-Susceptible model with the time-varying transmission rate. I consider three different ways of modeling reinfection. The crucial feature of this study is that I explore both the difference between the reinfection and no-reinfection scenarios and how the mitigation measures affect this difference. The principal results are the following. First, the dynamics of the reinfection and no-reinfection scenarios are in- distinguishable before the infection peak. Second, the mitigation measures delay not only the infection peak, but also the moment when the difference between the reinfection and no-reinfection scenarios becomes prominent. These results are robust to various modeling assumptions.
  // isDescribedBy pubmed:32982082
  // DOID:0080600
  // hasTaxon taxonomy:2697049 taxonomy:9606
  // hasProperty mamo:MAMO_0000028
  // biomodels.db:MODEL2012070001 biomodels.db:BIOMD0000000980
  // model units - substance: substance, time: time, volume: volume, area: area, length: length, extent: substance

  // Compartments:
  compartment USA = 1 volume;  // ncit:C17234

  // Species:
  species Susceptible in USA = Total_population - Recovered - Exposed - Infected;  // ido:0000514
  species Exposed in USA = 14439817;  // ncit:0000514; ncit:C171133; hasProperty ncit:0000597
  species Infected in USA = 3.3005296e5;  // ido:0000511; ncit:C171133
  species Recovered in USA = 0;  // ido:0000514; hasProperty ido:0000569
  species Total_population in USA = 330052960;

  // Parameters:
  omega = 0.01667;
  sigma = 0.19231;
  gamma = 0.05556;
  R_1_0 = 3;
  R_2_0 = 3;
  R_1_f = 1.6;
  R_2_f = 1.6;
  eta = 0;

  // Assignment rules:
  Fraction_infected := Infected/Total_population;
  R_1 := exp(-eta*time)*R_1_0 + (1 - exp(-eta*time))*R_1_f;
  R_2 := exp(-eta*time)*R_2_0 + (1 - exp(-eta*time))*R_2_f;
  R_fixed := (R_1 + R_2)/2;
  beta := gamma*R_fixed;

  // Reactions:
  Susceptible_to_Exposed: Susceptible => Exposed; USA*Rate_Law_for_reaction(beta, Susceptible, Total_population, Infected);  // modifiers: Total_population, Infected; ido:0000597; ncit:C171133
  Exposed_to_Infected: Exposed => Infected; USA*sigma*Exposed;  // ncit:C171133
  Infected_to_Recovered: Infected => Recovered; USA*gamma*Infected;  // ncit:C25746
  Recovered_to_Susceptible__Reinfection: Recovered => Susceptible; USA*omega*Recovered; Recovered_to_Susceptible__Reinfection is "Recovered_to_Susceptible_(Reinfection)";  // ncit:C25559; ncit:C16710

  // Unit definitions:
  unit length = metre;
  unit area = metre^2;
  unit volume = 1e-3 litre;
  unit time = 86400 second;
  unit substance = item;
end
