// SBML level 2 version 4
// dcterms:bibliographicCitation: urn:miriam:pubmed:29371237

function Function_for_reaction6(Active_R2, index_kb_R2, k_medium, kf_R2_activation)
  Active_R2*index_kb_R2*kf_R2_activation/k_medium;
end

function Function_for_reaction37(S4_export_from_nuc, S4_n, nuc)
  nuc*S4_n*S4_export_from_nuc;
end

function Function_for_reaction40(Trimer_import_to_nuc, cyt, pS2_pS2_S4_c)
  cyt*Trimer_import_to_nuc*pS2_pS2_S4_c;
end

function Function_for_reaction50_2(K_mran, hill_fact1, k_induced_S7_production, mRNA_prod, pS2_pS2_S4_n)
  mRNA_prod + k_induced_S7_production*pS2_pS2_S4_n^hill_fact1/(K_mran^hill_fact1 + pS2_pS2_S4_n^hill_fact1);
end

function Function_for_reaction2(TGFb, TGFb_R2_surface, kf_R2_activation)
  TGFb*TGFb_R2_surface*kf_R2_activation;
end

function Function_for_reaction36(S4_c, S4_import_to_nuc, cyt)
  cyt*S4_c*S4_import_to_nuc;
end

function Function_for_reaction52(Smad7mRNA, k_S7_protein)
  Smad7mRNA*k_S7_protein;
end

function Function_for_reaction5(Active_R2, index_kb_R2, kf_R2_activation)
  Active_R2*index_kb_R2*kf_R2_activation;
end

function Function_for_reaction15(Inactive_Rec, index_seq_kb, kf_Seq_S7_Rec)
  Inactive_Rec*index_seq_kb*kf_Seq_S7_Rec;
end

function Function_for_reaction8(Active_Rec, index_kb_R1, kf_R1_activation)
  Active_Rec*index_kb_R1*kf_R1_activation;
end

function Function_for_reaction32(index_kb_homotrimer, kb_trimmer, pS2_pS2_pS2_n)
  index_kb_homotrimer*kb_trimmer*pS2_pS2_pS2_n;
end

function Function_for_reaction34(S2_c, S2_import_to_nuc, cyt)
  cyt*S2_c*S2_import_to_nuc;
end

function Function_for_reaction21(TGFb_R2_endo, index_k_out_2_relative_speed, k_in_2)
  TGFb_R2_endo*index_k_out_2_relative_speed*k_in_2;
end

function Function_for_reaction20(TGFb_R1_endo, index_k_out_1_relative_speed, k_in_1)
  TGFb_R1_endo*index_k_out_1_relative_speed*k_in_1;
end

function Function_for_reaction51(Smad7mRNA1, export_cytoplasm, nuc)
  nuc*Smad7mRNA1*export_cytoplasm;
end

function Function_for_reaction25(Active_Rec_endo, S2_c, k_phosphorylation)
  Active_Rec_endo*S2_c*k_phosphorylation;
end

function Function_for_reaction35(S2_export_from_nuc, S2_n, nuc)
  nuc*S2_n*S2_export_from_nuc;
end

function Function_for_reaction38(S2_import_to_nuc, cyt, pS2_c)
  cyt*S2_import_to_nuc*pS2_c;
end

function Function_for_reaction17(Inactive_Rec, index_induced_R2_deg, kdeg_R2)
  Inactive_Rec*index_induced_R2_deg*kdeg_R2;
end

function Function_for_reaction3(TGFb, TGFb_R2_surface, kf_R2_activation)
  TGFb*TGFb_R2_surface*kf_R2_activation;
end

function Function_for_reaction43(index_trimer_dephos, k_Dephos, pS2_pS2_S4_n)
  index_trimer_dephos*k_Dephos*pS2_pS2_S4_n;
end

function Function_for_reaction4(Active_R2, index_kb_R2, kf_R2_activation)
  Active_R2*index_kb_R2*kf_R2_activation;
end

function Function_for_reaction39(S2_export_from_nuc, nuc, pS2_n)
  nuc*S2_export_from_nuc*pS2_n;
end

function Function_for_reaction33(index_kb_homotrimer, kb_trimmer, pS2_pS2_pS2_c)
  index_kb_homotrimer*kb_trimmer*pS2_pS2_pS2_c;
end

function Function_for_reaction41(Trimer_import_to_nuc, cyt, pS2_pS2_pS2_c)
  cyt*Trimer_import_to_nuc*pS2_pS2_pS2_c;
end

function Function_for_reaction1(TGFb, TGFb_R2_surface, k_medium, kf_R2_activation)
  TGFb*TGFb_R2_surface*kf_R2_activation/k_medium;
end

function Function_for_reaction22(Active_Rec, index_active_Rec_internalize, k_in_1)
  Active_Rec*index_active_Rec_internalize*k_in_1;
end

function Function_for_reaction16(Inactive_Rec, index_induced_ligand_deg, kin_deg_Ligand)
  Inactive_Rec*index_induced_ligand_deg*kin_deg_Ligand;
end

function Function_for_reaction45_0(S4_export_from_nuc, S4_import_to_nuc, S4_total, kdeg_S4)
  S4_total*(S4_import_to_nuc*kdeg_S4 + S4_export_from_nuc*kdeg_S4 + kdeg_S4^2)/(2*S4_import_to_nuc + S4_export_from_nuc + kdeg_S4);
end
Function_for_reaction45_0 is "Function for reaction45_1";

function Function_for_reaction46_0(R1_total, index_k_out_1_relative_speed, k_in_1, kdeg_R1)
  R1_total*k_in_1*kdeg_R1^2/(k_in_1*kdeg_R1 + kdeg_R1^2 + index_k_out_1_relative_speed*k_in_1*kdeg_R1);
end
Function_for_reaction46_0 is "Function for reaction46_1";

function Function_for_reaction47_0(R2_total, index_k_out_2_relative_speed, k_in_2, kdeg_R2)
  R2_total*k_in_2*kdeg_R2^2/(k_in_2*kdeg_R2 + kdeg_R2^2 + index_k_out_2_relative_speed*k_in_2*kdeg_R2);
end
Function_for_reaction47_0 is "Function for reaction47_1";

function Function_for_reaction31_0(index_kf_homotrimer, kf_trimmer, pS2_n)
  index_kf_homotrimer*kf_trimmer*pS2_n^3;
end
Function_for_reaction31_0 is "Function for reaction31_1";

function Function_for_reaction44_0(S2_export_from_nuc, S2_import_to_nuc, S2_total, kdeg_S2)
  S2_total*(S2_import_to_nuc*kdeg_S2 + S2_export_from_nuc*kdeg_S2 + kdeg_S2^2)/(2*S2_import_to_nuc + S2_export_from_nuc + kdeg_S2);
end
Function_for_reaction44_0 is "Function for reaction44_1";

function Function_for_reaction30_0(index_kf_homotrimer, kf_trimmer, pS2_c)
  index_kf_homotrimer*kf_trimmer*pS2_c^3;
end
Function_for_reaction30_0 is "Function for reaction30_1";

model Strasen2018___TGF__SMAD_Signalling___Dose_dependent_dynamics_upon_TGF__stimulation()
  // Strasen2018 - TGFb SMAD Signalling - Dose dependent dynamics upon TGFb stimulation
  // This model simulates TGFb dose dependent kinetics of The SMADs. TGFb ligand dose applied are 1pM, 2.5pM, 5pM, 25pM, and 100pM as explained in the manuscript.
  // unknownQualifier mamo:MAMO_0000046
  // isDescribedBy pubmed:29371237
  // biomodels.db:MODEL1712050001 biomodels.db:BIOMD0000000989
  // occursIn BTO:0001211
  // hasTaxon taxonomy:9606
  // hasProperty GO:0038105 biomodels.db:MODEL1712050001 GO:0007179 mamo:MAMO_0000046

  // Compartments:
  compartment cyt = 2;  // ncit:C13226
  compartment nuc = 1;  // ncit:C13197

  // Species:
  species TGFb_R1_surface in cyt = R1_total*kdeg_R1*(kdeg_R1 + index_k_out_1_relative_speed*k_in_1)/(k_in_1*kdeg_R1 + kdeg_R1^2 + index_k_out_1_relative_speed*k_in_1*kdeg_R1); TGFb_R1_surface is "TGFb_TGFR1_surface";  // hasPart uniprot:P36897; hasPart uniprot:P01137; hasProperty ncit:C13376; hasProperty GO:0070021
  species TGFb_R2_surface in cyt = R2_total*kdeg_R2*(kdeg_R2 + index_k_out_2_relative_speed*k_in_2)/(k_in_2*kdeg_R2 + kdeg_R2^2 + index_k_out_2_relative_speed*k_in_2*kdeg_R2); TGFb_R2_surface is "TGFb_TGFR2_surface";  // hasPart uniprot:P01137; hasPart uniprot:P37173; hasProperty GO:0070021; hasProperty ncit:C13376
  species TGFb_R1_endo in cyt = R1_total*k_in_1*kdeg_R1/(k_in_1*kdeg_R1 + kdeg_R1^2 + index_k_out_1_relative_speed*k_in_1*kdeg_R1); TGFb_R1_endo is "TGFb_TGFR1_endo";  // hasPart uniprot:P36897; hasPart uniprot:P01137; hasProperty GO:0016197; hasProperty GO:0070021
  species TGFb_R2_endo in cyt = R2_total*k_in_2*kdeg_R2/(k_in_2*kdeg_R2 + kdeg_R2^2 + index_k_out_2_relative_speed*k_in_2*kdeg_R2); TGFb_R2_endo is "TGFb_TGFR2_endo";  // hasPart uniprot:P01137; hasPart uniprot:P37173; hasProperty GO:0016197; hasProperty GO:0070021
  species TGFb in cyt = TGFb_LIGAND_Dose;  // uniprot:P01137
  species TGFb_In in cyt = 0;  // uniprot:P01137; hasProperty GO:0016197
  species Active_R2 in cyt = 0; Active_R2 is "Active_TGFR2";  // uniprot:P37173; hasProperty ncit:C45329
  species Active_Rec in cyt = 0; Active_Rec is "Active_TGFb-TGFR1-TGFR2";  // hasPart uniprot:P01137; hasPart uniprot:P36897; hasPart uniprot:P37173; hasProperty ncit:C45329
  species Active_Rec_endo in cyt = 0; Active_Rec_endo is "Active_TGFb-TGFR1-TGFR2_endo";  // hasPart uniprot:P01137; hasPart uniprot:P36897; hasPart uniprot:P37173; hasProperty GO:0016197
  species Inactive_Rec in cyt = 0; Inactive_Rec is "Inactive_TGFb-TGFR1-TGFR2";  // hasPart uniprot:P36897; hasPart uniprot:P01137; hasPart uniprot:P37173; hasProperty ncit:C154407
  species pS2_c in cyt = 0; pS2_c is "pSMAD2_c";  // uniprot:Q15796; hasProperty PR:000037070; hasProperty ncit:C13226
  species S2_c in cyt = S2_total*(S2_export_from_nuc + kdeg_S2)/(2*S2_import_to_nuc + S2_export_from_nuc + kdeg_S2); S2_c is "SMAD2_c";  // uniprot:Q15796; hasProperty ncit:C13226
  species S4_c in cyt = S4_total*(S4_export_from_nuc + kdeg_S4)/(2*S4_import_to_nuc + S4_export_from_nuc + kdeg_S4); S4_c is "SMAD4_c";  // uniprot:Q13485; hasProperty ncit:C13226
  species pS2_pS2_S4_c in cyt = 0; pS2_pS2_S4_c is "pSMAD2_pSMAD2_SMAD4_c";  // hasPart uniprot:Q13485; hasPart uniprot:Q15796; hasProperty PR:000037070; hasProperty ncit:C13226
  species pS2_pS2_pS2_c in cyt = 0; pS2_pS2_pS2_c is "pSMAD2_trimer_c";  // uniprot:Q15796; hasProperty PR:000037070; hasProperty ncit:C13226; hasProperty GO:0070206
  species Smad7mRNA in cyt = export_cytoplasm*mRNA_prod/(2*kmRNAdeg_S7*(export_cytoplasm + kmRNA1deg_S7)); Smad7mRNA is "SMAD7_mRNA";  // uniprot:O15105; bao:0000274
  species SMAD7 in cyt = export_cytoplasm*k_S7_protein*mRNA_prod/(2*kdeg_S7*kmRNAdeg_S7*(export_cytoplasm + kmRNA1deg_S7));  // uniprot:O15105
  species Smad7mRNA1 in nuc = mRNA_prod/(export_cytoplasm + kmRNA1deg_S7); Smad7mRNA1 is "SMAD7_mRNA1";  // bao:0000274; isVersionOf uniprot:O15105
  species pS2_n in nuc = 0; pS2_n is "pSMAD2_n";  // uniprot:Q15796; hasProperty ncit:C13197; hasProperty PR:000037070
  species pS2_pS2_S4_n in nuc = 0; pS2_pS2_S4_n is "pSMAD2_pSMAD2_SMAD4_n";  // hasPart uniprot:Q13485; hasPart uniprot:Q15796; hasProperty ncit:C13197; hasProperty PR:000037070
  species pS2_pS2_pS2_n in nuc = 0; pS2_pS2_pS2_n is "pSMAD2_trimer_n";  // hasInstance uniprot:Q15796 ncit:C13197 PR:000037070 GO:0070206; uniprot:Q15796; hasProperty ncit:C13197; hasProperty PR:000037070
  species S2_n in nuc = 2*S2_total*S2_import_to_nuc/(2*S2_import_to_nuc + S2_export_from_nuc + kdeg_S2); S2_n is "SMAD2_n";  // uniprot:Q15796; hasProperty ncit:C13197
  species S4_n in nuc = 2*S4_total*S4_import_to_nuc/(2*S4_import_to_nuc + S4_export_from_nuc + kdeg_S4); S4_n is "SMAD4_n";  // uniprot:Q13485; hasProperty ncit:C13197

  // Parameters:
  K_mran = 223.5953;
  R1_total = 34.87281;
  R2_total = 34.9992;
  S2_export_from_nuc = 1.9987;
  S2_import_to_nuc = 0.3715772;
  S2_total = 876.0421;
  S4_export_from_nuc = 0.1968107;
  S4_import_to_nuc = 0.03708854;
  S4_total = 629.893;
  Trimer_import_to_nuc = 0.1440326;
  export_cytoplasm = 0.03043709;
  hill_fact1 = 3.985926;
  index_active_Rec_internalize = 0.5373808;
  index_induced_R2_deg = 1.000378;
  index_induced_ligand_deg = 2.721072;
  index_k_out_1_relative_speed = 0.5666516;
  index_k_out_2_relative_speed = 0.2457854;
  index_kb_R1 = 1.612296;
  index_kb_R2 = 8.704676;
  index_kb_homotrimer = 0.01640562;
  index_kf_homotrimer = 4.484456;
  index_seq_kb = 0.0008811834;
  index_trimer_dephos = 2.609993;
  k5 = 47;
  k_Dephos = 0.1394183;
  k_S7_protein = 0.2182698;
  k_disso_Active_Rec = 0.001037149;
  k_in_1 = 0.2009207;
  k_in_2 = 0.625805;
  k_induced_S7_production = 4.999015;
  k_medium = 2018.933;
  k_phosphorylation = 0.07012739;
  kb_trimmer = 1.607624;
  kdeg_R1 = 0.05865548;
  kdeg_R2 = 0.001000394;
  kdeg_S2 = 0.0005141483;
  kdeg_S4 = 0.004802027;
  kdeg_S7 = 0.001022537;
  kf_R1_activation = 4.985476;
  kf_R2_activation = 4.955553;
  kf_Seq_S7_Rec = 0.8821667;
  kf_trimmer = 4.814301;
  kin_deg_Ligand = 0.7201984;
  kmRNA1deg_S7 = 0.005218886;
  kmRNAdeg_S7 = 0.09901554;
  mRNA_prod = 0.01308869;
  TGFb_LIGAND_Dose = 25;
  var NUC_CYT_SMAD2; NUC_CYT_SMAD2 is "NUC/CYT SMAD2";

  // Assignment rules:
  NUC_CYT_SMAD2 := (2*pS2_pS2_S4_n + S2_n + pS2_n + 3*pS2_pS2_pS2_n)/(2*pS2_pS2_S4_c + S2_c + pS2_c + 3*pS2_pS2_pS2_c);

  // Reactions:
  reaction1: TGFb => ; cyt*Function_for_reaction1(TGFb, TGFb_R2_surface, k_medium, kf_R2_activation);  // modifiers: TGFb_R2_surface; isVersionOf ncit:C20139
  reaction2: TGFb_R2_surface => ; cyt*Function_for_reaction2(TGFb, TGFb_R2_surface, kf_R2_activation);  // modifiers: TGFb; isVersionOf GO:0001881
  reaction3: => Active_R2; cyt*Function_for_reaction3(TGFb, TGFb_R2_surface, kf_R2_activation);  // modifiers: TGFb, TGFb_R2_surface; isVersionOf ncit:C40702
  reaction4: Active_R2 => ; cyt*Function_for_reaction4(Active_R2, index_kb_R2, kf_R2_activation);  // isVersionOf GO:0032801
  reaction5: => TGFb_R2_surface; cyt*Function_for_reaction5(Active_R2, index_kb_R2, kf_R2_activation);  // modifiers: Active_R2; isVersionOf GO:0034394
  reaction6: => TGFb; cyt*Function_for_reaction6(Active_R2, index_kb_R2, k_medium, kf_R2_activation);  // modifiers: Active_R2
  reaction7: TGFb_R1_surface + Active_R2 => Active_Rec; cyt*kf_R1_activation*TGFb_R1_surface*Active_R2;  // isInstanceOf GO:0007181
  reaction8: Active_Rec => TGFb_R1_surface + Active_R2; cyt*Function_for_reaction8(Active_Rec, index_kb_R1, kf_R1_activation);
  reaction9: Active_Rec_endo => TGFb_R1_endo + TGFb_In; cyt*kdeg_R2*Active_Rec_endo;  // isVersionOf GO:0001881
  reaction10: Active_Rec_endo => TGFb_R2_endo + TGFb_In; cyt*kdeg_R1*Active_Rec_endo;  // isVersionOf GO:0001881
  reaction11: Active_Rec_endo => TGFb_R1_endo + TGFb_R2_endo; cyt*kin_deg_Ligand*Active_Rec_endo;  // isVersionOf GO:0001881
  reaction12: TGFb_R1_endo => ; cyt*kdeg_R1*TGFb_R1_endo;
  reaction13: TGFb_R2_endo => ; cyt*kdeg_R2*TGFb_R2_endo;
  reaction14: Active_Rec + SMAD7 => Inactive_Rec; cyt*kf_Seq_S7_Rec*Active_Rec*SMAD7;  // hasProperty biomodels.teddy:TEDDY_0000034
  reaction15: Inactive_Rec => Active_Rec + SMAD7; cyt*Function_for_reaction15(Inactive_Rec, index_seq_kb, kf_Seq_S7_Rec);  // isVersionOf GO:0001881
  reaction16: Inactive_Rec => TGFb_R1_surface + TGFb_R2_surface + SMAD7; cyt*Function_for_reaction16(Inactive_Rec, index_induced_ligand_deg, kin_deg_Ligand);  // isVersionOf GO:0001881
  reaction17: Inactive_Rec => TGFb_R1_surface + TGFb_In + SMAD7; cyt*Function_for_reaction17(Inactive_Rec, index_induced_R2_deg, kdeg_R2);  // isVersionOf GO:0001881
  reaction18: TGFb_R1_surface => TGFb_R1_endo; cyt*k_in_1*TGFb_R1_surface;  // isVersionOf GO:0048227
  reaction19: TGFb_R2_surface => TGFb_R2_endo; cyt*k_in_2*TGFb_R2_surface;  // isVersionOf GO:0048227
  reaction20: TGFb_R1_endo => TGFb_R1_surface; cyt*Function_for_reaction20(TGFb_R1_endo, index_k_out_1_relative_speed, k_in_1);  // isVersionOf GO:1990126
  reaction21: TGFb_R2_endo => TGFb_R2_surface; cyt*Function_for_reaction21(TGFb_R2_endo, index_k_out_2_relative_speed, k_in_2);  // isVersionOf GO:1990126
  reaction22: Active_Rec => Active_Rec_endo; cyt*Function_for_reaction22(Active_Rec, index_active_Rec_internalize, k_in_1);  // isVersionOf GO:0048227
  reaction23: Active_Rec_endo => TGFb_R1_endo + TGFb_R2_endo + TGFb_In; cyt*k_disso_Active_Rec*Active_Rec_endo;  // isVersionOf GO:0001881
  reaction24: TGFb_In => ; cyt*kin_deg_Ligand*TGFb_In;
  reaction25: S2_c => pS2_c; cyt*Function_for_reaction25(Active_Rec_endo, S2_c, k_phosphorylation);  // modifiers: Active_Rec_endo
  reaction26: 2 pS2_c + S4_c => pS2_pS2_S4_c; cyt*kf_trimmer*pS2_c^2*S4_c;  // isVersionOf GO:0070208
  reaction27: pS2_pS2_S4_c => 2 pS2_c + S4_c; cyt*kb_trimmer*pS2_pS2_S4_c;
  reaction28: 2 pS2_n + S4_n => pS2_pS2_S4_n; nuc*kf_trimmer*pS2_n^2*S4_n;  // isVersionOf GO:0070208
  reaction29: pS2_pS2_S4_n => 2 pS2_n + S4_n; nuc*kb_trimmer*pS2_pS2_S4_n;
  reaction30: 3 pS2_c => pS2_pS2_pS2_c; cyt*Function_for_reaction30_0(index_kf_homotrimer, kf_trimmer, pS2_c);  // isVersionOf GO:0070207
  reaction31: 3 pS2_n => pS2_pS2_pS2_n; nuc*Function_for_reaction31_0(index_kf_homotrimer, kf_trimmer, pS2_n);  // isVersionOf GO:0070207
  reaction32: pS2_pS2_pS2_n => 3 pS2_n; nuc*Function_for_reaction32(index_kb_homotrimer, kb_trimmer, pS2_pS2_pS2_n);
  reaction33: pS2_pS2_pS2_c => 3 pS2_c; cyt*Function_for_reaction33(index_kb_homotrimer, kb_trimmer, pS2_pS2_pS2_c);
  reaction34: S2_c => S2_n; Function_for_reaction34(S2_c, S2_import_to_nuc, cyt);  // isVersionOf GO:0006606
  reaction35: S2_n => S2_c; Function_for_reaction35(S2_export_from_nuc, S2_n, nuc);  // isVersionOf GO:0006611
  reaction36: S4_c => S4_n; Function_for_reaction36(S4_c, S4_import_to_nuc, cyt);  // isVersionOf GO:0006606
  reaction37: S4_n => S4_c; Function_for_reaction37(S4_export_from_nuc, S4_n, nuc);  // isVersionOf GO:0006611
  reaction38: pS2_c => pS2_n; Function_for_reaction38(S2_import_to_nuc, cyt, pS2_c);  // isVersionOf GO:0006606
  reaction39: pS2_n => pS2_c; Function_for_reaction39(S2_export_from_nuc, nuc, pS2_n);  // isVersionOf GO:0006611
  reaction40: pS2_pS2_S4_c => pS2_pS2_S4_n; Function_for_reaction40(Trimer_import_to_nuc, cyt, pS2_pS2_S4_c);  // isVersionOf GO:0006606
  reaction41: pS2_pS2_pS2_c => pS2_pS2_pS2_n; Function_for_reaction41(Trimer_import_to_nuc, cyt, pS2_pS2_pS2_c);  // isVersionOf GO:0006606
  reaction42: pS2_n => S2_n; nuc*k_Dephos*pS2_n;
  reaction43: pS2_pS2_S4_n => pS2_n + S2_n + S4_n; nuc*Function_for_reaction43(index_trimer_dephos, k_Dephos, pS2_pS2_S4_n);
  reaction44: => S2_c; cyt*Function_for_reaction44_0(S2_export_from_nuc, S2_import_to_nuc, S2_total, kdeg_S2);
  reaction45: => S4_c; cyt*Function_for_reaction45_0(S4_export_from_nuc, S4_import_to_nuc, S4_total, kdeg_S4);
  reaction46: => TGFb_R1_surface; cyt*Function_for_reaction46_0(R1_total, index_k_out_1_relative_speed, k_in_1, kdeg_R1);
  reaction47: => TGFb_R2_surface; cyt*Function_for_reaction47_0(R2_total, index_k_out_2_relative_speed, k_in_2, kdeg_R2);
  reaction48: => Smad7mRNA1; nuc*Function_for_reaction50_2(K_mran, hill_fact1, k_induced_S7_production, mRNA_prod, pS2_pS2_S4_n);  // modifiers: pS2_pS2_S4_n; isVersionOf GO:0009299
  reaction49: Smad7mRNA1 => Smad7mRNA; Function_for_reaction51(Smad7mRNA1, export_cytoplasm, nuc);  // isVersionOf GO:0006397
  reaction52: => SMAD7; cyt*Function_for_reaction52(Smad7mRNA, k_S7_protein); reaction52 is "reaction50";  // modifiers: Smad7mRNA; isVersionOf GO:0009299
  reaction53: S2_c => ; cyt*kdeg_S2*S2_c; reaction53 is "reaction51";
  reaction54: S2_n => ; nuc*kdeg_S2*S2_n; reaction54 is "reaction52";
  reaction55: pS2_n => ; nuc*kdeg_S2*pS2_n; reaction55 is "reaction53";
  reaction56: pS2_c => ; cyt*kdeg_S2*pS2_c; reaction56 is "reaction54";
  reaction57: S4_c => ; cyt*kdeg_S4*S4_c; reaction57 is "reaction55";
  reaction58: S4_n => ; nuc*kdeg_S4*S4_n; reaction58 is "reaction56";
  reaction59: pS2_pS2_S4_c => pS2_c + S4_c; cyt*kdeg_S2*pS2_pS2_S4_c; reaction59 is "reaction57";
  reaction60: pS2_pS2_S4_c => 2 pS2_c; cyt*kdeg_S4*pS2_pS2_S4_c; reaction60 is "reaction58";
  reaction61: pS2_pS2_pS2_c => 2 pS2_c; cyt*kdeg_S2*pS2_pS2_pS2_c; reaction61 is "reaction59";
  reaction62: pS2_pS2_S4_n => pS2_n + S4_n; nuc*kdeg_S2*pS2_pS2_S4_n; reaction62 is "reaction60";
  reaction63: pS2_pS2_S4_n => 2 pS2_n; nuc*kdeg_S4*pS2_pS2_S4_n; reaction63 is "reaction61";
  reaction64: pS2_pS2_pS2_n => 2 pS2_n; nuc*kdeg_S2*pS2_pS2_pS2_n; reaction64 is "reaction62";
  reaction65: Smad7mRNA1 => ; nuc*kmRNA1deg_S7*Smad7mRNA1; reaction65 is "reaction63";
  reaction66: Smad7mRNA => ; cyt*kmRNAdeg_S7*Smad7mRNA; reaction66 is "reaction64";
  reaction67: SMAD7 => ; cyt*kdeg_S7*SMAD7; reaction67 is "reaction65";

  // Unit definitions:
  unit length = metre;
  unit area = metre^2;
  unit volume = litre;
  unit time = 60 second;
  unit substance = item;
end
