// SBML level 2 version 4
// dcterms:bibliographicCitation: urn:miriam:pubmed:29371237

function Function_for_reaction33_3_0(index_kb_homotrimer, kb_trimmer, pS2_pS2_pS2_c)
  index_kb_homotrimer*kb_trimmer*pS2_pS2_pS2_c;
end

function Function_for_reaction20_3_0(TGFb_R1_endo, index_k_out_1_relative_speed, k_in_1)
  TGFb_R1_endo*index_k_out_1_relative_speed*k_in_1;
end

function Function_for_reaction32_2_0(index_kb_homotrimer, kb_trimmer, pS2_pS2_pS2_n)
  index_kb_homotrimer*kb_trimmer*pS2_pS2_pS2_n;
end

function Function_for_reaction25__1_0(Active_Rec_endo, S2_c, k_phosphorylation)
  k_phosphorylation*Active_Rec_endo*S2_c;
end
Function_for_reaction25__1_0 is "Function for reaction25 [1]";

function Function_for_reaction52_2_0(Smad7mRNA, k_S7_protein)
  Smad7mRNA*k_S7_protein;
end

function Function_for_reaction47_4_0(R2_total, index_k_out_2_relative_speed, k_in_2, kdeg_R2)
  R2_total*k_in_2*kdeg_R2^2/(k_in_2*kdeg_R2 + kdeg_R2^2 + index_k_out_2_relative_speed*k_in_2*kdeg_R2);
end

function Function_for_reaction51_1_0(Smad7mRNA1, export_cytoplasm, nuc)
  nuc*Smad7mRNA1*export_cytoplasm;
end

function Function_for_reaction39_4_0(S2_export_from_nuc, nuc, pS2_n)
  nuc*S2_export_from_nuc*pS2_n;
end

function Function_for_reaction8_0(Active_Rec, index_kb_R1, kf_R1_activation)
  Active_Rec*index_kb_R1*kf_R1_activation;
end

function Function_for_reaction34_3_0(S2_c, S2_import_to_nuc, cyt)
  cyt*S2_c*S2_import_to_nuc;
end

function Function_for_reaction31_1_0(index_kf_homotrimer, kf_trimmer, pS2_n)
  index_kf_homotrimer*kf_trimmer*pS2_n^3;
end

function Function_for_reaction5_0(Active_R2, index_kb_R2, kf_R2_activation)
  Active_R2*index_kb_R2*kf_R2_activation;
end

function Function_for_reaction38_4_0(S2_import_to_nuc, cyt, pS2_c)
  cyt*S2_import_to_nuc*pS2_c;
end

function Function_for_reaction16_0(Inactive_Rec, index_induced_ligand_deg, kin_deg_Ligand)
  Inactive_Rec*index_induced_ligand_deg*kin_deg_Ligand;
end

function Function_for_reaction4_0(Active_R2, index_kb_R2, kf_R2_activation)
  Active_R2*index_kb_R2*kf_R2_activation;
end

function Function_for_reaction3_0(TGFb, TGFb_R2_surface, kf_R2_activation)
  TGFb*TGFb_R2_surface*kf_R2_activation;
end

function Function_for_reaction2_0(TGFb, TGFb_R2_surface, kf_R2_activation)
  TGFb*TGFb_R2_surface*kf_R2_activation;
end

function Function_for_reaction30_0(index_kf_homotrimer, kf_trimmer, pS2_c)
  index_kf_homotrimer*kf_trimmer*pS2_c^3;
end

function Function_for_reaction37_4_0(S4_export_from_nuc, S4_n, nuc)
  nuc*S4_n*S4_export_from_nuc;
end

function Function_for_reaction6_0(Active_R2, index_kb_R2, k_medium, kf_R2_activation)
  Active_R2*index_kb_R2*kf_R2_activation/k_medium;
end

function Function_for_reaction45_4_0(S4_export_from_nuc, S4_import_to_nuc, S4_total, kdeg_S4)
  S4_total*(S4_import_to_nuc*kdeg_S4 + S4_export_from_nuc*kdeg_S4 + kdeg_S4^2)/(2*S4_import_to_nuc + S4_export_from_nuc + kdeg_S4);
end

function Function_for_reaction35_4_0(S2_export_from_nuc, S2_n, nuc)
  nuc*S2_n*S2_export_from_nuc;
end

function Function_for_reaction44_3_0(S2_export_from_nuc, S2_import_to_nuc, S2_total, kdeg_S2)
  S2_total*(S2_import_to_nuc*kdeg_S2 + S2_export_from_nuc*kdeg_S2 + kdeg_S2^2)/(2*S2_import_to_nuc + S2_export_from_nuc + kdeg_S2);
end

function Function_for_reaction40_4_0(Trimer_import_to_nuc, cyt, pS2_pS2_S4_c)
  cyt*Trimer_import_to_nuc*pS2_pS2_S4_c;
end

function Function_for_reaction41_1_0(Trimer_import_to_nuc, cyt, pS2_pS2_pS2_c)
  cyt*Trimer_import_to_nuc*pS2_pS2_pS2_c;
end

function Function_for_reaction46_4_0(R1_total, index_k_out_1_relative_speed, k_in_1, kdeg_R1)
  R1_total*k_in_1*kdeg_R1^2/(k_in_1*kdeg_R1 + kdeg_R1^2 + index_k_out_1_relative_speed*k_in_1*kdeg_R1);
end

function Function_for_reaction21_3_0(TGFb_R2_endo, index_k_out_2_relative_speed, k_in_2)
  TGFb_R2_endo*index_k_out_2_relative_speed*k_in_2;
end

function Function_for_reaction22_3_0(Active_Rec, index_active_Rec_internalize, k_in_1)
  Active_Rec*index_active_Rec_internalize*k_in_1;
end

function Function_for_reaction17_0(Inactive_Rec, index_induced_R2_deg, kdeg_R2)
  Inactive_Rec*index_induced_R2_deg*kdeg_R2;
end

function Function_for_reaction1_0(TGFb, TGFb_R2_surface, k_medium, kf_R2_activation)
  TGFb*TGFb_R2_surface*kf_R2_activation/k_medium;
end

function Function_for_reaction15_0(Inactive_Rec, index_seq_kb, kf_Seq_S7_Rec)
  Inactive_Rec*index_seq_kb*kf_Seq_S7_Rec;
end

function Function_for_reaction43_0(index_trimer_dephos, k_Dephos, pS2_pS2_S4_n)
  index_trimer_dephos*k_Dephos*pS2_pS2_S4_n;
end

function Function_for_reaction36_4_0(S4_c, S4_import_to_nuc, cyt)
  cyt*S4_c*S4_import_to_nuc;
end

function Function_for_reaction50__2_0(K_mran, hill_fact1, k_induced_S7_production, mRNA_prod, pS2_pS2_S4_n)
  mRNA_prod + k_induced_S7_production*pS2_pS2_S4_n^hill_fact1/(K_mran^hill_fact1 + pS2_pS2_S4_n^hill_fact1);
end
Function_for_reaction50__2_0 is "Function for reaction50 [2]";

model Strasen2018___TGF__SMAD_Signalling___Restimulation_with_5pM_TGF__at_8hr()
  // Strasen2018 - TGFb SMAD Signalling - Restimulation with 5pM TGFb at 8hr
  // Restimulation with 5pM TGFβ at 8 hrs, shown in Figure 4F
  // unknownQualifier biomodels.db:MODEL1712050001
  // isDescribedBy pubmed:29371237
  // biomodels.db:MODEL1712050004 biomodels.db:BIOMD0000000995
  // occursIn BTO:0001211
  // hasTaxon taxonomy:9606
  // hasProperty GO:0007179 GO:0038105 mamo:MAMO_0000046

  // Compartments:
  compartment cyt = 2;  // ncit:C13226
  compartment nuc = 1;  // ncit:C13197

  // Species:
  species TGFb_R1_surface in cyt = R1_total*kdeg_R1*(kdeg_R1 + index_k_out_1_relative_speed*k_in_1)/(k_in_1*kdeg_R1 + kdeg_R1^2 + index_k_out_1_relative_speed*k_in_1*kdeg_R1); TGFb_R1_surface is "TGFb_TGFR1_surface";  // hasProperty GO:0070021 ncit:C13376; hasPart uniprot:P01137; hasPart uniprot:P36897; hasProperty ncit:C13376
  species TGFb_R2_surface in cyt = R2_total*kdeg_R2*(kdeg_R2 + index_k_out_2_relative_speed*k_in_2)/(k_in_2*kdeg_R2 + kdeg_R2^2 + index_k_out_2_relative_speed*k_in_2*kdeg_R2); TGFb_R2_surface is "TGFb_TGFR2_surface";  // hasProperty GO:0070021 ncit:C13376; hasPart uniprot:P37173; hasPart uniprot:P01137; hasProperty GO:0070021
  species TGFb_R1_endo in cyt = R1_total*k_in_1*kdeg_R1/(k_in_1*kdeg_R1 + kdeg_R1^2 + index_k_out_1_relative_speed*k_in_1*kdeg_R1); TGFb_R1_endo is "TGFb_TGFR1_endo";  // hasProperty GO:0016197 GO:0070021; hasPart uniprot:P01137; hasPart uniprot:P36897; hasProperty GO:0016197
  species TGFb_R2_endo in cyt = R2_total*k_in_2*kdeg_R2/(k_in_2*kdeg_R2 + kdeg_R2^2 + index_k_out_2_relative_speed*k_in_2*kdeg_R2); TGFb_R2_endo is "TGFb_TGFR2_endo";  // hasProperty GO:0016197 GO:0070021; hasPart uniprot:P37173; hasPart uniprot:P01137; hasProperty GO:0016197
  species TGFb in cyt = 0;  // uniprot:P01137
  species TGFb_In in cyt = 0;  // hasProperty GO:0016197; uniprot:P01137; hasProperty GO:0016197
  species Active_R2 in cyt = 0; Active_R2 is "Active_TGFR2";  // hasProperty ncit:C45329; uniprot:P37173; hasProperty ncit:C45329
  species Active_Rec in cyt = 0; Active_Rec is "Active_TGFb-TGFR1-TGFR2";  // hasProperty ncit:C45329; hasPart uniprot:P01137; hasPart uniprot:P36897; hasPart uniprot:P37173
  species Active_Rec_endo in cyt = 0; Active_Rec_endo is "Active_TGFb-TGFR1-TGFR2_endo";  // hasProperty GO:0016197 ncit:C45329; hasPart uniprot:P36897; hasPart uniprot:P01137; hasPart uniprot:P37173
  species Inactive_Rec in cyt = 0; Inactive_Rec is "Inactive_TGFb-TGFR1-TGFR2";  // hasProperty ncit:C154407; hasPart uniprot:P37173; hasPart uniprot:P01137; hasPart uniprot:P36897
  species pS2_c in cyt = 0; pS2_c is "pSMAD2_c";  // hasProperty ncit:C13226 PR:000037070; uniprot:Q15796; hasProperty ncit:C13226; hasProperty PR:000037070
  species S2_c in cyt = S2_total*(S2_export_from_nuc + kdeg_S2)/(2*S2_import_to_nuc + S2_export_from_nuc + kdeg_S2); S2_c is "SMAD2_c";  // hasProperty ncit:C13226; uniprot:Q15796; hasProperty ncit:C13226
  species S4_c in cyt = S4_total*(S4_export_from_nuc + kdeg_S4)/(2*S4_import_to_nuc + S4_export_from_nuc + kdeg_S4); S4_c is "SMAD4_c";  // hasProperty ncit:C13226; uniprot:Q13485; hasProperty ncit:C13226
  species pS2_pS2_S4_c in cyt = 0; pS2_pS2_S4_c is "pSMAD2_pSMAD2_SMAD4_c";  // hasProperty ncit:C13226 PR:000037070; hasPart uniprot:Q13485; hasPart uniprot:Q15796; hasProperty ncit:C13226
  species pS2_pS2_pS2_c in cyt = 0; pS2_pS2_pS2_c is "pSMAD2_trimer_c";  // hasProperty GO:0070206 ncit:C13226 PR:000037070; uniprot:Q15796; hasProperty ncit:C13226; hasProperty PR:000037070
  species Smad7mRNA in cyt = export_cytoplasm*mRNA_prod/(2*kmRNAdeg_S7*(export_cytoplasm + kmRNA1deg_S7)); Smad7mRNA is "SMAD7_mRNA";  // bao:0000274; uniprot:O15105
  species SMAD7 in cyt = export_cytoplasm*k_S7_protein*mRNA_prod/(2*kdeg_S7*kmRNAdeg_S7*(export_cytoplasm + kmRNA1deg_S7));  // uniprot:O15105
  species Smad7mRNA1 in nuc = mRNA_prod/(export_cytoplasm + kmRNA1deg_S7); Smad7mRNA1 is "SMAD7_mRNA1";  // bao:0000274; uniprot:O15105
  species pS2_n in nuc = 0; pS2_n is "pSMAD2_n";  // hasProperty ncit:C13197 PR:000037070; uniprot:Q15796; hasProperty PR:000037070; hasProperty ncit:C13197
  species pS2_pS2_S4_n in nuc = 0; pS2_pS2_S4_n is "pSMAD2_pSMAD2_SMAD4_n";  // hasProperty ncit:C13197 PR:000037070; hasPart uniprot:Q15796; hasPart uniprot:Q13485; hasProperty ncit:C13197
  species pS2_pS2_pS2_n in nuc = 0; pS2_pS2_pS2_n is "pSMAD2_trimer_n";  // hasProperty ncit:C13197 PR:000037070; uniprot:Q15796; hasProperty PR:000037070; hasProperty ncit:C13197
  species S2_n in nuc = 2*S2_total*S2_import_to_nuc/(2*S2_import_to_nuc + S2_export_from_nuc + kdeg_S2); S2_n is "SMAD2_n";  // hasProperty ncit:C13197; uniprot:Q15796; hasProperty ncit:C13197
  species S4_n in nuc = 2*S4_total*S4_import_to_nuc/(2*S4_import_to_nuc + S4_export_from_nuc + kdeg_S4); S4_n is "SMAD4_n";  // hasProperty ncit:C13197; uniprot:Q13485; hasProperty ncit:C13197

  // Parameters:
  K_mran = 223.5953;
  R1_total = 34.87281;
  R2_total = 34.9992;
  S2_export_from_nuc = 1.9987;
  S2_import_to_nuc = 0.3715772;
  S2_total = 876.0421;
  S4_export_from_nuc = 0.1968107;
  S4_import_to_nuc = 0.03708854;
  S4_total = 629.893;
  Trimer_import_to_nuc = 0.1440326;
  export_cytoplasm = 0.03043709;
  hill_fact1 = 3.985926;
  index_active_Rec_internalize = 0.5373808;
  index_induced_R2_deg = 1.000378;
  index_induced_ligand_deg = 2.721072;
  index_k_out_1_relative_speed = 0.5666516;
  index_k_out_2_relative_speed = 0.2457854;
  index_kb_R1 = 1.612296;
  index_kb_R2 = 8.704676;
  index_kb_homotrimer = 0.01640562;
  index_kf_homotrimer = 4.484456;
  index_seq_kb = 0.0008811834;
  index_trimer_dephos = 2.609993;
  kS4_effective_2 = 1;
  k_Dephos = 0.1394183;
  k_S7_protein = 0.2182698;
  k_disso_Active_Rec = 0.001037149;
  k_in_1 = 0.2009207;
  k_in_2 = 0.625805;
  k_induced_S7_production = 4.999015;
  k_medium = 2018.933;
  k_phosphorylation = 0.07012739;
  kb_trimmer = 1.607624;
  kdeg_R1 = 0.05865548;
  kdeg_R2 = 0.001000394;
  kdeg_S2 = 0.0005141483;
  kdeg_S4 = 0.004802027;
  kdeg_S7 = 0.001022537;
  kf_R1_activation = 4.985476;
  kf_R2_activation = 4.955553;
  kf_Seq_S7_Rec = 0.8821667;
  kf_trimmer = 4.814301;
  kin_deg_Ligand = 0.7201984;
  kmRNA1deg_S7 = 0.005218886;
  kmRNAdeg_S7 = 0.09901554;
  mRNA_prod = 0.01308869;
  effective = 0; effective is "Restimulation";
  var TGFb_Ligand_DOSE; TGFb_Ligand_DOSE is "TGFb_Ligand_strength";
  WASH_LIGAND = 0;
  var NUC_CYT_SMAD2; NUC_CYT_SMAD2 is "NUC/CYT SMAD2";
  offset_restimulation_2_5pM = 0.05; offset_restimulation_2_5pM is "offset_restimulation_5pM";
  scale_restimulation_2_5pM = 1.28428; scale_restimulation_2_5pM is "scale_restimulation_5pM";

  // Assignment rules:
  TGFb_Ligand_DOSE := 5;
  NUC_CYT_SMAD2 := offset_restimulation_2_5pM + scale_restimulation_2_5pM*((2*pS2_pS2_S4_n + S2_n + pS2_n + 3*pS2_pS2_pS2_n)/(2*pS2_pS2_S4_c + S2_c + pS2_c + 3*pS2_pS2_pS2_c));

  // Reactions:
  reaction1: TGFb => ; cyt*Function_for_reaction1_0(TGFb, TGFb_R2_surface, k_medium, kf_R2_activation);  // modifiers: TGFb_R2_surface; isVersionOf ncit:C20139
  reaction2: TGFb_R2_surface => ; cyt*Function_for_reaction2_0(TGFb, TGFb_R2_surface, kf_R2_activation);  // modifiers: TGFb; isVersionOf GO:0001881
  reaction3: => Active_R2; cyt*Function_for_reaction3_0(TGFb, TGFb_R2_surface, kf_R2_activation);  // modifiers: TGFb, TGFb_R2_surface; isVersionOf ncit:C40702
  reaction4: Active_R2 => ; cyt*Function_for_reaction4_0(Active_R2, index_kb_R2, kf_R2_activation);  // isVersionOf GO:0032801
  reaction5: => TGFb_R2_surface; cyt*Function_for_reaction5_0(Active_R2, index_kb_R2, kf_R2_activation);  // modifiers: Active_R2; isVersionOf GO:0034394
  reaction6: => TGFb; cyt*Function_for_reaction6_0(Active_R2, index_kb_R2, k_medium, kf_R2_activation);  // modifiers: Active_R2
  reaction7: TGFb_R1_surface + Active_R2 => Active_Rec; cyt*kf_R1_activation*TGFb_R1_surface*Active_R2;
  reaction8: Active_Rec => TGFb_R1_surface + Active_R2; cyt*Function_for_reaction8_0(Active_Rec, index_kb_R1, kf_R1_activation);
  reaction9: Active_Rec_endo => TGFb_R1_endo + TGFb_In; cyt*kdeg_R2*Active_Rec_endo;  // isVersionOf GO:0001881
  reaction10: Active_Rec_endo => TGFb_R2_endo + TGFb_In; cyt*kdeg_R1*Active_Rec_endo;  // isVersionOf GO:0001881
  reaction11: Active_Rec_endo => TGFb_R1_endo + TGFb_R2_endo; cyt*kin_deg_Ligand*Active_Rec_endo;  // isVersionOf GO:0001881
  reaction12: TGFb_R1_endo => ; cyt*kdeg_R1*TGFb_R1_endo;
  reaction13: TGFb_R2_endo => ; cyt*kdeg_R2*TGFb_R2_endo;
  reaction14: Active_Rec + SMAD7 => Inactive_Rec; cyt*kf_Seq_S7_Rec*Active_Rec*SMAD7;
  reaction15: Inactive_Rec => Active_Rec + SMAD7; cyt*Function_for_reaction15_0(Inactive_Rec, index_seq_kb, kf_Seq_S7_Rec);  // isVersionOf GO:0001881
  reaction16: Inactive_Rec => TGFb_R1_surface + TGFb_R2_surface + SMAD7; cyt*Function_for_reaction16_0(Inactive_Rec, index_induced_ligand_deg, kin_deg_Ligand);  // isVersionOf GO:0001881
  reaction17: Inactive_Rec => TGFb_R1_surface + TGFb_In + SMAD7; cyt*Function_for_reaction17_0(Inactive_Rec, index_induced_R2_deg, kdeg_R2);  // isVersionOf GO:0001881
  reaction18: TGFb_R1_surface => TGFb_R1_endo; cyt*k_in_1*TGFb_R1_surface;  // isVersionOf GO:0048227
  reaction19: TGFb_R2_surface => TGFb_R2_endo; cyt*k_in_2*TGFb_R2_surface;  // isVersionOf GO:0048227
  reaction20: TGFb_R1_endo => TGFb_R1_surface; cyt*Function_for_reaction20_3_0(TGFb_R1_endo, index_k_out_1_relative_speed, k_in_1);  // isVersionOf GO:1990126
  reaction21: TGFb_R2_endo => TGFb_R2_surface; cyt*Function_for_reaction21_3_0(TGFb_R2_endo, index_k_out_2_relative_speed, k_in_2);  // isVersionOf GO:1990126
  reaction22: Active_Rec => Active_Rec_endo; cyt*Function_for_reaction22_3_0(Active_Rec, index_active_Rec_internalize, k_in_1);  // isVersionOf GO:0048227
  reaction23: Active_Rec_endo => TGFb_R1_endo + TGFb_R2_endo + TGFb_In; cyt*k_disso_Active_Rec*Active_Rec_endo;  // isVersionOf GO:0001881
  reaction24: TGFb_In => ; cyt*kin_deg_Ligand*TGFb_In;
  reaction25: S2_c => pS2_c; cyt*Function_for_reaction25__1_0(Active_Rec_endo, S2_c, k_phosphorylation);  // modifiers: Active_Rec_endo
  reaction26: 2 pS2_c + S4_c => pS2_pS2_S4_c; cyt*kf_trimmer*pS2_c^2*S4_c;  // isVersionOf GO:0070208
  reaction27: pS2_pS2_S4_c => 2 pS2_c + S4_c; cyt*kb_trimmer*pS2_pS2_S4_c;
  reaction28: 2 pS2_n + S4_n => pS2_pS2_S4_n; nuc*kf_trimmer*pS2_n^2*S4_n;  // isVersionOf GO:0070208
  reaction29: pS2_pS2_S4_n => 2 pS2_n + S4_n; nuc*kb_trimmer*pS2_pS2_S4_n;
  reaction30: 3 pS2_c => pS2_pS2_pS2_c; cyt*Function_for_reaction30_0(index_kf_homotrimer, kf_trimmer, pS2_c);  // isVersionOf GO:0070207
  reaction31: 3 pS2_n => pS2_pS2_pS2_n; nuc*Function_for_reaction31_1_0(index_kf_homotrimer, kf_trimmer, pS2_n);  // isVersionOf GO:0070207
  reaction32: pS2_pS2_pS2_n => 3 pS2_n; nuc*Function_for_reaction32_2_0(index_kb_homotrimer, kb_trimmer, pS2_pS2_pS2_n);
  reaction33: pS2_pS2_pS2_c => 3 pS2_c; cyt*Function_for_reaction33_3_0(index_kb_homotrimer, kb_trimmer, pS2_pS2_pS2_c);
  reaction34: S2_c => S2_n; Function_for_reaction34_3_0(S2_c, S2_import_to_nuc, cyt);  // isVersionOf GO:0006606
  reaction35: S2_n => S2_c; Function_for_reaction35_4_0(S2_export_from_nuc, S2_n, nuc);  // isVersionOf GO:0006611
  reaction36: S4_c => S4_n; Function_for_reaction36_4_0(S4_c, S4_import_to_nuc, cyt);  // isVersionOf GO:0006606
  reaction37: S4_n => S4_c; Function_for_reaction37_4_0(S4_export_from_nuc, S4_n, nuc);  // isVersionOf GO:0006611
  reaction38: pS2_c => pS2_n; Function_for_reaction38_4_0(S2_import_to_nuc, cyt, pS2_c);  // isVersionOf GO:0006606
  reaction39: pS2_n => pS2_c; Function_for_reaction39_4_0(S2_export_from_nuc, nuc, pS2_n);  // isVersionOf GO:0006611
  reaction40: pS2_pS2_S4_c => pS2_pS2_S4_n; Function_for_reaction40_4_0(Trimer_import_to_nuc, cyt, pS2_pS2_S4_c);  // isVersionOf GO:0006606
  reaction41: pS2_pS2_pS2_c => pS2_pS2_pS2_n; Function_for_reaction41_1_0(Trimer_import_to_nuc, cyt, pS2_pS2_pS2_c);  // isVersionOf GO:0006606
  reaction42: pS2_n => S2_n; nuc*k_Dephos*pS2_n;
  reaction43: pS2_pS2_S4_n => pS2_n + S2_n + S4_n; nuc*Function_for_reaction43_0(index_trimer_dephos, k_Dephos, pS2_pS2_S4_n);
  reaction44: => S2_c; cyt*Function_for_reaction44_3_0(S2_export_from_nuc, S2_import_to_nuc, S2_total, kdeg_S2);
  reaction45: => S4_c; cyt*Function_for_reaction45_4_0(S4_export_from_nuc, S4_import_to_nuc, S4_total, kdeg_S4);
  reaction46: => TGFb_R1_surface; cyt*Function_for_reaction46_4_0(R1_total, index_k_out_1_relative_speed, k_in_1, kdeg_R1);
  reaction47: => TGFb_R2_surface; cyt*Function_for_reaction47_4_0(R2_total, index_k_out_2_relative_speed, k_in_2, kdeg_R2);
  reaction50: => Smad7mRNA1; nuc*Function_for_reaction50__2_0(K_mran, hill_fact1, k_induced_S7_production, mRNA_prod, pS2_pS2_S4_n);  // modifiers: pS2_pS2_S4_n; isVersionOf GO:0009299
  reaction51: Smad7mRNA1 => Smad7mRNA; Function_for_reaction51_1_0(Smad7mRNA1, export_cytoplasm, nuc);  // isVersionOf GO:0006397
  reaction52: => SMAD7; cyt*Function_for_reaction52_2_0(Smad7mRNA, k_S7_protein);  // modifiers: Smad7mRNA; isVersionOf GO:0009299
  reaction53: S2_c => ; cyt*kdeg_S2*S2_c;
  reaction54: S2_n => ; nuc*kdeg_S2*S2_n;
  reaction55: pS2_n => ; nuc*kdeg_S2*pS2_n;
  reaction56: pS2_c => ; cyt*kdeg_S2*pS2_c;
  reaction57: S4_c => ; cyt*kdeg_S4*S4_c;
  reaction58: S4_n => ; nuc*kdeg_S4*S4_n;
  reaction59: pS2_pS2_S4_c => pS2_c + S4_c; cyt*kdeg_S2*pS2_pS2_S4_c;
  reaction60: pS2_pS2_S4_c => 2 pS2_c; cyt*kdeg_S4*pS2_pS2_S4_c;
  reaction61: pS2_pS2_pS2_c => 2 pS2_c; cyt*kdeg_S2*pS2_pS2_pS2_c;
  reaction62: pS2_pS2_S4_n => pS2_n + S4_n; nuc*kdeg_S2*pS2_pS2_S4_n;
  reaction63: pS2_pS2_S4_n => 2 pS2_n; nuc*kdeg_S4*pS2_pS2_S4_n;
  reaction64: pS2_pS2_pS2_n => 2 pS2_n; nuc*kdeg_S2*pS2_pS2_pS2_n;
  reaction65: Smad7mRNA1 => ; nuc*kmRNA1deg_S7*Smad7mRNA1;
  reaction66: Smad7mRNA => ; cyt*kmRNAdeg_S7*Smad7mRNA;
  reaction67: SMAD7 => ; cyt*kdeg_S7*SMAD7;
  reaction68: TGFb => ; cyt*WASH_LIGAND*TGFb;

  // Events:
  Ligand1_injection: at (time == 1e-6): TGFb = TGFb_Ligand_DOSE;
  Ligand1_start_wash: at ((time > 479) && (time < 479.5)): WASH_LIGAND = 1000000;
  Ligand2_injection: at (time == 480.1): TGFb = TGFb_Ligand_DOSE;
  Ligand1_stop_wash: at (time >= 480): WASH_LIGAND = 0;

  // Unit definitions:
  unit length = metre;
  unit area = metre^2;
  unit volume = litre;
  unit time = second;
  unit substance = mole;
end
