// SBML level 2 version 4
// dcterms:bibliographicCitation: urn:miriam:pubmed:29371237

function Function_for_reaction16(Inactive_Rec, index_induced_ligand_deg, kin_deg_Ligand)
  Inactive_Rec*index_induced_ligand_deg*kin_deg_Ligand;
end

function Function_for_reaction1(TGFb, TGFb_R2_surface, k_medium, kf_R2_activation)
  TGFb*TGFb_R2_surface*kf_R2_activation/k_medium;
end

function Function_for_reaction31_2(index_kf_homotrimer, kf_trimmer, pS2_c)
  index_kf_homotrimer*kf_trimmer*pS2_c^3;
end

function Function_for_reaction32_3(index_kb_homotrimer, kb_trimmer, pS2_pS2_pS2_c)
  index_kb_homotrimer*kb_trimmer*pS2_pS2_pS2_c;
end

function Function_for_reaction21(TGFb_R2_endo, index_k_out_2_relative_speed_C5, k_in_R2_C5)
  TGFb_R2_endo*index_k_out_2_relative_speed_C5*k_in_R2_C5;
end
Function_for_reaction21 is "Function for reaction21_7";

function Function_for_reaction45(S2_export_from_nuc_C5, S2_import_to_nuc_C5, S2_total_C5, kdeg_S2)
  S2_total_C5*(S2_import_to_nuc_C5*kdeg_S2 + S2_export_from_nuc_C5*kdeg_S2 + kdeg_S2^2)/(2*S2_import_to_nuc_C5 + S2_export_from_nuc_C5 + kdeg_S2);
end
Function_for_reaction45 is "Function for reaction45_8";

function Function_for_reaction37(S4_c, S4_import_to_nuc_C5, cyt)
  cyt*S4_c*S4_import_to_nuc_C5;
end
Function_for_reaction37 is "Function for reaction37_8";

function Function_for_reaction53(Smad7mRNA, k_S7_protein_C5)
  Smad7mRNA*k_S7_protein_C5;
end
Function_for_reaction53 is "Function for reaction53_5";

function Function_for_reaction15(Inactive_Rec, index_seq_kb, kf_Seq_S7_Rec)
  Inactive_Rec*index_seq_kb*kf_Seq_S7_Rec;
end

function Function_for_reaction41_2(Trimer_import_to_nuc, cyt, pS2_pS2_S4_c)
  cyt*Trimer_import_to_nuc*pS2_pS2_S4_c;
end

function Function_for_reaction42(Trimer_import_to_nuc, cyt, pS2_pS2_pS2_c)
  cyt*Trimer_import_to_nuc*pS2_pS2_pS2_c;
end

function Function_for_reaction33_2(index_kf_homotrimer, kf_trimmer, pS2_n)
  index_kf_homotrimer*kf_trimmer*pS2_n^3;
end

function Function_for_reaction20(TGFb_R1_endo, index_k_out_1_relative_speed_C5, k_in_R1_C5)
  TGFb_R1_endo*index_k_out_1_relative_speed_C5*k_in_R1_C5;
end
Function_for_reaction20 is "Function for reaction20_7";

function Function_for_reaction39(S2_import_to_nuc_C5, cyt, pS2_c)
  cyt*S2_import_to_nuc_C5*pS2_c;
end
Function_for_reaction39 is "Function for reaction39_8";

function Function_for_reaction48(R2_total_C5, index_k_out_2_relative_speed_C5, k_in_R2_C5, kdeg_R2)
  R2_total_C5*k_in_R2_C5*kdeg_R2^2/(k_in_R2_C5*kdeg_R2 + kdeg_R2^2 + index_k_out_2_relative_speed_C5*k_in_R2_C5*kdeg_R2);
end
Function_for_reaction48 is "Function for reaction48_5";

function Function_for_reaction38(S4_export_from_nuc_C5, S4_n, nuc)
  nuc*S4_n*S4_export_from_nuc_C5;
end
Function_for_reaction38 is "Function for reaction38_8";

function Function_for_reaction44(index_trimer_dephos, k_Dephos_C5, pS2_pS2_S4_n)
  index_trimer_dephos*k_Dephos_C5*pS2_pS2_S4_n;
end
Function_for_reaction44 is "Function for reaction44_8";

function Function_for_reaction35(S2_c, S2_import_to_nuc_C5, cyt)
  cyt*S2_c*S2_import_to_nuc_C5;
end
Function_for_reaction35 is "Function for reaction35_8";

function Function_for_reaction51(K_mran, S7KD, hill_fact1, k_induced_S7_production_C5, mRNA_prod_C5, pS2_pS2_S4_n)
  S7KD*(mRNA_prod_C5 + k_induced_S7_production_C5*pS2_pS2_S4_n^hill_fact1/(K_mran^hill_fact1 + pS2_pS2_S4_n^hill_fact1));
end
Function_for_reaction51 is "Function for reaction51_7";

function Function_for_reaction22(Active_Rec, index_active_Rec_internalize_C5, k_in_R1_C5)
  Active_Rec*index_active_Rec_internalize_C5*k_in_R1_C5;
end
Function_for_reaction22 is "Function for reaction22_7";

function Function_for_reaction47(R1_total_C5, index_k_out_1_relative_speed_C5, k_in_R1_C5, kdeg_R1)
  R1_total_C5*k_in_R1_C5*kdeg_R1^2/(k_in_R1_C5*kdeg_R1 + kdeg_R1^2 + index_k_out_1_relative_speed_C5*k_in_R1_C5*kdeg_R1);
end
Function_for_reaction47 is "Function for reaction47_8";

function Function_for_reaction36(S2_export_from_nuc_C5, S2_n, nuc)
  nuc*S2_n*S2_export_from_nuc_C5;
end
Function_for_reaction36 is "Function for reaction36_8";

function Function_for_reaction52_3(Smad7mRNA1, export_cytoplasm, nuc)
  nuc*Smad7mRNA1*export_cytoplasm;
end

function Function_for_reaction46(S4_export_from_nuc_C5, S4_import_to_nuc_C5, S4_total_C5, kdeg_S4)
  S4_total_C5*(S4_import_to_nuc_C5*kdeg_S4 + S4_export_from_nuc_C5*kdeg_S4 + kdeg_S4^2)/(2*S4_import_to_nuc_C5 + S4_export_from_nuc_C5 + kdeg_S4);
end
Function_for_reaction46 is "Function for reaction46_8";

function Function_for_reaction17(Inactive_Rec, index_induced_R2_deg, kdeg_R2)
  Inactive_Rec*index_induced_R2_deg*kdeg_R2;
end

function Function_for_reaction5(Active_R2, index_kb_R2, kf_R2_activation)
  Active_R2*index_kb_R2*kf_R2_activation;
end

function Function_for_reaction4(Active_R2, index_kb_R2, kf_R2_activation)
  Active_R2*index_kb_R2*kf_R2_activation;
end

function Function_for_reaction3(TGFb, TGFb_R2_surface, kf_R2_activation)
  TGFb*TGFb_R2_surface*kf_R2_activation;
end

function Function_for_reaction34_2(index_kb_homotrimer, kb_trimmer, pS2_pS2_pS2_n)
  index_kb_homotrimer*kb_trimmer*pS2_pS2_pS2_n;
end

function Function_for_reaction2(TGFb, TGFb_R2_surface, kf_R2_activation)
  TGFb*TGFb_R2_surface*kf_R2_activation;
end

function Function_for_reaction8(Active_Rec, index_kb_R1, kf_R1_activation)
  Active_Rec*index_kb_R1*kf_R1_activation;
end

function Function_for_reaction6(Active_R2, index_kb_R2, k_medium, kf_R2_activation)
  Active_R2*index_kb_R2*kf_R2_activation/k_medium;
end

function Function_for_reaction26(Active_Rec_endo, S2_c, k_phosphorylation)
  Active_Rec_endo*S2_c*k_phosphorylation;
end

function Function_for_reaction40(S2_export_from_nuc_C5, nuc, pS2_n)
  nuc*S2_export_from_nuc_C5*pS2_n;
end
Function_for_reaction40 is "Function for reaction40_8";

model Strasen2018___TGF__SMAD_Signalling_Class_5()
  // Strasen2018 - TGFb SMAD Signalling Class 5
  // simulating class 5 signalling
  // unknownQualifier biomodels.db:MODEL1712050011
  // isDescribedBy pubmed:29371237
  // biomodels.db:MODEL1712050011 biomodels.db:BIOMD0000001002
  // occursIn BTO:0001211
  // hasTaxon taxonomy:9606
  // hasProperty GO:0007179 GO:0038105 mamo:MAMO_0000046

  // Compartments:
  compartment cyt = 2;  // ncit:C13226
  compartment nuc = 1;  // ncit:C13197

  // Species:
  species TGFb_R1_surface in cyt = R1_total_C5*kdeg_R1*(kdeg_R1 + index_k_out_1_relative_speed_C5*k_in_R1_C5)/(k_in_R1_C5*kdeg_R1 + kdeg_R1^2 + index_k_out_1_relative_speed_C5*k_in_R1_C5*kdeg_R1); TGFb_R1_surface is "TGFb_TGFR1_surface";  // hasPart uniprot:P01137; hasPart uniprot:P36897; hasProperty ncit:C13376; hasProperty GO:0070021
  species TGFb_R2_surface in cyt = R2_total_C5*kdeg_R2*(kdeg_R2 + index_k_out_2_relative_speed_C5*k_in_R2_C5)/(k_in_R2_C5*kdeg_R2 + kdeg_R2^2 + index_k_out_2_relative_speed_C5*k_in_R2_C5*kdeg_R2); TGFb_R2_surface is "TGFb_TGFR2_surface";  // hasPart uniprot:P01137; hasPart uniprot:P37173; hasProperty ncit:C13376; hasProperty GO:0070021
  species TGFb_R1_endo in cyt = R1_total_C5*k_in_R1_C5*kdeg_R1/(k_in_R1_C5*kdeg_R1 + kdeg_R1^2 + index_k_out_1_relative_speed_C5*k_in_R1_C5*kdeg_R1); TGFb_R1_endo is "TGFb_TGFR1_endo";  // hasPart uniprot:P01137; hasPart uniprot:P36897; hasProperty GO:0070021; hasProperty GO:0016197
  species TGFb_R2_endo in cyt = R2_total_C5*k_in_R2_C5*kdeg_R2/(k_in_R2_C5*kdeg_R2 + kdeg_R2^2 + index_k_out_2_relative_speed_C5*k_in_R2_C5*kdeg_R2); TGFb_R2_endo is "TGFb_TGFR2_endo";  // hasPart uniprot:P37173; hasPart uniprot:P01137; hasProperty GO:0016197; hasProperty GO:0070021
  species TGFb in cyt = 100;  // uniprot:P01137
  species TGFb_In in cyt = 0;  // uniprot:P01137; hasProperty GO:0016197; hasProperty GO:0016197
  species Active_R2 in cyt = 0; Active_R2 is "Active_TGFR2";  // uniprot:P37173; hasProperty ncit:C45329; hasProperty ncit:C45329
  species Active_Rec in cyt = 0; Active_Rec is "Active_TGFb-TGFR1-TGFR2";  // hasPart uniprot:P01137; hasPart uniprot:P37173; hasPart uniprot:P36897; hasProperty ncit:C45329
  species Active_Rec_endo in cyt = 0; Active_Rec_endo is "Active_TGFb-TGFR1-TGFR2_endo";  // hasPart uniprot:P37173; hasPart uniprot:P36897; hasPart uniprot:P01137; hasProperty GO:0016197
  species Inactive_Rec in cyt = 0; Inactive_Rec is "Inactive_TGFb-TGFR1-TGFR2";  // hasPart uniprot:P01137; hasPart uniprot:P36897; hasPart uniprot:P37173; hasProperty ncit:C154407
  species pS2_c in cyt = 0; pS2_c is "pSMAD2_c";  // uniprot:Q15796; hasProperty ncit:C13226; hasProperty PR:000037070; hasProperty ncit:C13226 PR:000037070
  species S2_c in cyt = S2_total_C5*(S2_export_from_nuc_C5 + kdeg_S2)/(2*S2_import_to_nuc_C5 + S2_export_from_nuc_C5 + kdeg_S2); S2_c is "SMAD2_c";  // uniprot:Q15796; hasProperty ncit:C13226; hasProperty ncit:C13226
  species S4_c in cyt = S4_total_C5*(S4_export_from_nuc_C5 + kdeg_S4)/(2*S4_import_to_nuc_C5 + S4_export_from_nuc_C5 + kdeg_S4); S4_c is "SMAD4_c";  // uniprot:Q13485; hasProperty ncit:C13226; hasProperty ncit:C13226
  species pS2_pS2_S4_c in cyt = 0; pS2_pS2_S4_c is "pSMAD2_pSMAD2_SMAD4_c";  // hasPart uniprot:Q13485; hasPart uniprot:Q15796; hasProperty ncit:C13226; hasProperty PR:000037070
  species pS2_pS2_pS2_c in cyt = 0; pS2_pS2_pS2_c is "pSMAD2_trimer_c";  // uniprot:Q15796; hasProperty ncit:C13226; hasProperty PR:000037070; hasProperty GO:0070206
  species Smad7mRNA in cyt = export_cytoplasm*mRNA_prod_C5/(2*kmRNAdeg_S7*(export_cytoplasm + kmRNA1deg_S7)); Smad7mRNA is "SMAD7_mRNA";  // bao:0000274; uniprot:O15105
  species Smad7mRNA1 in nuc = mRNA_prod_C5/(export_cytoplasm + kmRNA1deg_S7); Smad7mRNA1 is "SMAD7_mRNA1";  // uniprot:O15105
  species SMAD7 in cyt = export_cytoplasm*k_S7_protein_C5*mRNA_prod_C5/(2*kdeg_S7*kmRNAdeg_S7*(export_cytoplasm + kmRNA1deg_S7));  // bao:0000274; uniprot:O15105
  species pS2_n in nuc = 0; pS2_n is "pSMAD2_n";  // uniprot:Q15796; hasProperty ncit:C13197; hasProperty PR:000037070; hasProperty ncit:C13197 PR:000037070
  species pS2_pS2_S4_n in nuc = 0; pS2_pS2_S4_n is "pSMAD2_pSMAD2_SMAD4_n";  // hasPart uniprot:Q15796; hasPart uniprot:Q13485; hasProperty PR:000037070; hasProperty ncit:C13197
  species pS2_pS2_pS2_n in nuc = 0; pS2_pS2_pS2_n is "pSMAD2_trimer_n";  // uniprot:Q15796; hasProperty ncit:C13197; hasProperty PR:000037070; hasProperty ncit:C13197 PR:000037070
  species S2_n in nuc = 2*S2_total_C5*S2_import_to_nuc_C5/(2*S2_import_to_nuc_C5 + S2_export_from_nuc_C5 + kdeg_S2); S2_n is "SMAD2_n";  // uniprot:Q15796; hasProperty ncit:C13197; hasProperty ncit:C13197
  species S4_n in nuc = 2*S4_total_C5*S4_import_to_nuc_C5/(2*S4_import_to_nuc_C5 + S4_export_from_nuc_C5 + kdeg_S4); S4_n is "SMAD4_n";  // uniprot:Q13485; hasProperty ncit:C13197; hasProperty ncit:C13197

  // Parameters:
  K_mran = 223.586;
  R1_total_C5 = 69.74586;
  R2_total_C5 = 54.34956;
  S2_export_from_nuc_C5 = 3.736336;
  S2_import_to_nuc_C5 = 0.4763998;
  S2_total_C5 = 437.9985;
  S4_export_from_nuc_C5 = 0.3931255;
  S4_import_to_nuc_C5 = 0.03281804;
  S4_total_C5 = 314.9717;
  S7KD = 1;
  Trimer_import_to_nuc = 0.144035;
  export_cytoplasm = 0.0304373;
  hill_fact1 = 3.986302;
  index_active_Rec_internalize_C5 = 0.6052331;
  index_induced_R2_deg = 1.000378;
  index_induced_ligand_deg = 2.721065;
  index_k_out_1_relative_speed_C5 = 1.133286;
  index_k_out_2_relative_speed_C5 = 0.2894783;
  index_kb_R1 = 1.612905;
  index_kb_R2 = 8.704989;
  index_kb_homotrimer = 0.01639215;
  index_kf_homotrimer = 4.485792;
  index_seq_kb = 0.0008651319;
  index_trimer_dephos = 2.610138;
  k_Dephos_C5 = 0.1953265;
  k_S7_protein_C5 = 0.1091452;
  k_disso_Active_Rec = 0.001039404;
  k_in_R1_C5 = 0.1228227;
  k_in_R2_C5 = 0.6902929;
  k_induced_S7_production_C5 = 2.499991;
  k_medium = 2000000;
  k_phosphorylation = 0.07015602;
  kb_trimmer = 1.607735;
  kdeg_R1 = 0.05865845;
  kdeg_R2 = 0.001000394;
  kdeg_S2 = 0.000514084;
  kdeg_S4 = 0.004802027;
  kdeg_S7 = 0.001024018;
  kf_R1_activation = 4.985485;
  kf_R2_activation = 4.955595;
  kf_Seq_S7_Rec = 0.882455;
  kf_trimmer = 4.814247;
  kin_deg_Ligand = 0.7201822;
  kmRNA1deg_S7 = 0.005231814;
  kmRNAdeg_S7 = 0.09901581;
  kout_deg_Ligand_100pM = 0.00036189622;
  mRNA_prod_C5 = 0.007020844;
  var NUC_CYT_SMAD2; NUC_CYT_SMAD2 is "NUC/CYT SMAD2";

  // Assignment rules:
  NUC_CYT_SMAD2 := (2*pS2_pS2_S4_n + pS2_n + S2_n + 3*pS2_pS2_pS2_n)/(2*pS2_pS2_S4_c + pS2_c + S2_c + 3*pS2_pS2_pS2_c);

  // Reactions:
  reaction1: TGFb => ; cyt*Function_for_reaction1(TGFb, TGFb_R2_surface, k_medium, kf_R2_activation);  // modifiers: TGFb_R2_surface; isVersionOf ncit:C20139
  reaction2: TGFb_R2_surface => ; cyt*Function_for_reaction2(TGFb, TGFb_R2_surface, kf_R2_activation);  // modifiers: TGFb; isVersionOf GO:0001881
  reaction3: => Active_R2; cyt*Function_for_reaction3(TGFb, TGFb_R2_surface, kf_R2_activation);  // modifiers: TGFb, TGFb_R2_surface; isVersionOf ncit:C40702
  reaction4: Active_R2 => ; cyt*Function_for_reaction4(Active_R2, index_kb_R2, kf_R2_activation);  // isVersionOf GO:0032801
  reaction5: => TGFb_R2_surface; cyt*Function_for_reaction5(Active_R2, index_kb_R2, kf_R2_activation);  // modifiers: Active_R2; isVersionOf GO:0034394
  reaction6: => TGFb; cyt*Function_for_reaction6(Active_R2, index_kb_R2, k_medium, kf_R2_activation);  // modifiers: Active_R2
  reaction7: TGFb_R1_surface + Active_R2 => Active_Rec; cyt*kf_R1_activation*TGFb_R1_surface*Active_R2;
  reaction8: Active_Rec => TGFb_R1_surface + Active_R2; cyt*Function_for_reaction8(Active_Rec, index_kb_R1, kf_R1_activation);
  reaction9: Active_Rec_endo => TGFb_R1_endo + TGFb_In; cyt*kdeg_R2*Active_Rec_endo;  // isVersionOf GO:0001881
  reaction10: Active_Rec_endo => TGFb_R2_endo + TGFb_In; cyt*kdeg_R1*Active_Rec_endo;  // isVersionOf GO:0001881
  reaction11: Active_Rec_endo => TGFb_R1_endo + TGFb_R2_endo; cyt*kin_deg_Ligand*Active_Rec_endo;  // isVersionOf GO:0001881
  reaction12: TGFb_R1_endo => ; cyt*kdeg_R1*TGFb_R1_endo;
  reaction13: TGFb_R2_endo => ; cyt*kdeg_R2*TGFb_R2_endo;
  reaction14: Active_Rec + SMAD7 => Inactive_Rec; cyt*kf_Seq_S7_Rec*Active_Rec*SMAD7;
  reaction15: Inactive_Rec => Active_Rec + SMAD7; cyt*Function_for_reaction15(Inactive_Rec, index_seq_kb, kf_Seq_S7_Rec);  // isVersionOf GO:0001881
  reaction16: Inactive_Rec => TGFb_R1_endo + TGFb_R2_endo + SMAD7; cyt*Function_for_reaction16(Inactive_Rec, index_induced_ligand_deg, kin_deg_Ligand);  // isVersionOf GO:0001881
  reaction17: Inactive_Rec => TGFb_R1_endo + TGFb_In + SMAD7; cyt*Function_for_reaction17(Inactive_Rec, index_induced_R2_deg, kdeg_R2);  // isVersionOf GO:0001881
  reaction18: TGFb_R1_surface => TGFb_R1_endo; cyt*k_in_R1_C5*TGFb_R1_surface;  // isVersionOf GO:0048227
  reaction19: TGFb_R2_surface => TGFb_R2_endo; cyt*k_in_R2_C5*TGFb_R2_surface;  // isVersionOf GO:0048227
  reaction20: TGFb_R1_endo => TGFb_R1_surface; cyt*Function_for_reaction20(TGFb_R1_endo, index_k_out_1_relative_speed_C5, k_in_R1_C5);  // isVersionOf GO:1990126
  reaction21: TGFb_R2_endo => TGFb_R2_surface; cyt*Function_for_reaction21(TGFb_R2_endo, index_k_out_2_relative_speed_C5, k_in_R2_C5);  // isVersionOf GO:1990126
  reaction22: Active_Rec => Active_Rec_endo; cyt*Function_for_reaction22(Active_Rec, index_active_Rec_internalize_C5, k_in_R1_C5);  // isVersionOf GO:0048227
  reaction23: Active_Rec_endo => TGFb_R1_endo + TGFb_R2_endo + TGFb_In; cyt*k_disso_Active_Rec*Active_Rec_endo;  // isVersionOf GO:0001881
  reaction24: TGFb_In => ; cyt*kin_deg_Ligand*TGFb_In;
  reaction25: TGFb => ; cyt*kout_deg_Ligand_100pM*TGFb;
  reaction26: S2_c => pS2_c; cyt*Function_for_reaction26(Active_Rec_endo, S2_c, k_phosphorylation);  // modifiers: Active_Rec_endo
  reaction27: 2 pS2_c + S4_c => pS2_pS2_S4_c; cyt*kf_trimmer*pS2_c^2*S4_c;  // isVersionOf GO:0070208
  reaction28: pS2_pS2_S4_c => 2 pS2_c + S4_c; cyt*kb_trimmer*pS2_pS2_S4_c;
  reaction29: 2 pS2_n + S4_n => pS2_pS2_S4_n; nuc*kf_trimmer*pS2_n^2*S4_n;  // isVersionOf GO:0070208
  reaction30: pS2_pS2_S4_n => 2 pS2_n + S4_n; nuc*kb_trimmer*pS2_pS2_S4_n;
  reaction31: 3 pS2_c => pS2_pS2_pS2_c; cyt*Function_for_reaction31_2(index_kf_homotrimer, kf_trimmer, pS2_c);  // isVersionOf GO:0070207
  reaction32: pS2_pS2_pS2_c => 3 pS2_c; cyt*Function_for_reaction32_3(index_kb_homotrimer, kb_trimmer, pS2_pS2_pS2_c);  // isVersionOf GO:0070207
  reaction33: 3 pS2_n => pS2_pS2_pS2_n; nuc*Function_for_reaction33_2(index_kf_homotrimer, kf_trimmer, pS2_n);
  reaction34: pS2_pS2_pS2_n => 3 pS2_n; nuc*Function_for_reaction34_2(index_kb_homotrimer, kb_trimmer, pS2_pS2_pS2_n);
  reaction35: S2_c => S2_n; Function_for_reaction35(S2_c, S2_import_to_nuc_C5, cyt);  // isVersionOf GO:0006606
  reaction36: S2_n => S2_c; Function_for_reaction36(S2_export_from_nuc_C5, S2_n, nuc);  // isVersionOf GO:0006611
  reaction37: S4_c => S4_n; Function_for_reaction37(S4_c, S4_import_to_nuc_C5, cyt);  // isVersionOf GO:0006606
  reaction38: S4_n => S4_c; Function_for_reaction38(S4_export_from_nuc_C5, S4_n, nuc);  // isVersionOf GO:0006611
  reaction39: pS2_c => pS2_n; Function_for_reaction39(S2_import_to_nuc_C5, cyt, pS2_c);  // isVersionOf GO:0006606
  reaction40: pS2_n => pS2_c; Function_for_reaction40(S2_export_from_nuc_C5, nuc, pS2_n);  // isVersionOf GO:0006611
  reaction41: pS2_pS2_S4_c => pS2_pS2_S4_n; Function_for_reaction41_2(Trimer_import_to_nuc, cyt, pS2_pS2_S4_c);  // isVersionOf GO:0006606
  reaction42: pS2_pS2_pS2_c => pS2_pS2_pS2_n; Function_for_reaction42(Trimer_import_to_nuc, cyt, pS2_pS2_pS2_c);  // isVersionOf GO:0006606
  reaction43: pS2_n => S2_n; nuc*k_Dephos_C5*pS2_n;
  reaction44: pS2_pS2_S4_n => pS2_n + S2_n + S4_n; nuc*Function_for_reaction44(index_trimer_dephos, k_Dephos_C5, pS2_pS2_S4_n);
  reaction45: => S2_c; cyt*Function_for_reaction45(S2_export_from_nuc_C5, S2_import_to_nuc_C5, S2_total_C5, kdeg_S2);
  reaction46: => S4_c; cyt*Function_for_reaction46(S4_export_from_nuc_C5, S4_import_to_nuc_C5, S4_total_C5, kdeg_S4);
  reaction47: => TGFb_R1_surface; cyt*Function_for_reaction47(R1_total_C5, index_k_out_1_relative_speed_C5, k_in_R1_C5, kdeg_R1);
  reaction48: => TGFb_R2_surface; cyt*Function_for_reaction48(R2_total_C5, index_k_out_2_relative_speed_C5, k_in_R2_C5, kdeg_R2);
  reaction51: => Smad7mRNA1; nuc*Function_for_reaction51(K_mran, S7KD, hill_fact1, k_induced_S7_production_C5, mRNA_prod_C5, pS2_pS2_S4_n);  // modifiers: pS2_pS2_S4_n; isVersionOf GO:0009299
  reaction52: Smad7mRNA1 => Smad7mRNA; Function_for_reaction52_3(Smad7mRNA1, export_cytoplasm, nuc);  // isVersionOf GO:0006397
  reaction53: => SMAD7; cyt*Function_for_reaction53(Smad7mRNA, k_S7_protein_C5);  // modifiers: Smad7mRNA; isVersionOf GO:0009299
  reaction54: S2_c => ; cyt*kdeg_S2*S2_c;
  reaction55: S2_n => ; nuc*kdeg_S2*S2_n;
  reaction56: pS2_n => ; nuc*kdeg_S2*pS2_n;
  reaction57: pS2_c => ; cyt*kdeg_S2*pS2_c;
  reaction58: S4_c => ; cyt*kdeg_S4*S4_c;
  reaction59: S4_n => ; nuc*kdeg_S4*S4_n;
  reaction60: pS2_pS2_S4_c => pS2_c + S4_c; cyt*kdeg_S2*pS2_pS2_S4_c;
  reaction61: pS2_pS2_S4_c => 2 pS2_c; cyt*kdeg_S4*pS2_pS2_S4_c;
  reaction62: pS2_pS2_pS2_c => 2 pS2_c; cyt*kdeg_S2*pS2_pS2_pS2_c;
  reaction63: pS2_pS2_S4_n => pS2_n + S4_n; nuc*kdeg_S2*pS2_pS2_S4_n;
  reaction64: pS2_pS2_S4_n => 2 pS2_n; nuc*kdeg_S4*pS2_pS2_S4_n;
  reaction65: pS2_pS2_pS2_n => 2 pS2_n; nuc*kdeg_S2*pS2_pS2_pS2_n;
  reaction66: Smad7mRNA1 => ; nuc*kmRNA1deg_S7*Smad7mRNA1;
  reaction67: Smad7mRNA => ; cyt*kmRNAdeg_S7*Smad7mRNA;
  reaction68: SMAD7 => ; cyt*kdeg_S7*SMAD7;

  // Unit definitions:
  unit length = metre;
  unit area = metre^2;
  unit volume = litre;
  unit time = 60 second;
  unit substance = item;
end
