// SBML level 2 version 4
// dcterms:bibliographicCitation: urn:miriam:pubmed:15725723

function Constant_flux__irreversible(v)
  v;
end
Constant_flux__irreversible is "Constant flux (irreversible)";

function F11___translocation1(Vratio, k, S)
  Vratio*k*S;
end
F11___translocation1 is "F11 - translocation1";

function F9__p53_ub_ub_deg(k1, k2, s)
  (k1 + k2)*s;
end
F9__p53_ub_ub_deg is "F9- p53 ub ub deg";

function F7___indirect(k, M)
  k*M;
end
F7___indirect is "F7 - indirect";

function F1___ubiquitination1(k, E, S)
  k*E*S;
end
F1___ubiquitination1 is "F1 - ubiquitination1";

function F2_Damage(k, M)
  k*M;
end
F2_Damage is "F2-Damage";

function F3_Repair(k, p53, S, Jdna)
  k*p53*(S/(Jdna + S));
end
F3_Repair is "F3-Repair";

function F4___mdm2_phos(p53t, Jph, kph, S)
  kph/(Jph + p53t)*S;
end
F4___mdm2_phos is "F4 - mdm2 phos";

function F8_ubiquitination2(k, M, S)
  k*M*S;
end
F8_ubiquitination2 is "F8-ubiquitination2";

function F10___mdm2cyt_synthesis(p1, p2, p53tot, m, Js)
  p1 + p2*p53tot^m/(Js^m + p53tot^m);
end
F10___mdm2cyt_synthesis is "F10 - mdm2cyt synthesis";

function F12__translocation2(Vratio, k, M)
  Vratio*k*M;
end
F12__translocation2 is "F12- translocation2";

model Ciliberto2005___Steady_states_and_oscillations_in_the_p53_Mdm2_network()
  // Ciliberto2005 - Steady states and oscillations in the p53/Mdm2 network
  // Its a mathematial model studying steady state and oscialltions in p53-MDM2 network triggered by IR induced DNA Damage.
  // unknownQualifier mamo:MAMO_0000046
  // isDescribedBy pubmed:15725723
  // biomodels.db:MODEL2104140001 biomodels.db:BIOMD0000001006
  // occursIn BTO:0000414
  // hasTaxon taxonomy:9606
  // hasProperty PW:0000718 GO:0042769 mamo:MAMO_0000046

  // Compartments:
  compartment Cyt = 1;  // GO:0005829
  compartment Nuc = 1;  // GO:0005634

  // Species:
  species DNA_damage in Nuc = 0;  // isVersionOf ncit:C16507
  species $IR in Nuc;  // isVersionOf obi:OBI_0302889
  species p53_total in Nuc = 0.07118;  // isVersionOf uniprot:P04637
  species p53_ub in Nuc = 0.02456;  // isVersionOf uniprot:P04637; hasProperty PR:000037077
  species p53_ub_ub in Nuc = 0.006826;  // isVersionOf uniprot:P04637; hasProperty PR:000037077
  species Mdm2_cyt in Cyt = 0.1161;  // uniprot:Q00987
  species Mdm2_p_cyt in Cyt = 0.01187;  // isVersionOf uniprot:Q00987; hasProperty bao:0002007
  species Mdm2_p_nuc in Nuc = 0.3318;  // isVersionOf uniprot:Q00987; hasProperty bao:0002007
  species $p53 in Nuc;  // uniprot:P04637
  species $MDM2_total in Cyt;  // isVersionOf uniprot:Q00987

  // Parameters:
  Kf = 8.8;
  Kr = 2.5;
  ks53 = 0.055;
  kDNA = 0.18;
  kdDNA = 0.017;
  Jdna = 1;
  vratio = 15;
  kd53 = 0.0055; kd53 is "kd53'";
  ks2 = 0.0015; ks2 is "ks2'";
  ks2_0 = 0.006;
  kd2 = 0.01; kd2 is "kd2'";
  kd2_ = 0.01; kd2_ is "kd2''";
  kph = 0.05;
  kdeph = 6;
  kin = 14;
  kout = 0.5;
  kd53_0 = 8;
  m = 3;
  Js = 1.2;
  Jdam = 0.2;
  Jph = 0.01;
  ampl = 1;
  step = 0;
  t_on = 10;
  t_off = 20;
  var kd2_0;
  Initial_for_vratio = vratio;

  // Assignment rules:
  kd2_0 := kd2 + kd2_*DNA_damage/(Jdam + DNA_damage);
  IR := ampl*step;
  p53 := p53_total - p53_ub - p53_ub_ub;
  MDM2_total := Mdm2_cyt + 1/Initial_for_vratio*Mdm2_p_nuc + Mdm2_p_cyt;

  // Reactions:
  DNA_Damage: => DNA_damage; Nuc*F2_Damage(kDNA, IR);  // modifiers: IR; isVersionOf ncit:C18754
  DNA_Repair: DNA_damage => ; Nuc*F3_Repair(kdDNA, p53_total, DNA_damage, Jdna);  // modifiers: p53_total; isVersionOf NCIT:C16513
  p53_total_production: => p53_total; Nuc*Constant_flux__irreversible(ks53);
  p53_total_degradation: p53_total => ; Nuc*kd53*p53_total;
  p53_ubiquitination_1: => p53_ub; Nuc*F1___ubiquitination1(Kf, Mdm2_p_nuc, p53);  // modifiers: Mdm2_p_nuc, p53
  p53_ubiquitination_2: p53_ub => p53_ub_ub; Nuc*F8_ubiquitination2(Kf, Mdm2_p_nuc, p53_ub);  // modifiers: Mdm2_p_nuc
  p53_ub_degradation: p53_ub => ; Nuc*kd53*p53_ub;
  p53_ub_ub_degradation: p53_ub_ub => ; Nuc*F9__p53_ub_ub_deg(kd53, kd53_0, p53_ub_ub);
  p53_deubiquitination_1: p53_ub => ; Nuc*Kr*p53_ub;  // isInstanceOf GO:0016579
  p53_deubiquitination_2: p53_ub_ub => p53_ub; Nuc*Kr*p53_ub_ub;  // isInstanceOf GO:0016579
  Mdm2_cyt_production: => Mdm2_cyt; F10___mdm2cyt_synthesis(ks2, ks2_0, p53_total, m, Js);  // modifiers: p53_total
  Mdm2_cyt_phosphorylation: Mdm2_cyt => Mdm2_p_cyt; F4___mdm2_phos(p53_total, Jph, kph, Mdm2_cyt);  // modifiers: p53_total
  Mdm2_cyt_degradation: Mdm2_cyt => ; Cyt*kd2*Mdm2_cyt;
  Mdm2_p_cyt_degradation: Mdm2_p_cyt => ; Cyt*kd2*Mdm2_p_cyt;
  Mdm2_p_nuc_translocation_out: Mdm2_p_nuc => ; Nuc*F11___translocation1(vratio, kout, Mdm2_p_nuc);
  Mdm2_p_cyt_dephosphorylation: Mdm2_p_cyt => Mdm2_cyt; Cyt*kdeph*Mdm2_p_cyt;
  Mdm2_p_cyt_translocation_out: Mdm2_p_cyt => ; Cyt*kin*Mdm2_p_cyt;
  Mdm2_p_nuc_degradation: Mdm2_p_nuc => ; Nuc*kd2_0*Mdm2_p_nuc;
  p53_total_degradation_2: p53_total => ; Nuc*F7___indirect(kd53_0, p53_ub_ub);  // modifiers: p53_ub_ub
  Mdm2_p_cyt_translocation_in: => Mdm2_p_cyt; F2_Damage(kout, Mdm2_p_nuc);  // modifiers: Mdm2_p_nuc
  Mdm2_p_nuc_translocation_in: => Mdm2_p_nuc; F12__translocation2(vratio, kin, Mdm2_p_cyt);  // modifiers: Mdm2_p_cyt

  // Events:
  event: at (2) after (time > 10), fromTrigger=false: step = 1;
  event_1: at (time > 20): step = 0;

  // Unit definitions:
  unit length = metre;
  unit area = metre^2;
  unit volume = litre;
  unit time = second;
  unit substance = mole;
end
