// SBML level 2 version 4
// dcterms:bibliographicCitation: urn:miriam:pubmed:17245126

function MAX(a, b)
  piecewise(a, a >= b, b);
end

function p53_production_0(Ks53, MDM2cyt, n, Js53, Ks54)
  Ks53 + Ks54*(MDM2cyt^n/(Js53^n + MDM2cyt^n));
end

function mdm2_production(ks2, p53, m, Js2, ks21)
  ks2 + ks21*(p53^m/(Js2^m + p53^m));
end

model Zhang2007___Mechanism_of_DNA_damage_response__Model1()
  // Zhang2007 - Mechanism of DNA damage response (Model1)
  // Its a mechanistic model explaining the impact of p53 om apoptosis decision. This model represents schema 1 of manuscript.
  // unknownQualifier mamo:MAMO_0000046
  // isDescribedBy pubmed:17245126
  // biomodels.db:MODEL2105260001 biomodels.db:BIOMD0000001007
  // hasTaxon taxonomy:9606
  // hasProperty PW:0000718 PW:0001360 mamo:MAMO_0000046

  // Compartments:
  compartment cyt = 1;  // GO:0005829
  compartment nuc = 1;  // GO:0005634

  // Species:
  species p53 in nuc = 0.186;  // uniprot:P04637
  species MDM2cyt in cyt = 0.158;  // uniprot:Q00987
  species MDM2nuc in nuc = 0.647;  // uniprot:Q00987
  species $DNAdamage in nuc;  // ncit:C16507

  // Parameters:
  ks53 = 0.6; ks53 is "ks53'";
  Js53 = 0.45;
  kd53 = 0.27; kd53 is "kd53'";
  n = 4;
  kin = 0.41;
  kout = 0.05;
  kd2 = 0.05; kd2 is "kd2'";
  var kd2_0;
  ks2 = 0.15; ks2 is "ks2'";
  Js2 = 0.92;
  m = 4;
  var kd53_0;
  Q = 0.83;
  J1 = 0.1;
  J2 = 0.1;
  krepair = 0.08;
  var G_u_v_q_r; G_u_v_q_r is "G(u,v,q,r)";
  ks53_ = 2.56; ks53_ is "ks53''";
  kd53_ = 8.25; kd53_ is "kd53''";
  ks2_ = 4.23; ks2_ is "ks2''";
  kd2_ = 0.79; kd2_ is "kd2''";
  dd = 2;
  Tdam = 50;
  Dam0 = 2;
  var heav_x; heav_x is "heav(x)";
  Initial_for_Tdam = Tdam;

  // Assignment rules:
  u := MDM2nuc;
  r := J2/p53;
  v := Q;
  q := J1/p53;
  G_u_v_q_r := 2*u*r/(v - u + v*q + u*r + ((v - u + v*q + u*r)^2 - 4*u*r*(v - u))^0.5);
  kd53_0 := kd53 + kd53_*G_u_v_q_r;
  xyz := MAX(0, Dam0 - krepair*(time - Tdam));
  x := time - Initial_for_Tdam;
  heav_x := piecewise(0, x < 0, piecewise(1, x > 0, 0));
  DNAdamage := heav_x*xyz;
  kd2_0 := kd2*(1 + DNAdamage);

  // Reactions:
  p53_production: => p53; p53_production_0(ks53, MDM2cyt, n, Js53, ks53_);  // modifiers: MDM2cyt
  p53_degradation: p53 => ; nuc*kd53_0*p53;
  MDM2cyt_production: => MDM2cyt; mdm2_production(ks2, p53, m, Js2, ks2_);  // modifiers: p53
  MDM2cyt_translocation: MDM2cyt -> MDM2nuc; kin*MDM2cyt - kout*MDM2nuc;
  MDM2cyt_degradation: MDM2cyt => ; cyt*kd2_*MDM2cyt;
  MDM2nuc_degradation: MDM2nuc => ; nuc*kd2_0*MDM2nuc;

  // Unit definitions:
  unit length = metre;
  unit area = metre^2;
  unit volume = litre;
  unit time = second;
  unit substance = mole;
end
