// SBML level 2 version 4
// dcterms:bibliographicCitation: urn:miriam:pubmed:17245126

function MAX(a, b)
  piecewise(a, a >= b, b);
end

function mdm2_production(ks2, p53, m, Js2, ks21)
  ks2 + ks21*(p53^m/(Js2^m + p53^m));
end

function Constant_flux__irreversible(v)
  v;
end
Constant_flux__irreversible is "Constant flux (irreversible)";

model Zhang2007___Mechanism_of_DNA_damage_response__Model2()
  // Zhang2007 - Mechanism of DNA damage response (Model2)
  // Its a mechanistic model explaining the impact of p53 on apoptosis decision. This model represents schema 2 of manuscript.
  // unknownQualifier mamo:MAMO_0000046
  // isDescribedBy pubmed:17245126
  // biomodels.db:MODEL2106230001 biomodels.db:BIOMD0000001009
  // hasTaxon taxonomy:9606
  // hasProperty PW:0000718 PW:0001360 mamo:MAMO_0000046

  // Compartments:
  compartment cyt = 1;  // GO:0005829
  compartment nuc = 1;  // GO:0005634

  // Species:
  species $p53_total in nuc;  // isVersionOf uniprot:P04637
  species MDM2cyt in cyt = 0.21;  // uniprot:Q00987
  species MDM2nuc in nuc = 0.55;  // uniprot:Q00987
  species $DNAdamage in nuc;  // ncit:C16507
  species p53_inact in nuc = 0.19;  // uniprot:P04637; hasProperty ncit:C118254
  species p53_act in nuc = 0.01;  // uniprot:P04637; hasProperty ncit:C45329

  // Parameters:
  kd53 = 0.3; kd53 is "kd53'";
  kin = 0.4;
  kout = 0.05;
  kd2 = 0.1; kd2 is "kd2'";
  var kd2_0;
  ks2 = 0.182; ks2 is "ks2'";
  Js2 = 0.7;
  m = 3;
  var kd53_0;
  Q = 0.8;
  J1 = 0.1;
  J2 = 0.1;
  krepair = 0.05;
  var G_u_v_q_r; G_u_v_q_r is "G(u,v,q,r)";
  kd53_ = 8; kd53_ is "kd53''";
  ks2_ = 3; ks2_ is "ks2''";
  kd2_ = 0.7; kd2_ is "kd2''";
  ks53 = 0.6;
  k_inact = 0.1;
  k_act_ = 5; k_act_ is "k_act''";
  J_act = 0.2;
  k_act_0 = 0.2; k_act_0 is "k_act'";
  Dam0 = 0.8;
  Tdam = 50;
  var heav_x; heav_x is "heav(x)";
  ModelValue_28_0 = Tdam; ModelValue_28_0 is "Initial for Tdam";

  // Assignment rules:
  p53_total := p53_inact + p53_act;
  u := MDM2nuc;
  r := J2/p53_total;
  v := Q;
  q := J1/p53_total;
  G_u_v_q_r := 2*u*r/(v - u + v*q + u*r + ((v - u + v*q + u*r)^2 - 4*u*r*(v - u))^0.5);
  kd53_0 := kd53 + kd53_*G_u_v_q_r;
  k_act := k_act_0 + k_act_*p53_act^3/(J_act^3 + p53_act^3);
  x := time - ModelValue_28_0;
  max := MAX(0, Dam0 - krepair*(time - Tdam));
  heav_x := piecewise(0, x < 0, piecewise(1, x > 0, 0));
  DNAdamage := heav_x*max;
  kd2_0 := kd2*(1 + DNAdamage);

  // Reactions:
  MDM2cyt_production: => MDM2cyt; mdm2_production(ks2, p53_act, m, Js2, ks2_);  // modifiers: p53_act
  MDM2cyt_translocation: MDM2cyt -> MDM2nuc; kin*MDM2cyt - kout*MDM2nuc;
  MDM2cyt_degradation: MDM2cyt => ; cyt*kd2_*MDM2cyt;
  MDM2nuc_degradation: MDM2nuc => ; nuc*kd2_0*MDM2nuc;
  p53_inact_production: => p53_inact; nuc*Constant_flux__irreversible(ks53);
  p53_activation: p53_inact -> p53_act; nuc*(k_act*p53_inact - k_inact*p53_act);
  p53_inact_degradation: p53_inact => ; nuc*kd53_0*p53_inact;
  p53_act_degradation: p53_act => ; nuc*kd53_0*p53_act;

  // Unit definitions:
  unit substance = mole;
  unit length = metre;
  unit area = metre^2;
  unit volume = litre;
  unit time = second;
end
