// SBML level 3 version 1
// dcterms:bibliographicCitation: urn:miriam:pubmed:17245126

function MAX(a, b)
  piecewise(a, a >= b, b);
end

function Constant_flux__irreversible(v)
  v;
end
Constant_flux__irreversible is "Constant flux (irreversible)";

function mdm2_production(ks2, p53, m, Js2, ks2_1, mdm2, ks2_2)
  ks2 + ks2_1*p53 + ks2_2*mdm2^m/(Js2^m + mdm2^m);
end

model Zhang2007___Mechanism_of_DNA_damage_response__Model3()
  // Zhang2007 - Mechanism of DNA damage response (Model3)
  // It's a mechanistic model explaining the impact of p53 on apoptosis decision. This model represents schema 3 of manuscript.
  // unknownQualifier mamo:MAMO_0000046
  // isDescribedBy pubmed:17245126
  // biomodels.db:MODEL2106230002 biomodels.db:BIOMD0000001010
  // hasTaxon taxonomy:9606
  // hasProperty PW:0000718 PW:0001360 mamo:MAMO_0000046
  // model units - substance: substance, time: time, volume: volume, area: area, length: length, extent: substance

  // Compartments:
  compartment cyt = 1 volume;  // GO:0005829
  compartment nuc = 1 volume;  // GO:0005634

  // Species:
  species p53 in nuc = 0.36;  // uniprot:P04637
  species $DNAdamage in nuc;  // ncit:C16507
  species MDM2 in cyt = 0.71;  // uniprot:Q00987

  // Parameters:
  kd53 = 0.005; kd53 is "kd53'";
  kd2 = 1.4; kd2 is "kd2'";
  var kd2_0;
  ks2 = 0.01; ks2 is "ks2'";
  Js2 = 0.5;
  m = 4;
  var kd53_0;
  Q = 0.5;
  J1 = 0.1;
  J2 = 0.1;
  krepair = 0.0021429;
  var G_u_v_q_r; G_u_v_q_r is "G(u,v,q,r)";
  kd53_ = 0.1; kd53_ is "kd53''";
  ks2_ = 0.5; ks2_ is "ks2''";
  ks53 = 0.0276;
  ks2__ = 1; ks2__ is "ks2'''";
  Tdam = 50;
  Dam0 = 0.07;
  var heav_x; heav_x is "heav(x)";
  Initial_for_Tdam = Tdam;

  // Assignment rules:
  u := MDM2;
  r := J2/p53;
  v := Q;
  q := J1/p53;
  G_u_v_q_r := 2*u*r/(v - u + v*q + u*r + ((v - u + v*q + u*r)^2 - 4*u*r*(v - u))^0.5);
  kd53_0 := kd53 + kd53_*G_u_v_q_r;
  x := time - Initial_for_Tdam;
  heav_x := piecewise(0, x < 0, piecewise(1, x > 0, 0));
  max := MAX(0, Dam0 - krepair*(time - Tdam));
  DNAdamage := heav_x*max;
  kd2_0 := kd2*(1 + DNAdamage);

  // Reactions:
  MDM2_production: => MDM2; mdm2_production(ks2, p53, m, Js2, ks2_, MDM2, ks2__);  // modifiers: p53
  MDM2_degradation: MDM2 => ; cyt*kd2_0*MDM2;
  p53_production: => p53; nuc*Constant_flux__irreversible(ks53);
  p53_degradation: p53 => ; nuc*kd53_0*p53;

  // Unit definitions:
  unit length = metre;
  unit area = metre^2;
  unit volume = litre;
  unit time = second;
  unit substance = mole;
end
