// SBML level 2 version 4
// dcterms:bibliographicCitation: urn:miriam:pubmed:33572301

function Rate_Law_for_tumour_growth(rho_T, T)
  rho_T*T;
end

function Rate_Law_for_tumour_death(alpha_2, C, T)
  alpha_2*C*T;
end

function Rate_Law_for_CAR_T_cell_proliferation(rho_C, C, T, g_T)
  rho_C*C*T/(g_T + T);
end
Rate_Law_for_CAR_T_cell_proliferation is "Rate Law for CAR_T-cell_proliferation";

function Rate_Law_for_CAR_T_cell_depletion(alpha_1, C, T, g_C, tao_C)
  alpha_1*C*T/(g_C + C) + 1/tao_C*C;
end
Rate_Law_for_CAR_T_cell_depletion is "Rate Law for CAR_T-cell_depletion";

model Leon_Triana2021___Competition_between_tumour_cells_and_single_target_CAR_T_cells()
  // Leon-Triana2021 - Competition between tumour cells and single-target CAR T-cells
  // This model of the use of chimeric antigen receptor (CAR)-T cell therapy in the treatment of solid tumours is described in the article:
  // "Dual-Target CAR-Ts with On- and Off-Tumour Activity May Override Immune Suppression in Solid Cancers: A Mathematical Proof of Concept"
  // Odelaisy León-Triana, Antonio Pérez-Martínez, Manuel Ramírez-Orellana and Víctor M. Pérez-García
  // Cancers 2021, 13, 703.; doi: 10.3390/cancers13040703
  // This is the first mathematical model, derived from equations 1 and 2, used in the paper.
  // Reproduction of Fig. 5a was achieved by setting alpha_1 = 0.04, different to the value quoted in the article caption for Fig. 5.
  // Abstract:
  // Chimeric antigen receptor (CAR)-T cell-based therapies have achieved substantial success against B-cell malignancies, which has led to a growing scientific and clinical interest in extending their
  // use to solid cancers. However, results for solid tumours have been limited up to now, in part due to the immunosuppressive tumour microenvironment, which is able to inactivate CAR-T cell clones. In
  // this paper we put forward a mathematical model describing the competition of CAR-T and tumour cells, taking into account their immunosuppressive capacity. Using the mathematical model, we show that
  // the use of large numbers of CAR-T cells targetting the solid tumour antigens could overcome the immunosuppressive potential of cancer. To achieve such high levels of CAR-T cells we propose, and study
  // computationally, the manufacture and injection of CAR-T cells targetting two antigens: CD19 and a tumour-associated antigen. We study in silico the resulting dynamics of the disease after the
  // injection of this product and find that the expansion of the CAR-T cell population in the blood and lymphopoietic organs could lead to the massive production of an army of CAR-T cells targetting the
  // solid tumour, and potentially overcoming its immune suppression capabilities. This strategy could benefit from the combination with PD-1 inhibitors and low tumour loads. Our computational results
  // provide theoretical support for the treatment of different types of solid tumours using T cells engineered with combination treatments of dual CARs with on- and off-tumour activity and anti-PD-1
  // drugs after completion of classical cytoreductive treatments.
  // biomodels.db:MODEL2107120003 biomodels.db:BIOMD0000001013
  // occursIn ncit:C94498
  // hasTaxon taxonomy:9606
  // isDescribedBy pubmed:33572301
  // hasProperty DOID:162 ncit:C15438 GO:0002837 ncit:C126102 mamo:MAMO_0000046

  // Compartments:
  compartment Solid_tumour = 1;  // isVersionOf ncit:C9292; hasProperty ncit:C94498

  // Species:
  species CAR_T_cells in Solid_tumour = 400000000; CAR_T_cells is "CAR_T-cells";  // isVersionOf CL:0000084; isVersionOf ncit:C137999
  species Tumour_cells in Solid_tumour = 6.7e9;  // isVersionOf CL:0001063; isVersionOf BTO:0006256; hasProperty CHEBI:144829

  // Parameters:
  rho_C = 0.9 unit_0;
  g_T = 1e10 unit_1;
  alpha_1 = 0.04 unit_0;
  g_C = 2000000000 unit_1;
  tao_C = 7 unit_2;
  rho_T = 0.02 unit_0;
  alpha_2 = 2.5e-10 unit_3;

  // Reactions:
  CAR_T_cell_proliferation: => CAR_T_cells; Solid_tumour*Rate_Law_for_CAR_T_cell_proliferation(rho_C, CAR_T_cells, Tumour_cells, g_T); CAR_T_cell_proliferation is "CAR_T-cell_proliferation";  // modifiers: Tumour_cells; isVersionOf GO:0042098
  CAR_T_cell_depletion: CAR_T_cells => ; Solid_tumour*Rate_Law_for_CAR_T_cell_depletion(alpha_1, CAR_T_cells, Tumour_cells, g_C, tao_C); CAR_T_cell_depletion is "CAR_T-cell_depletion";  // modifiers: Tumour_cells; isVersionOf GO:0008219; isVersionOf ncit:C175900
  tumour_growth: => Tumour_cells; Solid_tumour*Rate_Law_for_tumour_growth(rho_T, Tumour_cells);  // isVersionOf ncit:C28378; isVersionOf GO:0040007
  tumour_death: Tumour_cells => ; Solid_tumour*Rate_Law_for_tumour_death(alpha_2, CAR_T_cells, Tumour_cells);  // modifiers: CAR_T_cells; isVersionOf GO:0008219

  // Unit definitions:
  unit length = metre;
  unit area = metre^2;
  unit volume = litre;
  unit time = 86400 second;
  unit substance = item;
  unit unit_0 = 1 / (86400 second); unit_0 is "1/d";
  unit unit_1 = item; unit_1 is "#";
  unit unit_2 = 86400 second; unit_2 is "d";
  unit unit_3 = 1 / (86400 second); unit_3 is "1/(d)";
end
