// SBML level 2 version 4
// dcterms:bibliographicCitation: urn:miriam:pubmed:33572301

function Rate_Law_for_tumour_growth(rho_T, T)
  rho_T*T;
end

function Rate_Law_for_tumour_death(alpha_2, C, T)
  alpha_2*C*T;
end

function Rate_Law_for_B_cell_induced_CAR_T_cell_proliferation(rho_C_bar, C_bar, B, g_B)
  rho_C_bar*C_bar*B/(g_B + B);
end
Rate_Law_for_B_cell_induced_CAR_T_cell_proliferation is "Rate Law for B-cell_induced_CAR_T-cell_proliferation";

function Rate_Law_for_B_cell_induced_CAR_T_cell_depletion(tao_C, C_bar, k)
  1/tao_C*C_bar + k*C_bar;
end
Rate_Law_for_B_cell_induced_CAR_T_cell_depletion is "Rate Law for B-cell_induced_CAR_T-cell_depletion";

function Rate_Law_for_CAR_T_cell_induced_B_cell_death(alpha_B, B, C_bar, tao_B)
  alpha_B*B*C_bar + 1/tao_B*B;
end
Rate_Law_for_CAR_T_cell_induced_B_cell_death is "Rate Law for CAR_T-cell_induced_B-cell_death";

function Rate_Law_for_CAR_T_cell_depletion(alpha_1, C, T, g_C, tao_C)
  alpha_1*C*T/(g_C + C) + 1/tao_C*C;
end
Rate_Law_for_CAR_T_cell_depletion is "Rate Law for CAR_T-cell_depletion";

function Rate_Law_for_CAR_T_cell_proliferation(rho_C, C, T, g_T, k, C_bar)
  k*C_bar + rho_C*C*T/(g_T + T);
end
Rate_Law_for_CAR_T_cell_proliferation is "Rate Law for CAR_T-cell_proliferation";

model Leon_Triana2021___Competition_between_tumour_cells_and_dual_target_CAR_T_cells()
  // Leon-Triana2021 - Competition between tumour cells and dual-target CAR T-cells
  // This model of the use of chimeric antigen receptor (CAR)-T cell therapy in the treatment of solid tumours is described in the article:
  // "Dual-Target CAR-Ts with On- and Off-Tumour Activity May Override Immune Suppression in Solid Cancers: A Mathematical Proof of Concept"
  // Odelaisy León-Triana, Antonio Pérez-Martínez, Manuel Ramírez-Orellana and Víctor M. Pérez-García
  // Cancers 2021, 13, 703.; doi: 10.3390/cancers13040703
  // This is the second mathematical model, derived from equations 3 to 6, used in the paper.
  // Reproduction of Figure 5b was achieved by setting alpha_1 = 0.183, in substitution for alpha_1 = 0.2 as quoted in the article.
  // Abstract:
  // Chimeric antigen receptor (CAR)-T cell-based therapies have achieved substantial success against B-cell malignancies, which has led to a growing scientific and clinical interest in extending their
  // use to solid cancers. However, results for solid tumours have been limited up to now, in part due to the immunosuppressive tumour microenvironment, which is able to inactivate CAR-T cell clones. In
  // this paper we put forward a mathematical model describing the competition of CAR-T and tumour cells, taking into account their immunosuppressive capacity. Using the mathematical model, we show that
  // the use of large numbers of CAR-T cells targetting the solid tumour antigens could overcome the immunosuppressive potential of cancer. To achieve such high levels of CAR-T cells we propose, and study
  // computationally, the manufacture and injection of CAR-T cells targetting two antigens: CD19 and a tumour-associated antigen. We study in silico the resulting dynamics of the disease after the
  // injection of this product and find that the expansion of the CAR-T cell population in the blood and lymphopoietic organs could lead to the massive production of an army of CAR-T cells targetting the
  // solid tumour, and potentially overcoming its immune suppression capabilities. This strategy could benefit from the combination with PD-1 inhibitors and low tumour loads. Our computational results
  // provide theoretical support for the treatment of different types of solid tumours using T cells engineered with combination treatments of dual CARs with on- and off-tumour activity and anti-PD-1
  // drugs after completion of classical cytoreductive treatments.
  // biomodels.db:MODEL2107120004 biomodels.db:BIOMD0000001014
  // occursIn ncit:C94498
  // hasTaxon taxonomy:9606
  // isDescribedBy pubmed:33572301
  // hasProperty ncit:C126102 GO:0002837 ncit:C15438 DOID:3068 mamo:MAMO_0000046

  // Compartments:
  compartment On_tumour = 1;  // isVersionOf ncit:C3058; isVersionOf ncit:C9292; hasProperty ncit:C94498
  compartment Off_tumour = 1;  // BTO:0000553; BTO:0000141

  // Species:
  species CAR_T_cells_on_tumour in On_tumour = 0; CAR_T_cells_on_tumour is "CAR_T-cells_on-tumour";  // isVersionOf ncit:C137999; isVersionOf CL:0000084
  species Tumour_cells in On_tumour = 3.35e10;  // isVersionOf BTO:0000527; isVersionOf CL:0001063; hasProperty CHEBI:144829; hasProperty ncit:C134496
  species CAR_T_cells_off_tumour in Off_tumour = 200000000; CAR_T_cells_off_tumour is "CAR_T-cells_off-tumour";  // isVersionOf ncit:C137999; isVersionOf CL:0000084
  species B_cells in Off_tumour = 2.5e10;  // isVersionOf CL:0000236; hasProperty PR:000001002
  species $CAR_T_cells_total in On_tumour; CAR_T_cells_total is "CAR_T-cells_total";  // isVersionOf ncit:C137999; isVersionOf CL:0000084

  // Parameters:
  rho_C = 0.9 unit_0;
  g_T = 1e10 unit_1;
  alpha_1 = 0.02 unit_0;
  g_C = 2000000000 unit_1;
  tao_C = 7 unit_2;
  rho_T = 0.02 unit_0;
  alpha_2 = 2.5e-10 unit_3;
  rho_C_bar = 0.9 unit_0;
  g_B = 1e10 unit_1;
  k = 0.2;
  alpha_B = 4.5e-11 unit_3;
  tao_B = 60 unit_2;

  // Assignment rules:
  CAR_T_cells_total := CAR_T_cells_on_tumour + CAR_T_cells_off_tumour;

  // Reactions:
  CAR_T_cell_proliferation: => CAR_T_cells_on_tumour; Rate_Law_for_CAR_T_cell_proliferation(rho_C, CAR_T_cells_on_tumour, Tumour_cells, g_T, k, CAR_T_cells_off_tumour); CAR_T_cell_proliferation is "CAR_T-cell_proliferation";  // modifiers: Tumour_cells, CAR_T_cells_off_tumour; isVersionOf GO:0042098
  CAR_T_cell_depletion: CAR_T_cells_on_tumour => ; On_tumour*Rate_Law_for_CAR_T_cell_depletion(alpha_1, CAR_T_cells_on_tumour, Tumour_cells, g_C, tao_C); CAR_T_cell_depletion is "CAR_T-cell_depletion";  // modifiers: Tumour_cells; isVersionOf ncit:C175900; isVersionOf GO:0008219
  tumour_growth: => Tumour_cells; On_tumour*Rate_Law_for_tumour_growth(rho_T, Tumour_cells);  // isVersionOf GO:0040007; isVersionOf ncit:C28378
  tumour_death: Tumour_cells => ; On_tumour*Rate_Law_for_tumour_death(alpha_2, CAR_T_cells_on_tumour, Tumour_cells);  // modifiers: CAR_T_cells_on_tumour; isVersionOf GO:0008219
  B_cell_induced_CAR_T_cell_proliferation: => CAR_T_cells_off_tumour; Off_tumour*Rate_Law_for_B_cell_induced_CAR_T_cell_proliferation(rho_C_bar, CAR_T_cells_off_tumour, B_cells, g_B); B_cell_induced_CAR_T_cell_proliferation is "B-cell_induced_CAR_T-cell_proliferation";  // modifiers: B_cells; isVersionOf GO:0042098
  CAR_T_cell_off_tumour_depletion: CAR_T_cells_off_tumour => ; Off_tumour*Rate_Law_for_B_cell_induced_CAR_T_cell_depletion(tao_C, CAR_T_cells_off_tumour, k); CAR_T_cell_off_tumour_depletion is "CAR_T-cell_off_tumour_depletion";  // isVersionOf efo:0009832; isVersionOf GO:0008219
  CAR_T_cell_induced_B_cell_death: B_cells => ; Off_tumour*Rate_Law_for_CAR_T_cell_induced_B_cell_death(alpha_B, B_cells, CAR_T_cells_off_tumour, tao_B); CAR_T_cell_induced_B_cell_death is "CAR_T-cell_induced_B-cell_death";  // modifiers: CAR_T_cells_off_tumour; isVersionOf GO:0008219

  // Unit definitions:
  unit length = metre;
  unit area = metre^2;
  unit volume = litre;
  unit time = 86400 second;
  unit substance = item;
  unit unit_0 = 1 / (86400 second); unit_0 is "1/d";
  unit unit_1 = item; unit_1 is "#";
  unit unit_2 = 86400 second; unit_2 is "d";
  unit unit_3 = 1 / (86400 second); unit_3 is "1/(d)";
end
