// SBML level 3 version 1
// dcterms:bibliographicCitation: urn:miriam:pubmed:25013809

function Rate_Law_for_reaction_4(bm, k3, D, M)
  bm + k3*D*M;
end

function Rate_Law_for_reaction(bH, k1, D, M)
  bH + k1*D*M;
end

function Rate_Law_for_reaction_6(k5, C, N, alpha)
  k5*C*N + alpha*N;
end

model Jarrah2014___mathematical_model_of_the_immune_response_in_muscle_degeneration_and_subsequent_regeneration_in_Duchenne_muscular_dystrophy_in_mdx_mice()
  // Jarrah2014 - mathematical model of the immune response in muscle degeneration and subsequent regeneration in Duchenne muscular dystrophy in mdx mice
  // Duchenne muscular dystrophy (DMD) is a genetic disease that results in the death of affected boys by early adulthood.The genetic defect responsible for DMD has been known for over 25 years, yet at present there is neither cure nor effective treatment for DMD. During early disease onset, the mdx mouse has been validated as an animal model for DMD and use of this model has led to valuable but incomplete insights into the disease process. For example, immune cells are thought to be responsible for a significant portion of muscle cell death in the mdx mouse; however, the role and time course of the immune response in the dystrophic process have not been well described. In this paper we constructed a simple mathematical model to investigate the role of the immune response in muscle degeneration and subsequent regeneration in the mdx mouse model of Duchenne muscular dystrophy. Our model suggests that the immune response contributes substantially to the muscle degeneration and regeneration processes. Furthermore, the analysis of the model predicts that the immune system response oscillates throughout the life of the mice, and the damaged fibers are never completely cleared.
  // isDescribedBy pubmed:25013809
  // biomodels.db:MODEL2107200002 biomodels.db:BIOMD0000001015
  // hasVersion omit:0018341
  // mamo:MAMO_0000046
  // ncit:C17930
  // occursIn ncit:C33558
  // model units - substance: substance, time: time, volume: volume, area: area, length: length, extent: substance

  // Compartments:
  compartment compartment = 1 volume; compartment is "Skeletal_muscle";  // ncit:C13050

  // Species:
  species H in compartment = 0; H is "CD4+_T_Helper_cells_(H)";  // CL:0000492
  species D in compartment = 0; D is "Damaged_fibres_(D)";  // BTO:0000888; hasProperty ncit:C61555
  species M in compartment = 400; M is "Macrophages_(M)";  // omit:0009339
  species C in compartment = 4; C is "CD8+_cytotoxic_T_lymphocytes_(C)";  // CL:0000794
  species N in compartment = 100; N is "Normal_fibres_(N)";  // BTO:0000888
  species R in compartment = 0; R is "Regenerative_fibres_(R)";  // BTO:0000888; hasProperty ncit:C17083

  // Parameters:
  k1 = 0.0341;
  k2 = 0.115375;
  k3 = 0.766576;
  k4 = 0.123848;
  k5 = 0.00409948;
  k6 = 0.000323097;
  dH = 1;
  dC = 1.61511;
  dM = 0.781155;
  dD = 1.34671;
  H0 = 0;
  C0 = 4;
  M0 = 400;
  sigma = 2.2;
  m = 4.22686;
  h = 0.511657;

  // Assignment rules:
  bC := dC*C0;
  bH := dH*H0;
  bM := dM*M0;
  alpha := h/((time + 1e-11)*sigma*(2*pi)^0.5)*exp(-(ln(time + 1e-11) - m)^2/(2*sigma^2));

  // Reactions:
  reaction: => H; compartment*Rate_Law_for_reaction(bH, k1, D, M); reaction is "T_helper_cells_creation";  // modifiers: D, M; CL:0000492; hasProperty ncit:C42620
  T_helper_cells_degradation: H => ; compartment*dH*H;  // CL:0000492; hasProperty ncit:C61559
  T_lymphocytes_creation: => C; compartment*Rate_Law_for_reaction(bC, k2, D, H);  // modifiers: D, H; CL:0000794; hasProperty ncit:C42620
  T_lymphocytes_degradation: C => ; compartment*dC*C;  // CL:0000794; hasProperty ncit:C61559
  Macrophage_creation: => M; compartment*Rate_Law_for_reaction_4(bM, k3, D, M);  // modifiers: D; omit:0009339; hasProperty ncit:C42620
  Macrophage_degradation: M => ; compartment*dM*M;  // omit:0009339; hasProperty ncit:C61559
  Fibre_damage: N => D; compartment*Rate_Law_for_reaction_6(k5, C, N, alpha);  // modifiers: C; BTO:0000888; hasProperty ncit:C61555
  Fibre_regeneration: D => R; compartment*Rate_Law_for_reaction_6(k6, M, D, dD);  // modifiers: M; BTO:0000888; hasProperty ncit:C17083
  Fibre_normalisation: R => N; compartment*k4*R;  // BTO:0000888

  // Unit definitions:
  unit length = metre;
  unit area = metre^2;
  unit volume = litre;
  unit time = 604800 second;
  unit substance = mole;
end
