// SBML level 2 version 4
// dcterms:bibliographicCitation: urn:miriam:pubmed:32062771

function Constant_flux__irreversible(v)
  v;
end
Constant_flux__irreversible is "Constant flux (irreversible)";

function Rate_Law_for_C3_hydrolysis(k1, C3, k2, C3bBb, k3)
  k1*C3 + k2*C3bBb*C3/(k3 + C3);
end

function Rate_Law_for_C3_convertase_formation(k7, FD, C3bB_open, k8)
  k7*FD*C3bB_open/(k8 + C3bB_open);
end

model Bakshi2020___Truncated_minimal_model_of_alternative_pathway_of_complement_system()
  // Bakshi2020 - Truncated minimal model of alternative pathway of complement system
  // This model is based on the publication:
  // "Mathematical Modelling of Alternative Pathway of Complement System".
  // Suruchi Bakshi, Fraser Cunningham, Eva-Maria Nichols, Marta Biedzka-Sarek, Jessica Neisen, Sebastien Petit-Frere, Christina Bessant, Loveleena Bansal, Lambertus A Peletier, Stefano Zamuner, Piet H
  // van der Graaf
  // DOI: 10.1007/s11538-020-00708-z
  // This model is based on the truncated minimal model equations (Eq. B.1) from the manuscript, which simulate depletion of factor H.
  // Abstract:
  // The complement system (CS) is an integral part of innate immunity and can be activated via three different pathways. The alternative pathway (AP) has a central role in the function of the CS. The AP
  // of complement system is implicated in several human disease pathologies. In the absence of triggers, the AP exists in a time-invariant resting state (physiological steady state). It is capable of
  // rapid, potent and transient activation response upon challenge with a trigger. Previous models of AP have focused on the activation response. In order to understand the molecular machinery necessary
  // for AP activation and regulation of a physiological steady state, we built parsimonious AP models using experimentally supported kinetic parameters. The models further allowed us to test quantitative
  // roles played by negative and positive regulators of the pathway in order to test hypotheses regarding their mechanisms of action, thus providing more insight into the complex regulation of AP.
  // biomodels.db:MODEL2107190002 biomodels.db:BIOMD0000001016
  // occursIn BTO:0000131
  // isPropertyOf DOID:626
  // isPropertyOf PW:0000505
  // isPropertyOf GO:0045087
  // hasTaxon taxonomy:9606

  // Compartments:
  compartment Fluid_phase = 1;  // isVersionOf BTO:0000131

  // Species:
  species C3 in Fluid_phase = 6;  // isVersionOf PR:000004900
  species C3b in Fluid_phase = 0;  // isPartOf PR:000004900; isVersionOf PR:000019178; isVersionOf omit:0004486
  species C3bB_closed in Fluid_phase = 0;  // hasPart PR:000005374; hasPart PR:000019178; hasProperty PATO:0000608
  species C3bB_open in Fluid_phase = 0;  // hasPart PR:000019178; hasPart PR:000005374; hasProperty PATO:0000610
  species C3bBb in Fluid_phase = 0;  // hasPart PR:000019178; hasPart PR:000019308; isVersionOf ncit:C17123; isVersionOf omit:0024874
  species Bb in Fluid_phase = 0;  // isPartOf PR:000005374; isVersionOf PR:000019308
  species Factor_B in Fluid_phase = 2;  // isVersionOf PR:000005374
  species Factor_D in Fluid_phase = 0.08;  // isVersionOf ncit:C17123; isVersionOf PR:000005376

  // Parameters:
  k1 = 0.0001 unit_0;
  k2 = 107 unit_0;
  k3 = 5.86 unit_1;
  k4 = 0.816 unit_2;
  k5 = 6.9 unit_0;
  k6 = 0.46 unit_0;
  k7 = 130 unit_0;
  k8 = 0.72 unit_1;
  k9 = 0.33 unit_0;
  k10 = 0.1068 unit_0;
  ks1 = 0.00316 unit_3;
  ks2 = 0.000789 unit_3;
  d1 = 0.000392 unit_0;
  d2 = 0.000333 unit_0;

  // Reactions:
  C3_hydrolysis: C3 => C3b; Fluid_phase*Rate_Law_for_C3_hydrolysis(k1, C3, k2, C3bBb, k3);  // modifiers: C3bBb; isVersionOf GO:0002020
  C3bB_formation: C3b + Factor_B -> C3bB_closed; Fluid_phase*(k4*C3b*Factor_B - k5*C3bB_closed);  // isVersionOf GO:0005488
  C3bB_conformational_change: C3bB_closed -> C3bB_open; Fluid_phase*(k9*C3bB_closed - k10*C3bB_open);
  C3_convertase_formation: C3bB_open => C3bBb; Fluid_phase*Rate_Law_for_C3_convertase_formation(k7, Factor_D, C3bB_open, k8);  // modifiers: Factor_D; isVersionOf GO:0002020
  C3_convertase_decay: C3bBb => C3b + Bb; Fluid_phase*k6*C3bBb;
  C3_synthesis: => C3; Fluid_phase*Constant_flux__irreversible(ks1);
  C3_degradation: C3 => ; Fluid_phase*d1*C3;
  Factor_B_synthesis: => Factor_B; Fluid_phase*Constant_flux__irreversible(ks2);
  Factor_B_degradation: Factor_B => ; Fluid_phase*d2*Factor_B;

  // Unit definitions:
  unit length = metre;
  unit area = metre^2;
  unit volume = litre;
  unit time = 0.06 second;
  unit substance = 1e-6 mole;
  unit unit_0 = 1 / (0.06 second); unit_0 is "1/min";
  unit unit_1 = 1e-6 mole; unit_1 is "umol";
  unit unit_2 = 1 / (1e-6 mole * 0.06 second); unit_2 is "1/(umol*min)";
  unit unit_3 = 1e-6 mole / (0.06 second); unit_3 is "umol/min";
end
