// SBML level 3 version 1
// dcterms:bibliographicCitation: urn:miriam:pubmed:34208323

function function_for_indirect_stimulation(par, modifier)
  par*modifier;
end

function function_for_R7(par, T, b)
  par*T*(1 - b*T);
end

function function_for_R3_R5(par, T, Cm)
  par*T*Cm;
end

model Barros2021___CARTmath__Mathematical_Model_of_CAR_T_Immunotherapy_in_HDLM_2_cell_line()
  // Barros2021 - CARTmath, Mathematical Model of CAR-T Immunotherapy in HDLM-2 cell line
  // A mathematical model (CART-math) studying the impact of CAR-T cells therapy on haematological cancer cell line which in this case is HDLM-2.
  // unknownQualifier mamo:MAMO_0000046
  // isDescribedBy pubmed:34208323
  // biomodels.db:MODEL2107220001 biomodels.db:BIOMD0000001019
  // occursIn BTO:0004973
  // hasTaxon taxonomy:10095
  // hasProperty ncit:C15262 BTO:0000782 mamo:MAMO_0000046
  // model units - substance: substance, time: time, volume: volume, area: area, length: length, extent: substance

  // Compartments:
  compartment compartment = 1 volume;  // hasProperty ncit:C94498

  // Species:
  species Cm in compartment = 0;  // hasProperty BTO:0003435
  species Ct in compartment = 0;  // hasProperty ncit:C177284
  species T in compartment = 2000000;  // hasProperty ncit:C9357

  // Parameters:
  phi = 0.265 unit_0;
  pi = 0.35 unit_0;
  epsilon = 0.15 unit_0;
  theta = 6e-6 unit_1;
  alpha = 4.5e-8 unit_1;
  mu = 0.005 unit_0;
  rho = 0.05650026 unit_0;
  beta = 1.404029e-12 unit_2;
  gamma = 3.715843e-6 unit_1;

  // Reactions:
  R3_Cm_activation_into_Ct: Cm => Ct; compartment*function_for_R3_R5(theta, T, Cm);  // modifiers: T
  R6_Ct_expansion: => Ct; compartment*function_for_indirect_stimulation(phi, Ct);  // isVersionOf ncit:C157211
  R4_Ct_natural_death: Ct => ; compartment*pi*Ct;  // isVersionOf GO:0008219
  R5_Ct_inhibiton_by_Tumor: Ct => ; compartment*function_for_R3_R5(alpha, T, Ct);  // modifiers: T
  R1_Cm_formation: => Cm; compartment*function_for_indirect_stimulation(epsilon, Ct);  // modifiers: Ct
  R2_Cm_death: Cm => ; compartment*mu*Cm;  // isVersionOf GO:0008219
  R7_Tumor_proliferation: => T; compartment*function_for_R7(rho, T, beta);  // isVersionOf ncit:C36294
  R8_Tumor_death_by_Ct: T => ; compartment*function_for_R3_R5(gamma, Ct, T);  // modifiers: Ct; isVersionOf GO:0008219

  // Events:
  event1: at (time >= 45), persistent=false, fromTrigger=false: Ct = 2000000;
  event2: at (time >= 250), persistent=false, fromTrigger=false: T = 1000000;

  // Unit definitions:
  unit length = metre;
  unit area = metre^2;
  unit volume = litre;
  unit time = 86400 second;
  unit substance = mole;
  unit unit_0 = 1 / (86400 second); unit_0 is "1/d";
  unit unit_1 = 1 / (86400 second); unit_1 is "cells/d";
  unit unit_2 = dimensionless^0; unit_2 is "1/cells";
end
