// SBML level 3 version 1
// dcterms:bibliographicCitation: urn:miriam:pubmed:34208323

function function_for_R3_R5(par, T, Cm)
  par*T*Cm;
end

function function_for_R7(par, T, b)
  par*T*(1 - b*T);
end

function function_for_indirect_stimulation(par, modifier)
  par*modifier;
end

model Barros2021___CARTmath__Mathematical_Model_of_CAR_T_Immunotherapy_in_Raji_Cell_Line()
  // Barros2021 - CARTmath, Mathematical Model of CAR-T Immunotherapy in Raji Cell Line
  // A mathematical model (CART-math) studying the impact of CAR-T cells therapy on haematological cancer cell lines which in this case is RAJI.
  // unknownQualifier mamo:MAMO_0000046
  // isDescribedBy pubmed:34208323
  // biomodels.db:MODEL2107220002 biomodels.db:BIOMD0000001020
  // occursIn BTO:0004973
  // hasTaxon taxonomy:10095
  // hasProperty BTO:0000782 ncit:C15262 mamo:MAMO_0000046
  // model units - substance: substance, time: time, volume: volume, area: area, length: length, extent: substance

  // Compartments:
  compartment compartment = 1 volume;  // hasProperty ncit:C94498

  // Species:
  species Cm in compartment = 0;  // hasProperty BTO:0003435
  species Ct in compartment = 0;  // hasProperty ncit:C177284
  species T in compartment = 3000000;  // hasProperty ncit:C9357

  // Parameters:
  phi = 0.83 unit_0;
  pi = 0.8300536 unit_0;
  epsilon = 1.59795 unit_0;
  theta = 0.00023 unit_1;
  alpha has unit_1;
  mu = 6.89e-7 unit_0;
  rho = 0.5071721 unit_0;
  beta = 0 unit_2;
  gamma = 3.365388e-8 unit_1;
  Raji_IDO_CAT19 = 0; Raji_IDO_CAT19 is "Raji-IDO+CAT19";
  Raji_IDO_CART_19_1MT = 0; Raji_IDO_CART_19_1MT is "Raji-IDO+CART-19+1MT";
  Initial_for_Raji_IDO_CART_19_1MT = Raji_IDO_CART_19_1MT; Initial_for_Raji_IDO_CART_19_1MT is "Initial for Raji-IDO+CART-19+1MT";
  Initial_for_Raji_IDO_CAT19 = Raji_IDO_CAT19; Initial_for_Raji_IDO_CAT19 is "Initial for Raji-IDO+CAT19";

  // Assignment rules:
  alpha := piecewise(1.461699e-8, Initial_for_Raji_IDO_CAT19 == 1, piecewise(1.26166e-8, Initial_for_Raji_IDO_CART_19_1MT == 1, 1.248506e-8));

  // Reactions:
  R3_Cm_activation_into_Ct: Cm => Ct; compartment*function_for_R3_R5(theta, T, Cm);  // modifiers: T
  R6_Ct_expansion: => Ct; compartment*function_for_indirect_stimulation(phi, Ct);  // isVersionOf ncit:C157211
  R4_Ct_natural_death: Ct => ; compartment*pi*Ct;  // isVersionOf GO:0008219
  R5_Ct_inhibiton_by_Tumor: Ct => ; compartment*function_for_R3_R5(alpha, T, Ct);  // modifiers: T
  R1_Cm_formation: => Cm; compartment*function_for_indirect_stimulation(epsilon, Ct);  // modifiers: Ct
  R2_Cm_death: Cm => ; compartment*mu*Cm;  // isVersionOf GO:0008219
  R7_Tumor_proliferation: => T; compartment*function_for_R7(rho, T, beta);  // isVersionOf ncit:C36294
  R8_Tumor_death_by_Ct: T => ; compartment*function_for_R3_R5(gamma, Ct, T);  // modifiers: Ct; isVersionOf GO:0008219

  // Events:
  event1: at (time >= 7), persistent=false, fromTrigger=false: Ct = 10000000;

  // Unit definitions:
  unit length = metre;
  unit area = metre^2;
  unit volume = litre;
  unit time = 86400 second;
  unit substance = mole;
  unit unit_0 = 1 / (86400 second); unit_0 is "1/d";
  unit unit_1 = 1 / (86400 second); unit_1 is "cells/d";
  unit unit_2 = dimensionless^0; unit_2 is "1/cells";
end
