// SBML level 2 version 4
// dcterms:bibliographicCitation: urn:miriam:pubmed:33622135

function Rate_Law_for_Antiviral_response(Phi, F, I, k)
  k*I + Phi*F*I;
end

function Rate_Law_for_Virus_release(p, I, f, _I_)
  p*I + (1 - f)*p*_I_;
end

function Rate_Law_for_IFN_release(Pi, p, I, _I_)
  Pi*p*(I + _I_);
end

function Rate_Law_for_Infection(Beta, V, T)
  Beta*V*T;
end

function Rate_Law_for_Refractory_state(Phi, F, T, R, Rho)
  Phi*F*T - Rho*R;
end

model Lavigne2021___non_spatial_model_of_viral_infection_dynamics_and_interferon_response_of_well_mixed_viral_infection()
  // Lavigne2021 - Non-spatial model of viral infection dynamics and interferon response of well-mixed viral infection
  // This ordinary differential equation model is described in the following article:
  // "Autocrine and paracrine interferon signalling as ‘ring vaccination’ and ‘contact tracing’ strategies to suppress virus infection in a host"
  // G. Michael Lavigne, Hayley Russell, Barbara Sherry and Ruian Ke
  // DOI: 10.1098/rspb.2020.3002
  // This model is based on the ordinary differential equations of the non-spatial model of well-mixed viral infection stated in the manuscript (Eq. 2.1 in the article).
  // Abstract:
  // The innate immune response, particularly the interferon response, represents a first line of defence against viral infections. The interferon molecules produced from infected cells act through
  // autocrine and paracrine signalling to turn host cells into an antiviral state. Although the molecular mechanisms of IFN signalling have been well characterized, how the interferon response
  // collectively contribute to the regulation of host cells to stop or suppress viral infection during early infection remain unclear. Here, we use mathematical models to delineate the roles of the
  // autocrine and the paracrine signalling, and show that their impacts on viral spread are dependent on how infection proceeds. In particular, we found that when infection is well-mixed, the paracrine
  // signalling is not as effective; by contrast, when infection spreads in a spatial manner, a likely scenario during initial infection in tissue, the paracrine signalling can impede the spread of
  // infection by decreasing the number of susceptible cells close to the site of infection. Furthermore, we argue that the interferon response can be seen as a parallel to population-level epidemic
  // prevention strategies such as ‘contact tracing’ or ‘ring vaccination’. Thus, our results here may have implications for the outbreak control at the population scale more broadly.
  // biomodels.db:MODEL2107220003 biomodels.db:BIOMD0000001021
  // isPropertyOf GO:0140374
  // isPropertyOf GO:0071345
  // isPropertyOf GO:0019221
  // hasTaxon taxonomy:9606
  // isDescribedBy pubmed:33622135

  // Compartments:
  compartment whole_organism = 1;  // isVersionOf obi:OBI_0100026; hasProperty PATO:0001993

  // Species:
  species Target_cells in whole_organism = 400000000;  // isVersionOf CL:0000000; hasProperty efo:0001460
  species Infected_cells in whole_organism = 0;  // isVersionOf BTO:0000152
  species Infected_cells_antiviral in whole_organism = 0;  // isVersionOf BTO:0000152; hasProperty ido:0000440
  species Refractory_cells in whole_organism = 0;  // isVersionOf CL:0000000; hasProperty efo:0001460; hasProperty MP:0002409
  species Virions in whole_organism = 100;  // isVersionOf ido:0000508
  species IFN in whole_organism = 0;  // isVersionOf ncit:C20493
  species $Fraction_target_cells_remaining in whole_organism;  // isVersionOf CL:0000000; hasProperty efo:0001460

  // Parameters:
  Beta = 5e-10 unit_0;
  Phi = 5e-10 unit_0;
  Rho = 1 unit_1;
  Delta = 4 unit_1;
  k = 2 unit_1;
  p = 2400 unit_2;
  f = 0.9;
  c = 14 unit_1;
  Pi = 1;
  Initial_for_Target_cells = Target_cells;

  // Assignment rules:
  Fraction_target_cells_remaining := Target_cells/Initial_for_Target_cells;

  // Reactions:
  Infection: Target_cells => Infected_cells; whole_organism*Rate_Law_for_Infection(Beta, Virions, Target_cells);  // modifiers: Virions; isVersionOf ido:0000586
  Refractory_state: Target_cells -> Refractory_cells; whole_organism*Rate_Law_for_Refractory_state(Phi, IFN, Target_cells, Refractory_cells, Rho);  // modifiers: IFN; isVersionOf GO:0051607
  Antiviral_response: Infected_cells => Infected_cells_antiviral; whole_organism*Rate_Law_for_Antiviral_response(Phi, IFN, Infected_cells, k);  // modifiers: IFN; isVersionOf GO:0051607
  Infected_cell_death: Infected_cells => ; whole_organism*Delta*Infected_cells;  // isVersionOf GO:0008219
  Antiviral_infected_cell_death: Infected_cells_antiviral => ; whole_organism*Delta*Infected_cells_antiviral;  // isVersionOf GO:0008219
  Virus_release: => Virions; whole_organism*Rate_Law_for_Virus_release(p, Infected_cells, f, Infected_cells_antiviral);  // modifiers: Infected_cells, Infected_cells_antiviral; isVersionOf GO:0019076
  IFN_release: => IFN; whole_organism*Rate_Law_for_IFN_release(Pi, p, Infected_cells, Infected_cells_antiviral);  // modifiers: Infected_cells, Infected_cells_antiviral; isVersionOf GO:0001816
  Virus_clearence: Virions => ; whole_organism*c*Virions;
  IFN_clearence: IFN => ; whole_organism*c*IFN;

  // Unit definitions:
  unit length = metre;
  unit area = metre^2;
  unit volume = litre;
  unit time = 86400 second;
  unit substance = item;
  unit unit_0 = 0.01 metre / (86400 second * item); unit_0 is "cm/(#*d)";
  unit unit_1 = 1 / (86400 second); unit_1 is "1/d";
  unit unit_2 = 1 / (86400 second * item); unit_2 is "1/(#*d)";
end
