// SBML level 2 version 4
// dcterms:bibliographicCitation: urn:miriam:pubmed:34059522

function Rate_Law_for_Tumor_growth(rho, T)
  rho*T^(4/5);
end

function Rate_Law_for_T_cell_mediated_tumor_cell_killing(xi, I, T, h_I, h_T)
  xi*I*T/(1 + I/h_I + T/h_T);
end
Rate_Law_for_T_cell_mediated_tumor_cell_killing is "Rate Law for T_cell-mediated_tumor_cell_killing";

function Rate_Law_for_Effector_T_cell_proliferation(p_s, S)
  p_s*S;
end

function Rate_Law_for_Lymph_node_resident_T_cell_conversion(alpha, T, N)
  alpha*(T/(10000000 + T))*N;
end
Rate_Law_for_Lymph_node_resident_T_cell_conversion is "Rate Law for Lymph_node-resident_T_cell_conversion";

model Creemers2021___Tumor_immune_dynamics_and_implications_on_immunotherapy_responses()
  // Creemers2021 - Tumor-immune dynamics and implications on immunotherapy responses
  // This ordinary differential equation model simulating the mechanisms that govern cancer-immune dynamics and their role in tumor responses to immunotherapy is described by the publication:
  // Creemers JHA, Lesterhuis WJ, Mehra N, et al.
  // "A tipping point in cancer-immune dynamics leads to divergent immunotherapy responses and hampers biomarker discovery."
  // Journal for ImmunoTherapy of Cancer 2021;9:e002032.
  // doi:10.1136/jitc-2020-002032
  // Simulation parameters in supplementary table 1 mismatch with figure 1 in manuscript. Therefore, to clarify, the following parameter values were used:
  // Reproduction of Fig. 1(C), xi = 0.0005
  // Reproduction of Fig. 1(D), xi = 0.00025
  // Abstract:
  // Background: Predicting treatment response or survival of cancer patients remains challenging in immuno-oncology. Efforts to overcome these challenges focus, among others, on the discovery of new
  // biomarkers. Despite advances in cellular and molecular approaches, only a limited number of candidate biomarkers eventually enter clinical practice.
  // Methods: A computational modeling approach based on ordinary differential equations was used to simulate the fundamental mechanisms that dictate tumor-immune dynamics and to investigate its
  // implications on responses to immune checkpoint inhibition (ICI) and patient survival. Using in silico biomarker discovery trials, we revealed fundamental principles that explain the diverging success
  // rates of biomarker discovery programs.
  // Results: Our model shows that a tipping point—a sharp state transition between immune control and immune evasion—induces a strongly non-linear relationship between patient survival and both
  // immunological and tumor-related parameters. In patients close to the tipping point, ICI therapy may lead to long-lasting survival benefits, whereas patients far from the tipping point may fail to
  // benefit from these potent treatments.
  // Conclusion: These findings have two important implications for clinical oncology. First, the apparent conundrum that ICI induces substantial benefits in some patients yet completely fails in others
  // could be, to a large extent, explained by the presence of a tipping point. Second, predictive biomarkers for immunotherapy should ideally combine both immunological and tumor-related markers, as a
  // patient’s distance from the tipping point can typically not be reliably determined from solely one of these. The notion of a tipping point in cancer-immune dynamics helps to devise more accurate
  // strategies to select appropriate treatments for patients with cancer.
  // biomodels.db:MODEL2107290001 biomodels.db:BIOMD0000001022
  // isPropertyOf ncit:C15438
  // hasTaxon taxonomy:9606
  // isDescribedBy pubmed:34059522
  // hasProperty GO:0002837 mamo:MAMO_0000046

  // Compartments:
  compartment Tumor = 1;  // isVersionOf ncit:C98275; hasProperty ncit:C94498
  compartment Lymph_node = 1;  // isVersionOf BTO:0000784

  // Species:
  species T in Tumor = 1; T is "Tumor_cells";  // isVersionOf CL:0001063
  species I in Tumor = 0; I is "Intratumoral_T_cells";  // isVersionOf CL:0000084; hasProperty ncit:C28036
  species S in Lymph_node = 0; S is "Specific_T_cells";  // isVersionOf CL:0000911
  species N in Lymph_node = 1000000; N is "Naive_T_cells";  // isVersionOf CL:0000898

  // Parameters:
  rho = 6;
  xi = 0.035;
  h = 571;
  delta = 0.019;
  alpha = 0.0025;
  p_s = 1;
  m_s = 1;

  // Reactions:
  Tumor_growth: => T; Tumor*Rate_Law_for_Tumor_growth(rho, T);  // isVersionOf GO:0008283
  T_cell_mediated_tumor_cell_killing: T => ; Tumor*Rate_Law_for_T_cell_mediated_tumor_cell_killing(xi, I, T, h, h); T_cell_mediated_tumor_cell_killing is "T_cell-mediated_tumor_cell_killing";  // modifiers: I; isVersionOf GO:0001906
  Lymph_node_resident_T_cell_migration: S => I; m_s*S; Lymph_node_resident_T_cell_migration is "Lymph_node-resident_T_cell_migration";  // isVersionOf GO:0072678
  Intratumoral_T_cell_death: I => ; Tumor*delta*I;  // isVersionOf GO:0008219
  Lymph_node_resident_T_cell_conversion: N => S; Rate_Law_for_Lymph_node_resident_T_cell_conversion(alpha, T, N); Lymph_node_resident_T_cell_conversion is "Lymph_node-resident_T_cell_conversion";  // modifiers: T; isVersionOf GO:0042110
  Effector_T_cell_proliferation: => S; Lymph_node*Rate_Law_for_Effector_T_cell_proliferation(p_s, S);  // isVersionOf GO:0042098

  // Unit definitions:
  unit length = metre;
  unit area = metre^2;
  unit volume = litre;
  unit time = 86400 second;
  unit substance = item;
end
