// SBML level 2 version 4
// dcterms:bibliographicCitation: urn:miriam:doi:10.3390/math8081285

function Rate_Law_for_Normal_cell_growth(r, N, beta_1)
  r*N*(1 - beta_1*N);
end

function Rate_Law_for_Normal_cell_death_inhibition(eta, N, I, gamma, T)
  eta*N*I + gamma*N*T;
end
Rate_Law_for_Normal_cell_death_inhibition is "Rate Law for Normal_cell_death/inhibition";

function Rate_Law_for_Tumor_cell_growth(alpha_1, T, alpha_2, beta_2, N)
  alpha_1*T*(1 - alpha_2*T) + beta_2*N*T;
end

function Rate_Law_for_Tumor_cell_death_inhibition(alpha_3, T, I)
  alpha_3*T*I;
end
Rate_Law_for_Tumor_cell_death_inhibition is "Rate Law for Tumor_cell_death/inhibition";

function Rate_Law_for_Immune_cell_increase(sigma, rho, N, I, m, rho_1, T, m_1)
  sigma + rho*N*I/(m + N) + rho_1*T*I/(m_1 + T);
end

function Rate_Law_for_Immune_cell_decrease(delta, I, mu, N, mu_1, T)
  delta*I + mu*N*I + mu_1*T*I;
end

model Alharbi2020___An_ODE_based_model_of_the_dynamics_of_tumor_cell_progression_and_its_effects_on_normal_cell_growth_and_immune_system_functionality()
  // Alharbi2020 - An ODE-based model of the dynamics of tumor cell progression and its effects on normal cell growth and immune system functionality
  // This ordinary differential equation model of tumor cell growth, called the normal-tumor-immune-unhealthy diet model (NTIUNHDM), is described by the publication:
  // Alharbi, S.A.; Rambely, A.S.
  // "A New ODE-Based Model for Tumor Cells and Immune System Competition"
  // Mathematics 2020, 8, 1285.
  // doi:10.3390/math8081285
  // Abstract:
  // Changes in diet are heavily associated with high mortality rates in several types of cancer. In this paper, a new mathematical model of tumor cells growth is established to dynamically demonstrate
  // the effects of abnormal cell progression on the cells affected by the tumor in terms of the immune system’s functionality and normal cells’ dynamic growth. This model is called the
  // normal-tumor-immune-unhealthy diet model (NTIUNHDM) and governed by a system of ordinary differential equations. In the NTIUNHDM, there are three main populations normal cells, tumor cell and immune
  // cells. The model is discussed analytically and numerically by utilizing a fourth-order Runge–Kutta method. The dynamic behavior of the NTIUNHDM is discussed by analyzing the stability of the system
  // at various equilibrium points and the Mathematica software is used to simulate the model. From analysis and simulation of the NTIUNHDM, it can be deduced that instability of the response stage, due
  // to a weak immune system, is classified as one of the main reasons for the coexistence of abnormal cells and normal cells. Additionally, it is obvious that the NTIUNHDM has only one stable case when
  // abnormal cells begin progressing into early stages of tumor cells such that the immune cells are generated once. Thus, early boosting of the immune system might contribute to reducing the risk of
  // cancer.
  // biomodels.db:MODEL2107290002 biomodels.db:BIOMD0000001023
  // isPropertyOf GO:0002418
  // isPropertyOf ncit:C18670
  // isPropertyOf DOID:162
  // isPropertyOf GO:0002376
  // hasTaxon taxonomy:9606

  // Compartments:
  compartment Whole_organism = 1;  // isVersionOf ncit:C13413; hasProperty PATO:0001993

  // Species:
  species Normal_cells in Whole_organism = 1;  // isVersionOf CL:0000000; hasProperty HP:0032322
  species Tumor_cells in Whole_organism = 1;  // isVersionOf CL:0001063
  species Immune_cells in Whole_organism = 1.22;  // isVersionOf ncit:C132890

  // Parameters:
  r = 0.4312;
  beta_1 = 2.99e-6;
  eta = 0.1379;
  gamma = 0.9314;
  alpha_1 = 0.4426;
  alpha_2 = 0.4;
  beta_2 = 1.189;
  alpha_3 = 0.1469;
  sigma = 0.7;
  delta = 0.57;
  mu = 0.813;
  rho = 0.271;
  m = 0.813;
  mu_1 = 0.3634;
  rho_1 = 0.7829;
  m_1 = 0.862;

  // Reactions:
  Normal_cell_growth: => Normal_cells; Whole_organism*Rate_Law_for_Normal_cell_growth(r, Normal_cells, beta_1);  // isVersionOf GO:0008283
  Normal_cell_death_inhibition: Normal_cells => ; Whole_organism*Rate_Law_for_Normal_cell_death_inhibition(eta, Normal_cells, Immune_cells, gamma, Tumor_cells); Normal_cell_death_inhibition is "Normal_cell_death/inhibition";  // modifiers: Immune_cells, Tumor_cells; isVersionOf GO:0008219
  Tumor_cell_growth: => Tumor_cells; Whole_organism*Rate_Law_for_Tumor_cell_growth(alpha_1, Tumor_cells, alpha_2, beta_2, Normal_cells);  // modifiers: Normal_cells; isVersionOf GO:0008283
  Tumor_cell_death_inhibition: Tumor_cells => ; Whole_organism*Rate_Law_for_Tumor_cell_death_inhibition(alpha_3, Tumor_cells, Immune_cells); Tumor_cell_death_inhibition is "Tumor_cell_death/inhibition";  // modifiers: Immune_cells; isVersionOf GO:0008219; isVersionOf GO:0001906
  Immune_cell_increase: => Immune_cells; Whole_organism*Rate_Law_for_Immune_cell_increase(sigma, rho, Normal_cells, Immune_cells, m, rho_1, Tumor_cells, m_1);  // modifiers: Normal_cells, Tumor_cells; isVersionOf GO:0008283
  Immune_cell_decrease: Immune_cells => ; Whole_organism*Rate_Law_for_Immune_cell_decrease(delta, Immune_cells, mu, Normal_cells, mu_1, Tumor_cells);  // modifiers: Normal_cells, Tumor_cells; isVersionOf GO:0008219

  // Unit definitions:
  unit length = metre;
  unit area = metre^2;
  unit volume = litre;
  unit time = 86400 second;
  unit substance = mole;
end
