// SBML level 2 version 4
// dcterms:bibliographicCitation: urn:miriam:pubmed:33205434

function Rate_Law_for_Tumor_cell_death(d, C_E, U)
  d*C_E*U;
end

function Rate_Law_for_Expanding_CAR_T_cell_proliferation(rho, C_E, U)
  rho*C_E*U;
end
Rate_Law_for_Expanding_CAR_T_cell_proliferation is "Rate Law for Expanding_CAR-T_cell_proliferation";

function Rate_Law_for_Tumor_cell_growth(g, U)
  g*U;
end

model Chaudhury2020___Lotka_Volterra_mathematical_model_of_CAR_T_cell_and_tumour_kinetics()
  // Chaudhury2020 - Lotka-Volterra mathematical model of CAR-T cell and tumour kinetics
  // This ordinary differential equation model of the cellular kinetics and pharmacodynamics of CAR-T cell therapy is described in the publication:
  // Chaudhury, A., Zhu, X., Chu, L., Goliaei, A., June, C., Kearns, J. and Stein, A., 2020. Chimeric Antigen Receptor T Cell Therapies: A Review of Cellular Kinetic‐Pharmacodynamic Modeling Approaches.
  // The Journal of Clinical Pharmacology, 60(S1).
  // DOI: 10.1002/jcph.1691
  // This model is based on equations 4-5 from the manuscript.
  // Abstract:
  // Chimeric antigen receptor T cell (CAR-T cell) therapies have shown significant efficacy in CD19+ leukemias and lymphomas. There remain many challenges and questions for improving next-generation
  // CAR-T cell therapies, and mathematical modeling of CAR-T cells may play a role in supporting further development. In this review, we introduce a mathematical modeling taxonomy for a set of relatively
  // simple cellular kinetic-pharmacodynamic models that describe the in vivo dynamics of CAR-T cell and their interactions with cancer cells. We then discuss potential extensions of this model to include
  // target binding, tumor distribution, cytokine-release syndrome, immunophenotype differentiation, and genotypic heterogeneity.
  // biomodels.db:MODEL2108050001 biomodels.db:BIOMD0000001024
  // isPropertyOf ncit:C15438
  // isPropertyOf ncit:C126102
  // hasTaxon taxonomy:9606
  // isDescribedBy pubmed:33205434
  // hasProperty DOID:0060058 DOID:1240 GO:0002837 mamo:MAMO_0000046

  // Compartments:
  compartment Whole_organism_blood = 1;  // isVersionOf ncit:C13413; isVersionOf BTO:0000089; hasProperty PATO:0001993

  // Species:
  species Expanding_CAR_T_cells in Whole_organism_blood = 10; Expanding_CAR_T_cells is "Expanding_CAR-T_cells";  // isVersionOf CL:0000084; isVersionOf ncit:C137999
  species Tumor_cells in Whole_organism_blood = 900;  // isVersionOf CL:0001063; isVersionOf CL:0001201; hasProperty CHEBI:144829

  // Parameters:
  rho = 0.0018 unit_0;
  k_E = 0.16 unit_1;
  g = 0.15 unit_1;
  d = 0.00015 unit_2;

  // Reactions:
  Expanding_CAR_T_cell_proliferation: => Expanding_CAR_T_cells; Whole_organism_blood*Rate_Law_for_Expanding_CAR_T_cell_proliferation(rho, Expanding_CAR_T_cells, Tumor_cells); Expanding_CAR_T_cell_proliferation is "Expanding_CAR-T_cell_proliferation";  // modifiers: Tumor_cells; isVersionOf GO:0042098
  Expanding_CAR_T_cell_death: Expanding_CAR_T_cells => ; Whole_organism_blood*k_E*Expanding_CAR_T_cells; Expanding_CAR_T_cell_death is "Expanding_CAR-T_cell_death";  // isVersionOf GO:0008219
  Tumor_cell_growth: => Tumor_cells; Whole_organism_blood*Rate_Law_for_Tumor_cell_growth(g, Tumor_cells);  // isVersionOf GO:0008283
  Tumor_cell_death: Tumor_cells => ; Whole_organism_blood*Rate_Law_for_Tumor_cell_death(d, Expanding_CAR_T_cells, Tumor_cells);  // modifiers: Expanding_CAR_T_cells; isVersionOf GO:0008219

  // Unit definitions:
  unit length = metre;
  unit area = metre^2;
  unit volume = 1e-6 litre;
  unit time = 86400 second;
  unit substance = item;
  unit unit_0 = 86400 second * item / (1e-6 litre); unit_0 is "d*#/ul";
  unit unit_1 = 1 / (86400 second); unit_1 is "1/d";
  unit unit_2 = 1e-6 litre / (86400 second * item); unit_2 is "1/(d*#/ul)";
end
