// SBML level 2 version 4
// dcterms:bibliographicCitation: urn:miriam:pubmed:33205434

function Rate_Law_for_Tumour_cell_death(d, C_E, U, EC_50_d)
  d*(C_E*U/(EC_50_d + C_E + U));
end

function Rate_Law_for_Tumour_cell_growth(F_cure, g, U, U_max)
  F_cure*g*U*((log10(U_max) - log10(U))/log10(U_max));
end

model Chaudhury2020___EC50_expansion_and_killing_mathematical_model_of_CAR_T_cell_and_tumour_kinetics()
  // Chaudhury2020 - EC50 expansion and killing mathematical model of CAR-T cell and tumour kinetics
  // This ordinary differential equation model of the cellular kinetics and pharmacodynamics of CAR-T cell therapy is described in the publication:
  // Chaudhury, A., Zhu, X., Chu, L., Goliaei, A., June, C., Kearns, J. and Stein, A., 2020. Chimeric Antigen Receptor T Cell Therapies: A Review of Cellular Kinetic‐Pharmacodynamic Modeling Approaches.
  // The Journal of Clinical Pharmacology, 60(S1).
  // DOI: 10.1002/jcph.1691
  // This model is based on equations 7-9 from the manuscript.
  // Abstract:
  // Chimeric antigen receptor T cell (CAR-T cell) therapies have shown significant efficacy in CD19+ leukemias and lymphomas. There remain many challenges and questions for improving next-generation
  // CAR-T cell therapies, and mathematical modeling of CAR-T cells may play a role in supporting further development. In this review, we introduce a mathematical modeling taxonomy for a set of relatively
  // simple cellular kinetic-pharmacodynamic models that describe the in vivo dynamics of CAR-T cell and their interactions with cancer cells. We then discuss potential extensions of this model to include
  // target binding, tumor distribution, cytokine-release syndrome, immunophenotype differentiation, and genotypic heterogeneity.
  // biomodels.db:MODEL2108050002 biomodels.db:BIOMD0000001025
  // hasPart DOID:1240
  // isPropertyOf ncit:C126102
  // isPropertyOf ncit:C15438
  // hasTaxon taxonomy:9606
  // isDescribedBy pubmed:33205434

  // Compartments:
  compartment Whole_organism_blood = 1;  // isVersionOf BTO:0000089; isVersionOf ncit:C13413; hasProperty PATO:0001993

  // Species:
  species $Expanding_CAR_T_cells in Whole_organism_blood = 10; Expanding_CAR_T_cells is "Expanding_CAR-T_cells";  // isVersionOf CL:0000084; isVersionOf ncit:C137999; hasProperty PATO:0002102
  species $Persistent_CAR_T_cells in Whole_organism_blood = 0; Persistent_CAR_T_cells is "Persistent_CAR-T_cells";  // isVersionOf ncit:C137999; isVersionOf CL:0000084; hasProperty ncit:C43623
  species Tumor_cells in Whole_organism_blood = 900;  // isVersionOf CL:0001063; isVersionOf CL:0001201; hasProperty CHEBI:144829
  species $CAR_T_cells in Whole_organism_blood; CAR_T_cells is "CAR-T_cells";  // isVersionOf CL:0000084; isVersionOf ncit:C137999

  // Parameters:
  rho = 8.8 unit_0;
  k_E = 0.16 unit_0;
  EC_50_rho = 1 unit_1; EC_50_rho is "EC_50,rho";
  g = 0.2 unit_0;
  d = 0.35 unit_0;
  k_EP = 0.0012 unit_0;
  beta = 0.0032 unit_0;
  U_crit = 0.1 unit_1;
  U_max = 1000 unit_1;
  h = 3;
  EC_50_d = 10 unit_1; EC_50_d is "EC_50,d";
  T_max = 9.3 unit_2;
  h_T = 3;

  // Assignment rules:
  CAR_T_cells := Expanding_CAR_T_cells + Persistent_CAR_T_cells;
  F_cure := 1/(1 + (U_crit/Tumor_cells)^h);

  // Rate rules:
  Expanding_CAR_T_cells' = piecewise(rho*(Expanding_CAR_T_cells*Tumor_cells/(EC_50_rho + Expanding_CAR_T_cells + Tumor_cells)), time <= T_max, -(k_EP + k_E)*Expanding_CAR_T_cells);
  Persistent_CAR_T_cells' = piecewise(0, time <= T_max, k_EP*Expanding_CAR_T_cells - beta*Persistent_CAR_T_cells);

  // Reactions:
  Tumor_cell_growth: => Tumor_cells; Whole_organism_blood*Rate_Law_for_Tumour_cell_growth(F_cure, g, Tumor_cells, U_max);  // isVersionOf GO:0008283
  Tumor_cell_death: Tumor_cells => ; Whole_organism_blood*Rate_Law_for_Tumour_cell_death(d, Expanding_CAR_T_cells, Tumor_cells, EC_50_d);  // modifiers: Expanding_CAR_T_cells; isVersionOf GO:0008219

  // Unit definitions:
  unit length = metre;
  unit area = metre^2;
  unit volume = 1e-6 litre;
  unit time = 86400 second;
  unit substance = item;
  unit unit_0 = 1 / (86400 second); unit_0 is "1/d";
  unit unit_1 = item / (1e-6 litre); unit_1 is "#/ul";
  unit unit_2 = 86400 second; unit_2 is "d";
end
