// SBML level 2 version 4

function Diffusion_to_RBC(k, x)
  k*x;
end

model Metformin_partitioning_between_plasma_and_RBC_with_independent_Kin_and_Kout_coefficients()
  // Kurlovics2021 - Metformin partitioning between plasma and RBC with independent Kin and Kout coefficients
  // This model is a supplementary material of a manuscript
  // "Diffusion driven metformin exchange transport rates between plasma and red blood cells"
  // by Janis Kurlovics, Darta Maija Zake, Linda Zaharenko, Kristaps Berzins, Janis Klovins, Egils Stalidzans
  // The setting of the model correspond to Fig.2 for the case with a single coefficient for experimental values of average concentration curve.
  // Parameter estimation can be executed using experimental data file "average_exp_data.txt".
  // A=B if metformin concentration is 0 at t=0.
  // hasProperty mamo:MAMO_0000046

  // Compartments:
  compartment RBC = 2198;

  // Species:
  species Mrbc in RBC = 0;

  // Parameters:
  A = 1382.061;
  d = -0.7830068;
  Kin = 0.04400642;
  c = -0.2156089;
  Kout = 0.03997984;
  var Summary_flux_to_RBC;
  Initial_for_A = A;
  Initial_for_B = B;
  Initial_for_c = c;
  Initial_for_d = d;

  // Assignment rules:
  Summary_flux_to_RBC := Vin - Vout;
  B := Initial_for_A;
  Mpl := Initial_for_A*exp(Initial_for_c*time) - Initial_for_B*exp(Initial_for_d*time);

  // Reactions:
  Vout: Mrbc => ; RBC*Kout*Mrbc;
  Vin: => Mrbc; RBC*Diffusion_to_RBC(Kin, Mpl);

  // Unit definitions:
  unit length = metre;
  unit area = metre^2;
  unit volume = 1e-3 litre;
  unit time = 360000 second;
  unit substance = 1e-3 mole;
end
