// SBML level 2 version 4
// dcterms:bibliographicCitation: urn:miriam:pubmed:28131824

function Rate_Law_for_u_production(lambda, u)
  lambda*u;
end

function Rate_Law_for_u_consumption(kappa, y, u)
  kappa*y*u;
end

function Rate_Law_for_x_production(beta, u)
  beta*u;
end

function Rate_Law_for_y_production(mu, u, x)
  mu*(u/x);
end

model Sontag2017___Dynamic_model_of_immune_responses_to_antigen_presentation_by_tumor_or_pathogen()
  // Sontag2017 - Dynamic model of immune responses to antigen presentation by tumor or pathogen
  // This model of the immune system response to antigen presentation is based on the publication:
  // Eduardo D.Sontag (2017) 'A Dynamic Model of Immune Responses to Antigen Presentation Predicts Different Regions of Tumor or Pathogen Elimination', Cell Systems, 4(2)
  // DOI: 10.1016/j.cels.2016.12.003
  // This model is based on the "toy model" as described by Equations 1A-1C from the manuscript and the system represented by Equation 2, which exhibits a type of incoherent feedforward loop (IFFL).
  // Abstract:
  // The immune system must discriminate between agents of disease and an organism’s healthy cells. While the identification of an antigen as self/non-self is critically important, the dynamic features of
  // antigen presentation may also determine the immune system’s response. Here, we use a simple mathematical model of immune activation to explore the idea of antigen discrimination through dynamics. We
  // propose that antigen presentation is coupled to two nodes, one regulatory and one effecting the immune response, through an incoherent feedforward loop and repressive feedback. This circuit would
  // allow the immune system to effectively estimate the increase of antigens with respect to time, a key determinant of immune reactivity in vivo. Our model makes the prediction that tumors growing at
  // specific rates evade the immune system despite the continuous presence of antigens indicating disease, a phenomenon closely related to clinically observed “two-zone tolerance.” Finally, we discuss a
  // plausible biological instantiation of our circuit using combinations of regulatory and effector T cells.
  // biomodels.db:MODEL2108160001 biomodels.db:BIOMD0000001030
  // occursIn BTO:0005810
  // isPropertyOf GO:0002507
  // isPropertyOf GO:0019882
  // isPropertyOf GO:0006955
  // hasTaxon taxonomy:7742

  // Compartments:
  compartment Whole_organism = 1;  // isVersionOf ncit:C13413; hasProperty PATO:0001993

  // Species:
  species $Antigen_expressing_cells in Whole_organism; Antigen_expressing_cells is "Antigen-expressing_cells";  // isVersionOf ido:0000528; isVersionOf CL:0001063; hasProperty CHEBI:59132
  species Regulatory_cells in Whole_organism = 1;  // isVersionOf CL:0000815
  species Effector_cells in Whole_organism = 1;  // isVersionOf CL:0000911

  // Parameters:
  lambda = 0;
  kappa = 0;
  delta_x = 1;
  beta = 1;
  mu = 1;
  detla_y = 1;

  // Assignment rules:
  Antigen_expressing_cells := piecewise(time - 99, time >= 100, 1);

  // Reactions:
  pathogen_tumor_production: => $Antigen_expressing_cells; Whole_organism*Rate_Law_for_u_production(lambda, Antigen_expressing_cells); pathogen_tumor_production is "pathogen/tumor_production";
  pathogen_tumor_consumption: $Antigen_expressing_cells => ; Whole_organism*Rate_Law_for_u_consumption(kappa, Effector_cells, Antigen_expressing_cells); pathogen_tumor_consumption is "pathogen/tumor_consumption";  // modifiers: Effector_cells
  regulatory_production: => Regulatory_cells; Whole_organism*Rate_Law_for_x_production(beta, Antigen_expressing_cells);  // modifiers: Antigen_expressing_cells
  regulatory_consumption: Regulatory_cells => ; Whole_organism*delta_x*Regulatory_cells;
  effector_production: => Effector_cells; Whole_organism*Rate_Law_for_y_production(mu, Antigen_expressing_cells, Regulatory_cells);  // modifiers: Antigen_expressing_cells, Regulatory_cells
  effector_consumption: Effector_cells => ; Whole_organism*detla_y*Effector_cells;

  // Unit definitions:
  unit length = metre;
  unit area = metre^2;
  unit volume = litre;
  unit time = 86400 second;
  unit substance = item;
end
