// SBML level 2 version 4
// dcterms:bibliographicCitation: urn:miriam:pubmed:32738266

function Rate_Law_for_uninfected_cancer_cell_growth(x, f)
  f*x;
end

function Rate_Law_for_virus_infection_removal(m, x, v, h)
  m*x*v + h*v;
end
Rate_Law_for_virus_infection_removal is "Rate Law for virus_infection/removal";

function Rate_Law_for_cancer_cell_infection(x, v)
  x*v;
end

model Al_Tuwairqi2020___Dynamics_of_cancer_virotherapy()
  // Al-Tuwairqi2020 - Dynamics of cancer virotherapy - Phase I treatment
  // This ordinary differential equation model of cancer virotherapy dynamics is described in the publication:
  // Salma M. Al-Tuwairqi, Najwa O. Al-Johani, Eman A. Simbawa,
  // "Modeling dynamics of cancer radiovirotherapy",
  // Journal of Theoretical Biology, Volume 506, 2020, 110405, ISSN 0022-5193,
  // DOI: 10.1016/j.jtbi.2020.110405.
  // This model is represented by the equations in system (2) of the publication manuscript and describes the cancer-virus interactions for the Phase I virotherapy treatment.
  // Abstract:
  // Advances in genetic engineering have paved the way for a new therapy for cancer, which is called virotherapy. This treatment uses genetically engineered viruses which selectively infect, replicate
  // in, and destroy cancer cells without damaging normal cells. Furthermore, current research and clinical trials have indicated that these viruses can be delivered as single agents or in combination
  // with other therapies. In this paper, we propose systems of ordinary differential equations for modeling the dynamics of aggressive tumor growth under radiovirotherapy treatment. We divide the
  // treatment period into two phases; consequently, we present two mathematical models. First, we formulate the virotherapy model as Phase I of the treatment. Then we extend the model to include
  // radiotherapy in combination with virotherapy as Phase II of the treatment. Comprehensive qualitative analyses of both models are conducted. Furthermore, numerical experiments are performed in order
  // to support the analytical results. An analysis of the parameters is also carried out to investigate their effects on the outcome of the treatment. Overall, the analytical results reveal that
  // radiovirotherapy is more effective than, and a good alternative to, virotherapy, as it is capable of eradicating tumors completely.
  // biomodels.db:MODEL2108160002 biomodels.db:BIOMD0000001031
  // isPropertyOf ncit:C15438
  // isPropertyOf ncit:C62713
  // hasTaxon taxonomy:9606
  // isDescribedBy pubmed:32738266
  // hasProperty GO:0002837 DOID:162 mamo:MAMO_0000046

  // Compartments:
  compartment Whole_organism = 1;  // isVersionOf ncit:C13413; hasProperty PATO:0001993

  // Species:
  species uninfected_cancer_cells in Whole_organism = 0.6;  // isVersionOf CL:0001063; hasProperty CHEBI:144829; hasProperty efo:0001460
  species infected_cancer_cells in Whole_organism = 0;  // isVersionOf BTO:0000152; isVersionOf CL:0001063; hasProperty CHEBI:144829
  species free_virus in Whole_organism = 0.5;  // isVersionOf ido:0000508; isVersionOf ncit:C717

  // Parameters:
  f = 0;
  h = 0.15;
  m = 0.02;

  // Reactions:
  uninfected_cancer_cell_growth: => uninfected_cancer_cells; Whole_organism*Rate_Law_for_uninfected_cancer_cell_growth(uninfected_cancer_cells, f);  // isVersionOf GO:0008283
  cancer_cell_infection: uninfected_cancer_cells => infected_cancer_cells; Whole_organism*Rate_Law_for_cancer_cell_infection(uninfected_cancer_cells, free_virus);  // modifiers: free_virus; isVersionOf ido:0000586; isVersionOf ncit:C3439
  infected_cancer_cell_lysis: infected_cancer_cells => free_virus; Whole_organism*k1*infected_cancer_cells;  // isVersionOf GO:0008219; isVersionOf GO:0044659
    k1 = 1;
  virus_infection_removal: free_virus => ; Whole_organism*Rate_Law_for_virus_infection_removal(m, uninfected_cancer_cells, free_virus, h); virus_infection_removal is "virus_infection/removal";  // modifiers: uninfected_cancer_cells; isVersionOf GO:0046718

  // Unit definitions:
  unit length = metre;
  unit area = metre^2;
  unit volume = (1e-3 metre)^3;
  unit time = 360000 second;
  unit substance = item;
end
