// SBML level 2 version 4
// dcterms:bibliographicCitation: urn:miriam:pubmed:33525118

function Rate_Law_for_M1_polarisation(M1, r0_m1, r_m1_u, T_u, h_u, M2_u, r0_m2, r_m2_v, V, h_v)
  M1*(r0_m1 + r_m1_u*(T_u/(h_u + T_u))) - M2_u*(r0_m2 + r_m2_v*(V/(h_v + V)));
end

function Rate_Law_for_M2_infection(beta_2, V, M2_u)
  beta_2*V*M2_u;
end

function Rate_Law_for_infected_tumour_lysis_elimination(delta_i1, T_i, d_i, M1, h_m, M2_u)
  delta_i1*T_i + d_i*T_i*(M1/(h_m + M2_u));
end
Rate_Law_for_infected_tumour_lysis_elimination is "Rate Law for infected_tumour_lysis/elimination";

function Rate_Law_for_M1_activation_growth(a1_v, V, a1_i, T_i, a1_u, T_u, p_m1, M1, M2_u, K2)
  a1_v*V + a1_i*T_i + a1_u*T_u + p_m1*M1*(1 - (M1 + M2_u)/K2);
end
Rate_Law_for_M1_activation_growth is "Rate Law for M1_activation/growth";

function Rate_Law_for_tumour_elimination(d_u, T_u, M1, h_m, M2_u)
  d_u*T_u*(M1/(h_m + M2_u));
end

function Rate_Law_for_tumour_infection(beta, V, T_u)
  beta*V*T_u;
end

function Rate_Law_for_tumour_growth_production(r, T_u, K1, d_m, M2_u, h_m)
  r*T_u*(1 - T_u/K1) + d_m*T_u*(M2_u/(h_m + M2_u));
end
Rate_Law_for_tumour_growth_production is "Rate Law for tumour_growth/production";

function Rate_Law_for_virus_death_elimination(omega, V, delta_v, M1, h_m, M2_u)
  omega*V + delta_v*V*(M1/(h_m + M2_u));
end
Rate_Law_for_virus_death_elimination is "Rate Law for virus_death/elimination";

function Rate_Law_for_virus_production(b, delta_i1, T_i, c, delta_i2, M2_i)
  b*delta_i1*T_i + c*delta_i2*M2_i;
end

function Rate_Law_for_M2_activation_growth(a2_u, T_u, p_m2, M2_u, M1, K2)
  a2_u*T_u + p_m2*M2_u*(1 - (M1 + M2_u)/K2);
end
Rate_Law_for_M2_activation_growth is "Rate Law for M2_activation/growth";

model Almuallem2020___Virus_macrophage_tumour_interactions_in_oncolytic_viral_therapies()
  // Almuallem2020 - Virus-macrophage-tumour interactions in oncolytic viral therapies
  // This mathematical model of the role of the innate immune responses generated by macrophages in the context of anti-tumour oncolytic viral therapies is described in the publication:
  // Nada Almuallem, Dumitru Trucu, Raluca Eftimie. "Oncolytic viral therapies and the delicate balance between virus-macrophage-tumour interactions: A mathematical approach". Mathematical Biosciences and
  // Engineering, 2021, 18(1): 764-799.
  // doi: 10.3934/mbe.2021041
  // This model is represented by Equations 2.1a-f of the publication manuscript.
  // Abstract:
  // The success of oncolytic virotherapies depends on the tumour microenvironment, which contains a large number of infiltrating immune cells. In this theoretical study, we derive an ODE model to
  // investigate the interactions between breast cancer tumour cells, an oncolytic virus (Vesicular Stomatitis Virus), and tumour-infiltrating macrophages with different phenotypes which can impact the
  // dynamics of oncolytic viruses. The complexity of the model requires a combined analytical-numerical approach to understand the transient and asymptotic dynamics of this model. We use this model to
  // propose new biological hypotheses regarding the impact on tumour elimination/relapse/persistence of: (i) different macrophage polarisation/re-polarisation rates; (ii) different infection rates of
  // macrophages and tumour cells with the oncolytic virus; (iii) different viral burst sizes for macrophages and tumour cells. We show that increasing the rate at which the oncolytic virus infects the
  // tumour cells can delay tumour relapse and even eliminate tumour. Increasing the rate at which the oncolytic virus particles infect the macrophages can trigger transitions between steady-state
  // dynamics and oscillatory dynamics, but it does not lead to tumour elimination unless the tumour infection rate is also very large. Moreover, we confirm numerically that a large tumour-induced M1→M2
  // polarisation leads to fast tumour growth and fast relapse (if the tumour was reduced before by a strong anti-tumour immune and viral response). The increase in viral-induced M2→M1 re-polarisation
  // reduces temporarily the tumour size, but does not lead to tumour elimination. Finally, we show numerically that the tumour size is more sensitive to the production of viruses by the infected
  // macrophages.
  // biomodels.db:MODEL2108190002 biomodels.db:BIOMD0000001033
  // isPropertyOf ncit:C15438
  // isPropertyOf ncit:C62713
  // hasTaxon taxonomy:9606
  // isDescribedBy pubmed:33525118
  // hasProperty DOID:1612 GO:0002837 GO:0046730 mamo:MAMO_0000046

  // Compartments:
  compartment Whole_organism = 1;  // isVersionOf ncit:C13413; hasProperty PATO:0001993

  // Species:
  species Uninfected_tumour_cells in Whole_organism = 0.0005;  // isVersionOf CL:0001063; isVersionOf ncit:C12959; hasProperty efo:0001460; hasProperty CHEBI:144829
  species Infected_tumour_cells in Whole_organism = 0;  // isVersionOf ncit:C12959; isVersionOf BTO:0000152; isVersionOf CL:0001063; hasProperty CHEBI:144829
  species M1_macrophages in Whole_organism = 2.5e-6;  // isVersionOf CL:0000863; isVersionOf BTO:0006110
  species Uninfected_M2_macrophages in Whole_organism = 2.5e-7;  // isVersionOf BTO:0006111; isVersionOf CL:0000890; hasProperty efo:0001460
  species Infected_M2_macrophages in Whole_organism = 0;  // isVersionOf BTO:0000152; isVersionOf CL:0000890; isVersionOf BTO:0006111
  species Oncolytic_viruses in Whole_organism = 1e-5;  // isVersionOf taxonomy:11276; isVersionOf ncit:C717; isVersionOf ido:0000508

  // Parameters:
  r = 0.62;
  K1 = 1;
  g1 = 0;
  beta1 = 10;
  d_u = 1;
  d_m = 0.2;
  delta_i1 = 0.4;
  d_i = 2;
  a1_v = 0.025;
  a1_i = 0.00025;
  a1_u = 1.25e-7;
  p_m1 = 0.57;
  r0_m1 = 0.001;
  r0_m2 = 0.001;
  r_u_m1 = 1;
  r_v_m2 = 0;
  d_e1 = 0.88;
  d_e2 = 0.12;
  p_m2 = 0.57;
  K2 = 1;
  g2 = 0;
  beta2 = 500;
  delta_i2 = 0.52;
  b = 25;
  c = 8;
  omega = 2;
  delta_v = 5e-5;
  h_u = 0.0001;
  h_v = 1e-6;
  h_m = 0.00025;
  a2_u = 2.5e-7;

  // Reactions:
  tumour_growth_production: => Uninfected_tumour_cells; Whole_organism*Rate_Law_for_tumour_growth_production(r, Uninfected_tumour_cells, K1, d_m, Uninfected_M2_macrophages, h_m); tumour_growth_production is "tumour_growth/production";  // modifiers: Uninfected_M2_macrophages; isVersionOf GO:0008283; isVersionOf ncit:C19098
  tumour_infection: Uninfected_tumour_cells => Infected_tumour_cells; Whole_organism*Rate_Law_for_tumour_infection(beta1, Oncolytic_viruses, Uninfected_tumour_cells);  // modifiers: Oncolytic_viruses; isVersionOf ncit:C3439; isVersionOf ido:0000586
  tumour_elimination: Uninfected_tumour_cells => ; Whole_organism*Rate_Law_for_tumour_elimination(d_u, Uninfected_tumour_cells, M1_macrophages, h_m, Uninfected_M2_macrophages);  // modifiers: M1_macrophages, Uninfected_M2_macrophages; isVersionOf GO:0001906; isVersionOf GO:0008219
  infected_tumour_lysis_elimination: Infected_tumour_cells => ; Whole_organism*Rate_Law_for_infected_tumour_lysis_elimination(delta_i1, Infected_tumour_cells, d_i, M1_macrophages, h_m, Uninfected_M2_macrophages); infected_tumour_lysis_elimination is "infected_tumour_lysis/elimination";  // modifiers: M1_macrophages, Uninfected_M2_macrophages; isVersionOf GO:0001906; isVersionOf GO:0008219; isVersionOf GO:0044659
  M1_activation_growth: => M1_macrophages; Whole_organism*Rate_Law_for_M1_activation_growth(a1_v, Oncolytic_viruses, a1_i, Infected_tumour_cells, a1_u, Uninfected_tumour_cells, p_m1, M1_macrophages, Uninfected_M2_macrophages, K2); M1_activation_growth is "M1_activation/growth";  // modifiers: Oncolytic_viruses, Infected_tumour_cells, Uninfected_tumour_cells, Uninfected_M2_macrophages; isVersionOf GO:0008283; isVersionOf GO:0042116
  M1_polarisation: M1_macrophages -> Uninfected_M2_macrophages; Whole_organism*Rate_Law_for_M1_polarisation(M1_macrophages, r0_m1, r_u_m1, Uninfected_tumour_cells, h_u, Uninfected_M2_macrophages, r0_m2, r_v_m2, Oncolytic_viruses, h_v);  // modifiers: Uninfected_tumour_cells, Oncolytic_viruses; isVersionOf GO:0043030; isVersionOf ncit:C52566
  M1_death: M1_macrophages => ; Whole_organism*d_e1*M1_macrophages;  // isVersionOf GO:0008219
  M2_activation_growth: => Uninfected_M2_macrophages; Whole_organism*Rate_Law_for_M2_activation_growth(a2_u, Uninfected_tumour_cells, p_m2, Uninfected_M2_macrophages, M1_macrophages, K2); M2_activation_growth is "M2_activation/growth";  // modifiers: Uninfected_tumour_cells, M1_macrophages; isVersionOf GO:0008283; isVersionOf GO:0042116
  M2_infection: Uninfected_M2_macrophages => Infected_M2_macrophages; Whole_organism*Rate_Law_for_M2_infection(beta2, Oncolytic_viruses, Uninfected_M2_macrophages);  // modifiers: Oncolytic_viruses; isVersionOf ido:0000586; isVersionOf ncit:C3439
  M2_death: Uninfected_M2_macrophages => ; Whole_organism*d_e2*Uninfected_M2_macrophages;  // isVersionOf GO:0008219
  infected_M2_lysis: Infected_M2_macrophages => ; Whole_organism*delta_i2*Infected_M2_macrophages;  // isVersionOf GO:0008219; isVersionOf GO:0044659
  virus_production: => Oncolytic_viruses; Whole_organism*Rate_Law_for_virus_production(b, delta_i1, Infected_tumour_cells, c, delta_i2, Infected_M2_macrophages);  // modifiers: Infected_tumour_cells, Infected_M2_macrophages; isVersionOf GO:0044659
  virus_death_elimination: Oncolytic_viruses => ; Whole_organism*Rate_Law_for_virus_death_elimination(omega, Oncolytic_viruses, delta_v, M1_macrophages, h_m, Uninfected_M2_macrophages); virus_death_elimination is "virus_death/elimination";  // modifiers: M1_macrophages, Uninfected_M2_macrophages; isVersionOf ncit:C26011

  // Unit definitions:
  unit length = metre;
  unit area = metre^2;
  unit volume = litre;
  unit time = 86400 second;
  unit substance = item;
end
