// SBML level 2 version 4
// dcterms:bibliographicCitation: urn:miriam:pubmed:17457655

function Constant_flux__irreversible(v)
  v;
end
Constant_flux__irreversible is "Constant flux (irreversible)";

function Rate_Law_for_BCG_killing(B, p_1, E)
  B*p_1*E + B;
end

function Rate_Law_for_Effector_cell_activation_recruitment(E, p4, B, alpha, T_i)
  E*p4*B + alpha*T_i;
end
Rate_Law_for_Effector_cell_activation_recruitment is "Rate Law for Effector_cell_activation/recruitment";

function Rate_Law_for_Infected_tumor_cell_death(p3, E, T_i)
  p3*E*T_i;
end

function Rate_Law_for_Tumor_growth(T_u, r, beta)
  T_u*r*(1 - beta*T_u);
end

function Rate_Law_for_Effector_cell_inactivation_death(E, mu, p5, T_i)
  E*mu + E*p5*T_i;
end
Rate_Law_for_Effector_cell_inactivation_death is "Rate Law for Effector_cell_inactivation/death";

model Bunimovich_Mendrazitsky2007___Mathematical_model_of_BCG_immunotherapy()
  // Bunimovich-Mendrazitsky2007 - Mathematical model of BCG immunotherapy
  // This ordinary differential equation model, simulating the tumor-immune interactions involved in BCG immunotherapy to treat superficial bladder cancer, is described by the publication:
  // Bunimovich-Mendrazitsky, S., Shochat, E., Stone, L. "Mathematical Model of BCG Immunotherapy in Superficial Bladder Cancer". Bull. Math. Biol. 69, 1847–1870 (2007). DOI: 10.1007/s11538-007-9195-z
  // This model is based on the system of ODEs given in Equation 4 of the publication manuscript.
  // Reproduction of Figure 4 was achieved by setting p4 = 0.085.
  // Abstract:
  // Immunotherapy with Bacillus Calmette-Guérin (BCG)-an attenuated strain of Mycobacterium bovis (M. bovis) used for anti tuberculosis immunization-is a clinically established procedure for the
  // treatment of superficial bladder cancer. However, the mode of action has not yet been fully elucidated, despite much extensive biological experience. The purpose of this paper is to develop a first
  // mathematical model that describes tumor-immune interactions in the bladder as a result of BCG therapy. A mathematical analysis of the ODE model identifies multiple equilibrium points, their stability
  // properties, and bifurcation points. Intriguing regimes of bistability are identified in which treatment has potential to result in a tumor-free equilibrium or a full-blown tumor depending only on
  // initial conditions. Attention is given to estimating parameters and validating the model using published data taken from in vitro, mouse and human studies. The model makes clear that intensity of
  // immunotherapy must be kept in limited bounds. While small treatment levels may fail to clear the tumor, a treatment that is too large can lead to an over-stimulated immune system having dangerous
  // side effects for the patient.
  // biomodels.db:MODEL2108190003 biomodels.db:BIOMD0000001034
  // occursIn BTO:0000123
  // isPropertyOf ncit:C15438
  // isPropertyOf efo:0011041
  // hasTaxon taxonomy:9606
  // hasTaxon taxonomy:33892

  // Compartments:
  compartment Bladder = 1;  // isVersionOf BTO:0000123; hasProperty HP:0009725

  // Species:
  species BCG in Bladder = 0;  // isVersionOf taxonomy:33892
  species Effector_cells in Bladder = 0.05;  // isVersionOf CL:0000911; isVersionOf ncit:C28241
  species Tumor_infected_cells in Bladder = 0;  // isVersionOf CL:0001063; isVersionOf BTO:0000152; isVersionOf BTO:0000362
  species Tumor_uninfected_cells in Bladder = 0.55;  // isVersionOf BTO:0000362; isVersionOf CL:0001063; hasProperty efo:0001460

  // Parameters:
  mu1 = 1;
  mu2 = 0.41;
  p1 = 1.25;
  p2 = 0.285;
  p3 = 1.1;
  p4 = 0.085;
  p5 = 0.003;
  alpha = 0.52;
  beta = 0.0155;
  r = 0.12;
  b = 1.9;

  // Assignment rules:
  mu := mu2/mu1;

  // Reactions:
  BCG_production: => BCG; Bladder*Constant_flux__irreversible(b);  // isVersionOf omit:0008442
  Effector_cell_activation_recruitment: => Effector_cells; Bladder*Rate_Law_for_Effector_cell_activation_recruitment(Effector_cells, p4, BCG, alpha, Tumor_infected_cells); Effector_cell_activation_recruitment is "Effector_cell_activation/recruitment";  // modifiers: BCG, Tumor_infected_cells; isVersionOf GO:0042110; isVersionOf GO:0072678
  Effector_cell_inactivation_death: Effector_cells => ; Bladder*Rate_Law_for_Effector_cell_inactivation_death(Effector_cells, mu, p5, Tumor_infected_cells); Effector_cell_inactivation_death is "Effector_cell_inactivation/death";  // modifiers: Tumor_infected_cells; isVersionOf ncit:C175900; isVersionOf GO:0008219
  Tumor_growth: => Tumor_uninfected_cells; Bladder*Rate_Law_for_Tumor_growth(Tumor_uninfected_cells, r, beta);  // isVersionOf GO:0008283
  Tumor_infection: Tumor_uninfected_cells + BCG => Tumor_infected_cells; Bladder*p2*Tumor_uninfected_cells*BCG;  // isVersionOf ido:0000586; isVersionOf efo:0009429
  Infected_tumor_cell_death: Tumor_infected_cells => ; Bladder*Rate_Law_for_Infected_tumor_cell_death(p3, Effector_cells, Tumor_infected_cells);  // modifiers: Effector_cells; isVersionOf GO:0001906; isVersionOf GO:0008219
  BCG_killing: BCG => ; Bladder*Rate_Law_for_BCG_killing(BCG, p1, Effector_cells);  // modifiers: Effector_cells; isVersionOf GO:0042742; isVersionOf GO:0008219

  // Unit definitions:
  unit length = metre;
  unit area = metre^2;
  unit volume = litre;
  unit time = 86400 second;
  unit substance = item;
end
