// SBML level 2 version 4
// dcterms:bibliographicCitation: urn:miriam:doi:10.1186/s13662-020-02893-6

function Rate_Law_for_uninfected_tumor_cell_growth(r_1, x, y)
  r_1*x*(1 - (x + y));
end

function Rate_Law_for_virus_killing_clearence(h_2, v, z, e)
  h_2*v*z + e*v;
end
Rate_Law_for_virus_killing_clearence is "Rate Law for virus_killing/clearence";

function Rate_Law_for_uninfected_tumor_cell_killing_death(h_1, x, z, d_1)
  h_1*x*z + d_1*x;
end
Rate_Law_for_uninfected_tumor_cell_killing_death is "Rate Law for uninfected_tumor_cell_killing/death";

function Rate_Law_for_immune_cell_proliferation(m_1, y, z, m_2, x)
  m_1*y*z + m_2*x*z;
end

function Rate_Law_for_infected_tumor_cell_killing_death(c, y, z)
  c*y*z + y;
end
Rate_Law_for_infected_tumor_cell_killing_death is "Rate Law for infected_tumor_cell_killing/death";

function Rate_Law_for_virus_lytic_release(b, y)
  b*y;
end

model Al_Tuwairqi2020___Dynamics_of_cancer_virotherapy_with_immune_response()
  // Al-Tuwairqi2020 - Dynamics of cancer virotherapy with immune response
  // This ordinary differential equation model of the role of the immune response in cancer virotherapy dynamics is described in the publication:
  // Al-Tuwairqi, S.M., Al-Johani, N.O., Simbawa, E.A. "Modeling dynamics of cancer virotherapy with immune response." Adv Differ Equ 2020, 438 (2020).
  // DOI: 10.1186/s13662-020-02893-6
  // This model is represented by the system described in Equation 2 of the publication manuscript.
  // Abstract:
  // Virotherapy is a therapeutic treatment for cancer. It uses genetically engineered viruses to selectively infect, replicate in, and destroy cancer cells without damaging normal cells. In this paper,
  // we present a modified model to include, within the dynamics of virotherapy, the interaction between uninfected tumor cells and immune response. The model is analyzed qualitatively to produce five
  // equilibrium points. One of these equilibriums demonstrates the effect observed in virotherapy, where the immune system demolishes infected cells as well as viruses. Moreover, the existence and
  // stability of the equilibrium points are established under certain criteria. Numerical simulations are performed to display the agreement with the analytical results. Finally, parameter analysis is
  // carried out to illustrate which parameters in the model affect the outcome of virotherapy.
  // biomodels.db:MODEL2108190004 biomodels.db:BIOMD0000001035
  // isPropertyOf ncit:C62713
  // isPropertyOf ncit:C15438
  // hasTaxon taxonomy:9606
  // isDescribedBy doi:10.1186/s13662-020-02893-6
  // hasProperty GO:0002837 GO:0046730 DOID:162 mamo:MAMO_0000046

  // Compartments:
  compartment Whole_organism = 1;  // isVersionOf ncit:C13413; hasProperty PATO:0001993

  // Species:
  species uninfected_cancer_cells in Whole_organism = 0.5;  // isVersionOf CL:0001063; hasProperty CHEBI:144829; hasProperty efo:0001460
  species infected_cancer_cells in Whole_organism = 0;  // isVersionOf CL:0001063; isVersionOf BTO:0000152; hasProperty CHEBI:144829
  species free_virus in Whole_organism = 0.01;  // isVersionOf ido:0000508; isVersionOf ncit:C717
  species immune_cells in Whole_organism = 0.01;  // isVersionOf CL:0000623; isVersionOf ncit:C132890; isVersionOf CL:0000910

  // Parameters:
  r_1 = 0.36;
  a = 0.5;
  h_1 = 0.36;
  d_1 = 0.1278;
  c = 0.48;
  h_2 = 0.16;
  e = 0.2;
  m_1 = 0.6;
  m_2 = 0.29;
  n = 0.16;
  b = 2;

  // Reactions:
  uninfected_cancer_cell_growth: => uninfected_cancer_cells; Whole_organism*Rate_Law_for_uninfected_tumor_cell_growth(r_1, uninfected_cancer_cells, infected_cancer_cells);  // modifiers: infected_cancer_cells; isVersionOf GO:0008283
  cancer_cell_infection: uninfected_cancer_cells + free_virus => infected_cancer_cells; Whole_organism*a*uninfected_cancer_cells*free_virus;  // isVersionOf ncit:C3439; isVersionOf ido:0000586
  uninfected_cancer_cell_killing_death: uninfected_cancer_cells => ; Whole_organism*Rate_Law_for_uninfected_tumor_cell_killing_death(h_1, uninfected_cancer_cells, immune_cells, d_1); uninfected_cancer_cell_killing_death is "uninfected_cancer_cell_killing/death";  // modifiers: immune_cells; isVersionOf GO:0001906; isVersionOf GO:0008219; hasProperty ncit:C28373
  infected_cancer_cell_killing_death: infected_cancer_cells => ; Whole_organism*Rate_Law_for_infected_tumor_cell_killing_death(c, infected_cancer_cells, immune_cells); infected_cancer_cell_killing_death is "infected_cancer_cell_killing/death";  // modifiers: immune_cells; isVersionOf GO:0008219; isVersionOf GO:0001906
  virus_lytic_release: => free_virus; Whole_organism*Rate_Law_for_virus_lytic_release(b, infected_cancer_cells);  // modifiers: infected_cancer_cells; isVersionOf GO:0044659
  virus_killing_clearence: free_virus => ; Whole_organism*Rate_Law_for_virus_killing_clearence(h_2, free_virus, immune_cells, e); virus_killing_clearence is "virus_killing/clearence";  // modifiers: immune_cells; isVersionOf ncit:C26011
  immune_cell_proliferation: => immune_cells; Whole_organism*Rate_Law_for_immune_cell_proliferation(m_1, infected_cancer_cells, immune_cells, m_2, uninfected_cancer_cells);  // modifiers: infected_cancer_cells, uninfected_cancer_cells; isVersionOf GO:0008283
  immune_cell_clearence: immune_cells => ; Whole_organism*n*immune_cells;  // isVersionOf GO:0008219

  // Unit definitions:
  unit length = metre;
  unit area = metre^2;
  unit volume = (1e-3 metre)^3;
  unit time = 360000 second;
  unit substance = item;
end
