// SBML level 2 version 4
// dcterms:bibliographicCitation: urn:miriam:pubmed:17416392
// dcterms:bibliographicCitation: is derived from urn:miriam:pubmed:9785481

function Rate_Law_for_Effector_cell_increase(c, T, p1, E, I_L, g1, s1)
  c*T + p1*E*I_L/(g1 + I_L) + s1;
end

function Rate_Law_for_Tumor_cell_decrease(a, E, T, g2)
  a*E*T/(g2 + T);
end

function Rate_Law_for_IL_2_increase(p2, E, T, g3, s2)
  p2*E*T/(g3 + T) + s2;
end
Rate_Law_for_IL_2_increase is "Rate Law for IL-2_increase";

function Rate_Law_for_Tumor_cell_increase(r2, T, b)
  r2*T*(1 - b*T);
end

model Cappuccio2007___Tumor_immune_system_interactions_and_determination_of_the_optimal_therapeutic_protocol_in_immunotherapy()
  // Cappuccio2007 - Tumor-immune system interactions and determination of the optimal therapeutic protocol in immunotherapy
  // This ordinary differential equation model is the Panetta-Kirschner model of tumor-immune interactions is described in the publication:
  // Cappuccio A, Castiglione F, Piccoli B." Determination of the optimal therapeutic protocols in cancer immunotherapy." Math Biosci. 2007 Sep;209(1):1-13.
  // doi: 10.1016/j.mbs.2007.02.009.
  // The model represented in Equations 1-3 is the Panetta-Kirschner model and was used to reproduce Fig. 1.
  // N.B.: Labelling of Fig. 1 graphs in manuscript mismatches with simulation results - CTL and tumor cell plots swapped.
  // Abstract:
  // Cancer immunotherapy aims at eliciting an immune system response against the tumor. However, it is often characterized by toxic side-effects. Limiting the tumor growth and, concurrently, avoiding the
  // toxicity of a drug, is the problem of protocol design. We formulate this question as an optimization problem and derive an algorithm for its solution. Unlike the standard optimal control approach,
  // the algorithm simulates impulse-like drug administrations. It relies on an exact computation of the gradient of the cost function with respect to any protocol by means of the variational equations,
  // that can be solved in parallel with the system. In comparison with previous versions of this method [F. Castiglione, B. Piccoli, Optimal control in a model of dendritic cell transfection cancer
  // immunotherapy, Bull. Math. Biol. 68 (2006) 255-274; B. Piccoli, F. Castiglione, Optimal vaccine scheduling in cancer immunotherapy, Physica A. 370 (2) (2007) 672-680], we optimize both the timing and
  // the dosage of each administration and introduce a penalty term to avoid clustering of subsequent injections, a requirement consistent with the clinical practice. In addition, we implement the
  // optimization scheme to simulate the case of multi-therapies. The procedure works for any ODE system describing the pharmacokinetics and pharmacodynamics of an arbitrary number of therapeutic agents.
  // In this work, it was tested for a well known model of the tumor-immune system interaction [D. Kirschner, J.C. Panetta, Modeling immunotherapy of tumor-immune interaction, J. Math. Biol. 37 (1998)
  // 235-252]. Exploring three immunotherapeutic scenarios (CTL therapy, IL-2 therapy and combined therapy), we display the stability and efficacy of the optimization method, obtaining protocols that are
  // successful compromises between various clinical requirements.
  // isDerivedFrom biomodels.db:BIOMD0000000732
  // isDerivedFrom biomodels.db:BIOMD0000000732 pubmed:9785481
  // biomodels.db:MODEL2108260001 biomodels.db:BIOMD0000001036
  // isPropertyOf ncit:C15438
  // hasTaxon taxonomy:9606
  // isDescribedBy pubmed:17416392

  // Compartments:
  compartment Tumor_microenvironment = 1;  // isVersionOf ncit:C94498

  // Species:
  species Effector_cells in Tumor_microenvironment = 1e-5;  // isVersionOf ncit:C28241; isVersionOf CL:0000084
  species Tumor_cells in Tumor_microenvironment = 1e-5;  // isVersionOf CL:0001063
  species IL_2 in Tumor_microenvironment = 1e-5; IL_2 is "IL-2";  // isVersionOf PR:000001379

  // Parameters:
  c = 1.009;
  mu2 = 0.0378;
  p1 = 0.044;
  g1 = 0.02;
  s1 = 0;
  r2 = 0.123;
  b = 1;
  a = 0.018;
  g2 = 0.0001;
  p2 = 0.9;
  g3 = 1e-5;
  mu3 = 1.8;
  s2 = 0;

  // Reactions:
  Effector_cell_stimulation: => Effector_cells; Tumor_microenvironment*Rate_Law_for_Effector_cell_increase(c, Tumor_cells, p1, Effector_cells, IL_2, g1, s1);  // modifiers: Tumor_cells, IL_2; isVersionOf GO:0042098
  Effector_cell_decay: Effector_cells => ; Tumor_microenvironment*mu2*Effector_cells;
  Tumor_growth: => Tumor_cells; Tumor_microenvironment*Rate_Law_for_Tumor_cell_increase(r2, Tumor_cells, b);  // isVersionOf GO:0008283
  Tumor_killing: Tumor_cells => ; Tumor_microenvironment*Rate_Law_for_Tumor_cell_decrease(a, Effector_cells, Tumor_cells, g2);  // modifiers: Effector_cells; isVersionOf GO:0001906
  IL_2_production: => IL_2; Tumor_microenvironment*Rate_Law_for_IL_2_increase(p2, Effector_cells, Tumor_cells, g3, s2); IL_2_production is "IL-2_production";  // modifiers: Effector_cells, Tumor_cells
  IL_2_decay: IL_2 => ; Tumor_microenvironment*mu3*IL_2; IL_2_decay is "IL-2_decay";

  // Unit definitions:
  unit length = metre;
  unit area = metre^2;
  unit volume = litre;
  unit time = second;
  unit substance = mole;
end
