// SBML level 2 version 4
// dcterms:bibliographicCitation: urn:miriam:doi:10.1109/ACCESS.2019.2940060

function Rate_Law_for_N_increase(r, N, beta1)
  r*N*(1 - beta1*N);
end

function Rate_Law_for_T_increase(alpha1, T, alpha2, beta2, N)
  alpha1*T*(1 - alpha2*T) + beta2*N*T;
end

function Rate_Law_for_N_decrease(gamma, N, T)
  gamma*N*T;
end

model Alharbi2019___Tumor_normal_model__TNM__of_the_development_of_tumor_cells_and_their_impact_on_normal_cell_dynamics()
  // Alharbi2019 - Tumor-normal model (TNM) of the development of tumor cells and their impact on normal cell dynamics
  // This ordinary differential equation model of the interactions between tumor and normal cells is based on the publication:
  // S. A. Alharbi and A. S. Rambely, "Dynamic Simulation for Analyzing the Effects of the Intervention of Vitamins on Delaying the Growth of Tumor Cells," in IEEE Access, vol. 7, pp. 128816-128827, 2019
  // doi: 10.1109/ACCESS.2019.2940060.
  // This TNM model is described by the system of equations presented in (2), in the publication manuscript.
  // Abstract:
  // The natural sources of the vitamins, which come from a balanced diet (as recommended by the World Cancer Research Fund and the American Institute for Cancer Research) contribute to protecting the
  // body from advancing progressive of cancer stages. Thus, in this study, we analyze the effect of the intervention of vitamins on delaying the growth of cancer cells based on the dynamics of a normal
  // cell cycle when the tumor cells appear in a tissue as a resulting for progressing abnormal cells due to the weak response of the immune system. We developed a mathematical model, called
  // tumor-normal-vitamins model (TNVM), which is governed by a system of ordinary differential equations and refers to two main populations normal cells and tumor cells. This model considers the
  // intervention of vitamins as a moderating factor within thirty days. The models are discussed analytically and numerically by utilizing the Runge-Kutta method to simulate them. The results of the
  // analysis and simulation of free model illustrate that the model will be stable if the tumor cells succeed in eliminating normal cells in the tissue. Whereas, the analysis and simulation of the TNVM
  // showed a case of coexistence between normal cells and tumor cells occur if an individual consumes a regular rate of vitamins that have been simulated to be 87% per day from a natural food source.
  // Even though the response of the immune system is weak, the daily consumption of enough vitamins can play an essential role in delaying the development of an early stage of cancer. This study
  // contributes to the increasing awareness regarding a healthy diet to reduce the risk of some deadly diseases, especially cancer.
  // biomodels.db:MODEL2108260002 biomodels.db:BIOMD0000001037
  // isPropertyOf GO:0002347
  // isPropertyOf DOID:162
  // isPropertyOf ncit:C18670
  // hasTaxon taxonomy:9606
  // isDescribedBy doi:10.1109/ACCESS.2019.2940060

  // Compartments:
  compartment Whole_organism = 1;  // isVersionOf ncit:C13413; hasProperty PATO:0001993

  // Species:
  species Normal_cells in Whole_organism = 1;  // isVersionOf CL:0000000; hasProperty HP:0032322
  species Tumor_cells in Whole_organism = 1;  // isVersionOf CL:0001063

  // Parameters:
  r = 0.4312;
  beta1 = 2.99e-6;
  gamma = 0.9314;
  alpha1 = 0.4426;
  alpha2 = 0.4;
  beta2 = 1.1891;

  // Reactions:
  Normal_cell_growth: => Normal_cells; Whole_organism*Rate_Law_for_N_increase(r, Normal_cells, beta1);  // isVersionOf GO:0008283
  Normal_cell_death_inhibition: Normal_cells => ; Whole_organism*Rate_Law_for_N_decrease(gamma, Normal_cells, Tumor_cells); Normal_cell_death_inhibition is "Normal_cell_death/inhibition";  // modifiers: Tumor_cells; isVersionOf GO:0008219
  Tumor_cell_growth: => Tumor_cells; Whole_organism*Rate_Law_for_T_increase(alpha1, Tumor_cells, alpha2, beta2, Normal_cells);  // modifiers: Normal_cells; isVersionOf GO:0008283

  // Unit definitions:
  unit length = metre;
  unit area = metre^2;
  unit volume = litre;
  unit time = 86400 second;
  unit substance = mole;
end
