// SBML level 2 version 4
// dcterms:bibliographicCitation: urn:miriam:doi:10.1109/ACCESS.2019.2940060

function Constant_flux__irreversible(v)
  v;
end
Constant_flux__irreversible is "Constant flux (irreversible)";

function Rate_Law_for_N_increase(r, N, beta1, c1, V)
  r*N*(1 - beta1*N) + c1*N*V;
end

function Rate_Law_for_N_decrease(gamma, N, T)
  gamma*N*T;
end

function Rate_Law_for_T_increase(alpha1, T, alpha2, beta2, N)
  alpha1*T*(1 - alpha2*T) + beta2*N*T;
end

function Rate_Law_for_T_decrease(c2, T, V)
  c2*T*V;
end

model Alharbi2019___Tumor_normal_vitamins_model__TNVM__of_the_effects_of_vitamins_on_delaying_the_growth_of_tumor_cells()
  // Alharbi2019 - Tumor-normal-vitamins model (TNVM) of the effects of vitamins on delaying the growth of tumor cells
  // This ordinary differential equation model of the interactions between tumor and normal cells, in the presence of a regular rate of vitamins, is based on the publication:
  // S. A. Alharbi and A. S. Rambely, "Dynamic Simulation for Analyzing the Effects of the Intervention of Vitamins on Delaying the Growth of Tumor Cells," in IEEE Access, vol. 7, pp. 128816-128827, 2019
  // doi: 10.1109/ACCESS.2019.2940060.
  // This TNVM model is described by the system of equations presented in (10), in the publication manuscript.
  // Reproduction of Fig. 11 was achieved by swapping the values of gamma and beta2 stated in the manuscript, i.e. gamma = 0.9817 and beta2 = 0.2291.
  // Abstract:
  // The natural sources of the vitamins, which come from a balanced diet (as recommended by the World Cancer Research Fund and the American Institute for Cancer Research) contribute to protecting the
  // body from advancing progressive of cancer stages. Thus, in this study, we analyze the effect of the intervention of vitamins on delaying the growth of cancer cells based on the dynamics of a normal
  // cell cycle when the tumor cells appear in a tissue as a resulting for progressing abnormal cells due to the weak response of the immune system. We developed a mathematical model, called
  // tumor-normal-vitamins model (TNVM), which is governed by a system of ordinary differential equations and refers to two main populations normal cells and tumor cells. This model considers the
  // intervention of vitamins as a moderating factor within thirty days. The models are discussed analytically and numerically by utilizing the Runge-Kutta method to simulate them. The results of the
  // analysis and simulation of free model illustrate that the model will be stable if the tumor cells succeed in eliminating normal cells in the tissue. Whereas, the analysis and simulation of the TNVM
  // showed a case of coexistence between normal cells and tumor cells occur if an individual consumes a regular rate of vitamins that have been simulated to be 87% per day from a natural food source.
  // Even though the response of the immune system is weak, the daily consumption of enough vitamins can play an essential role in delaying the development of an early stage of cancer. This study
  // contributes to the increasing awareness regarding a healthy diet to reduce the risk of some deadly diseases, especially cancer.
  // biomodels.db:MODEL2108260003 biomodels.db:BIOMD0000001038
  // isVersionOf GO:0002347
  // isPropertyOf efo:0002755
  // isPropertyOf ncit:C18670
  // isPropertyOf DOID:162
  // isPropertyOf ncit:C16016

  // Compartments:
  compartment Whole_organism = 1;  // isVersionOf ncit:C13413; hasProperty PATO:0001993

  // Species:
  species Normal_cells in Whole_organism = 1;  // isVersionOf CL:0000000; hasProperty HP:0032322
  species Tumor_cells in Whole_organism = 1;  // isVersionOf CL:0001063
  species Vitamins in Whole_organism = 5;  // isVersionOf ncit:C944

  // Parameters:
  r = 0.4312;
  beta1 = 2.99e-6;
  gamma = 0.9817;
  alpha1 = 0.4426;
  alpha2 = 0.4;
  beta2 = 0.2291;
  k1 = 0.8976;
  k2 = 0.9611;
  c1 = 0.2215;
  c2 = 0.4975;

  // Reactions:
  Normal_cell_growth: => Normal_cells; Whole_organism*Rate_Law_for_N_increase(r, Normal_cells, beta1, c1, Vitamins);  // modifiers: Vitamins; isVersionOf GO:0008283
  Normal_cell_death_inhibition: Normal_cells => ; Whole_organism*Rate_Law_for_N_decrease(gamma, Normal_cells, Tumor_cells); Normal_cell_death_inhibition is "Normal_cell_death/inhibition";  // modifiers: Tumor_cells; isVersionOf GO:0008219
  Tumor_cell_growth: => Tumor_cells; Whole_organism*Rate_Law_for_T_increase(alpha1, Tumor_cells, alpha2, beta2, Normal_cells);  // modifiers: Normal_cells; isVersionOf GO:0008283
  Tumor_cell_inhibition: Tumor_cells => ; Whole_organism*Rate_Law_for_T_decrease(c2, Tumor_cells, Vitamins);  // modifiers: Vitamins
  Vitamin_intake: => Vitamins; Whole_organism*Constant_flux__irreversible(k1);  // isVersionOf ncit:C25538
  Vitamin_decay: Vitamins => ; Whole_organism*k2*Vitamins;

  // Unit definitions:
  unit length = metre;
  unit area = metre^2;
  unit volume = litre;
  unit time = 86400 second;
  unit substance = mole;
end
