// SBML level 2 version 4
// dcterms:bibliographicCitation: urn:miriam:pubmed:33757357

function Rate_Law_for_Normal_T_cell_population_growth(r_N, N, C, K_N)
  -r_N*N*ln((N + C)/K_N);
end

function Rate_Law_for_Tumour_growth(r_B, B)
  r_B*B;
end

function Rate_Law_for_Tumour_killing(gamma_B, B, C, k_B)
  gamma_B*B*(C/(k_B + C));
end

function Rate_Law_for_CAR_T_cell_population_growth(r_C, C, N, K_C)
  -r_C*C*ln((N + C)/K_C);
end

model Kimmel2021___T_cell_competition_and_stochastic_extinction_events_in_CAR_T_cell_therapy()
  // Kimmel2021 - T cell competition and stochastic extinction events in CAR T cell therapy
  // This mathematical model of T cell-tumour interactions considering the roles of T cell competition and stochastic extinction events in CAR T cell therapy is described by the publication:
  // Kimmel GJ, Locke FL, Altrock PM. "The roles of T cell competition and stochastic extinction events in chimeric antigen receptor T cell therapy." Proc Biol Sci. 2021 Mar 31;288(1947):20210229.
  // doi: 10.1098/rspb.2021.0229
  // Reproduction of Fig. 2(a) and (b) was simulated by using the fitted model parameter set given in Table 1 of the manuscript's Supplementary Material, however substituting the values of r_N and rho_C
  // for those stated in Table 1 of the publication manuscript, i.e. r_N = 0.17 and rho_C = 0.0251.
  // Abstract:
  // Chimeric antigen receptor (CAR) T cell therapy is a remarkably effective immunotherapy that relies on in vivo expansion of engineered CAR T cells, after lymphodepletion (LD) by chemotherapy. The
  // quantitative laws underlying this expansion and subsequent tumour eradication remain unknown. We develop a mathematical model of T cell–tumour cell interactions and demonstrate that expansion can be
  // explained by immune reconstitution dynamics after LD and competition among T cells. CAR T cells rapidly grow and engage tumour cells but experience an emerging growth rate disadvantage compared to
  // normal T cells. Since tumour eradication is deterministically unstable in our model, we define cure as a stochastic event, which, even when likely, can occur at variable times. However, we show that
  // variability in timing is largely determined by patient variability. While cure events impacted by these fluctuations occur early and are narrowly distributed, progression events occur late and are
  // more widely distributed in time. We parameterized our model using population-level CAR T cell and tumour data over time and compare our predictions with progression-free survival rates. We find that
  // therapy could be improved by optimizing the tumour-killing rate and the CAR T cells' ability to adapt, as quantified by their carrying capacity. Our tumour extinction model can be leveraged to
  // examine why therapy works in some patients but not others, and to better understand the interplay of deterministic and stochastic effects on outcomes. For example, our model implies that LD before a
  // second CAR T injection is necessary.
  // biomodels.db:MODEL2109010001 biomodels.db:BIOMD0000001041
  // isPropertyOf ncit:C15438
  // isPropertyOf ncit:C126102
  // hasTaxon taxonomy:9606
  // isDescribedBy pubmed:33757357
  // hasProperty DOID:0060060 GO:0002837 mamo:MAMO_0000046

  // Compartments:
  compartment compartment = 1;

  // Species:
  species Normal_T_cells in compartment = 6;  // isVersionOf CL:0000084
  species CAR_T_cells in compartment = 0.36;  // isVersionOf CL:0000084; isVersionOf ncit:C137999
  species Antigen_presenting_tumour_cells in compartment = 94.86; Antigen_presenting_tumour_cells is "Antigen-presenting_tumour_cells";  // isVersionOf CL:0001063; isVersionOf CL:0001201; hasProperty CHEBI:144829
  species $Total_lymphocyte_count in compartment;  // isVersionOf CL:0000084; isVersionOf ncit:C122157

  // Parameters:
  K_N = 500 unit_0;
  K_C = 139 unit_0;
  r_N = 0.17 unit_1;
  rho_C = 0.0251 unit_1;
  a = 0.423;
  b = 0.525 unit_2;
  r_B = 0.01 unit_1;
  gamma_B = 1.15 unit_1;
  k_B = 4.05 unit_0;

  // Assignment rules:
  Total_lymphocyte_count := Normal_T_cells + CAR_T_cells;
  r_C := rho_C + b*(Total_lymphocyte_count - K_N)^2/(a*Total_lymphocyte_count^2 + (Total_lymphocyte_count - K_N)^2);

  // Reactions:
  Normal_T_cell_population_growth: => Normal_T_cells; compartment*Rate_Law_for_Normal_T_cell_population_growth(r_N, Normal_T_cells, CAR_T_cells, K_N);  // modifiers: CAR_T_cells; isVersionOf GO:0042098
  CAR_T_cell_population_growth: => CAR_T_cells; compartment*Rate_Law_for_CAR_T_cell_population_growth(r_C, CAR_T_cells, Normal_T_cells, K_C);  // modifiers: Normal_T_cells; isVersionOf GO:0042098
  Tumour_growth: => Antigen_presenting_tumour_cells; compartment*Rate_Law_for_Tumour_growth(r_B, Antigen_presenting_tumour_cells);  // isVersionOf GO:0008283
  Tumour_killing: Antigen_presenting_tumour_cells => ; compartment*Rate_Law_for_Tumour_killing(gamma_B, Antigen_presenting_tumour_cells, CAR_T_cells, k_B);  // modifiers: CAR_T_cells; isVersionOf GO:0001906; isVersionOf obi:OBI_1110204

  // Unit definitions:
  unit length = metre;
  unit area = metre^2;
  unit volume = 1e-3 litre;
  unit time = 86400 second;
  unit substance = item;
  unit unit_0 = item / (1e-6 litre); unit_0 is "#/ul";
  unit unit_1 = 1 / (86400 second); unit_1 is "1/d";
  unit unit_2 = 86400 second; unit_2 is "d";
end
