// SBML level 2 version 4
// dcterms:bibliographicCitation: urn:miriam:pubmed:32148558

function Constant_flux__irreversible(v)
  v;
end
Constant_flux__irreversible is "Constant flux (irreversible)";

function Rate_Law_for_Tumour_growth(a, T, b)
  a*T*(1 - b*T);
end

function Rate_Law_for_CD4_T_cell_production(beta_1, T, alpha_1, I)
  beta_1*T/(alpha_1 + T)*I;
end

function Rate_Law_for_NK_cell_production(e, C, g, T, h, N)
  e*C + g*T^2/(h + T^2)*N;
end

function Rate_Law_for_IL_2_production(beta_2, T, alpha_2, Y)
  beta_2*T/(alpha_2 + T)*Y;
end
Rate_Law_for_IL_2_production is "Rate Law for IL-2_production";

function Rate_Law_for_CD8_T_cell_production(j, D, T, k, L, r_1, N, r_2, C, p_i, I, g_i)
  j*D^2*T^2/(k + D^2*T^2)*L + (r_1*N + r_2*C)*T + p_i*I/(g_i + I)*L;
end

function Rate_Law_for_NK_cell_depletion(f, N, p, T)
  f*N + p*N*T;
end

function Rate_Law_for_CD4_T_cell_depletion(mu_1, Y, delta_2, T)
  mu_1*Y + delta_2*T*Y;
end

function Rate_Law_for_CD8_T_cell_depletion(m, L, q, T, u, N)
  m*L + q*L*T + u*N*L^2;
end

function Rate_Law_for_Tumour_death(c, N, T, D, c_1, a_1, I)
  c*N*T + D*T + c_1*T/(a_1 + T)*I;
end

model Makhlouf2020___No_treatment_model_of_the_role_of_CD4_T_cells_in_tumor_immune_interactions()
  // Makhlouf2020 - No treatment model of the role of CD4 T cells in tumor-immune interactions
  // This ordinary differential equation model simulating the interactions between tumor and immune cells is detailed in the publication:
  // Ahmed M. Makhlouf, Lamiaa El-Shennawy, Hesham A. Elkaranshawy, "Mathematical Modelling for the Role of CD4+T Cells in Tumor-Immune Interactions", Comput Math Methods Med. 2020 Feb 19;2020:7187602.
  // doi: 10.1155/2020/7187602
  // This no treatment model is described by equations 1-7 of the publication manuscript.
  // Abstract:
  // Mathematical modelling has been used to study tumor-immune cell interaction. Some models were proposed to examine the effect of circulating lymphocytes, natural killer cells, and CD8+T cells, but
  // they neglected the role of CD4+T cells. Other models were constructed to study the role of CD4+T cells but did not consider the role of other immune cells. In this study, we propose a mathematical
  // model, in the form of a system of nonlinear ordinary differential equations, that predicts the interaction between tumor cells and natural killer cells, CD4+T cells, CD8+T cells, and circulating
  // lymphocytes with or without immunotherapy and/or chemotherapy. This system is stiff, and the Runge–Kutta method failed to solve it. Consequently, the “Adams predictor-corrector” method is used. The
  // results reveal that the patient’s immune system can overcome small tumors; however, if the tumor is large, adoptive therapy with CD4+T cells can be an alternative to both CD8+T cell therapy and
  // cytokines in some cases. Moreover, CD4+T cell therapy could replace chemotherapy depending upon tumor size. Even if a combination of chemotherapy and immunotherapy is necessary, using CD4+T cell
  // therapy can better reduce the dose of the associated chemotherapy compared to using combined CD8+T cells and cytokine therapy. Stability analysis is performed for the studied patients. It has been
  // found that all equilibrium points are unstable, and a condition for preventing tumor recurrence after treatment has been deduced. Finally, a bifurcation analysis is performed to study the effect of
  // varying system parameters on the stability, and bifurcation points are specified. New equilibrium points are created or demolished at some bifurcation points, and stability is changed at some others.
  // Hence, for systems turning to be stable, tumors can be eradicated without the possibility of recurrence. The proposed mathematical model provides a valuable tool for designing patients’ treatment
  // intervention strategies.
  // biomodels.db:MODEL2109060001 biomodels.db:BIOMD0000001042
  // isPropertyOf GO:0002418
  // isPropertyOf DOID:162
  // isPropertyOf ncit:C18670
  // hasTaxon taxonomy:9606
  // isDescribedBy pubmed:32148558

  // Compartments:
  compartment Tumor_microenvironment = 1;  // isVersionOf ncit:C94498

  // Species:
  species Tumor_cells in Tumor_microenvironment = 10000000;  // isVersionOf CL:0001063
  species NK_cells in Tumor_microenvironment = 1000;  // isVersionOf CL:0000623
  species CD8_T_cells in Tumor_microenvironment = 100;  // isVersionOf CL:0000625
  species CD4_T_cells in Tumor_microenvironment = 1000000;  // isVersionOf CL:0000492
  species Circulating_lymphocytes in Tumor_microenvironment = 6e10;  // isVersionOf CL:0000542; isVersionOf CL:0000080
  species IL_2 in Tumor_microenvironment = 100000; IL_2 is "IL-2";  // isVersionOf PR:000001379

  // Parameters:
  a = 0.431 unit_0;
  a_1 = 100000 unit_1;
  b = 1.02e-9 unit_2;
  c = 6.41e-11 unit_3;
  c_1 = 0.2 unit_4;
  d = 2.34 unit_0;
  e = 2.08e-7 unit_0;
  f = 0.0412 unit_0;
  g = 0.0125 unit_0;
  g_i = 20000000 unit_5;
  h = 20200000 unit_5;
  j = 0.0249 unit_0;
  k = 36600000 unit_5;
  l = 2.09;
  m = 0.204 unit_0;
  p = 3.42e-6 unit_6;
  p_i = 0.125 unit_0;
  q = 1.42e-6 unit_3;
  r_1 = 1.1e-7 unit_3;
  r_2 = 6.5e-11 unit_6;
  s = 0.0839;
  u = 3e-10 unit_7;
  alpha = 750000000 unit_4;
  alpha_1 = 1000 unit_1;
  alpha_2 = 1000 unit_1;
  beta = 0.012 unit_0;
  beta_1 = 0.835 unit_4;
  beta_2 = 5.4 unit_6;
  mu_1 = 0.1 unit_0;
  mu_i = 10 unit_0;
  delta_2 = 1e-7 unit_6;

  // Assignment rules:
  D := d*((CD8_T_cells/(Tumor_cells + 1e-10))^l/(s + (CD8_T_cells/(Tumor_cells + 1e-10))^l));

  // Reactions:
  Tumour_growth: => Tumor_cells; Tumor_microenvironment*Rate_Law_for_Tumour_growth(a, Tumor_cells, b);  // isVersionOf GO:0008283
  Tumour_death: Tumor_cells => ; Tumor_microenvironment*Rate_Law_for_Tumour_death(c, NK_cells, Tumor_cells, D, c_1, a_1, IL_2);  // modifiers: NK_cells, IL_2; isVersionOf GO:0008219; isVersionOf GO:0001906
  NK_cell_production: => NK_cells; Tumor_microenvironment*Rate_Law_for_NK_cell_production(e, Circulating_lymphocytes, g, Tumor_cells, h, NK_cells);  // modifiers: Circulating_lymphocytes, Tumor_cells; isVersionOf GO:0008283
  NK_cell_depletion: NK_cells => ; Tumor_microenvironment*Rate_Law_for_NK_cell_depletion(f, NK_cells, p, Tumor_cells);  // modifiers: Tumor_cells; isVersionOf GO:0008219
  CD8_T_cell_production: => CD8_T_cells; Tumor_microenvironment*Rate_Law_for_CD8_T_cell_production(j, D, Tumor_cells, k, CD8_T_cells, r_1, NK_cells, r_2, Circulating_lymphocytes, p_i, IL_2, g_i);  // modifiers: Tumor_cells, NK_cells, Circulating_lymphocytes, IL_2; isVersionOf GO:0042098
  CD8_T_cell_depletion: CD8_T_cells => ; Tumor_microenvironment*Rate_Law_for_CD8_T_cell_depletion(m, CD8_T_cells, q, Tumor_cells, u, NK_cells);  // modifiers: Tumor_cells, NK_cells; isVersionOf GO:0008219
  CD4_T_cell_production: => CD4_T_cells; Tumor_microenvironment*Rate_Law_for_CD4_T_cell_production(beta_1, Tumor_cells, alpha_1, IL_2);  // modifiers: Tumor_cells, IL_2; isVersionOf GO:0042098
  CD4_T_cell_depletion: CD4_T_cells => ; Tumor_microenvironment*Rate_Law_for_CD4_T_cell_depletion(mu_1, CD4_T_cells, delta_2, Tumor_cells);  // modifiers: Tumor_cells; isVersionOf GO:0008219
  Circulating_lymphocyte_production: => Circulating_lymphocytes; Tumor_microenvironment*Constant_flux__irreversible(alpha);  // isVersionOf GO:0008283
  Circulating_lymphocyte_depletion: Circulating_lymphocytes => ; Tumor_microenvironment*beta*Circulating_lymphocytes;  // isVersionOf GO:0008219
  IL_2_production: => IL_2; Tumor_microenvironment*Rate_Law_for_IL_2_production(beta_2, Tumor_cells, alpha_2, CD4_T_cells); IL_2_production is "IL-2_production";  // modifiers: Tumor_cells, CD4_T_cells
  IL_2_depletion: IL_2 => ; Tumor_microenvironment*mu_i*IL_2; IL_2_depletion is "IL-2_depletion";

  // Unit definitions:
  unit length = metre;
  unit area = metre^2;
  unit volume = litre;
  unit time = 86400 second;
  unit substance = item;
  unit unit_0 = 1 / (86400 second); unit_0 is "1/d";
  unit unit_1 = item; unit_1 is "#";
  unit unit_2 = 1 / item; unit_2 is "1/#";
  unit unit_3 = item / (86400 second); unit_3 is "1/d*#";
  unit unit_4 = item / (86400 second); unit_4 is "#/d";
  unit unit_5 = item^2; unit_5 is "#^2";
  unit unit_6 = 86400 second / item; unit_6 is "1/#*d";
  unit unit_7 = 86400 second / item^2; unit_7 is "1/#^2*d";
end
