// SBML level 2 version 4
// dcterms:bibliographicCitation: urn:miriam:pubmed:11309314

function Rate_Law_for_x_increase(r, x, y, k)
  r*x*(1 - (x + y)/k);
end

function Rate_Law_for_y_increase(s, y, x, k)
  s*y*(1 - (x + y)/k);
end

function Rate_Law_for_y_decrease(a, y, p_v, z_v)
  a*y + p_v*y*z_v;
end

function Rate_Law_for_x_to_y(beta, x, y)
  beta*x*y;
end

function Rate_Law_for_z_v_increase(c_v, y, z_v)
  c_v*y*z_v;
end

model Wodarz2001___Viruses_as_antitumor_weapons()
  // Wodarz2001 - Viruses as antitumor weapons
  // This mathematical model of the dynamics between tumor, virus and virus-specific CTL populations is described by the publication:
  // Wodarz D. "Viruses as antitumor weapons: defining conditions for tumor remission". Cancer Res. 2001 Apr 15;61(8):3501-7.
  // PMID: 11309314
  // Reproduction of Fig. 3A was achieved by using the initial conditions infected_tumor_cells = 0.01, uninfected_tumor_cells = 0.0001, virus-specific_CTLs = 0, and with modified parameter sets.
  // For Fig. 3A non-cytotoxic virus, k = 17 and beta= 0.5.
  // For Fig. 3A cytotoxic virus, beta = 0.5.
  // These simulation conditions yield plots similar to Fig. 3A in the manuscript.
  // Abstract:
  // Recent research has indicated that viruses specifically infecting tumor cells could be used as an alternative therapeutic approach in cancer patients. A particular example is the adenovirus ONYX-015,
  // which has entered clinical trials in the context of head and neck cancer. Successful therapy crucially requires an understanding about how viral and host parameters influence tumor load. The
  // interactions between the growing tumor, the replicating virus, and possible immune responses are multifactorial and nonlinear. Hence, a complete understanding of how virus and host characteristics
  // influence the outcome of therapy requires mathematical models. In this study, such mathematical models are presented and analyzed. The study investigates three possible scenarios that could be
  // relevant for therapy: (a) viral cytotoxicity alone kills tumor cells; (b) a virus-specific lytic CTL response contributes to killing of infected tumor cells; (c) the virus elicits immunostimulatory
  // signals within the tumor that promote the development of tumor-specific CTL. The models precisely define conditions required for successful therapy. They identify the parameters that need to be
  // measured and modulated to evaluate and refine the existing therapy regimes.
  // biomodels.db:MODEL2109090001 biomodels.db:BIOMD0000001043
  // isPropertyOf ncit:C62713
  // isPropertyOf ncit:C15438
  // hasTaxon taxonomy:9606
  // isDescribedBy pubmed:11309314
  // hasProperty GO:0002837 DOID:162 GO:0046730 mamo:MAMO_0000046

  // Compartments:
  compartment Tumor_microenvironment = 1;  // isVersionOf ncit:C94498

  // Species:
  species uninfected_tumor_cells in Tumor_microenvironment = 0.01;  // isVersionOf CL:0001063; hasProperty CHEBI:144829; hasProperty efo:0001460
  species infected_tumor_cells in Tumor_microenvironment = 0.0001;  // isVersionOf CL:0001063; isVersionOf BTO:0000152; hasProperty CHEBI:144829
  species virus_specific_CTLs in Tumor_microenvironment = 0; virus_specific_CTLs is "virus-specific_CTLs";  // isVersionOf ncit:C131870; isVersionOf CL:0000910
  species $overall_tumor_size in Tumor_microenvironment;  // isVersionOf CL:0001063; hasProperty CHEBI:144829

  // Parameters:
  r = 0.5;
  k = 17;
  d = 0.1;
  beta = 0.5;
  s = 0;
  a = 0.1;
  p_v = 0;
  c_v = 0;
  b = 0;

  // Assignment rules:
  overall_tumor_size := uninfected_tumor_cells + infected_tumor_cells;

  // Reactions:
  uninfected_tumor_growth: => uninfected_tumor_cells; Tumor_microenvironment*Rate_Law_for_x_increase(r, uninfected_tumor_cells, infected_tumor_cells, k);  // modifiers: infected_tumor_cells; isVersionOf GO:0008283
  uninfected_tumor_death: uninfected_tumor_cells => ; Tumor_microenvironment*d*uninfected_tumor_cells;  // isVersionOf GO:0008219
  infected_tumor_growth: => infected_tumor_cells; Tumor_microenvironment*Rate_Law_for_y_increase(s, infected_tumor_cells, uninfected_tumor_cells, k);  // modifiers: uninfected_tumor_cells; isVersionOf GO:0008283
  infected_tumor_death: infected_tumor_cells => ; Tumor_microenvironment*Rate_Law_for_y_decrease(a, infected_tumor_cells, p_v, virus_specific_CTLs);  // modifiers: virus_specific_CTLs; isVersionOf GO:0001906; isVersionOf GO:0008219
  tumor_infection: uninfected_tumor_cells => infected_tumor_cells; Tumor_microenvironment*Rate_Law_for_x_to_y(beta, uninfected_tumor_cells, infected_tumor_cells);  // isVersionOf ncit:C3439; isVersionOf ido:0000586
  virus_specific_CTL_expansion: => virus_specific_CTLs; Tumor_microenvironment*Rate_Law_for_z_v_increase(c_v, infected_tumor_cells, virus_specific_CTLs); virus_specific_CTL_expansion is "virus-specific_CTL_expansion";  // modifiers: infected_tumor_cells; isVersionOf GO:0042098
  virus_specific_CTLs_decay: virus_specific_CTLs => ; Tumor_microenvironment*b*virus_specific_CTLs; virus_specific_CTLs_decay is "virus-specific_CTLs_decay";

  // Events:
  virotherapy: at (time == 20): virus_specific_CTLs = 0.001;

  // Unit definitions:
  unit length = metre;
  unit area = metre^2;
  unit volume = litre;
  unit time = second;
  unit substance = mole;
end
