// SBML level 2 version 4
// dcterms:bibliographicCitation: urn:miriam:doi:---

function Rate_Law_for_Susceptible_to_Infected(beta, I, S)
  beta*I*S;
end

model Smith_Moore2004___The_SIR_Model_for_Spread_of_Disease()
  // Smith&Moore2004 - The SIR model for the spread of HongKong Flu
  // This is the SIR model for disease spread of the Hong Kong flu in New York City in the late 1960's.
  // unknownQualifier mamo:MAMO_0000028
  // unknownQualifier mamo:MAMO_0000046
  // biomodels.db:MODEL2201270001 biomodels.db:BIOMD0000001045
  // hasVersion DOID:8469
  // hasTaxon taxonomy:506350
  // hasTaxon taxonomy:9606

  // Compartments:
  compartment New_York_1968_69 = 1;  // isVersionOf ncit:C25632; isVersionOf ncit:C43468

  // Species:
  species Infected in New_York_1968_69 = 1.27e-6;  // isVersionOf ncit:C77737; isVersionOf ido:0000511
  species Recovered in New_York_1968_69 = 0;  // isVersionOf ncit:C77737; isVersionOf ido:0000592
  species Susceptible in New_York_1968_69 = 1;  // isVersionOf ncit:C77737; isVersionOf ido:0000514

  // Parameters:
  beta = 0.5;
  k = 0.33;

  // Reactions:
  Susceptible_to_Infected: Susceptible => Infected; New_York_1968_69*Rate_Law_for_Susceptible_to_Infected(beta, Infected, Susceptible);  // isVersionOf ncit:C128320; isVersionOf ncit:C77737
  Infected_to_Recovered: Infected => Recovered; New_York_1968_69*k*Infected;  // isVersionOf ncit:C25746; isVersionOf ncit:C77737

  // Unit definitions:
  unit length = metre;
  unit area = metre^2;
  unit volume = dimensionless^0;
  unit time = 86400 second;
  unit substance = item;
end
