// SBML level 2 version 4
// dcterms:bibliographicCitation: urn:miriam:pubmed:34380040

function Function_for_v_5(EpoRActJAK2, SOCS3, SOCS3Eqc, SOCS3Inh, p2EpoRpJAK2)
  EpoRActJAK2*p2EpoRpJAK2/(SOCS3*SOCS3Inh/SOCS3Eqc + 1);
end

function Function_for_v_21(CISEqc, CISRNA, CISTurn)
  CISRNA*CISEqc*CISTurn;
end

function Function_for_v_0(Epo, EpoRJAK2, JAK2ActEpo, SOCS3, SOCS3Eqc, SOCS3Inh)
  Epo*EpoRJAK2*JAK2ActEpo/(SOCS3*SOCS3Inh/SOCS3Eqc + 1);
end

function Function_for_v_13(EpoRpJAK2, SOCS3, SOCS3Eqc, SOCS3Inh, STAT5, STAT5ActJAK2, p12EpoRpJAK2, p1EpoRpJAK2, p2EpoRpJAK2)
  STAT5*STAT5ActJAK2*(EpoRpJAK2 + p12EpoRpJAK2 + p1EpoRpJAK2 + p2EpoRpJAK2)/(SOCS3*SOCS3Inh/SOCS3Eqc + 1);
end

function Function_for_v_25(SOCS3Eqc, SOCS3EqcOE, SOCS3Turn, SOCS3oe)
  SOCS3oe*SOCS3Eqc*SOCS3Turn*SOCS3EqcOE;
end

function Function_for_v_1(DeaEpoRJAKActSHP1, EpoRpJAK2, SHP1Act, SHP1ActEpoR)
  DeaEpoRJAKActSHP1*EpoRpJAK2*SHP1Act/SHP1ActEpoR;
end

function Function_for_v_6(DeaEpoRJAKActSHP1, SHP1Act, SHP1ActEpoR, p1EpoRpJAK2)
  DeaEpoRJAKActSHP1*SHP1Act*p1EpoRpJAK2/SHP1ActEpoR;
end

function Function_for_v_8(DeaEpoRJAKActSHP1, SHP1Act, SHP1ActEpoR, p12EpoRpJAK2)
  DeaEpoRJAKActSHP1*SHP1Act*p12EpoRpJAK2/SHP1ActEpoR;
end

function Function_for_v_7(DeaEpoRJAKActSHP1, SHP1Act, SHP1ActEpoR, p2EpoRpJAK2)
  DeaEpoRJAKActSHP1*SHP1Act*p2EpoRpJAK2/SHP1ActEpoR;
end

function Function_for_v_11(EpoRpJAK2, SHP1, SHP1ActEpoR, p12EpoRpJAK2, p1EpoRpJAK2, p2EpoRpJAK2)
  SHP1*SHP1ActEpoR*(EpoRpJAK2 + p12EpoRpJAK2 + p1EpoRpJAK2 + p2EpoRpJAK2);
end

function Function_for_v_16(STAT5Exp, npSTAT5, nuc)
  nuc*STAT5Exp*npSTAT5;
end

function Function_for_v_3(EpoRActJAK2, EpoRpJAK2, SOCS3, SOCS3Eqc, SOCS3Inh)
  3*EpoRpJAK2*EpoRActJAK2/(SOCS3*SOCS3Inh/SOCS3Eqc + 1);
end

function Function_for_v_2(EpoRActJAK2, EpoRpJAK2, SOCS3, SOCS3Eqc, SOCS3Inh)
  EpoRpJAK2*EpoRActJAK2/(SOCS3*SOCS3Inh/SOCS3Eqc + 1);
end

function Function_for_v_14(CIS, CISEqc, CISInh, SOCS3, SOCS3Eqc, SOCS3Inh, STAT5, STAT5ActEpoR, p12EpoRpJAK2, p1EpoRpJAK2)
  STAT5*STAT5ActEpoR*(p12EpoRpJAK2 + p1EpoRpJAK2)^2/((SOCS3*SOCS3Inh/SOCS3Eqc + 1)*(CIS*CISInh/CISEqc + 1));
end

function Function_for_v_19(CISRNADelay, CISnRNA2, nuc)
  nuc*CISnRNA2*CISRNADelay;
end

function Function_for_v_17(ActD, CISRNAEqc, CISRNATurn, npSTAT5)
  -CISRNAEqc*CISRNATurn*npSTAT5*(ActD - 1);
end

function Function_for_v_15(STAT5Imp, cyt, pSTAT5)
  cyt*STAT5Imp*pSTAT5;
end

function Function_for_v_23(ActD, SOCS3Eqc, SOCS3Turn, cyt, npSTAT5)
  cyt*(-SOCS3Eqc)*SOCS3Turn*npSTAT5*(ActD - 1);
end

function Function_for_v_4(EpoRActJAK2, SOCS3, SOCS3Eqc, SOCS3Inh, p1EpoRpJAK2)
  3*EpoRActJAK2*p1EpoRpJAK2/(SOCS3*SOCS3Inh/SOCS3Eqc + 1);
end

model Adlung2021___Cell_to_cell_variability_in_JAK2_STAT5_pathway()
  // Adlung2021 - Cell-to-cell variability in JAK2/STAT5 pathway
  // A mathematical model for cell-to-cell variability in JAK2/STAT5 pathway components and cytoplasmic volumes defines survival threshold in erythroid progenitor cells
  // hasProperty mamo:MAMO_0000046
  // isDescribedBy pubmed:34380040
  // occursIn BTO:0004911
  // hasTaxon taxonomy:9606
  // isDescribedBy pubmed:34380040
  // hasProperty GO:0038162 GO:0046427 mamo:MAMO_0000046

  // Compartments:
  compartment cyt = 0.4;  // GO:0005829
  compartment nuc = 0.275;  // GO:0005634

  // Species:
  species EpoRJAK2 in cyt = init_EpoRJAK2;  // hasPart uniprot:O60674; hasPart uniprot:P19235; hasPart uniprot:P01588
  species EpoRpJAK2 in cyt = 0;  // hasPart uniprot:P19235; hasPart uniprot:P01588; hasPart uniprot:O60674; hasProperty bao:0002007
  species p1EpoRpJAK2 in cyt = 0;  // hasPart uniprot:O60674; hasPart uniprot:P01588; hasPart uniprot:P19235; hasProperty bao:0002007
  species p2EpoRpJAK2 in cyt = 0;  // hasPart uniprot:P19235; hasPart uniprot:O60674; hasPart uniprot:P01588; hasProperty bao:0002007
  species p12EpoRpJAK2 in cyt = 0;  // hasPart uniprot:O60674; hasPart uniprot:P19235; hasPart uniprot:P01588; hasProperty bao:0002007
  species SHP1 in cyt = init_SHP1;  // uniprot:P29350
  species SHP1Act in cyt = 0;  // uniprot:P29350; hasProperty bao:0002007
  species STAT5 in cyt = init_STAT5;  // uniprot:P42229
  species pSTAT5 in cyt = 0;  // uniprot:P42229; hasProperty bao:0002007
  species npSTAT5 in nuc = 0;  // uniprot:P42229; hasProperty bao:0002007
  species CISnRNA1 in nuc = 0;  // uniprot:Q9NSE2; efo:0003738
  species CISnRNA2 in nuc = 0;  // efo:0003738; uniprot:Q9NSE2
  species CISRNA in cyt = 0;  // uniprot:Q9NSE2; efo:0003738
  species CIS in cyt = 0;  // uniprot:Q9NSE2
  species SOCS3 in cyt = 0;  // uniprot:O14543

  // Parameters:
  ActD = 0;
  CISEqc = 0.7675388;
  CISInh = 4.383404e8;
  CISRNADelay = 0.1198453;
  CISRNAEqc = 1;
  CISRNATurn = 0.1198094;
  CISTurn = 0.01782329;
  DeaEpoRJAKActSHP1 = 0.0008859103;
  EpoRActJAK2 = 0.3262379;
  JAK2ActEpo = 0.05207698;
  SHP1ActEpoR = 1;
  SHP1Dea = 0.005573928;
  SOCS3Eqc = 0.1624938;
  SOCS3EqcOE = 828.0616;
  SOCS3Inh = 0.01034135;
  SOCS3Turn = 0.08060054;
  SOCS3oe = 0;
  STAT5ActEpoR = 0.2991367;
  STAT5ActJAK2 = 0.05132538;
  STAT5Exp = 0.01121571;
  STAT5Imp = 0.04047635;
  epo_level = 20;
  init_EpoRJAK2 = 3.975048;
  init_SHP1 = 26.72362;
  init_STAT5 = 79.72421;
  var _pSTAT5_Total_STAT5; _pSTAT5_Total_STAT5 is "%pSTAT5/Total_STAT5";

  // Assignment rules:
  Epo := epo_level;
  Total_STAT5 := STAT5 + pSTAT5 + 0.275*npSTAT5;
  measuralbe_pSTAT5 := pSTAT5/Total_STAT5*100;
  _pSTAT5_Total_STAT5 := pSTAT5/Total_STAT5*100;

  // Reactions:
  v1_v_0: EpoRJAK2 => EpoRpJAK2; cyt*Function_for_v_0(Epo, EpoRJAK2, JAK2ActEpo, SOCS3, SOCS3Eqc, SOCS3Inh);  // modifiers: SOCS3; hasProperty GO:0016310
  v2_v_1: EpoRpJAK2 => EpoRJAK2; cyt*Function_for_v_1(DeaEpoRJAKActSHP1, EpoRpJAK2, SHP1Act, SHP1ActEpoR);  // modifiers: SHP1Act; hasProperty GO:0016311
  v3_v_2: EpoRpJAK2 => p1EpoRpJAK2; cyt*Function_for_v_2(EpoRActJAK2, EpoRpJAK2, SOCS3, SOCS3Eqc, SOCS3Inh);  // modifiers: SOCS3; hasProperty GO:0016310
  v4_v_3: EpoRpJAK2 => p2EpoRpJAK2; cyt*Function_for_v_3(EpoRActJAK2, EpoRpJAK2, SOCS3, SOCS3Eqc, SOCS3Inh);  // modifiers: SOCS3; hasProperty GO:0016310
  v5_v_4: p1EpoRpJAK2 => p12EpoRpJAK2; cyt*Function_for_v_4(EpoRActJAK2, SOCS3, SOCS3Eqc, SOCS3Inh, p1EpoRpJAK2);  // modifiers: SOCS3; hasProperty GO:0016310
  v6_v_5: p2EpoRpJAK2 => p12EpoRpJAK2; cyt*Function_for_v_5(EpoRActJAK2, SOCS3, SOCS3Eqc, SOCS3Inh, p2EpoRpJAK2);  // modifiers: SOCS3; hasProperty GO:0016310
  v7_v_6: p1EpoRpJAK2 => EpoRJAK2; cyt*Function_for_v_6(DeaEpoRJAKActSHP1, SHP1Act, SHP1ActEpoR, p1EpoRpJAK2);  // modifiers: SHP1Act; hasProperty GO:0016311
  v8_v_7: p2EpoRpJAK2 => EpoRJAK2; cyt*Function_for_v_7(DeaEpoRJAKActSHP1, SHP1Act, SHP1ActEpoR, p2EpoRpJAK2);  // modifiers: SHP1Act; hasProperty GO:0016311
  v9_v_8: p12EpoRpJAK2 => EpoRJAK2; cyt*Function_for_v_8(DeaEpoRJAKActSHP1, SHP1Act, SHP1ActEpoR, p12EpoRpJAK2);  // modifiers: SHP1Act; hasProperty GO:0016311
  v12_v_11: => SHP1Act; cyt*Function_for_v_11(EpoRpJAK2, SHP1, SHP1ActEpoR, p12EpoRpJAK2, p1EpoRpJAK2, p2EpoRpJAK2);  // modifiers: EpoRpJAK2, SHP1, p12EpoRpJAK2, p1EpoRpJAK2, p2EpoRpJAK2; hasProperty GO:0010467
  v13_v_12: SHP1Act => ; cyt*SHP1Dea*SHP1Act;  // hasProperty SBO:0000179
  v14_v_13: STAT5 => pSTAT5; cyt*Function_for_v_13(EpoRpJAK2, SOCS3, SOCS3Eqc, SOCS3Inh, STAT5, STAT5ActJAK2, p12EpoRpJAK2, p1EpoRpJAK2, p2EpoRpJAK2);  // modifiers: EpoRpJAK2, SOCS3, p12EpoRpJAK2, p1EpoRpJAK2, p2EpoRpJAK2; hasProperty GO:0016310
  v15_v_14: STAT5 => pSTAT5; cyt*Function_for_v_14(CIS, CISEqc, CISInh, SOCS3, SOCS3Eqc, SOCS3Inh, STAT5, STAT5ActEpoR, p12EpoRpJAK2, p1EpoRpJAK2);  // modifiers: CIS, SOCS3, p12EpoRpJAK2, p1EpoRpJAK2; hasProperty GO:0016310
  v16_v_15: pSTAT5 => npSTAT5; Function_for_v_15(STAT5Imp, cyt, pSTAT5);  // hasProperty ncit:C28506
  v17_v_16: npSTAT5 => STAT5; Function_for_v_16(STAT5Exp, npSTAT5, nuc);  // hasProperty GO:0016311
  v18_v_17: => CISnRNA1; nuc*Function_for_v_17(ActD, CISRNAEqc, CISRNATurn, npSTAT5);  // modifiers: npSTAT5; hasProperty ncit:C17208
  v19_v_18: CISnRNA1 => CISnRNA2; nuc*CISRNADelay*CISnRNA1;  // hasProperty GO:0016556
  v20_v_19: CISnRNA2 => CISRNA; Function_for_v_19(CISRNADelay, CISnRNA2, nuc);  // hasProperty GO:0016556
  v21_v_20: CISRNA => ; cyt*CISRNATurn*CISRNA;  // hasProperty SBO:0000179
  v22_v_21: => CIS; cyt*Function_for_v_21(CISEqc, CISRNA, CISTurn);  // modifiers: CISRNA; hasProperty GO:0006412
  v23_v_22: CIS => ; cyt*CISTurn*CIS;  // hasProperty SBO:0000179
  v24_v_23: => SOCS3; Function_for_v_23(ActD, SOCS3Eqc, SOCS3Turn, cyt, npSTAT5);  // modifiers: npSTAT5; hasProperty ncit:C17208
  v25_v_24: SOCS3 => ; cyt*SOCS3Turn*SOCS3;  // hasProperty SBO:0000179
  v26_v_25: => SOCS3; cyt*Function_for_v_25(SOCS3Eqc, SOCS3EqcOE, SOCS3Turn, SOCS3oe);  // hasProperty GO:0006412

  // Unit definitions:
  unit length = metre;
  unit area = metre^2;
  unit volume = 1e-12 litre;
  unit time = 0.06 second;
  unit substance = mole;
end
