// SBML level 3 version 1

function Xi(x, alpha, r)
  1 + alpha*x*(x - 1)*(x - r);
end

model cellcycle_bistableapc()
  // Models the production and degradation of cyclin B that drives the early embryonic cell cycle. Cyclin B is degraded by APC/C. The activity of APC/C is modelled not through biochemical interactions, but through a "functional response curve". This can be ultrasensitive (with the parameter alpha = 0). In this case, the system does not oscillate. Importantly, the response can be made bistable and the form of the bistability can be easily prescribed. With a bistable response, the system oscillates. The uploaded file corresponds to the model used for Figs.3H, I in the publication.
  // isDescribedBy doi:10.1371/journal.pcbi.1009008
  // hasProperty mamo:MAMO_0000045
  // biomodels.db:MODEL2212060001

  // Compartments:
  compartment default_compartment = 1;

  // Species:
  species CycCdk in default_compartment = 0;

  // Parameters:
  ks = 1.1;
  bdeg = 0.1;
  APC = 0;
  epsilon = 0.01;
  n = 15;
  K = 20;
  alpha = 4.16;
  r = 0.5;

  // Rate rules:
  APC' = 1/epsilon*(CycCdk^n/((K*Xi(APC, alpha, r))^n + CycCdk^n) - APC);

  // Reactions:
  _J0: -> CycCdk; ks;
  _J1: CycCdk -> ; bdeg*CycCdk*APC;
end
