// SBML level 2 version 3

model Komarova2003_BoneRemodeling()
  // This a model from the article:
  // Mathematical model predicts a critical role for osteoclast autocrine regulation in the control of bone remodeling.
  // Komarova SV, Smith RJ, Dixon SJ, Sims SM, Wahl LM Bone2003 Aug;33(2):206-15 14499354,
  // Abstract:
  // Bone remodeling occurs asynchronously at multiple sites in the adult skeleton and involves resorption by osteoclasts, followed by formation of new bone by osteoblasts. Disruptions in bone remodeling contribute to the pathogenesis of disorderssuch as osteoporosis, osteoarthritis, and Paget's disease. Interactions among cells of osteoblast and osteoclast lineages are critical in the regulation of bone remodeling. We constructed a mathematical model of autocrine and paracrine interactions among osteoblasts and osteoclasts that allowed us to calculate cell population dynamics and changes in bone mass at a discrete site of bone remodeling. Themodel predicted different modes of dynamic behavior: a single remodeling cycle in response to an external stimulus, a series of internally regulated cycles of bone remodeling, or unstable behavior similar to pathological bone remodeling in Paget's disease. Parametric analysis demonstrated that the mode of dynamic behaviorin the system depends strongly on the regulation of osteoclasts by autocrine factors, such as transforming growth factor beta. Moreover, simulations demonstratedthat nonlinear dynamics of the system may explain the differing effects of immunosuppressants on bone remodeling in vitro and in vivo. In conclusion, the mathematical model revealed that interactions among osteoblasts and osteoclasts result in complex, nonlinear system behavior, which cannot be deduced from studies of each cell type alone. The model will be useful in future studies assessing the impact of cytokines, growth factors, and potential therapies on the overall process ofremodeling in normal bone and in pathological conditions such as osteoporosis and Paget's disease.
  // The model reproduces Fig 2A and Fig 2B of the paper. Note that the Y-axis scale is not right, the osteoblast steadystate is approximatley 212 and not 0 as depicted in the figure. Also, there is atypo in the equation for x2_bar which has been corrected here. Model successfully tested on MathSBML.
  // This model originates from BioModels Database: A Database of Annotated Published Models. It is copyright (c) 2005-2009 The BioModels Team.
  // For more information see the terms of use.
  // To cite BioModels Database, please use Le Novère N., Bornstein B., Broicher A., Courtot M., Donizelli M., Dharuri H., Li L., Sauro H., Schilstra M., Shapiro B., Snoep J.L., Hucka M. (2006) BioModels Database: A Free, Centralized Database of Curated, Published, Quantitative Kinetic Models of Biochemical and Cellular Systems Nucleic Acids Res., 34: D689-D691.
  // biomodels.db:MODEL6029826395
  // biomodels.db:BIOMD0000000148
  // isDescribedBy pubmed:14499354
  // occursIn taxonomy:7711
  // isVersionOf GO:0046850
  // hasProperty DOID:11476 DOID:8398 DOID:5408

  // Compartments:
  compartment compartment = 1;

  // Species:
  substanceOnly species Osteoclast in compartment = 11;
  substanceOnly species Osteoblast in compartment = 212;
  substanceOnly species x1_bar in compartment; x1_bar is "Steady state osteoclast";
  substanceOnly species x2_bar in compartment; x2_bar is "Steady state osteoblast";
  substanceOnly species z in compartment = 100; z is "Bone mass";
  substanceOnly species y1 in compartment = 0; y1 is "Cells actively resorbing bone";
  substanceOnly species y2 in compartment = 0; y2 is "Cells actively forming bone";

  // Parameters:
  alpha1 = 3;
  alpha2 = 4;
  beta1 = 0.2;
  beta2 = 0.02;
  g11 = 0.5;
  g21 = -0.5;
  g12 = 1;
  g22 = 0;
  k1 = 0.24;
  k2 = 0.0017;
  flag_resorption = 0;
  flag_formation = 0;

  // Assignment rules:
  gamma := g12*g21 - (1 - g11)*(1 - g22);
  x1_bar := (beta1/alpha1)^((1 - g22)/gamma)*(beta2/alpha2)^(g21/gamma);
  x2_bar := (beta1/alpha1)^(g12/gamma)*(beta2/alpha2)^((1 - g11)/gamma);

  // Reactions:
  Osteoclast_production: -> Osteoclast; alpha1*Osteoclast^g11*Osteoblast^g21;  // modifiers: Osteoblast; isVersionOf GO:0045672
  Osteoclast_removal: Osteoclast -> ; beta1*Osteoclast;  // isVersionOf GO:0045671
  Osteoblast_production: -> Osteoblast; alpha2*Osteoclast^g12*Osteoblast^g22;  // modifiers: Osteoclast; isVersionOf GO:0045669
  Osteoblast_removal: Osteoblast -> ; beta2*Osteoblast;  // isVersionOf GO:0045668
  Bone_resorption: z -> ; flag_resorption*k1*(Osteoclast - x1_bar);  // modifiers: Osteoclast, x1_bar; GO:0045453
  Bone_formation: -> z; flag_formation*k2*(Osteoblast - x2_bar);  // modifiers: Osteoblast, x2_bar; isVersionOf GO:0001503

  // Events:
  // When the osteoclast number is greater than the steady state osteoclast number the flag is set to 1, this insures that in reaction R5, y1 is equal to the difference of x1 and x1_bar. When x1 is greater than x1_bar the difference is set to zero by setting the flag to zero. The same procedure is used for bone formation.
  event_0000001: at (Osteoclast > x1_bar): flag_resorption = 1;
  event_0000003: at (Osteoclast <= x1_bar): flag_resorption = 0;
  event_0000002: at (Osteoblast > x2_bar): flag_formation = 1;
  event_0000004: at (Osteoblast <= x2_bar): flag_formation = 0;

  // Unit definitions:
  unit substance = item; substance is "number";
  unit time = 86400 second; time is "day";
end
