// SBML level 2 version 4
// dcterms:bibliographicCitation: urn:miriam:pubmed:24814512

model Jarrett2015___Modelling_the_interaction_between_immune_response__bacterial_dynamics_and_inflammatory_damage()
  // Jarrett2015 - Modelling the interaction between immune response, bacterial dynamics and inflammatory damage
  // isVersionOf GO:0050727
  // hasProperty efo:0005681
  // hasProperty efo:0000602
  // hasTaxon taxonomy:10090
  // isDescribedBy pubmed:24814512

  // Compartments:
  compartment BALB_c_Mouse = 1; BALB_c_Mouse is "BALB/c Mouse";  // hasProperty efo:0000602

  // Species:
  species $B in BALB_c_Mouse = 1;  // isVersionOf efo:0005681
  species $P in BALB_c_Mouse = 1;  // isVersionOf GO:0006954; hasProperty GO:0050729; isPropertyOf BTO:0001678; isPropertyOf BTO:0005655
  species $I in BALB_c_Mouse = 3;  // isVersionOf ncit:C3137
  species $A in BALB_c_Mouse = 1;  // isVersionOf GO:0006954; hasProperty GO:0050728; isPropertyOf BTO:0004520

  // Parameters:
  alpha_1 = 0.27;
  rho_1 = 0.2;
  beta_1 = 0.01;
  mu_1 = 0.12;
  K_B = 1;  // encodes ncit:C25443
  alpha_2 = 0.11;
  beta_2 = 0.135;
  mu_2 = 0.25;
  alpha_3 = 1.05;
  beta_3 = 2;
  rho_2 = 0.45;
  mu_3 = 0.0174;
  g = 0.9;
  alpha_4 = 1.5;
  beta_4 = 5;  // encodes GO:0006925
  gamma = 0.01;

  // Rate rules:
  B' = (g*(1 - B/K_B) + alpha_4*I - beta_4*P)*B + exp(-1*gamma*time);
  P' = (alpha_1*I + rho_1*B)*(1 - P) - (beta_1*A + mu_1*(1 - B/K_B))*P;
  I' = alpha_3*P + rho_2*B - (beta_3*A + mu_3)*I;
  A' = alpha_2*P - (beta_2*I + mu_2*(1 - B/K_B))*A;

  // Unit definitions:
  unit volume = 1e-3 litre;
  unit time = 3600 second;
  unit substance = item;
end
