// SBML level 2 version 1

model model_0000001()
  // Tabak2007_dopamine
  // The model is encoded according to the paper Low dose of dopamine may stimulate prolactin secretion by increasing fast potassium currents Figure5 has been reproduced by MathSBML. One need to change the value of ga in order to get the three correct results.
  // the xppaut file of the model is avaiable on the following address offered by the author , http://www.math.fsu.edu/%7Ebertram/software/pituitary/JCNS_07.ode
  // To the extent possible under law, all copyright and related or neighbouring rights to this encoded model have been dedicated to the public domain worldwide. Please refer to CC0 Public Domain Dedication for more information.
  // In summary, you are entitled to use this encoded model in absolutely any manner you deem suitable, verbatim, or with modification, alone or embedded it in a larger context, redistribute it, commercially or not, in a restricted way or not.
  // To cite BioModels Database, please use: Li C, Donizelli M, Rodriguez N, Dharuri H, Endler L, Chelliah V, Li L, He E, Henry A, Stefan MI, Snoep JL, Hucka M, Le Novère N, Laibe C (2010) BioModels Database: An enhanced, curated and annotated resource for published quantitative kinetic models. BMC Syst Biol., 4:92.
  // biomodels.db:MODEL6090663405
  // biomodels.db:BIOMD0000000138
  // isDescribedBy pubmed:17058022
  // hasTaxon taxonomy:7711
  // isVersionOf GO:0014046 GO:0005267 GO:1902211
  // hasProperty mamo:MAMO_0000046

  // Compartments:
  compartment cell = 1;  // isVersionOf GO:0005623

  // Species:
  // The concentration of Ca range can change from 0.1 to 0.3
  species c in cell = 0.3; c is "calcium concentration";  // CHEBI:29108 kegg.compound:C00076

  // Parameters:
  vca = 50; vca is "reversal potential for Ca";
  vk = -75; vk is "reversal potential for K";
  Cm = 10; Cm is "membrane capacitance";
  gk = 4;
  gcal = 2;
  gsk = 1.7;
  // For figure 5A, ga=0, figure5B, ga=8, figure5C, ga=25
  ga = 0;
  gf = 0;
  vn = -5;
  va = -20;
  vm = -20;
  vh = -60;
  vf = -20;
  sn = 10;
  sa = 10;
  sm = 12;
  sh = 5;
  sf = 5.6;
  taun = 30;
  tauh = 20;
  lambda = 0.7;
  kc = 0.16;
  ks = 0.5;
  ff = 0.01;
  alpha = 0.0015;
  n = 0.1;
  h = 0.1;
  V = -60;

  // Assignment rules:
  phik := 1/(1 + exp((vn - V)/sn));
  phia := 1/(1 + exp((va - V)/sa));
  phih := 1/(1 + exp((V - vh)/sh));
  phif := 1/(1 + exp((vf - V)/sf));
  phical := 1/(1 + exp((vm - V)/sm));
  ica := gcal*phical*(V - vca);
  cinf := c^2/(c^2 + ks^2);
  isk := gsk*cinf*(V - vk);
  ibk := gf*phif*(V - vk);
  ikdr := gk*n*(V - vk);
  ia := ga*phia*h*(V - vk);
  ik := isk + ibk + ikdr + ia;

  // Rate rules:
  V' = -(ica + ik)/Cm;
  n' = lambda*(phik - n)/taun;
  h' = (phih - h)/tauh;

  // Reactions:
  reaction_0000004: => c; -ff*(alpha*ica + kc*c)*cell;  // isVersionOf GO:0006816

  // Unit definitions:
  unit ms = 1e-3 second;
  unit mV = 1e-3 volt;
  unit micro_mole = 1e-6 mole;
end
