// SBML level 2 version 1

model MODEL1212150000()
  // Tseng2012 - Circadian clock of N.crassa
  // A comprehensive model of the circardian clock of fungal Neurospora crassa , which encompasses existing knowledge of the biochemistry of Neurospora clock, is described by Tseng et al. (2012). The model is validated against a wide range of experimental phenotypes and has been used to investigate possible molecular explanations of temperature compensation.
  // This model is described in the article:
  // Comprehensive modelling of the Neurospora circadian clock and its temperature compensation.
  // Tseng YY, Hunt SM, Heintzen C, Crosthwaite SK, Schwartz JM
  // PLoS Comput. Biol. [2012 ; Volume: 8 (Issue: 3 )] Page info: e1002437
  // Abstract:
  // Circadian clocks provide an internal measure of external time allowing organisms to anticipate and exploit predictable daily changes in the environment. Rhythms driven by circadian clocks have a temperature compensated periodicity of approximately 24 hours that persists in constant conditions and can be reset by environmental time cues. Computational modelling has aided our understanding of the molecular mechanisms of circadian clocks, nevertheless it remains a major challenge to integrate the large number of clock components and their interactions into a single, comprehensive model that is able to account for the full breadth of clock phenotypes. Here we present a comprehensive dynamic model of the Neurospora crassa circadian clock that incorporates its key components and their transcriptional and post-transcriptional regulation. The model accounts for a wide range of clock characteristics including: a periodicity of 21.6 hours, persistent oscillation in constant conditions, arrhythmicity in constant light, resetting by brief light pulses, and entrainment to full photoperiods. Crucial components influencing the period and amplitude of oscillations were identified by control analysis. Furthermore, simulations enabled us to propose a mechanism for temperature compensation, which is achieved by simultaneously increasing the translation of frq RNA and decreasing the nuclear import of FRQ protein.
  // Figure 3 of the reference publication has been reproduced using Copasi 4.8 (Build 35).
  // This model is hosted on BioModels Database and identified by: MODEL1212150000 .
  // To cite BioModels Database, please use: BioModels Database: An enhanced, curated and annotated resource for published quantitative kinetic models .
  // To the extent possible under law, all copyright and related or neighbouring rights to this encoded model have been dedicated to the public domain worldwide. Please refer to CC0 Public Domain Dedication for more information.
  // biomodels.db:MODEL1212150000
  // biomodels.db:BIOMD0000000437
  // isDescribedBy pubmed:22496627
  // isDerivedFrom biomodels.db:BIOMD0000000299 pubmed:15653726 pubmed:17965132
  // isVersionOf GO:0010378
  // hasTaxon taxonomy:5141

  // Compartments:
  compartment default = 1 volume;
  compartment Cytoplasm in default = 1 volume;
  compartment Nucleus in Cytoplasm = 1 volume;

  // Species:
  species L_WCC in Nucleus = 0;  // hasPart uniprot:Q01371 uniprot:P78714
  species L_WCCVVDn in Nucleus = 0;  // hasPart uniprot:Q01371 uniprot:P78714
  species Period in default;
  species T in default = 0;  // PATO:0000146
  species VVDc in Cytoplasm = 0;
  species VVDn in Nucleus = 0;
  species WC1c in Cytoplasm = 0.039;  // isVersionOf uniprot:Q01371
  species WC2c in Cytoplasm = 6.11815;  // isVersionOf uniprot:P78714
  species X in default = 0;
  species Y in default = 0;
  species active_hypoWCCn in Nucleus = 0.05281/Nucleus;
  species c_hypoFRQ_to_hyperFRQ in default;
  species cycle in default = 0;
  species degraded_L_WCCCVVDn in Nucleus = 0;
  species degraded_VVDc in Cytoplasm = 0;
  species degraded_VVDn in Nucleus = 0;
  species degraded_WC1c in Cytoplasm = 0;
  species degraded_WC2c in Cytoplasm = 0;
  species degraded_active_hypoWCCn in Nucleus = 0;
  species degraded_frq_mRNA in Cytoplasm = 0;
  species degraded_hyperFFCn in Nucleus = 0;
  species degraded_hyperFRQc in Cytoplasm = 0;
  species degraded_hyperWCCc in Cytoplasm = 0;
  species degraded_hyperWCCn in Nucleus = 0;
  species degraded_vvd_mRNA in Cytoplasm = 0;
  species degraded_wc1_mRNA in Cytoplasm = 0;
  species degraded_wc2_mRNA in Cytoplasm = 0;
  substanceOnly species $frq_gene in Nucleus = 1*Nucleus;
  species frq_level_A in default = 0;  // isVersionOf uniprot:P19970
  species frq_mRNA in Cytoplasm = 0.22321;  // isVersionOf CHEBI:33699; encodes uniprot:P19970
  species hyperFRQc in Cytoplasm = 0.368117/Cytoplasm;
  species hyperFRQn in Nucleus = 0.07298/Nucleus;  // isVersionOf uniprot:P19970
  species hyperWCCc in Cytoplasm = 0.496374/Cytoplasm;  // hasPart uniprot:Q01371 uniprot:P78714
  species hyperWCCn in Nucleus = 0.1573204/Nucleus;  // hasPart uniprot:Q01371 uniprot:P78714
  species hypoFRQc in Cytoplasm = 0.619449/Cytoplasm;  // isVersionOf uniprot:P19970
  species hypoFRQn in Nucleus = 0.394774/Nucleus;  // isVersionOf uniprot:P19970
  species hypoWCCc in Cytoplasm = 0.4285/Cytoplasm;  // hasPart uniprot:Q01371 uniprot:P78714
  species hypoWCCn in Nucleus = 0.47086/Nucleus;  // hasPart uniprot:Q01371 uniprot:P78714
  species n_hypoFRQ_to_hyperFRQ in default;
  species time_ in default = 0;
  species total_FRQ in default;  // isVersionOf uniprot:P19970
  species total_FRQc in default;  // isVersionOf uniprot:P19970
  species total_FRQn in default;  // isVersionOf uniprot:P19970
  species total_VVD in default;
  species total_WC1 in default;  // isVersionOf uniprot:Q01371
  species total_WC2 in default;  // isVersionOf uniprot:P78714
  species total_WCCn in default;  // hasPart uniprot:Q01371 uniprot:P78714
  species total_hyper_FRQ in default;  // isVersionOf uniprot:P19970
  species total_hypoWCC in default;  // hasPart uniprot:Q01371 uniprot:P78714
  species total_hypo_FRQ in default;  // isVersionOf uniprot:P19970
  species vvd_gene in Nucleus = 1/Nucleus;
  species vvd_mRNA in Cytoplasm = 0;
  substanceOnly species $wc1_gene in Nucleus = 1*Nucleus;
  species wc1_mRNA in Cytoplasm = 0.5218;
  substanceOnly species $wc2_gene in Nucleus = 1*Nucleus;
  species wc2_mRNA in Cytoplasm = 0.636098;
  substanceOnly species line in default = 1.8728;
  substanceOnly species line2 in default = 0.985;
  substanceOnly species line3 in default = 1.67;
  species total_hyperWCC in default;  // hasPart uniprot:Q01371 uniprot:P78714
  species hyper_hypo_WCC in default;  // hasPart uniprot:Q01371 uniprot:P78714

  // Parameters:
  kmax_frq = 7.3 substance; kmax_frq is "k_01";
  Km_frq = 0.1 substance; Km_frq is "K_01";
  A_active_hypoWCCn_frq = 4 substance; A_active_hypoWCCn_frq is "H_01";
  k_hypoFRQc = 0.19 substance; k_hypoFRQc is "k_05";
  kin_hypoFRQc = 0.1 substance; kin_hypoFRQc is "k_14";
  k_WC1c = 0.226 substance; k_WC1c is "k_06";
  k_WC2c = 1 substance; k_WC2c is "k_07";
  k_hypoWCCc = 0.472 substance; k_hypoWCCc is "k_13";
  kmaxp_hypoWCCn = 0.6 substance; kmaxp_hypoWCCn is "k_23";
  Kmp_hypoFRQn_hyperWCCn = 0.475 substance; Kmp_hypoFRQn_hyperWCCn is "K_02";
  I_hypoFRQn_hyperWCCn = 12 substance; I_hypoFRQn_hyperWCCn is "H_02";
  kd_active_hypoWCCn = 1.29 substance; kd_active_hypoWCCn is "k_35";
  kd_hyperFRQn = 0.27 substance; kd_hyperFRQn is "k_30";
  kd_WC1c = 0.135 substance; kd_WC1c is "k_31";
  kd_WC2c = 0.085 substance; kd_WC2c is "k_32";
  kadd_wc1 = 1.2 substance; kadd_wc1 is "k_02a01";
  kmax_wc2 = 1.6 substance; kmax_wc2 is "k_03";
  kd_frq = 2 substance; kd_frq is "k_09";
  kd_wc1 = 2.4 substance; kd_wc1 is "k_10";
  kd_wc2 = 2.5 substance; kd_wc2 is "k_11";
  kp_hypoFRQn = 0.1 substance; kp_hypoFRQn is "k_21";
  kout_hyperFRQn = 0.3 substance; kout_hyperFRQn is "k_18";
  kd_hyperFRQc = 0.27 substance; kd_hyperFRQc is "k_29";
  kout_hyperWCCn = 0.29 substance; kout_hyperWCCn is "k_19";
  kdp_hyperWCCc = 0.3 substance; kdp_hyperWCCc is "k_24";
  kin_hypoWCCc = 0.3 substance; kin_hypoWCCc is "k_15";
  kp_hypoFRQc = 0.1 substance; kp_hypoFRQc is "k_20";
  kout_hypoFRQn = 0.1 substance; kout_hypoFRQn is "k_17";
  kd_hyperWCCn = 0.05 substance; kd_hyperWCCn is "k_34";
  kd_hyperWCCc = 0.05 substance; kd_hyperWCCc is "k_33";
  kact_hypoWCCn = 0.15 substance; kact_hypoWCCn is "k_25";
  kp_hypoWCCc = 0.3 substance; kp_hypoWCCc is "k_22";
  on = 96;
  off = 120;
  k_VVDc = 0.68 substance; k_VVDc is "k_08";
  kd_vvd_mRNA = 6.2 substance; kd_vvd_mRNA is "k_12";
  kd_VVDc = 0.24 substance; kd_VVDc is "k_37";
  kin_VVDc = 0.3 substance; kin_VVDc is "k_16";
  kd_VVDn = 0.24 substance; kd_VVDn is "k_38";
  T_light_on = 10000000 substance;
  kact_L_WCC = 0 substance; kact_L_WCC is "k_26";
  kadd_light_frq = 320 substance; kadd_light_frq is "k_01a";
  kadd_L_wc1 = 90 substance; kadd_L_wc1 is "k_02a02";
  kact_L_WCC_light = 5 substance;
  kd_L_WCC = 6 substance; kd_L_WCC is "k_36";
  kadd_vvd_light_mRNA = 800 substance; kadd_vvd_light_mRNA is "k_04";
  kdfrq_hypoFRQc = 0.356 substance; kdfrq_hypoFRQc is "k_09a";
  ki_wc2_transcription = 0.03 substance; ki_wc2_transcription is "k_03i";
  kadd_wc2_transcription_hypoFRQn = 0.03 substance; kadd_wc2_transcription_hypoFRQn is "k_03a";
  k_min_wc1 = 1.19 substance; k_min_wc1 is "k_02";
  k_WCCVVD = 20 substance; k_WCCVVD is "k_27";
  k_dis_WCCVVD = 1.8 substance; k_dis_WCCVVD is "k_28";
  kd_WCCVVD = 0.75 substance; kd_WCCVVD is "k_39";
  LP = 60 substance;
  LP2 = 0 substance;
  LP3 = 0 substance;

  // Assignment rules:
  total_FRQ := hypoFRQc + hyperFRQc + hypoFRQn + hyperFRQn;
  total_WC1 := WC1c + hypoWCCc + hyperWCCc + hypoWCCn + hyperWCCn + active_hypoWCCn + L_WCC + L_WCCVVDn;
  total_FRQc := hypoFRQc + hyperFRQc;
  total_FRQn := hypoFRQn + hyperFRQn;
  total_hypo_FRQ := hypoFRQn + hypoFRQc;
  total_hyper_FRQ := hyperFRQn + hyperFRQc;
  c_hypoFRQ_to_hyperFRQ := hypoFRQc/hyperFRQc;
  n_hypoFRQ_to_hyperFRQ := hypoFRQn/hyperFRQn;
  total_VVD := VVDn + VVDc + L_WCCVVDn;
  Period := Y - X;
  total_WC2 := WC2c + hypoWCCc + hypoWCCn + hyperWCCn + hyperWCCc + active_hypoWCCn + L_WCC;
  total_hypoWCC := hypoWCCc + hypoWCCn;
  total_WCCn := hypoWCCn + hyperWCCn + active_hypoWCCn + L_WCC;
  total_hyperWCC := hyperWCCn + hyperWCCc;
  hyper_hypo_WCC := total_hyperWCC/total_hypoWCC;

  // Reactions:
  Time: 0 time_ => T; 1;
  frq_transcription: 0 $frq_gene => frq_mRNA; kmax_frq*(active_hypoWCCn^A_active_hypoWCCn_frq/(Km_frq^A_active_hypoWCCn_frq + active_hypoWCCn^A_active_hypoWCCn_frq)) + kadd_light_frq*L_WCC; frq_transcription is "re01";  // modifiers: active_hypoWCCn, L_WCC
  wc1_transcription: 0 $wc1_gene => wc1_mRNA; k_min_wc1 + kadd_wc1*active_hypoWCCn + kadd_L_wc1*L_WCC; wc1_transcription is "re02";  // modifiers: active_hypoWCCn, L_WCC
  wc2_transcription: 0 $wc2_gene => wc2_mRNA; kmax_wc2*(1/(1 + hypoWCCn*ki_wc2_transcription)) + hypoFRQn*kadd_wc2_transcription_hypoFRQn; wc2_transcription is "re03";  // modifiers: hypoFRQn, hypoWCCn
  vvd_transcription: 0 vvd_gene => vvd_mRNA; kadd_vvd_light_mRNA*L_WCC; vvd_transcription is "re04";  // modifiers: L_WCC
  frq_translation: 0 frq_mRNA => hypoFRQc; frq_mRNA*k_hypoFRQc; frq_translation is "re05";
  wc1_translation: 0 wc1_mRNA => WC1c; k_WC1c*wc1_mRNA; wc1_translation is "re06";
  wc2_translation: 0 wc2_mRNA => WC2c; wc2_mRNA*k_WC2c; wc2_translation is "re07";
  vvd_translation: 0 vvd_mRNA => VVDc; k_VVDc*vvd_mRNA; vvd_translation is "re08";
  frq_mRNA_degradation: frq_mRNA => 0 degraded_frq_mRNA; frq_mRNA*(kd_frq + hypoFRQc*kdfrq_hypoFRQc); frq_mRNA_degradation is "re09";  // modifiers: hypoFRQc
  wc1_mRNA_degradation: wc1_mRNA => 0 degraded_wc1_mRNA; wc1_mRNA*kd_wc1; wc1_mRNA_degradation is "re10";
  wc2_mRNA_degradation: wc2_mRNA => 0 degraded_wc2_mRNA; wc2_mRNA*kd_wc2; wc2_mRNA_degradation is "re11";
  vvd_mRNA_degradation: vvd_mRNA => 0 degraded_vvd_mRNA; kd_vvd_mRNA*vvd_mRNA; vvd_mRNA_degradation is "re12";
  hypoWCCc_formation: WC1c + WC2c => hypoWCCc; WC1c*WC2c*k_hypoWCCc; hypoWCCc_formation is "re13";
  hypoFRQc_translocation_in_nucleus: hypoFRQc => hypoFRQn; kin_hypoFRQc*hypoFRQc; hypoFRQc_translocation_in_nucleus is "re14";
  hypoWCCc_translocation_in_nucleus: hypoWCCc => hypoWCCn; hypoWCCc*kin_hypoWCCc; hypoWCCc_translocation_in_nucleus is "re15";
  VVD_nuclear_localisation: VVDc => VVDn; kin_VVDc*VVDc; VVD_nuclear_localisation is "re16";
  hypoFRQn_translocation_out_nucleus: hypoFRQn => hypoFRQc; hypoFRQn*kout_hypoFRQn; hypoFRQn_translocation_out_nucleus is "re17";
  hyperFRQn_translocation_out_nucleus: hyperFRQn => hyperFRQc; hyperFRQn*kout_hyperFRQn; hyperFRQn_translocation_out_nucleus is "re18";
  hyperWCCn_translocation_out_nucleus: hyperWCCn => hyperWCCc; hyperWCCn*kout_hyperWCCn; hyperWCCn_translocation_out_nucleus is "re19";
  hypoFRQc_phosphorylation: hypoFRQc => hyperFRQc; hypoFRQc*kp_hypoFRQc; hypoFRQc_phosphorylation is "re20";
  hypoFRQn_phosphorylation: hypoFRQn => hyperFRQn; hypoFRQn*kp_hypoFRQn; hypoFRQn_phosphorylation is "re21";
  hypoWCCc_phosphorylation: hypoWCCc => hyperWCCc; hypoWCCc*kp_hypoWCCc; hypoWCCc_phosphorylation is "re22";
  hypoWCCn_phosphorylation: hypoWCCn => hyperWCCn; kmaxp_hypoWCCn*hypoWCCn*(hypoFRQn^I_hypoFRQn_hyperWCCn/(Kmp_hypoFRQn_hyperWCCn^I_hypoFRQn_hyperWCCn + hypoFRQn^I_hypoFRQn_hyperWCCn)); hypoWCCn_phosphorylation is "re23";  // modifiers: hypoFRQn
  hyperWCCc_dephosphorylation: hyperWCCc => hypoWCCc; hyperWCCc*kdp_hyperWCCc; hyperWCCc_dephosphorylation is "re24";
  hypoWCCn_activation: hypoWCCn => active_hypoWCCn; hypoWCCn*kact_hypoWCCn; hypoWCCn_activation is "re25";
  L_WCC_formation: hypoWCCn => L_WCC; kact_L_WCC*hypoWCCn; L_WCC_formation is "re26";
  WCCVVD_complex_formation: VVDn + L_WCC => L_WCCVVDn; VVDn*L_WCC*k_WCCVVD; WCCVVD_complex_formation is "re27";
  WCCVVD_complex_disassociation: L_WCCVVDn => hypoWCCn + VVDn; L_WCCVVDn*k_dis_WCCVVD; WCCVVD_complex_disassociation is "re28";
  hyperFRQc_degradation: hyperFRQc => 0 degraded_hyperFRQc; hyperFRQc*kd_hyperFRQc; hyperFRQc_degradation is "re29";
  hyperFFCn_degradation: hyperFRQn => 0 degraded_hyperFFCn; hyperFRQn*kd_hyperFRQn; hyperFFCn_degradation is "re30";
  WC1c_degradation: WC1c => 0 degraded_WC1c; WC1c*kd_WC1c; WC1c_degradation is "re31";
  WC2c_degradation: WC2c => 0 degraded_WC2c; WC2c*kd_WC2c; WC2c_degradation is "re32";
  hyperWCCc_degradation: hyperWCCc => 0 degraded_hyperWCCc; hyperWCCc*kd_hyperWCCc; hyperWCCc_degradation is "re33";
  hyperWCCn_degradation: hyperWCCn => 0 degraded_hyperWCCn; hyperWCCn*kd_hyperWCCn; hyperWCCn_degradation is "re34";
  active_hypoWCCn_degradation: active_hypoWCCn => 0 degraded_active_hypoWCCn; active_hypoWCCn*kd_active_hypoWCCn; active_hypoWCCn_degradation is "re35";
  L_WCC_degradation: L_WCC => 0 degraded_L_WCCCVVDn; L_WCC*kd_L_WCC; L_WCC_degradation is "re36";
  VVDc_degradation: VVDc => 0 degraded_VVDc; VVDc*kd_VVDc; VVDc_degradation is "re37";
  VVDn_degradation: VVDn => 0 degraded_VVDn; VVDn*kd_VVDn; VVDn_degradation is "re38";
  L_WCCVVD_degradation: L_WCCVVDn => 0 degraded_L_WCCCVVDn; L_WCCVVDn*kd_WCCVVD; L_WCCVVD_degradation is "re39";

  // Events:
  n_CYCLE: at ((time > 125) && (frq_mRNA > frq_level_A)): cycle = cycle + 1;
  light_on: at (time > T_light_on): kact_L_WCC = kact_L_WCC_light;
  light_off: at (time > T_light_on + LP): kact_L_WCC = 0;
  calculate_period_find_frq_level_A: at (time > 125): frq_level_A = frq_mRNA;
  calculate_period_find_Y: at (((time > 125) && (frq_mRNA > frq_level_A)) && (cycle < 3)): Y = time;
  calculate_period_find_X: at (((time > 125) && (frq_mRNA > frq_level_A)) && (cycle < 2)): X = time;

  // Unit definitions:
  unit substance = mole;
  unit volume = litre;
  unit area = metre^2;
  unit length = metre;
  unit time = second;
end
