// SBML level 2 version 4

model MODEL1311290000()
  // Messiha2013 - Pentose phosphate pathway model
  // This model describes the dynamic behaviour of the pentose phosphate pathway with the inclusion of various enzymes involved in the pathway. The model's predictions are compared with experimental observations of transient metabolite concentrations following a glucose pulse.
  // This model is described in the article:
  // Enzyme characterisation and kinetic modelling of pentose phosphate pathway in yeast.
  // Hanan L. Messiha, Edward Kent, Naglis Malys, Kathleen M. Carroll, Pedro Mendes, Kieran Smallbone
  // PeerJ PrePrints 1:e146v2
  // Abstract:
  // We present the quantification and kinetic characterisation of the enzymes of the pentose phosphate pathway in Saccharomyces cerevisiae. The data are combined into a mathematical model that describes the dynamics of this system and allows for the predicting changes in metabolite concentrations and fluxes in response to perturbations. We use the model to study the response of yeast to a glucose pulse. We then combine the model with an existing glycolysis one to study the effect of oxidative stress on carbohydrate metabolism. The combination of these two models was made possible by the standardized enzyme kinetic experiments carried out in both studies. This work demonstrates the feasibility of constructing larger network models by merging smaller pathway models.
  // This model is hosted on BioModels Database and identified by: BIOMD0000000502 .
  // To cite BioModels Database, please use: BioModels Database: An enhanced, curated and annotated resource for published quantitative kinetic models .
  // To the extent possible under law, all copyright and related or neighbouring rights to this encoded model have been dedicated to the public domain worldwide. Please refer to CC0 Public Domain Dedication for more information.
  // biomodels.db:MODEL1311290000
  // biomodels.db:BIOMD0000000502
  // isDescribedBy doi:10.7287%2Fpeerj.preprints.146v2
  // encodes kegg.pathway:rn00030 GO:0006098
  // hasTaxon taxonomy:4932
  // hasProperty mamo:MAMO_0000046

  // Compartments:
  compartment cell = 1;  // GO:0005737

  // Species:
  species E4P in cell = 0.029;  // CHEBI:16897 kegg.compound:C00279
  species G6L in cell = 0.1;  // CHEBI:57955 kegg.compound:C01236
  species NADPH in cell = 0.16;  // CHEBI:57783 kegg.compound:C00005
  species P6G in cell = 0.25;  // CHEBI:58759 kegg.compound:C00345
  species R5P in cell = 0.118;  // CHEBI:18189 kegg.compound:C03736
  species Ru5P in cell = 0.033;  // CHEBI:58121 kegg.compound:C00199
  species S7P in cell = 0.082;  // CHEBI:57483 kegg.compound:C05382
  species X5P in cell = 0.041;  // CHEBI:57737 kegg.compound:C00231
  species $NADP in cell;  // CHEBI:58349 kegg.compound:C00006
  species $G6P in cell;  // CHEBI:14314 kegg.compound:C00092
  species $F6P in cell = 0.325;  // CHEBI:57579 kegg.compound:C00085
  species $GAP in cell = 0.067;  // CHEBI:58027 kegg.compound:C00661
  species $GND1 in cell = 0.013;  // uniprot:P38720; isEncodedBy sgd:S000001226 sce:YHR183W
  species $GND2 in cell = 0.003;  // uniprot:P53319; isEncodedBy sgd:S000003488 sce:YGR256W
  species $NQM1 in cell = 0.02;  // uniprot:P53228; isEncodedBy sgd:S000003275 sce:YGR043C
  species $RKI1 in cell = 0.05;  // uniprot:Q12189; isEncodedBy sgd:S000005621 sce:YOR095C
  species $RPE1 in cell = 0.03;  // uniprot:P46969; isEncodedBy sgd:S000003657 sce:YJL121C
  species $SOL3 in cell = 0.0296;  // isEncodedBy sgd:S000001206 sce:YHR163W; uniprot:P38858
  species $TAL1 in cell = 0.144;  // isEncodedBy sgd:S000004346 sce:YLR354C; uniprot:P15019
  species $TKL1 in cell = 0.455;  // isEncodedBy sgd:S000006278 sce:YPR074C; uniprot:P23254
  species $ZWF1 in cell = 0.02;  // isEncodedBy sgd:S000005185 sce:YNL241C; uniprot:P11412

  // Parameters:
  sum_NADP = 0.33 mM;
  Kx5p_TAL = 0.67 mM;
  Ke4p_TAL = 0.946 mM;
  Kr5p_TAL = 0.235 mM;
  Kgap_TAL = 0.1 mM;
  Kf6p_TAL = 1.1 mM;
  Ks7p_TAL = 0.15 mM;

  // Assignment rules:
  G6P := 0.9 + piecewise(44.1*time/(48 + time + 0.45*time^2), time >= 0, 0);
  NADP := sum_NADP - NADPH;

  // Reactions:
  GND: P6G + $NADP => Ru5P + NADPH; cell*(GND1*kcat_GND1*P6G*NADP/(Kp6g_GND1*Knadp_GND1)/((1 + P6G/Kp6g_GND1 + Ru5P/Kru5p_GND1)*(1 + NADP/Knadp_GND1 + NADPH/Knadph_GND1)) + GND2*kcat_GND2*P6G*NADP/((1 + P6G/Kp6g_GND2 + Ru5P/Kru5p_GND2)*(1 + NADP/Knadp_GND2 + NADPH/Knadph_GND2)));  // modifiers: GND1, GND2; ec-code:1.1.1.44
    kcat_GND1 = 28 per_s; Kp6g_GND1 = 0.062 mM; Knadp_GND1 = 0.094 mM; Kru5p_GND1 = 0.1 mM; Knadph_GND1 = 0.055 mM; kcat_GND2 = 27.3 per_s; Kp6g_GND2 = 0.115 mM; Knadp_GND2 = 0.094 mM; Kru5p_GND2 = 0.1 mM; Knadph_GND2 = 0.055 mM;
  RKI: Ru5P -> R5P; cell*RKI1*RKI_kcat*(Ru5P - R5P/RKI_Keq)/RKI_Kru5p/(1 + Ru5P/RKI_Kru5p + R5P/Kr5p);  // modifiers: RKI1; ec-code:5.3.1.6
    RKI_kcat = 335 per_s; RKI_Kru5p = 2.47 mM; Kr5p = 5.7 mM; Kiru5p = 9.88 mM; RKI_Keq = 4 dimensionless;
  RPE: Ru5P -> X5P; cell*RPE1*RPE_kcat*(Ru5P - X5P/RPE_Keq)/RPE_Kru5p/(1 + Ru5P/RPE_Kru5p + X5P/Kx5p);  // modifiers: RPE1; ec-code:5.1.3.1
    RPE_kcat = 4020 per_s; RPE_Kru5p = 5.97 mM; Kx5p = 7.7 mM; RPE_Keq = 1.4 dimensionless;
  SOL: G6L => P6G; cell*SOL3*SOL_kcat*G6L/SOL_Kg6l/(1 + G6L/SOL_Kg6l + P6G/Kp6g);  // modifiers: SOL3; ec-code:3.1.1.31
    SOL_kcat = 4.3 per_s; SOL_Kg6l = 0.8 mM; Kp6g = 0.5 mM;
  TAL: $GAP + S7P -> $F6P + E4P; cell*(TAL1*kcat_TAL1*(GAP*S7P - F6P*E4P/TAL_Keq)/(Kgap_TAL1*Ks7p_TAL1)/((1 + GAP/Kgap_TAL1 + F6P/Kf6p_TAL1)*(1 + S7P/Ks7p_TAL1 + E4P/Ke4p_TAL1)) + NQM1*kcat_NQM1*(GAP*S7P - F6P*E4P/TAL_Keq)/(Kgap_NQM1*Ks7p_NQM1)/((1 + GAP/Kgap_NQM1 + F6P/Kf6p_NQM1)*(1 + S7P/Ks7p_NQM1 + E4P/Ke4p_NQM1)));  // modifiers: TAL1, NQM1; ec-code:2.2.1.2
    kcat_TAL1 = 0.694 per_s; Kgap_TAL1 = 0.272 mM; Ks7p_TAL1 = 0.786 mM; Kf6p_TAL1 = 1.44 mM; Ke4p_TAL1 = 0.362 mM; kcat_NQM1 = 0.694 per_s; Kgap_NQM1 = 0.272 mM; Ks7p_NQM1 = 0.786 mM; Kf6p_NQM1 = 1.04 mM; Ke4p_NQM1 = 0.305 mM; TAL_Keq = 1.05 dimensionless;
  TKL_E4P: X5P + E4P -> $GAP + $F6P; cell*TKL1*TKL_E4P_kcat*(X5P*E4P - GAP*F6P/TKL_E4P_Keq)/(Kx5p_TAL*Ke4p_TAL)/((1 + X5P/Kx5p_TAL + GAP/Kgap_TAL)*(1 + E4P/Ke4p_TAL + F6P/Kf6p_TAL + R5P/Kr5p_TAL + S7P/Ks7p_TAL)); TKL_E4P is "TKL (E4P:F6P)";  // modifiers: TKL1, R5P, S7P; ec-code:2.2.1.1
    TKL_E4P_kcat = 47.1 per_s; TKL_E4P_Keq = 10 dimensionless;
  TKL_R5P: X5P + R5P -> $GAP + S7P; cell*TKL1*TKL_R5P_kcat*(X5P*R5P - GAP*S7P/TKL_R5P_Keq)/(Kx5p_TAL*Kr5p_TAL)/((1 + X5P/Kx5p_TAL + GAP/Kgap_TAL)*(1 + E4P/Ke4p_TAL + F6P/Kf6p_TAL + R5P/Kr5p_TAL + S7P/Ks7p_TAL)); TKL_R5P is "TKL (R5P:S7P)";  // modifiers: TKL1, E4P, F6P; ec-code:2.2.1.1
    TKL_R5P_kcat = 40.5 per_s; TKL_R5P_Keq = 1.2 dimensionless;
  ZWF: $G6P + $NADP => G6L + NADPH; cell*ZWF1*ZWF_kcat*G6P*NADP/(Kg6p*Knadp)/((1 + G6P/Kg6p + G6L/ZWF_Kg6l)*(1 + NADP/Knadp + NADPH/Knadph));  // modifiers: ZWF1; ec-code:1.1.1.49
    ZWF_kcat = 189 per_s; Kg6p = 0.042 mM; Knadp = 0.045 mM; ZWF_Kg6l = 0.01 mM; Knadph = 0.017 mM;
  NADPH_oxidase: NADPH => $NADP; cell*NADPH_oxidase_k*NADPH;
    NADPH_oxidase_k = 1 per_s;
  E4P_sink: E4P => ; cell*E4P_sink_k*E4P;
    E4P_sink_k = 1 per_s;
  R5P_sink: R5P => ; cell*R5P_sink_k*R5P;
    R5P_sink_k = 1 per_s;

  // Unit definitions:
  unit substance = 1e-3 mole; substance is "mmol";
  unit mM = 1e-3 mole / litre;
  unit per_s = 1 / second;
end
