// SBML level 2 version 4

model MODEL1403110000()
  // Muraro2014 - Vascular patterning in Arabidopsis roots
  // Using a multicellular model, maintanence of vascular patterning in Arabidopsis roots has been studied. The model that is provided here is the single-cell version of the model. The two-cell and multicellular models described in the paper can be downloaded as python scripts (follow the curation tab to get these files).
  // This model is described in the article:
  // Integration of hormonal signaling networks and mobile microRNAs is required for vascular patterning in Arabidopsis roots.
  // Muraro D, Mellor N, Pound MP, Help H, Lucas M, Chopard J, Byrne HM, Godin C, Hodgman TC, King JR, Pridmore TP, Helariutta Y, Bennett MJ, Bishopp A.
  // Proc Natl Acad Sci U S A. 2014 Jan 14;111(2):857-62.
  // Abstract:
  // As multicellular organisms grow, positional information is continually needed to regulate the pattern in which cells are arranged. In the Arabidopsis root, most cell types are organized in a radially symmetric pattern; however, a symmetry-breaking event generates bisymmetric auxin and cytokinin signaling domains in the stele. Bidirectional cross-talk between the stele and the surrounding tissues involving a mobile transcription factor, SHORT ROOT (SHR), and mobile microRNA species also determines vascular pattern, but it is currently unclear how these signals integrate. We use a multicellular model to determine a minimal set of components necessary for maintaining a stable vascular pattern. Simulations perturbing the signaling network show that, in addition to the mutually inhibitory interaction between auxin and cytokinin, signaling through SHR, microRNA165/6, and PHABULOSA is required to maintain a stable bisymmetric pattern. We have verified this prediction by observing loss of bisymmetry in shr mutants. The model reveals the importance of several features of the network, namely the mutual degradation of microRNA165/6 and PHABULOSA and the existence of an additional negative regulator of cytokinin signaling. These components form a plausible mechanism capable of patterning vascular tissues in the absence of positional inputs provided by the transport of hormones from the shoot.
  // This model is hosted on BioModels Database and identified by: BIOMD0000000522 .
  // To cite BioModels Database, please use: BioModels Database: An enhanced, curated and annotated resource for published quantitative kinetic models .
  // To the extent possible under law, all copyright and related or neighbouring rights to this encoded model have been dedicated to the public domain worldwide. Please refer to CC0 Public Domain Dedication for more information.
  // biomodels.db:MODEL1403110000
  // biomodels.db:BIOMD0000000522
  // isDescribedBy pubmed:24381155
  // isVersionOf GO:0010051
  // hasTaxon taxonomy:3701
  // hasProperty mamo:MAMO_0000046

  // Compartments:
  compartment compartment = 1;  // isVersionOf GO:0005623

  // Species:
  species Auxin in compartment = 0;  // isVersionOf uniprot:Q96247
  species Cytokinin in compartment = 0;  // isVersionOf CHEBI:23530
  species AHP6m in compartment = 0;  // encodes uniprot:Q9SSC9
  species AHP6p in compartment = 0;  // isVersionOf uniprot:Q9SSC9
  species IAA2m in compartment = 0;  // encodes uniprot:P49678
  species IAA2p in compartment = 0;  // isVersionOf uniprot:P49678
  species ARR5m in compartment = 0;  // encodes uniprot:Q9SB04
  species ARR5p in compartment = 0;  // isVersionOf uniprot:Q9SB04
  species PHBm in compartment = 0;  // encodes uniprot:O04291
  species PHBp in compartment = 0;  // isVersionOf uniprot:O04291
  species CKX3m in compartment = 0;  // encodes uniprot:Q9LTS3
  species CKX3p in compartment = 0;  // isVersionOf uniprot:Q9LTS3
  species PIN3m in compartment = 0;  // encodes uniprot:Q9S7Z8
  species PIN1m in compartment = 0;  // encodes uniprot:Q9SL42
  species PIN7m in compartment = 0;  // encodes uniprot:Q940Y5
  species miRNA in compartment = 0;

  // Parameters:
  p_ax = 0.06;
  p_ck = 2;
  d_ax = 1;
  d_ck = 10;
  phloem_rate_ax = 1;
  all_section_rate_ax = 1;
  phloem_rate_ck = 1;
  all_section_rate_ck = 1;
  lambda_AHP6 = 2;
  lambda_IAA2 = 10;
  lambda_ARR5 = 20;
  lambda_PIN1 = 0;
  lambda_PIN3 = 0;
  lambda_PIN7 = 1;
  mu_m_PHB = 1;
  mu_m_AHP6 = 1;
  mu_m_IAA2 = 10;
  mu_m_ARR5 = 10;
  mu_m_PIN1 = 0;
  mu_m_PIN3 = 0;
  mu_m_PIN7 = 1;
  delta_PHB = 1;
  delta_AHP6 = 1;
  delta_IAA2 = 10;
  delta_ARR5 = 10;
  delta_PIN1 = 0;
  delta_PIN3 = 0;
  delta_PIN7 = 5;
  delta_CKX3 = 1;
  mu_p_PHB = 1;
  mu_p_AHP6 = 1;
  mu_p_IAA2 = 10;
  mu_p_ARR5 = 10;
  mu_p_PIN1 = 0;
  mu_p_PIN3 = 0;
  mu_p_PIN7 = 1;
  mu_p_CKX3 = 1;
  theta_Ax = 0.25;
  theta_Ck = 0.5;
  theta_AHP6 = 0.04;
  theta_ARR5 = 0.1;
  theta_PHB = 0.4;
  theta_CKX3 = 0.05;
  p_phb = 2;
  d_phb = 1;
  p_mirna = 32.5;
  d_mirna = 1;
  d_mirna_mrna = 10;
  p_ckx3 = 5;
  d_ckx3 = 1;
  b_pin3 = 1;
  b_pin1 = 0;
  b_pin7 = 0;
  b_ahp6 = 0;
  b_arr5 = 0;
  b_iaa2 = 0;
  hill_ax = 2;
  hill_ck = 2;
  hill_arr5 = 3;
  hill_ckx3 = 5;
  hill_ahp6 = 3;
  hill_phb = 3;

  // Assignment rules:
  F_AHP6 := (b_ahp6 + (Auxin/theta_Ax)^hill_ax)/(1 + (Auxin/theta_Ax)^hill_ax + (PHBp/theta_PHB)^hill_phb);
  F_ARR5 := (b_arr5 + (Cytokinin/theta_Ck)^hill_ck)/(1 + (Cytokinin/theta_Ck)^hill_ck + (AHP6p/theta_AHP6)^hill_ahp6);
  F_CK := 1/(1 + (CKX3p/theta_CKX3)^hill_ckx3);
  F_IAA2 := (b_iaa2 + (Auxin/theta_Ax)^hill_ax)/(1 + (Auxin/theta_Ax)^hill_ax);
  F_PIN1 := (b_pin1 + (ARR5p/theta_ARR5)^hill_arr5)/(1 + (ARR5p/theta_ARR5)^hill_arr5);
  F_PIN3 := b_pin3;
  F_PIN7 := (b_pin7 + (ARR5p/theta_ARR5)^hill_arr5)/(1 + (ARR5p/theta_ARR5)^hill_arr5);

  // Rate rules:
  Auxin' = phloem_rate_ax*p_ax - d_ax*Auxin;
  Cytokinin' = phloem_rate_ck*p_ck*F_CK - d_ck*Cytokinin;
  miRNA' = 0;
  PHBm' = p_phb - d_phb*PHBm - d_mirna_mrna*PHBm*miRNA;
  AHP6m' = lambda_AHP6*F_AHP6 - mu_m_AHP6*AHP6m;
  IAA2m' = lambda_IAA2*F_IAA2 - mu_m_IAA2*IAA2m;
  ARR5m' = lambda_ARR5*F_ARR5 - mu_m_ARR5*ARR5m;
  PIN1m' = lambda_PIN1*F_PIN1 - mu_m_PIN1*PIN1m;
  PIN3m' = lambda_PIN3*F_PIN3 - mu_m_PIN3*PIN3m;
  PIN7m' = lambda_PIN7*F_PIN7 - mu_m_PIN7*PIN7m;
  AHP6p' = delta_AHP6*AHP6m - mu_p_AHP6*AHP6p;
  IAA2p' = delta_IAA2*IAA2m - mu_p_IAA2*IAA2p;
  ARR5p' = delta_ARR5*ARR5m - mu_p_ARR5*ARR5p;
  PHBp' = delta_PHB*PHBm - mu_p_PHB*PHBp;
  CKX3p' = delta_CKX3*CKX3m - mu_p_CKX3*CKX3p;
end
