// SBML level 2 version 4

model MODEL1408070000()
  // Clarke2000 - One-hit model of cell death in neuronal degenerations
  // This one-hit model fits different neuronal-death associated diseases for different animal models.
  // This model is described in the article:
  // A one-hit model of cell death in inherited neuronal degenerations.
  // Clarke G, Collins RA, Leavitt BR, Andrews DF, Hayden MR, Lumsden CJ, McInnes RR.
  // Nature 2000 Jul; 406(6792): 195-199
  // Abstract:
  // In genetic disorders associated with premature neuronal death, symptoms may not appear for years or decades. This delay in clinical onset is often assumed to reflect the occurrence of age-dependent cumulative damage. For example, it has been suggested that oxidative stress disrupts metabolism in neurological degenerative disorders by the cumulative damage of essential macromolecules. A prediction of the cumulative damage hypothesis is that the probability of cell death will increase over time. Here we show in contrast that the kinetics of neuronal death in 12 models of photoreceptor degeneration, hippocampal neurons undergoing excitotoxic cell death, a mouse model of cerebellar degeneration and Parkinson's and Huntington's diseases are all exponential and better explained by mathematical models in which the risk of cell death remains constant or decreases exponentially with age. These kinetics argue against the cumulative damage hypothesis; instead, the time of death of any neuron is random. Our findings are most simply accommodated by a 'one-hit' biochemical model in which mutation imposes a mutant steady state on the neuron and a single event randomly initiates cell death. This model appears to be common to many forms of neurodegeneration and has implications for therapeutic strategies.
  // This model is hosted on BioModels Database and identified by: BIOMD0000000538.
  // To cite BioModels Database, please use: BioModels Database: An enhanced, curated and annotated resource for published quantitative kinetic models.
  // To the extent possible under law, all copyright and related or neighbouring rights to this encoded model have been dedicated to the public domain worldwide. Please refer to CC0 Public Domain Dedication for more information.
  // biomodels.db:MODEL1408070000
  // biomodels.db:BIOMD0000000538
  // isDescribedBy pubmed:10910361
  // hasTaxon taxonomy:9606 taxonomy:10090 taxonomy:9685 taxonomy:9615 taxonomy:10116
  // hasVersion DOID:8466 DOID:1443 DOID:5327 DOID:5679 DOID:0050633 DOID:14330
  // isVersionOf GO:0051402

  // Compartments:
  compartment Brain = 1;  // BTO:0000142

  // Species:
  // Outer nuclear layer in nr/nr mice
  // Constant risk equation, according to the article
  species $ONLnr in Brain = 100;  // BTO:0005600
  // Outer nuclear layer in pcd/pcd mice
  // Constant risk equation, according to the article
  species $ONLpcd in Brain = 100;  // BTO:0005600
  // Outer nuclear layer in Rom1-/- mice
  // Exponentially decreasing risk equation, according to supplementary information
  species $ONLrom in Brain;  // BTO:0005600

  // Parameters:
  // Mu Value for nr/nr mice
  Munr = 0.278;
  // Mu Value for pcd/pcd mice
  Mupcd = 0.223;
  // R Value for Rom1-/- mice
  Rrom = 0.103;
  // Initial ONL for Rom1-/- mice
  ONLrom_0 = 40.947;
  // Mu Value for Rom1-/- mice
  Murom = 0.0708;

  // Assignment rules:
  ONLrom := ONLrom_0*exp((exp(-Rrom*time) - 1)*Murom/Rrom)*100/ONLrom_0;

  // Rate rules:
  ONLnr' = -Munr*ONLnr;
  ONLpcd' = -Mupcd*ONLpcd;

  // Unit definitions:
  unit volume = 1e-3 litre;
  unit time = 86400 second;
  unit substance = 1e-3 mole;
end
