// SBML level 3 version 2

function transition1_R_T(ka, b, species)
  species*ka*b^(1/2);
end
transition1_R_T is "Transition camR_ca1_X to camT_ca1_X";

function function_1(kTR, cA, camT_ca1_A)
  camT_ca1_A*kTR/cA^(1/2);
end
function_1 is "function_4_Transition camT_ca1_A to camR_ca1_A";

function function_2(kTR, cB, camT_ca1_B)
  camT_ca1_B*kTR/cB^(1/2);
end
function_2 is "function_4_Transition camT_ca1_B to camR_ca1_B";

function function_5(cA, cB, kRT, camR_ca2_AB)
  camR_ca2_AB*kRT*(cA*cB)^(1/2);
end
function_5 is "function_4_Transition camR_ca2_AB to camT_ca2_AB";

function function_3(kTR, cC, camT_ca1_C)
  camT_ca1_C*kTR/cC^(1/2);
end
function_3 is "function_4_Transition camT_ca1_C to camR_ca1_C";

function function_6(cA, cC, kRT, camR_ca2_AC)
  camR_ca2_AC*kRT*(cA*cC)^(1/2);
end
function_6 is "function_4_Transition camR_ca2_AC to camT_ca2_AC";

function function_7(cA, cD, kRT, camR_ca2_AD)
  camR_ca2_AD*kRT*(cA*cD)^(1/2);
end
function_7 is "function_4_Transition camR_ca2_AD to camT_ca2_AD";

function function_4(kTR, cD, camT_ca1_D)
  camT_ca1_D*kTR/cD^(1/2);
end
function_4 is "function_4_Transition camT_ca1_D to camR_ca1_D";

function function_13(kTR, cA, cD, camT_ca2_AD)
  camT_ca2_AD*kTR/(cA*cD)^(1/2);
end
function_13 is "function_4_Transition camT_ca2_AD to camR_ca2_AD";

function function_14(kTR, cB, cC, camT_ca2_BC)
  camT_ca2_BC*kTR/(cB*cC)^(1/2);
end
function_14 is "function_4_Transition camT_ca2_BC to camR_ca2_BC";

function function_15(kTR, cB, cD, camT_ca2_BD)
  camT_ca2_BD*kTR/(cB*cD)^(1/2);
end
function_15 is "function_4_Transition camT_ca2_BD to camR_ca2_BD";

function function_16(kTR, cC, cD, camT_ca2_CD)
  camT_ca2_CD*kTR/(cC*cD)^(1/2);
end
function_16 is "function_4_Transition camT_ca2_CD to camR_ca2_CD";

function function_17(cA, cB, cC, kRT, camR_ca3_ABC)
  camR_ca3_ABC*kRT*(cA*cB*cC)^(1/2);
end
function_17 is "function_4_Transition camR_ca3_ABC to camT_ca3_ABC";

function function_18(cA, cB, cD, kRT, camR_ca3_ABD)
  camR_ca3_ABD*kRT*(cA*cB*cD)^(1/2);
end
function_18 is "function_4_Transition camR_ca3_ABD to camT_ca3_ABD";

function function_19(cA, cC, cD, kRT, camR_ca3_ACD)
  camR_ca3_ACD*kRT*(cA*cC*cD)^(1/2);
end
function_19 is "function_4_Transition camR_ca3_ACD to camT_ca3_ACD";

function function_20(cB, cC, cD, kRT, camR_ca3_BCD)
  camR_ca3_BCD*kRT*(cB*cC*cD)^(1/2);
end
function_20 is "function_4_Transition camR_ca3_BCD to camT_ca3_BCD";

function function_8(cB, cC, kRT, camR_ca2_BC)
  camR_ca2_BC*kRT*(cB*cC)^(1/2);
end
function_8 is "function_4_Transition camR_ca2_BC to camT_ca2_BC";

function function_9(cB, cD, kRT, camR_ca2_BD)
  camR_ca2_BD*kRT*(cB*cD)^(1/2);
end
function_9 is "function_4_Transition camR_ca2_BD to camT_ca2_BD";

function function_10(cC, cD, kRT, camR_ca2_CD)
  camR_ca2_CD*kRT*(cC*cD)^(1/2);
end
function_10 is "function_4_Transition camR_ca2_CD to camT_ca2_CD";

function function_11(kTR, cA, cB, camT_ca2_AB)
  camT_ca2_AB*kTR/(cA*cB)^(1/2);
end
function_11 is "function_4_Transition camT_ca2_AB to camR_ca2_AB";

function function_12(kTR, cA, cC, camT_ca2_AC)
  camT_ca2_AC*kTR/(cA*cC)^(1/2);
end
function_12 is "function_4_Transition camT_ca2_AC to camR_ca2_AC";

function function_21(kTR, cA, cB, cC, camT_ca3_ABC)
  camT_ca3_ABC*kTR/(cA*cB*cC)^(1/2);
end
function_21 is "function_4_Transition camT_ca3_ABC to camR_ca3_ABC";

function function_22(kTR, cA, cB, cD, camT_ca3_ABD)
  camT_ca3_ABD*kTR/(cA*cB*cD)^(1/2);
end
function_22 is "function_4_Transition camT_ca3_ABD to camR_ca3_ABD";

function function_23(kTR, cA, cC, cD, camT_ca3_ACD)
  camT_ca3_ACD*kTR/(cA*cC*cD)^(1/2);
end
function_23 is "function_4_Transition camT_ca3_ACD to camR_ca3_ACD";

function function_24(kTR, cB, cC, cD, camT_ca3_BCD)
  camT_ca3_BCD*kTR/(cB*cC*cD)^(1/2);
end
function_24 is "function_4_Transition camT_ca3_BCD to camR_ca3_BCD";

function function_25(cA, cB, cC, cD, kRT, camR_ca4_ABCD)
  camR_ca4_ABCD*kRT*(cA*cB*cC*cD)^(1/2);
end
function_25 is "function_4_Transition camR_ca4_ABCD to camT_ca4_ABCD";

function function_26(kTR, cA, cB, cC, cD, camT_ca4_ABCD)
  camT_ca4_ABCD*kTR/(cA*cB*cC*cD)^(1/2);
end
function_26 is "function_4_Transition camT_ca4_ABCD to camR_ca4_ABCD";

model BIOMD0000000183()
  // Stefan2008 - calmodulin allostery
  // An allosteric model for calmodulin activation, in which binding to calcium facilitates the transition between a low-affinity [tense (T)] and a high-affinity [relaxed (R)] state.
  // This model is described in the article:
  // An allosteric model of calmodulin explains differential activation of PP2B and CaMKII.
  // Stefan MI, Edelstein SJ, Le Novère N
  // Proc. Natl. Acad. Sci. U.S.A. 2008 Aug; 105(31): 10768-10773
  // Abstract:
  // Calmodulin plays a vital role in mediating bidirectional synaptic plasticity by activating either calcium/calmodulin-dependent protein kinase II (CaMKII) or protein phosphatase 2B (PP2B) at different calcium concentrations. We propose an allosteric model for calmodulin activation, in which binding to calcium facilitates the transition between a low-affinity [tense (T)] and a high-affinity [relaxed (R)] state. The four calcium-binding sites are assumed to be nonidentical. The model is consistent with previously reported experimental data for calcium binding to calmodulin. It also accounts for known properties of calmodulin that have been difficult to model so far, including the activity of nonsaturated forms of calmodulin (we predict the existence of open conformations in the absence of calcium), an increase in calcium affinity once calmodulin is bound to a target, and the differential activation of CaMKII and PP2B depending on calcium concentration.
  // This model is hosted on BioModels Database and identified by: BIOMD0000000183.
  // To cite BioModels Database, please use: BioModels Database: An enhanced, curated and annotated resource for published quantitative kinetic models.
  // To the extent possible under law, all copyright and related or neighbouring rights to this encoded model have been dedicated to the public domain worldwide. Please refer to CC0 Public Domain Dedication for more information.
  // biomodels.db:MODEL9885984404
  // biomodels.db:BIOMD0000000183
  // isDescribedBy pubmed:18669651
  // isPartOf kegg.pathway:ko04720 reactome:REACT_9053.2
  // hasProperty mamo:MAMO_0000046
  // isVersionOf GO:0005516 GO:0004683 GO:0004722 GO:0031915 GO:0005513
  // model units - substance: substance, time: second, volume: volume, area: area, length: metre, extent: substance

  // Compartments:
  compartment Spine = 1e-15 volume;  // GO:0043197

  // Species:
  species camR in Spine = 9.7e-12;  // isVersionOf kegg.compound:C00391; isHomologTo uniprot:P62158
  species ca in Spine = 1e-5;  // CHEBI:29108 kegg.compound:C00076
  species camR_ca1_A in Spine = 0;  // hasPart CHEBI:29108 kegg.compound:C00391
  species camR_ca1_B in Spine = 0;  // hasPart CHEBI:29108 kegg.compound:C00391
  species camR_ca1_C in Spine = 0;  // hasPart CHEBI:29108 kegg.compound:C00391
  species camR_ca1_D in Spine = 0;  // hasPart CHEBI:29108 kegg.compound:C00391
  species camR_ca2_AB in Spine = 0;  // hasPart CHEBI:29108 kegg.compound:C00391
  species camR_ca2_AC in Spine = 0;  // hasPart CHEBI:29108 kegg.compound:C00391
  species camR_ca2_AD in Spine = 0;  // hasPart CHEBI:29108 kegg.compound:C00391
  species camR_ca2_BC in Spine = 0;  // hasPart CHEBI:29108 kegg.compound:C00391
  species camR_ca2_BD in Spine = 0;  // hasPart CHEBI:29108 kegg.compound:C00391
  species camR_ca2_CD in Spine = 0;  // hasPart CHEBI:29108 kegg.compound:C00391
  species camR_ca3_ABC in Spine = 0;  // hasPart CHEBI:29108 kegg.compound:C00391
  species camR_ca3_ABD in Spine = 0;  // hasPart CHEBI:29108 kegg.compound:C00391
  species camR_ca3_ACD in Spine = 0;  // hasPart CHEBI:29108 kegg.compound:C00391
  species camR_ca3_BCD in Spine = 0;  // hasPart CHEBI:29108 kegg.compound:C00391
  species camR_ca4_ABCD in Spine = 0;  // isVersionOf reactome:REACT_3178; hasPart CHEBI:29108 kegg.compound:C00391
  species camT in Spine = 2e-7;  // isHomologTo uniprot:P62158; isVersionOf kegg.compound:C00391
  species camT_ca1_A in Spine = 0;  // hasPart CHEBI:29108 kegg.compound:C00391
  species camT_ca1_B in Spine = 0;  // hasPart CHEBI:29108 kegg.compound:C00391
  species camT_ca1_C in Spine = 0;  // hasPart CHEBI:29108 kegg.compound:C00391
  species camT_ca1_D in Spine = 0;  // hasPart CHEBI:29108 kegg.compound:C00391
  species camT_ca2_AB in Spine = 0;  // hasPart CHEBI:29108 kegg.compound:C00391
  species camT_ca2_AC in Spine = 0;  // hasPart CHEBI:29108 kegg.compound:C00391
  species camT_ca2_AD in Spine = 0;  // hasPart CHEBI:29108 kegg.compound:C00391
  species camT_ca2_BC in Spine = 0;  // hasPart CHEBI:29108 kegg.compound:C00391
  species camT_ca2_BD in Spine = 0;  // hasPart CHEBI:29108 kegg.compound:C00391
  species camT_ca2_CD in Spine = 0;  // hasPart CHEBI:29108 kegg.compound:C00391
  species camT_ca3_ABC in Spine = 0;  // hasPart CHEBI:29108 kegg.compound:C00391
  species camT_ca3_ABD in Spine = 0;  // hasPart CHEBI:29108 kegg.compound:C00391
  species camT_ca3_ACD in Spine = 0;  // hasPart CHEBI:29108 kegg.compound:C00391
  species camT_ca3_BCD in Spine = 0;  // hasPart CHEBI:29108 kegg.compound:C00391
  species camT_ca4_ABCD in Spine = 0;  // hasPart CHEBI:29108 kegg.compound:C00391
  species CaMKII in Spine = 7e-5;  // hasProperty GO:0004683; isHomologTo uniprot:Q9UQM7; isVersionOf interpro:IPR015742 GO:0005954
  species camR_CaMKII in Spine = 0;  // hasPart uniprot:Q9UQM7 kegg.compound:C00391
  species camR_ca1_A_CaMKII in Spine = 0;  // hasPart CHEBI:29108 uniprot:Q9UQM7 kegg.compound:C00391
  species camR_ca1_B_CaMKII in Spine = 0;  // hasPart CHEBI:29108 uniprot:Q9UQM7 kegg.compound:C00391
  species camR_ca1_C_CaMKII in Spine = 0;  // hasPart CHEBI:29108 uniprot:Q9UQM7 kegg.compound:C00391
  species camR_ca1_D_CaMKII in Spine = 0;  // hasPart CHEBI:29108 uniprot:Q9UQM7 kegg.compound:C00391
  species camR_ca2_AB_CaMKII in Spine = 0;  // hasPart CHEBI:29108 uniprot:Q9UQM7 kegg.compound:C00391
  species camR_ca2_AC_CaMKII in Spine = 0;  // hasPart CHEBI:29108 uniprot:Q9UQM7 kegg.compound:C00391
  species camR_ca2_AD_CaMKII in Spine = 0;  // hasPart CHEBI:29108 uniprot:Q9UQM7 kegg.compound:C00391
  species camR_ca2_BC_CaMKII in Spine = 0;  // hasPart CHEBI:29108 uniprot:Q9UQM7 kegg.compound:C00391
  species camR_ca2_BD_CaMKII in Spine = 0;  // hasPart CHEBI:29108 uniprot:Q9UQM7 kegg.compound:C00391
  species camR_ca2_CD_CaMKII in Spine = 0;  // hasPart CHEBI:29108 uniprot:Q9UQM7 kegg.compound:C00391
  species camR_ca3_ABC_CaMKII in Spine = 0;  // hasPart CHEBI:29108 uniprot:Q9UQM7 kegg.compound:C00391
  species camR_ca3_ABD_CaMKII in Spine = 0;  // hasPart CHEBI:29108 uniprot:Q9UQM7 kegg.compound:C00391
  species camR_ca3_ACD_CaMKII in Spine = 0;  // hasPart CHEBI:29108 uniprot:Q9UQM7 kegg.compound:C00391
  species camR_ca3_BCD_CaMKII in Spine = 0;  // hasPart CHEBI:29108 uniprot:Q9UQM7 kegg.compound:C00391
  species camR_ca4_ABCD_CaMKII in Spine = 0;  // isVersionOf reactome:REACT_3178; hasPart CHEBI:29108 uniprot:Q9UQM7 kegg.compound:C00391
  species PP2B in Spine = 1.6e-6;  // hasProperty GO:0033192; isVersionOf reactome:REACT_4613 GO:0005955; hasPart uniprot:Q08209 uniprot:P16298 uniprot:P48454
  species camR_PP2B in Spine = 0;  // hasPart kegg.compound:C00391 GO:0005955
  species camR_ca1_A_PP2B in Spine = 0;  // hasPart CHEBI:29108 kegg.compound:C00391 GO:0005955
  species camR_ca1_B_PP2B in Spine = 0;  // hasPart CHEBI:29108 kegg.compound:C00391 GO:0005955
  species camR_ca1_C_PP2B in Spine = 0;  // hasPart CHEBI:29108 kegg.compound:C00391 GO:0005955
  species camR_ca1_D_PP2B in Spine = 0;  // hasPart CHEBI:29108 kegg.compound:C00391 GO:0005955
  species camR_ca2_AB_PP2B in Spine = 0;  // hasPart CHEBI:29108 kegg.compound:C00391 GO:0005955
  species camR_ca2_AC_PP2B in Spine = 0;  // hasPart CHEBI:29108 kegg.compound:C00391 GO:0005955
  species camR_ca2_AD_PP2B in Spine = 0;  // hasPart CHEBI:29108 kegg.compound:C00391 GO:0005955
  species camR_ca2_BC_PP2B in Spine = 0;  // hasPart CHEBI:29108 kegg.compound:C00391 GO:0005955
  species camR_ca2_BD_PP2B in Spine = 0;  // hasPart CHEBI:29108 kegg.compound:C00391 GO:0005955
  species camR_ca2_CD_PP2B in Spine = 0;  // hasPart CHEBI:29108 kegg.compound:C00391 GO:0005955
  species camR_ca3_ABC_PP2B in Spine = 0;  // hasPart CHEBI:29108 kegg.compound:C00391 GO:0005955
  species camR_ca3_ABD_PP2B in Spine = 0;  // hasPart CHEBI:29108 kegg.compound:C00391 GO:0005955
  species camR_ca3_ACD_PP2B in Spine = 0;  // hasPart CHEBI:29108 kegg.compound:C00391 GO:0005955
  species camR_ca3_BCD_PP2B in Spine = 0;  // hasPart CHEBI:29108 kegg.compound:C00391 GO:0005955
  species camR_ca4_ABCD_PP2B in Spine = 0;  // isVersionOf reactome:REACT_3178; hasPart CHEBI:29108 kegg.compound:C00391 GO:0005955

  // Parameters:
  kon = 1000000;
  var koffRA;
  var koffRB;
  var koffRC;
  var koffRD;
  var koffTA;
  var koffTB;
  var koffTC;
  var koffTD;
  kRT = 1000000;
  var kTR;
  cA = 0.00396;
  cB = 0.00396;
  cC = 0.00396;
  cD = 0.00396;
  konCaMKII = 3200000;
  koffCaMKII = 0.343;
  konPP2B = 46000000;
  koffPP2B = 0.0013;
  var free_camR_ca3_total;
  var free_camT_ca3_total;
  var free_cam_ca3_total;
  var cam_ca4_total;
  var CaMKII_camR_ca1;
  var CaMKII_camR_ca2;
  var CaMKII_camR_ca3;
  var total_CaMKII_bound;
  var total_CaMKII;
  var CaMKIIbar;
  var PP2B_camR_ca1;
  var PP2B_camR_ca2;
  var PP2B_camR_ca3;
  var total_PP2B_bound;
  var total_PP2B;
  var PP2Bbar;
  var camR_unbound;
  var total_camR;
  var total_camT;
  var Rbar;
  var cam_ca3_total;
  var free_camR_ca2_total;
  var free_camT_ca2_total;
  var free_cam_ca2_total;
  var cam_ca2_total;
  var free_cam_ca1_total;
  var cam_ca1_total;
  var cam_ca0_total;
  var cam_total;
  var moles_bound_ca_per_moles_cam;
  L = 20670;
  KRA = 8.32e-6;
  KRB = 1.66e-8;
  KRC = 1.74e-5;
  KRD = 1.45e-8;
  var alpha;
  var beta;
  var gamma;
  var delta;
  var epsilon;
  var ybar;
  var ybar_1_ybar; ybar_1_ybar is "ybar/(1-ybar)";

  // Assignment rules:
  koffRA := KRA*kon;
  free_camT_ca3_total := camT_ca3_ABC + camT_ca3_ABD + camT_ca3_ACD + camT_ca3_BCD;
  koffRB := KRB*kon;
  koffRC := KRC*kon;
  koffRD := KRD*kon;
  koffTA := koffRA/cA;
  koffTB := koffRB/cB;
  koffTC := koffRC/cC;
  koffTD := koffRD/cD;
  kTR := kRT/L;
  free_camR_ca3_total := camR_ca3_ABC + camR_ca3_ABD + camR_ca3_ACD + camR_ca3_BCD;
  free_cam_ca3_total := free_camR_ca3_total + free_camT_ca3_total;
  cam_ca4_total := camR_ca4_ABCD + camT_ca4_ABCD + camR_ca4_ABCD_CaMKII + camR_ca4_ABCD_PP2B;
  CaMKII_camR_ca1 := camR_ca1_A_CaMKII + camR_ca1_B_CaMKII + camR_ca1_C_CaMKII + camR_ca1_D_CaMKII;
  CaMKII_camR_ca3 := camR_ca3_ABC_CaMKII + camR_ca3_ABD_CaMKII + camR_ca3_ACD_CaMKII + camR_ca3_BCD_CaMKII;
  CaMKII_camR_ca2 := camR_ca2_AB_CaMKII + camR_ca2_AC_CaMKII + camR_ca2_AD_CaMKII + camR_ca2_BC_CaMKII + camR_ca2_BD_CaMKII + camR_ca2_CD_CaMKII;
  total_CaMKII_bound := camR_CaMKII + CaMKII_camR_ca1 + CaMKII_camR_ca2 + CaMKII_camR_ca3 + camR_ca4_ABCD_CaMKII;
  total_CaMKII := total_CaMKII_bound + CaMKII;
  CaMKIIbar := total_CaMKII_bound/total_CaMKII;
  PP2B_camR_ca1 := camR_ca1_A_PP2B + camR_ca1_B_PP2B + camR_ca1_C_PP2B + camR_ca1_D_PP2B;
  PP2B_camR_ca2 := camR_ca2_AB_PP2B + camR_ca2_AC_PP2B + camR_ca2_AD_PP2B + camR_ca2_BC_PP2B + camR_ca2_BD_PP2B + camR_ca2_CD_PP2B;
  PP2B_camR_ca3 := camR_ca3_ABC_PP2B + camR_ca3_ABD_PP2B + camR_ca3_ACD_PP2B + camR_ca3_BCD_PP2B;
  total_PP2B_bound := camR_PP2B + PP2B_camR_ca1 + PP2B_camR_ca2 + PP2B_camR_ca3 + camR_ca4_ABCD_PP2B;
  camR_unbound := camR + camR_ca1_A + camR_ca1_B + camR_ca1_C + camR_ca1_D + camR_ca2_AB + camR_ca2_AC + camR_ca2_AD + camR_ca2_BC + camR_ca2_BD + camR_ca2_CD + camR_ca3_ABC + camR_ca3_ABD + camR_ca3_ACD + camR_ca3_BCD + camR_ca4_ABCD;
  total_PP2B := total_PP2B_bound + PP2B;
  PP2Bbar := total_PP2B_bound/total_PP2B;
  total_camT := camT + camT_ca1_A + camT_ca1_B + camT_ca1_C + camT_ca1_D + camT_ca2_AB + camT_ca2_AC + camT_ca2_AD + camT_ca2_BC + camT_ca2_BD + camT_ca2_CD + camT_ca3_ABC + camT_ca3_ABD + camT_ca3_ACD + camT_ca3_BCD + camT_ca4_ABCD;
  total_camR := camR_unbound + total_CaMKII_bound + total_PP2B_bound;
  cam_ca3_total := CaMKII_camR_ca3 + PP2B_camR_ca3 + free_cam_ca3_total;
  Rbar := total_camR/(total_camR + total_camT);
  free_camR_ca2_total := camR_ca2_AB + camR_ca2_AC + camR_ca2_AD + camR_ca2_BC + camR_ca2_BD + camR_ca2_CD;
  free_camT_ca2_total := camT_ca2_AB + camT_ca2_AC + camT_ca2_AD + camT_ca2_BC + camT_ca2_BD + camT_ca2_CD;
  free_cam_ca2_total := free_camR_ca2_total + free_camT_ca2_total;
  cam_ca2_total := free_cam_ca2_total + CaMKII_camR_ca2 + PP2B_camR_ca2;
  free_cam_ca1_total := camR_ca1_A + camR_ca1_B + camR_ca1_C + camR_ca1_D + camT_ca1_A + camT_ca1_B + camT_ca1_C + camT_ca1_D;
  cam_ca1_total := free_cam_ca1_total + CaMKII_camR_ca1 + PP2B_camR_ca1;
  cam_ca0_total := camR + camT + camR_CaMKII + camR_PP2B;
  cam_total := cam_ca0_total + cam_ca1_total + cam_ca2_total + cam_ca3_total + cam_ca4_total;
  moles_bound_ca_per_moles_cam := (4*cam_ca4_total + 3*cam_ca3_total + 2*cam_ca2_total + cam_ca1_total)/cam_total;
  alpha := camR_ca4_ABCD/max(1e-15, camR_ca4_ABCD + camT_ca4_ABCD);
  beta := free_camR_ca3_total/max(1e-15, free_cam_ca3_total);
  gamma := free_camR_ca2_total/max(1e-15, free_cam_ca2_total);
  delta := (camR_ca1_A + camR_ca1_B + camR_ca1_C + camR_ca1_D)/max(1e-15, camR_ca1_A + camR_ca1_B + camR_ca1_C + camR_ca1_D + camT_ca1_A + camT_ca1_B + camT_ca1_C + camT_ca1_D);
  epsilon := camR/max(1e-15, camR + camT);
  ybar := moles_bound_ca_per_moles_cam/4;
  ybar_1_ybar := ybar/(1 - ybar);

  // Reactions:
  Ca_binding_to_camR_site_A: camR + ca => camR_ca1_A; Spine*kon*camR*ca;  // isVersionOf GO:0005509
  Ca_binding_to_camR_site_B: camR + ca => camR_ca1_B; Spine*kon*camR*ca;  // isVersionOf GO:0005509
  Ca_binding_to_camR_site_C: camR + ca => camR_ca1_C; Spine*kon*camR*ca;  // isVersionOf GO:0005509
  Ca_binding_to_camR_site_D: camR + ca => camR_ca1_D; Spine*kon*camR*ca;  // isVersionOf GO:0005509
  reaction_4: camR_ca1_A => camR + ca; Spine*koffRA*camR_ca1_A; reaction_4 is "Ca dissociating from camR_ca1_A site A";
  reaction_5: camR_ca1_B => camR + ca; Spine*koffRB*camR_ca1_B; reaction_5 is "Ca dissociating from camR_ca1_B site B";
  reaction_6: camR_ca1_C => camR + ca; Spine*koffRC*camR_ca1_C; reaction_6 is "Ca dissociating from camR_ca1_C site C";
  reaction_7: camR_ca1_D => camR + ca; Spine*koffRD*camR_ca1_D; reaction_7 is "Ca dissociating from camR_ca1_D site D";
  Ca_binding_to_camR_ca1_A_site_B: camR_ca1_A + ca => camR_ca2_AB; Spine*kon*camR_ca1_A*ca;
  Ca_binding_to_camR_ca1_A_site_C: camR_ca1_A + ca => camR_ca2_AC; Spine*kon*camR_ca1_A*ca;
  Ca_binding_to_camR_ca1_A_site_D: camR_ca1_A + ca => camR_ca2_AD; Spine*kon*camR_ca1_A*ca;
  Ca_binding_to_camR_ca1_B_site_A: camR_ca1_B + ca => camR_ca2_AB; Spine*kon*camR_ca1_B*ca;
  Ca_binding_to_camR_ca1_B_site_C: camR_ca1_B + ca => camR_ca2_BC; Spine*kon*camR_ca1_B*ca;
  Ca_binding_to_camR_ca1_B_site_D: camR_ca1_B + ca => camR_ca2_BD; Spine*kon*camR_ca1_B*ca;
  Ca_binding_to_camR_ca1_C_site_A: camR_ca1_C + ca => camR_ca2_AC; Spine*kon*camR_ca1_C*ca;
  Ca_binding_to_camR_ca1_C_site_B: camR_ca1_C + ca => camR_ca2_BC; Spine*kon*camR_ca1_C*ca;
  Ca_binding_to_camR_ca1_C_site_D: camR_ca1_C + ca => camR_ca2_CD; Spine*kon*camR_ca1_C*ca;
  Ca_binding_to_camR_ca1_D_site_A: camR_ca1_D + ca => camR_ca2_AD; Spine*kon*camR_ca1_D*ca;
  Ca_binding_to_camR_ca1_D_site_B: camR_ca1_D + ca => camR_ca2_BD; Spine*kon*camR_ca1_D*ca;
  Ca_binding_to_camR_ca1_D_site_C: camR_ca1_D + ca => camR_ca2_CD; Spine*kon*camR_ca1_D*ca;
  reaction_20: camR_ca2_AB => camR_ca1_A + ca; Spine*koffRB*camR_ca2_AB; reaction_20 is "Ca dissociating from camR_ca2_AB site B";
  reaction_21: camR_ca2_AC => camR_ca1_A + ca; Spine*koffRC*camR_ca2_AC; reaction_21 is "Ca dissociating from camR_ca2_AC site C";
  reaction_22: camR_ca2_AD => camR_ca1_A + ca; Spine*koffRD*camR_ca2_AD; reaction_22 is "Ca dissociating from camR_ca2_AD site D";
  reaction_23: camR_ca2_AB => camR_ca1_B + ca; Spine*koffRA*camR_ca2_AB; reaction_23 is "Ca dissociating from camR_ca2_AB site A";
  reaction_24: camR_ca2_BC => camR_ca1_B + ca; Spine*koffRC*camR_ca2_BC; reaction_24 is "Ca dissociating from camR_ca2_BC site C";
  reaction_25: camR_ca2_BD => camR_ca1_B + ca; Spine*koffRD*camR_ca2_BD; reaction_25 is "Ca dissociating from camR_ca2_BD site D";
  reaction_26: camR_ca2_AC => camR_ca1_C + ca; Spine*koffRA*camR_ca2_AC; reaction_26 is "Ca dissociating from camR_ca2_AC site A";
  reaction_27: camR_ca2_BC => camR_ca1_C + ca; Spine*koffRB*camR_ca2_BC; reaction_27 is "Ca dissociating from camR_ca2_BC site B";
  reaction_28: camR_ca2_CD => camR_ca1_C + ca; Spine*koffRD*camR_ca2_CD; reaction_28 is "Ca dissociating from camR_ca2_CD site D";
  reaction_29: camR_ca2_AD => camR_ca1_D + ca; Spine*koffRA*camR_ca2_AD; reaction_29 is "Ca dissociating from camR_ca2_AD site A";
  reaction_30: camR_ca2_BD => camR_ca1_D + ca; Spine*koffRB*camR_ca2_BD; reaction_30 is "Ca dissociating from camR_ca2_BD site B";
  reaction_31: camR_ca2_CD => camR_ca1_D + ca; Spine*koffRC*camR_ca2_CD; reaction_31 is "Ca dissociating from camR_ca2_CD site C";
  Ca_binding_to_camR_ca2_AB_site_C: camR_ca2_AB + ca => camR_ca3_ABC; Spine*kon*camR_ca2_AB*ca;
  Ca_binding_to_camR_ca2_AB_site_D: camR_ca2_AB + ca => camR_ca3_ABD; Spine*kon*camR_ca2_AB*ca;
  Ca_binding_to_camR_ca2_AC_site_B: camR_ca2_AC + ca => camR_ca3_ABC; Spine*kon*camR_ca2_AC*ca;
  Ca_binding_to_camR_ca2_AC_site_D: camR_ca2_AC + ca => camR_ca3_ACD; Spine*kon*camR_ca2_AC*ca;
  Ca_binding_to_camR_ca2_AD_site_B: camR_ca2_AD + ca => camR_ca3_ABD; Spine*kon*camR_ca2_AD*ca;
  Ca_binding_to_camR_ca2_AD_site_C: camR_ca2_AD + ca => camR_ca3_ACD; Spine*kon*camR_ca2_AD*ca;
  Ca_binding_to_camR_ca2_BC_site_A: camR_ca2_BC + ca => camR_ca3_ABC; Spine*kon*camR_ca2_BC*ca;
  Ca_binding_to_camR_ca2_BC_site_D: camR_ca2_BC + ca => camR_ca3_BCD; Spine*kon*camR_ca2_BC*ca;
  Ca_binding_to_camR_ca2_BD_site_A: camR_ca2_BD + ca => camR_ca3_ABD; Spine*kon*camR_ca2_BD*ca;
  Ca_binding_to_camR_ca2_BD_site_C: camR_ca2_BD + ca => camR_ca3_BCD; Spine*kon*camR_ca2_BD*ca;
  Ca_binding_to_camR_ca2_CD_site_A: camR_ca2_CD + ca => camR_ca3_ACD; Spine*kon*camR_ca2_CD*ca;
  Ca_binding_to_camR_ca2_CD_site_B: camR_ca2_CD + ca => camR_ca3_BCD; Spine*kon*camR_ca2_CD*ca;
  reaction_44: camR_ca3_ABC => camR_ca2_BC + ca; Spine*koffRA*camR_ca3_ABC; reaction_44 is "Ca dissociating from camR_ca3_ABC site A";
  reaction_45: camR_ca3_ABC => camR_ca2_AC + ca; Spine*koffRB*camR_ca3_ABC; reaction_45 is "Ca dissociating from camR_ca3_ABC site B";
  reaction_46: camR_ca3_ABC => camR_ca2_AB + ca; Spine*koffRC*camR_ca3_ABC; reaction_46 is "Ca dissociating from camR_ca3_ABC site C";
  reaction_47: camR_ca3_ABD => camR_ca2_BD + ca; Spine*koffRA*camR_ca3_ABD; reaction_47 is "Ca dissociating from camR_ca3_ABD site A";
  reaction_48: camR_ca3_ABD => camR_ca2_AD + ca; Spine*koffRB*camR_ca3_ABD; reaction_48 is "Ca dissociating from camR_ca3_ABD site B";
  reaction_49: camR_ca3_ABD => camR_ca2_AB + ca; Spine*koffRD*camR_ca3_ABD; reaction_49 is "Ca dissociating from camR_ca3_ABD site D";
  reaction_50: camR_ca3_ACD => camR_ca2_CD + ca; Spine*koffRA*camR_ca3_ACD; reaction_50 is "Ca dissociating from camR_ca3_ACD site A";
  reaction_51: camR_ca3_ACD => camR_ca2_AD + ca; Spine*koffRC*camR_ca3_ACD; reaction_51 is "Ca dissociating from camR_ca3_ACD site C";
  reaction_52: camR_ca3_ACD => camR_ca2_AC + ca; Spine*koffRD*camR_ca3_ACD; reaction_52 is "Ca dissociating from camR_ca3_ACD site D";
  reaction_53: camR_ca3_BCD => camR_ca2_CD + ca; Spine*koffRB*camR_ca3_BCD; reaction_53 is "Ca dissociating from camR_ca3_BCD site B";
  reaction_54: camR_ca3_BCD => camR_ca2_BD + ca; Spine*koffRC*camR_ca3_BCD; reaction_54 is "Ca dissociating from camR_ca3_BCD site C";
  reaction_55: camR_ca3_BCD => camR_ca2_BC + ca; Spine*koffRD*camR_ca3_BCD; reaction_55 is "Ca dissociating from camR_ca3_BCD site D";
  reaction_56: camR_ca3_ABC + ca => camR_ca4_ABCD; Spine*kon*camR_ca3_ABC*ca; reaction_56 is "Ca binding to camR_ca3_ABC site D";
  reaction_57: camR_ca3_ABD + ca => camR_ca4_ABCD; Spine*kon*camR_ca3_ABD*ca; reaction_57 is "Ca binding to camR_ca3_ABD site C";
  reaction_58: camR_ca3_ACD + ca => camR_ca4_ABCD; Spine*kon*camR_ca3_ACD*ca; reaction_58 is "Ca binding to camR_ca3_ACD site B";
  reaction_59: camR_ca3_BCD + ca => camR_ca4_ABCD; Spine*kon*camR_ca3_BCD*ca; reaction_59 is "Ca binding to camR_ca3_BCD site A";
  reaction_60: camR_ca4_ABCD => camR_ca3_ABC + ca; Spine*koffRD*camR_ca4_ABCD; reaction_60 is "Ca dissociating from camR_ca4_ABCD site D";
  reaction_61: camR_ca4_ABCD => camR_ca3_ABD + ca; Spine*koffRC*camR_ca4_ABCD; reaction_61 is "Ca dissociating from camR_ca4_ABCD site C";
  reaction_62: camR_ca4_ABCD => camR_ca3_ACD + ca; Spine*koffRB*camR_ca4_ABCD; reaction_62 is "Ca dissociating from camR_ca4_ABCD site B";
  reaction_63: camR_ca4_ABCD => camR_ca3_BCD + ca; Spine*koffRA*camR_ca4_ABCD; reaction_63 is "Ca dissociating from camR_ca4_ABCD site A";
  Ca_binding_to_camT_site_A: camT + ca => camT_ca1_A; Spine*kon*camT*ca;
  Ca_binding_to_camT_site_B: camT + ca => camT_ca1_B; Spine*kon*camT*ca;
  Ca_binding_to_camT_site_C: camT + ca => camT_ca1_C; Spine*kon*camT*ca;
  Ca_binding_to_camT_site_D: camT + ca => camT_ca1_D; Spine*kon*camT*ca;
  reaction_68: camT_ca1_A => camT + ca; Spine*koffTA*camT_ca1_A; reaction_68 is "Ca dissociating from camT_ca1_A site A";
  reaction_69: camT_ca1_B => camT + ca; Spine*koffTB*camT_ca1_B; reaction_69 is "Ca dissociating from camT_ca1_B site B";
  reaction_70: camT_ca1_C => camT + ca; Spine*koffTC*camT_ca1_C; reaction_70 is "Ca dissociating from camT_ca1_C site C";
  reaction_71: camT_ca1_D => camT + ca; Spine*koffTD*camT_ca1_D; reaction_71 is "Ca dissociating from camT_ca1_D site D";
  Ca_binding_to_camT_ca1_A_site_B: camT_ca1_A + ca => camT_ca2_AB; Spine*kon*camT_ca1_A*ca;
  Ca_binding_to_camT_ca1_A_site_C: camT_ca1_A + ca => camT_ca2_AC; Spine*kon*camT_ca1_A*ca;
  Ca_binding_to_camT_ca1_A_site_D: camT_ca1_A + ca => camT_ca2_AD; Spine*kon*camT_ca1_A*ca;
  Ca_binding_to_camT_ca1_B_site_A: camT_ca1_B + ca => camT_ca2_AB; Spine*kon*camT_ca1_B*ca;
  Ca_binding_to_camT_ca1_B_site_C: camT_ca1_B + ca => camT_ca2_BC; Spine*kon*camT_ca1_B*ca;
  Ca_binding_to_camT_ca1_B_site_D: camT_ca1_B + ca => camT_ca2_BD; Spine*kon*camT_ca1_B*ca;
  Ca_binding_to_camT_ca1_C_site_A: camT_ca1_C + ca => camT_ca2_AC; Spine*kon*camT_ca1_C*ca;
  Ca_binding_to_camT_ca1_C_site_B: camT_ca1_C + ca => camT_ca2_BC; Spine*kon*camT_ca1_C*ca;
  Ca_binding_to_camT_ca1_C_site_D: camT_ca1_C + ca => camT_ca2_CD; Spine*kon*camT_ca1_C*ca;
  Ca_binding_to_camT_ca1_D_site_A: camT_ca1_D + ca => camT_ca2_AD; Spine*kon*camT_ca1_D*ca;
  Ca_binding_to_camT_ca1_D_site_B: camT_ca1_D + ca => camT_ca2_BD; Spine*kon*camT_ca1_D*ca;
  Ca_binding_to_camT_ca1_D_site_C: camT_ca1_D + ca => camT_ca2_CD; Spine*kon*camT_ca1_D*ca;
  reaction_84: camT_ca2_AB => camT_ca1_B + ca; Spine*koffTA*camT_ca2_AB; reaction_84 is "Ca dissociating from camT_ca2_AB site A";
  reaction_85: camT_ca2_AB => camT_ca1_A + ca; Spine*koffTB*camT_ca2_AB; reaction_85 is "Ca dissociating from camT_ca2_AB site B";
  reaction_86: camT_ca2_AC => camT_ca1_C + ca; Spine*koffTA*camT_ca2_AC; reaction_86 is "Ca dissociating from camT_ca2_AC site A";
  reaction_87: camT_ca2_AC => camT_ca1_A + ca; Spine*koffTC*camT_ca2_AC; reaction_87 is "Ca dissociating from camT_ca2_AC site C";
  reaction_88: camT_ca2_AD => camT_ca1_D + ca; Spine*koffTA*camT_ca2_AD; reaction_88 is "Ca dissociating from camT_ca2_AD site A";
  reaction_89: camT_ca2_AD => camT_ca1_A + ca; Spine*koffTD*camT_ca2_AD; reaction_89 is "Ca dissociating from camT_ca2_AD site D";
  reaction_90: camT_ca2_BC => camT_ca1_C + ca; Spine*koffTB*camT_ca2_BC; reaction_90 is "Ca dissociating from camT_ca2_BC site B";
  reaction_91: camT_ca2_BC => camT_ca1_B + ca; Spine*koffTC*camT_ca2_BC; reaction_91 is "Ca dissociating from camT_ca2_BC site C";
  reaction_92: camT_ca2_BD => camT_ca1_D + ca; Spine*koffTB*camT_ca2_BD; reaction_92 is "Ca dissociating from camT_ca2_BD site B";
  reaction_93: camT_ca2_BD => camT_ca1_B + ca; Spine*koffTD*camT_ca2_BD; reaction_93 is "Ca dissociating from camT_ca2_BD site D";
  reaction_94: camT_ca2_CD => camT_ca1_D + ca; Spine*koffTC*camT_ca2_CD; reaction_94 is "Ca dissociating from camT_ca2_CD site C";
  reaction_95: camT_ca2_CD => camT_ca1_C + ca; Spine*koffTD*camT_ca2_CD; reaction_95 is "Ca dissociating from camT_ca2_CD site D";
  Ca_binding_to_camT_ca2_AB_site_C: camT_ca2_AB + ca => camT_ca3_ABC; Spine*kon*camT_ca2_AB*ca;
  Ca_binding_to_camT_ca2_AB_site_D: camT_ca2_AB + ca => camT_ca3_ABD; Spine*kon*camT_ca2_AB*ca;
  Ca_binding_to_camT_ca2_AC_site_B: camT_ca2_AC + ca => camT_ca3_ABC; Spine*kon*camT_ca2_AC*ca;
  Ca_binding_to_camT_ca2_AC_site_D: camT_ca2_AC + ca => camT_ca3_ACD; Spine*kon*camT_ca2_AC*ca;
  Ca_binding_to_camT_ca2_AD_site_B: camT_ca2_AD + ca => camT_ca3_ABD; Spine*kon*camT_ca2_AD*ca;
  Ca_binding_to_camT_ca2_AD_site_C: camT_ca2_AD + ca => camT_ca3_ACD; Spine*kon*camT_ca2_AD*ca;
  Ca_binding_to_camT_ca2_BC_site_A: camT_ca2_BC + ca => camT_ca3_ABC; Spine*kon*camT_ca2_BC*ca;
  Ca_binding_to_camT_ca2_BC_site_D: camT_ca2_BC + ca => camT_ca3_BCD; Spine*kon*camT_ca2_BC*ca;
  Ca_binding_to_camT_ca2_BD_site_A: camT_ca2_BD + ca => camT_ca3_ABD; Spine*kon*camT_ca2_BD*ca;
  Ca_binding_to_camT_ca2_BD_site_C: camT_ca2_BD + ca => camT_ca3_BCD; Spine*kon*camT_ca2_BD*ca;
  Ca_binding_to_camT_ca2_CD_site_A: camT_ca2_CD + ca => camT_ca3_ACD; Spine*kon*camT_ca2_CD*ca;
  Ca_binding_to_camT_ca2_CD_site_B: camT_ca2_CD + ca => camT_ca3_BCD; Spine*kon*camT_ca2_CD*ca;
  reaction_108: camT_ca3_ABC => camT_ca2_AC + ca; Spine*koffTB*camT_ca3_ABC; reaction_108 is "Ca dissociating from camT_ca3_ABC site B";
  reaction_109: camT_ca3_ABC => camT_ca2_BC + ca; Spine*koffTA*camT_ca3_ABC; reaction_109 is "Ca dissociating from camT_ca3_ABC site A";
  reaction_110: camT_ca3_ABD => camT_ca2_AB + ca; Spine*koffTD*camT_ca3_ABD; reaction_110 is "Ca dissociating from camT_ca3_ABD site D";
  reaction_111: camT_ca3_ABD => camT_ca2_AD + ca; Spine*koffTB*camT_ca3_ABD; reaction_111 is "Ca dissociating from camT_ca3_ABD site B";
  reaction_112: camT_ca3_ABD => camT_ca2_BD + ca; Spine*koffTA*camT_ca3_ABD; reaction_112 is "Ca dissociating from camT_ca3_ABD site A";
  reaction_113: camT_ca3_ACD => camT_ca2_AC + ca; Spine*koffTD*camT_ca3_ACD; reaction_113 is "Ca dissociating from camT_ca3_ACD site D";
  reaction_114: camT_ca3_ACD => camT_ca2_AD + ca; Spine*koffTC*camT_ca3_ACD; reaction_114 is "Ca dissociating from camT_ca3_ACD site C";
  reaction_115: camT_ca3_ACD => camT_ca2_CD + ca; Spine*koffTA*camT_ca3_ACD; reaction_115 is "Ca dissociating from camT_ca3_ACD site A";
  reaction_116: camT_ca3_BCD => camT_ca2_BC + ca; Spine*koffTD*camT_ca3_BCD; reaction_116 is "Ca dissociating from camT_ca3_BCD site D";
  reaction_117: camT_ca3_BCD => camT_ca2_BD + ca; Spine*koffTC*camT_ca3_BCD; reaction_117 is "Ca dissociating from camT_ca3_BCD site C";
  reaction_118: camT_ca3_BCD => camT_ca2_CD + ca; Spine*koffTB*camT_ca3_BCD; reaction_118 is "Ca dissociating from camT_ca3_BCD site B";
  reaction_119: camT_ca3_ABC + ca => camT_ca4_ABCD; Spine*kon*camT_ca3_ABC*ca; reaction_119 is "Ca binding to camT_ca3_ABC site D";
  reaction_120: camT_ca3_ABD + ca => camT_ca4_ABCD; Spine*kon*camT_ca3_ABD*ca; reaction_120 is "Ca binding to camT_ca3_ABD site C";
  reaction_121: camT_ca3_ACD + ca => camT_ca4_ABCD; Spine*kon*camT_ca3_ACD*ca; reaction_121 is "Ca binding to camT_ca3_ACD site B";
  reaction_122: camT_ca3_BCD + ca => camT_ca4_ABCD; Spine*kon*camT_ca3_BCD*ca; reaction_122 is "Ca binding to camT_ca3_BCD site A";
  reaction_123: camT_ca4_ABCD => camT_ca3_ABC + ca; Spine*koffTD*camT_ca4_ABCD; reaction_123 is "Ca dissociating from camT_ca4_ABCD site D";
  reaction_124: camT_ca4_ABCD => camT_ca3_ABD + ca; Spine*koffTC*camT_ca4_ABCD; reaction_124 is "Ca dissociating from camT_ca4_ABCD site C";
  reaction_125: camT_ca4_ABCD => camT_ca3_ACD + ca; Spine*koffTB*camT_ca4_ABCD; reaction_125 is "Ca dissociating from camT_ca4_ABCD site B";
  reaction_126: camT_ca4_ABCD => camT_ca3_BCD + ca; Spine*koffTA*camT_ca4_ABCD; reaction_126 is "Ca dissociating from camT_ca4_ABCD site A";
  Transition_camR_to_camT: camR => camT; Spine*kRT*camR;
  Transition_camT_to_camR: camT => camR; Spine*kTR*camT;
  reaction_129: camR_ca1_A => camT_ca1_A; Spine*transition1_R_T(kRT, kTR, camR_ca1_A); reaction_129 is "Transition camR_ca1_A to camT_ca1_A";
  reaction_130: camR_ca1_B => camT_ca1_B; Spine*transition1_R_T(kRT, cB, camR_ca1_B); reaction_130 is "Transition camR_ca1_B to camT_ca1_B";
  reaction_131: camR_ca1_C => camT_ca1_C; Spine*transition1_R_T(kRT, cC, camR_ca1_C); reaction_131 is "Transition camR_ca1_C to camT_ca1_C";
  reaction_132: camR_ca1_D => camT_ca1_D; Spine*transition1_R_T(kRT, cD, camR_ca1_D); reaction_132 is "Transition camR_ca1_D to camT_ca1_D";
  reaction_133: camT_ca1_A => camR_ca1_A; Spine*function_1(kTR, cA, camT_ca1_A); reaction_133 is "Transition camT_ca1_A to camR_ca1_A";
  reaction_134: camT_ca1_B => camR_ca1_B; Spine*function_2(kTR, cB, camT_ca1_B); reaction_134 is "Transition camT_ca1_B to camR_ca1_B";
  reaction_135: camT_ca1_C => camR_ca1_C; Spine*function_3(kTR, cC, camT_ca1_C); reaction_135 is "Transition camT_ca1_C to camR_ca1_C";
  reaction_136: camT_ca1_D => camR_ca1_D; Spine*function_4(kTR, cD, camT_ca1_D); reaction_136 is "Transition camT_ca1_D to camR_ca1_D";
  reaction_137: camR_ca2_AB => camT_ca2_AB; Spine*function_5(cA, cB, kRT, camR_ca2_AB); reaction_137 is "Transition camR_ca2_AB to camT_ca2_AB";
  reaction_138: camR_ca2_AC => camT_ca2_AC; Spine*function_6(cA, cC, kRT, camR_ca2_AC); reaction_138 is "Transition camR_ca2_AC to camT_ca2_AC";
  reaction_139: camR_ca2_AD => camT_ca2_AD; Spine*function_7(cA, cD, kRT, camR_ca2_AD); reaction_139 is "Transition camR_ca2_AD to camT_ca2_AD";
  reaction_140: camR_ca2_BC => camT_ca2_BC; Spine*function_8(cB, cC, kRT, camR_ca2_BC); reaction_140 is "Transition camR_ca2_BC to camT_ca2_BC";
  reaction_141: camR_ca2_BD => camT_ca2_BD; Spine*function_9(cB, cD, kRT, camR_ca2_BD); reaction_141 is "Transition camR_ca2_BD to camT_ca2_BD";
  reaction_142: camR_ca2_CD => camT_ca2_CD; Spine*function_10(cC, cD, kRT, camR_ca2_CD); reaction_142 is "Transition camR_ca2_CD to camT_ca2_CD";
  reaction_143: camT_ca2_AB => camR_ca2_AB; Spine*function_11(kTR, cA, cB, camT_ca2_AB); reaction_143 is "Transition camT_ca2_AB to camR_ca2_AB";
  reaction_144: camT_ca2_AC => camR_ca2_AC; Spine*function_12(kTR, cA, cC, camT_ca2_AC); reaction_144 is "Transition camT_ca2_AC to camR_ca2_AC";
  reaction_145: camT_ca2_AD => camR_ca2_AD; Spine*function_13(kTR, cA, cD, camT_ca2_AD); reaction_145 is "Transition camT_ca2_AD to camR_ca2_AD";
  reaction_146: camT_ca2_BC => camR_ca2_BC; Spine*function_14(kTR, cB, cC, camT_ca2_BC); reaction_146 is "Transition camT_ca2_BC to camR_ca2_BC";
  reaction_147: camT_ca2_BD => camR_ca2_BD; Spine*function_15(kTR, cB, cD, camT_ca2_BD); reaction_147 is "Transition camT_ca2_BD to camR_ca2_BD";
  reaction_148: camT_ca2_CD => camR_ca2_CD; Spine*function_16(kTR, cC, cD, camT_ca2_CD); reaction_148 is "Transition camT_ca2_CD to camR_ca2_CD";
  reaction_149: camR_ca3_ABC => camT_ca3_ABC; Spine*function_17(cA, cB, cC, kRT, camR_ca3_ABC); reaction_149 is "Transition camR_ca3_ABC to camT_ca3_ABC";
  reaction_150: camR_ca3_ABD => camT_ca3_ABD; Spine*function_18(cA, cB, cD, kRT, camR_ca3_ABD); reaction_150 is "Transition camR_ca3_ABD to camT_ca3_ABD";
  reaction_151: camR_ca3_ACD => camT_ca3_ACD; Spine*function_19(cA, cC, cD, kRT, camR_ca3_ACD); reaction_151 is "Transition camR_ca3_ACD to camT_ca3_ACD";
  reaction_152: camR_ca3_BCD => camT_ca3_BCD; Spine*function_20(cB, cC, cD, kRT, camR_ca3_BCD); reaction_152 is "Transition camR_ca3_BCD to camT_ca3_BCD";
  reaction_153: camT_ca3_ABC => camR_ca3_ABC; Spine*function_21(kTR, cA, cB, cC, camT_ca3_ABC); reaction_153 is "Transition camT_ca3_ABC to camR_ca3_ABC";
  reaction_154: camT_ca3_ABD => camR_ca3_ABD; Spine*function_22(kTR, cA, cB, cD, camT_ca3_ABD); reaction_154 is "Transition camT_ca3_ABD to camR_ca3_ABD";
  reaction_155: camT_ca3_ACD => camR_ca3_ACD; Spine*function_23(kTR, cA, cC, cD, camT_ca3_ACD); reaction_155 is "Transition camT_ca3_ACD to camR_ca3_ACD";
  reaction_156: camT_ca3_BCD => camR_ca3_BCD; Spine*function_24(kTR, cB, cC, cD, camT_ca3_BCD); reaction_156 is "Transition camT_ca3_BCD to camR_ca3_BCD";
  reaction_157: camR_ca4_ABCD => camT_ca4_ABCD; Spine*function_25(cA, cB, cC, cD, kRT, camR_ca4_ABCD); reaction_157 is "Transition camR_ca4_ABCD to camT_ca4_ABCD";
  reaction_158: camT_ca4_ABCD => camR_ca4_ABCD; Spine*function_26(kTR, cA, cB, cC, cD, camT_ca4_ABCD); reaction_158 is "Transition camT_ca4_ABCD to camR_ca4_ABCD";
  CaMKII_binding_to_camR: camR + CaMKII => camR_CaMKII; Spine*konCaMKII*camR*CaMKII;
  CaMKII_binding_to_camR_ca1_A: camR_ca1_A + CaMKII => camR_ca1_A_CaMKII; Spine*konCaMKII*camR_ca1_A*CaMKII;
  CaMKII_binding_to_camR_ca1_B: camR_ca1_B + CaMKII => camR_ca1_B_CaMKII; Spine*konCaMKII*camR_ca1_B*CaMKII;
  CaMKII_binding_to_camR_ca1_C: camR_ca1_C + CaMKII => camR_ca1_C_CaMKII; Spine*konCaMKII*camR_ca1_C*CaMKII;
  CaMKII_binding_to_camR_ca1_D: camR_ca1_D + CaMKII => camR_ca1_D_CaMKII; Spine*konCaMKII*camR_ca1_D*CaMKII;
  CaMKII_binding_to_camR_ca2_AB: camR_ca2_AB + CaMKII => camR_ca2_AB_CaMKII; Spine*konCaMKII*camR_ca2_AB*CaMKII;
  CaMKII_binding_to_camR_ca2_AC: camR_ca2_AC + CaMKII => camR_ca2_AC_CaMKII; Spine*konCaMKII*camR_ca2_AC*CaMKII;
  CaMKII_binding_to_camR_ca2_AD: camR_ca2_AD + CaMKII => camR_ca2_AD_CaMKII; Spine*konCaMKII*camR_ca2_AD*CaMKII;
  CaMKII_binding_to_camR_ca2_BC: camR_ca2_BC + CaMKII => camR_ca2_BC_CaMKII; Spine*konCaMKII*camR_ca2_BC*CaMKII;
  CaMKII_binding_to_camR_ca2_BD: camR_ca2_BD + CaMKII => camR_ca2_BD_CaMKII; Spine*konCaMKII*camR_ca2_BD*CaMKII;
  CaMKII_binding_to_camR_ca2_CD: camR_ca2_CD + CaMKII => camR_ca2_CD_CaMKII; Spine*konCaMKII*camR_ca2_CD*CaMKII;
  CaMKII_binding_to_camR_ca3_ABC: camR_ca3_ABC + CaMKII => camR_ca3_ABC_CaMKII; Spine*konCaMKII*camR_ca3_ABC*CaMKII;
  CaMKII_binding_to_camR_ca3_ABD: camR_ca3_ABD + CaMKII => camR_ca3_ABD_CaMKII; Spine*konCaMKII*camR_ca3_ABD*CaMKII;
  CaMKII_binding_to_camR_ca3_ACD: camR_ca3_ACD + CaMKII => camR_ca3_ACD_CaMKII; Spine*konCaMKII*camR_ca3_ACD*CaMKII;
  CaMKII_binding_to_camR_ca3_BCD: camR_ca3_BCD + CaMKII => camR_ca3_BCD_CaMKII; Spine*konCaMKII*camR_ca3_BCD*CaMKII;
  CaMKII_binding_to_camR_ca4_ABCD: camR_ca4_ABCD + CaMKII => camR_ca4_ABCD_CaMKII; Spine*konCaMKII*camR_ca4_ABCD*CaMKII;
  CaMKII_dissociation_from_camR: camR_CaMKII => camR + CaMKII; Spine*koffCaMKII*camR_CaMKII;
  reaction_176: camR_ca1_A_CaMKII => camR_ca1_A + CaMKII; Spine*koffCaMKII*camR_ca1_A_CaMKII; reaction_176 is "CaMKII dissociation from camR_ca1_A";
  reaction_177: camR_ca1_B_CaMKII => camR_ca1_B + CaMKII; Spine*koffCaMKII*camR_ca1_B_CaMKII; reaction_177 is "CaMKII dissociation from camR_ca1_B";
  reaction_178: camR_ca1_C_CaMKII => camR_ca1_C + CaMKII; Spine*koffCaMKII*camR_ca1_C_CaMKII; reaction_178 is "CaMKII dissociation from camR_ca1_C";
  reaction_179: camR_ca1_D_CaMKII => camR_ca1_D + CaMKII; Spine*koffCaMKII*camR_ca1_D_CaMKII; reaction_179 is "CaMKII dissociation from camR_ca1_D";
  reaction_180: camR_ca2_AB_CaMKII => camR_ca2_AB + CaMKII; Spine*koffCaMKII*camR_ca2_AB_CaMKII; reaction_180 is "CaMKII dissociation from camR_ca2_AB";
  reaction_181: camR_ca2_AC_CaMKII => camR_ca2_AC + CaMKII; Spine*koffCaMKII*camR_ca2_AC_CaMKII; reaction_181 is "CaMKII dissociation from camR_ca2_AC";
  reaction_182: camR_ca2_AD_CaMKII => camR_ca2_AD + CaMKII; Spine*koffCaMKII*camR_ca2_AD_CaMKII; reaction_182 is "CaMKII dissociation from camR_ca2_AD";
  reaction_183: camR_ca2_BC_CaMKII => camR_ca2_BC + CaMKII; Spine*koffCaMKII*camR_ca2_BC_CaMKII; reaction_183 is "CaMKII dissociation from camR_ca2_BC";
  reaction_184: camR_ca2_BD_CaMKII => camR_ca2_BD + CaMKII; Spine*koffCaMKII*camR_ca2_BD_CaMKII; reaction_184 is "CaMKII dissociation from camR_ca2_BD";
  reaction_185: camR_ca2_CD_CaMKII => camR_ca2_CD + CaMKII; Spine*koffCaMKII*camR_ca2_CD_CaMKII; reaction_185 is "CaMKII dissociation from camR_ca2_CD";
  reaction_186: camR_ca3_ABC_CaMKII => camR_ca3_ABC + CaMKII; Spine*koffCaMKII*camR_ca3_ABC_CaMKII; reaction_186 is "CaMKII dissociation from camR_ca3_ABC";
  reaction_187: camR_ca3_ABD_CaMKII => camR_ca3_ABD + CaMKII; Spine*koffCaMKII*camR_ca3_ABD_CaMKII; reaction_187 is "CaMKII dissociation from camR_ca3_ABD";
  reaction_188: camR_ca3_ACD_CaMKII => camR_ca3_ACD + CaMKII; Spine*koffCaMKII*camR_ca3_ACD_CaMKII; reaction_188 is "CaMKII dissociation from camR_ca3_ACD";
  reaction_189: camR_ca3_BCD_CaMKII => camR_ca3_BCD + CaMKII; Spine*koffCaMKII*camR_ca3_BCD_CaMKII; reaction_189 is "CaMKII dissociation from camR_ca3_BCD";
  reaction_190: camR_ca4_ABCD_CaMKII => camR_ca4_ABCD + CaMKII; Spine*koffCaMKII*camR_ca4_ABCD_CaMKII; reaction_190 is "CaMKII dissociation from camR_ca4_ABCD";
  PP2B_binding_to_camR: camR + PP2B => camR_PP2B; Spine*konPP2B*camR*PP2B;  // isVersionOf reactome:REACT_15299
  PP2B_binding_to_camR_ca1_A: camR_ca1_A + PP2B => camR_ca1_A_PP2B; Spine*konPP2B*camR_ca1_A*PP2B;  // isVersionOf reactome:REACT_15299
  PP2B_binding_to_camR_ca1_B: camR_ca1_B + PP2B => camR_ca1_B_PP2B; Spine*konPP2B*camR_ca1_B*PP2B;  // isVersionOf reactome:REACT_15299
  PP2B_binding_to_camR_ca1_C: camR_ca1_C + PP2B => camR_ca1_C_PP2B; Spine*konPP2B*camR_ca1_C*PP2B;  // isVersionOf reactome:REACT_15299
  PP2B_binding_to_camR_ca1_D: camR_ca1_D + PP2B => camR_ca1_D_PP2B; Spine*konPP2B*camR_ca1_D*PP2B;  // isVersionOf reactome:REACT_15299
  PP2B_binding_to_camR_ca2_AB: camR_ca2_AB + PP2B => camR_ca2_AB_PP2B; Spine*konPP2B*camR_ca2_AB*PP2B;  // isVersionOf reactome:REACT_15299
  PP2B_binding_to_camR_ca2_AC: camR_ca2_AC + PP2B => camR_ca2_AC_PP2B; Spine*konPP2B*camR_ca2_AC*PP2B;  // isVersionOf reactome:REACT_15299
  PP2B_binding_to_camR_ca2_AD: camR_ca2_AD + PP2B => camR_ca2_AD_PP2B; Spine*konPP2B*camR_ca2_AD*PP2B;  // isVersionOf reactome:REACT_15299
  PP2B_binding_to_camR_ca2_BC: camR_ca2_BC + PP2B => camR_ca2_BC_PP2B; Spine*konPP2B*camR_ca2_BC*PP2B;  // isVersionOf reactome:REACT_15299
  PP2B_binding_to_camR_ca2_BD: camR_ca2_BD + PP2B => camR_ca2_BD_PP2B; Spine*konPP2B*camR_ca2_BD*PP2B;  // isVersionOf reactome:REACT_15299
  PP2B_binding_to_camR_ca2_CD: camR_ca2_CD + PP2B => camR_ca2_CD_PP2B; Spine*konPP2B*camR_ca2_CD*PP2B;  // isVersionOf reactome:REACT_15299
  PP2B_binding_to_camR_ca3_ABC: camR_ca3_ABC + PP2B => camR_ca3_ABC_PP2B; Spine*konPP2B*camR_ca3_ABC*PP2B;  // isVersionOf reactome:REACT_15299
  PP2B_binding_to_camR_ca3_ABD: camR_ca3_ABD + PP2B => camR_ca3_ABD_PP2B; Spine*konPP2B*camR_ca3_ABD*PP2B;  // isVersionOf reactome:REACT_15299
  PP2B_binding_to_camR_ca3_ACD: camR_ca3_ACD + PP2B => camR_ca3_ACD_PP2B; Spine*konPP2B*camR_ca3_ACD*PP2B;  // isVersionOf reactome:REACT_15299
  PP2B_binding_to_camR_ca3_BCD: camR_ca3_BCD + PP2B => camR_ca3_BCD_PP2B; Spine*konPP2B*camR_ca3_BCD*PP2B;  // isVersionOf reactome:REACT_15299
  PP2B_binding_to_camR_ca4_ABCD: camR_ca4_ABCD + PP2B => camR_ca4_ABCD_PP2B; Spine*konPP2B*camR_ca4_ABCD*PP2B;  // isVersionOf reactome:REACT_15299
  PP2B_dissociation_from_camR: camR_PP2B => camR + PP2B; Spine*koffPP2B*camR_PP2B;
  reaction_208: camR_ca1_A_PP2B => camR_ca1_A + PP2B; Spine*koffPP2B*camR_ca1_A_PP2B; reaction_208 is "PP2B dissociation from camR_ca1_A";
  reaction_209: camR_ca1_B_PP2B => camR_ca1_B + PP2B; Spine*koffPP2B*camR_ca1_B_PP2B; reaction_209 is "PP2B dissociation from camR_ca1_B";
  reaction_210: camR_ca1_C_PP2B => camR_ca1_C + PP2B; Spine*koffPP2B*camR_ca1_C_PP2B; reaction_210 is "PP2B dissociation from camR_ca1_C";
  reaction_211: camR_ca1_D_PP2B => camR_ca1_D + PP2B; Spine*koffPP2B*camR_ca1_D_PP2B; reaction_211 is "PP2B dissociation from camR_ca1_D";
  reaction_212: camR_ca2_AB_PP2B => camR_ca2_AB + PP2B; Spine*koffPP2B*camR_ca2_AB_PP2B; reaction_212 is "PP2B dissociation from camR_ca2_AB";
  reaction_213: camR_ca2_AC_PP2B => camR_ca2_AC + PP2B; Spine*koffPP2B*camR_ca2_AC_PP2B; reaction_213 is "PP2B dissociation from camR_ca2_AC";
  reaction_214: camR_ca2_AD_PP2B => camR_ca2_AD + PP2B; Spine*koffPP2B*camR_ca2_AD_PP2B; reaction_214 is "PP2B dissociation from camR_ca2_AD";
  reaction_215: camR_ca2_BC_PP2B => camR_ca2_BC + PP2B; Spine*koffPP2B*camR_ca2_BC_PP2B; reaction_215 is "PP2B dissociation from camR_ca2_BC";
  reaction_216: camR_ca2_BD_PP2B => camR_ca2_BD + PP2B; Spine*koffPP2B*camR_ca2_BD_PP2B; reaction_216 is "PP2B dissociation from camR_ca2_BD";
  reaction_217: camR_ca2_CD_PP2B => camR_ca2_CD + PP2B; Spine*koffPP2B*camR_ca2_CD_PP2B; reaction_217 is "PP2B dissociation from camR_ca2_CD";
  reaction_218: camR_ca3_ABC_PP2B => camR_ca3_ABC + PP2B; Spine*koffPP2B*camR_ca3_ABC_PP2B; reaction_218 is "PP2B dissociation from camR_ca3_ABC";
  reaction_219: camR_ca3_ABD_PP2B => camR_ca3_ABD + PP2B; Spine*koffPP2B*camR_ca3_ABD_PP2B; reaction_219 is "PP2B dissociation from camR_ca3_ABD";
  reaction_220: camR_ca3_ACD_PP2B => camR_ca3_ACD + PP2B; Spine*koffPP2B*camR_ca3_ACD_PP2B; reaction_220 is "PP2B dissociation from camR_ca3_ACD";
  reaction_221: camR_ca3_BCD_PP2B => camR_ca3_BCD + PP2B; Spine*koffPP2B*camR_ca3_BCD_PP2B; reaction_221 is "PP2B dissociation from camR_ca3_BCD";
  reaction_222: camR_ca4_ABCD_PP2B => camR_ca4_ABCD + PP2B; Spine*koffPP2B*camR_ca4_ABCD_PP2B; reaction_222 is "PP2B dissociation from camR_ca4_ABCD";
  Ca_binding_to_camR_CaMKII_site_A: camR_CaMKII + ca => camR_ca1_A_CaMKII; Spine*kon*camR_CaMKII*ca;
  Ca_binding_to_camR_CaMKII_site_B: camR_CaMKII + ca => camR_ca1_B_CaMKII; Spine*kon*camR_CaMKII*ca;
  Ca_binding_to_camR_CaMKII_site_C: camR_CaMKII + ca => camR_ca1_C_CaMKII; Spine*kon*camR_CaMKII*ca;
  Ca_binding_to_camR_CaMKII_site_D: camR_CaMKII + ca => camR_ca1_D_CaMKII; Spine*kon*camR_CaMKII*ca;
  reaction_227: camR_ca1_A_CaMKII => camR_CaMKII + ca; Spine*koffRA*camR_ca1_A_CaMKII; reaction_227 is "Ca dissociation from camR_ca1_CaMKII site A";
  reaction_228: camR_ca1_C_CaMKII => camR_CaMKII + ca; Spine*koffRC*camR_ca1_C_CaMKII; reaction_228 is "Ca dissociation from camR_ca1_CaMKII site C";
  reaction_229: camR_ca1_D_CaMKII => camR_CaMKII + ca; Spine*koffRD*camR_ca1_D_CaMKII; reaction_229 is "Ca dissociation from camR_ca1_CaMKII site D";
  reaction_230: camR_ca1_A_CaMKII + ca => camR_ca2_AB_CaMKII; Spine*kon*camR_ca1_A_CaMKII*ca; reaction_230 is "Ca binding to camR_ca1_A_CaMKII site B";
  reaction_231: camR_ca1_A_CaMKII + ca => camR_ca2_AC_CaMKII; Spine*kon*camR_ca1_A_CaMKII*ca; reaction_231 is "Ca binding to camR_ca1_A_CaMKII site C";
  reaction_232: camR_ca1_A_CaMKII + ca => camR_ca2_AD_CaMKII; Spine*kon*camR_ca1_A_CaMKII*ca; reaction_232 is "Ca binding to camR_ca1_A_CaMKII site D";
  reaction_233: camR_ca1_B_CaMKII + ca => camR_ca2_AB_CaMKII; Spine*kon*camR_ca1_B_CaMKII*ca; reaction_233 is "Ca binding to camR_ca1_B_CaMKII site A";
  reaction_234: camR_ca1_B_CaMKII + ca => camR_ca2_BC_CaMKII; Spine*kon*camR_ca1_B_CaMKII*ca; reaction_234 is "Ca binding to camR_ca1_B_CaMKII site C";
  reaction_235: camR_ca1_B_CaMKII + ca => camR_ca2_BD_CaMKII; Spine*kon*camR_ca1_B_CaMKII*ca; reaction_235 is "Ca binding to camR_ca1_B_CaMKII site D";
  reaction_236: camR_ca1_C_CaMKII + ca => camR_ca2_AC_CaMKII; Spine*kon*camR_ca1_C_CaMKII*ca; reaction_236 is "Ca binding to camR_ca1_C_CaMKII site A";
  reaction_237: camR_ca1_C_CaMKII + ca => camR_ca2_BC_CaMKII; Spine*kon*camR_ca1_C_CaMKII*ca; reaction_237 is "Ca binding to camR_ca1_C_CaMKII site B";
  reaction_238: camR_ca1_C_CaMKII + ca => camR_ca2_CD_CaMKII; Spine*kon*camR_ca1_C_CaMKII*ca; reaction_238 is "Ca binding to camR_ca1_C_CaMKII site D";
  reaction_239: camR_ca1_D_CaMKII + ca => camR_ca2_AD_CaMKII; Spine*kon*camR_ca1_D_CaMKII*ca; reaction_239 is "Ca binding to camR_ca1_D_CaMKII site A";
  reaction_240: camR_ca1_D_CaMKII + ca => camR_ca2_BD_CaMKII; Spine*kon*camR_ca1_D_CaMKII*ca; reaction_240 is "Ca binding to camR_ca1_D_CaMKII site B";
  reaction_241: camR_ca1_D_CaMKII + ca => camR_ca2_CD_CaMKII; Spine*kon*camR_ca1_D_CaMKII*ca; reaction_241 is "Ca binding to camR_ca1_D_CaMKII site C";
  reaction_242: camR_ca2_AB_CaMKII => camR_ca1_B_CaMKII + ca; Spine*koffRA*camR_ca2_AB_CaMKII; reaction_242 is "Ca dissociation from camR_ca2_AB_CaMKII site A";
  reaction_243: camR_ca2_AB_CaMKII => camR_ca1_A_CaMKII + ca; Spine*koffRB*camR_ca2_AB_CaMKII; reaction_243 is "Ca dissociation from camR_ca2_AB_CaMKII site B";
  reaction_244: camR_ca2_AC_CaMKII => camR_ca1_C_CaMKII + ca; Spine*koffRA*camR_ca2_AC_CaMKII; reaction_244 is "Ca dissociation from camR_ca2_AC_CaMKII site A";
  reaction_245: camR_ca2_AC_CaMKII => camR_ca1_A_CaMKII + ca; Spine*koffRC*camR_ca2_AC_CaMKII; reaction_245 is "Ca dissociation from camR_ca2_AC_CaMKII site C";
  reaction_246: camR_ca2_AD_CaMKII => camR_ca1_D_CaMKII + ca; Spine*koffRA*camR_ca2_AD_CaMKII; reaction_246 is "Ca dissociation from camR_ca2_AD_CaMKII site A";
  reaction_247: camR_ca2_AD_CaMKII => camR_ca1_A_CaMKII + ca; Spine*koffRD*camR_ca2_AD_CaMKII; reaction_247 is "Ca dissociation from camR_ca2_AD_CaMKII site D";
  reaction_248: camR_ca2_BC_CaMKII => camR_ca1_C_CaMKII + ca; Spine*koffRB*camR_ca2_BC_CaMKII; reaction_248 is "Ca dissociation from camR_ca2_BC_CaMKII site B";
  reaction_249: camR_ca2_BC_CaMKII => camR_ca1_B_CaMKII + ca; Spine*koffRC*camR_ca2_BC_CaMKII; reaction_249 is "Ca dissociation from camR_ca2_BC_CaMKII site C";
  reaction_250: camR_ca2_BD_CaMKII => camR_ca1_D_CaMKII + ca; Spine*koffRB*camR_ca2_BD_CaMKII; reaction_250 is "Ca dissociation from camR_ca2_BD_CaMKII site B";
  reaction_251: camR_ca2_BD_CaMKII => camR_ca1_B_CaMKII + ca; Spine*koffRD*camR_ca2_BD_CaMKII; reaction_251 is "Ca dissociation from camR_ca2_BD_CaMKII site D";
  reaction_252: camR_ca2_CD_CaMKII => camR_ca1_D_CaMKII + ca; Spine*koffRC*camR_ca2_CD_CaMKII; reaction_252 is "Ca dissociation from camR_ca2_CD_CaMKII site C";
  reaction_253: camR_ca2_CD_CaMKII => camR_ca1_C_CaMKII + ca; Spine*koffRD*camR_ca2_CD_CaMKII; reaction_253 is "Ca dissociation from camR_ca2_CD_CaMKII site D";
  reaction_254: camR_ca2_AB_CaMKII + ca => camR_ca3_ABC_CaMKII; Spine*kon*camR_ca2_AB_CaMKII*ca; reaction_254 is "Ca binding to camR_ca2_AB_CaMKII site C";
  reaction_255: camR_ca2_AB_CaMKII + ca => camR_ca3_ABD_CaMKII; Spine*kon*camR_ca2_AB_CaMKII*ca; reaction_255 is "Ca binding to camR_ca2_AB_CaMKII site D";
  reaction_256: camR_ca2_AC_CaMKII + ca => camR_ca3_ABC_CaMKII; Spine*kon*camR_ca2_AC_CaMKII*ca; reaction_256 is "Ca binding to camR_ca2_AC_CaMKII site B";
  reaction_257: camR_ca2_AC_CaMKII + ca => camR_ca3_ACD_CaMKII; Spine*kon*camR_ca2_AC_CaMKII*ca; reaction_257 is "Ca binding to camR_ca2_AC_CaMKII site D";
  reaction_258: camR_ca2_AD_CaMKII + ca => camR_ca3_ABD_CaMKII; Spine*kon*camR_ca2_AD_CaMKII*ca; reaction_258 is "Ca binding to camR_ca2_AD_CaMKII site B";
  reaction_259: camR_ca2_AD_CaMKII + ca => camR_ca3_ACD_CaMKII; Spine*kon*camR_ca2_AD_CaMKII*ca; reaction_259 is "Ca binding to camR_ca2_AD_CaMKII site C";
  reaction_260: camR_ca2_BC_CaMKII + ca => camR_ca3_ABC_CaMKII; Spine*kon*camR_ca2_BC_CaMKII*ca; reaction_260 is "Ca binding to camR_ca2_BC_CaMKII site A";
  reaction_261: camR_ca2_BC_CaMKII + ca => camR_ca3_BCD_CaMKII; Spine*kon*camR_ca2_BC_CaMKII*ca; reaction_261 is "Ca binding to camR_ca2_BC_CaMKII site D";
  reaction_262: camR_ca2_BD_CaMKII + ca => camR_ca3_ABD_CaMKII; Spine*kon*camR_ca2_BD_CaMKII*ca; reaction_262 is "Ca binding to camR_ca2_BD_CaMKII site A";
  reaction_263: camR_ca2_BD_CaMKII + ca => camR_ca3_BCD_CaMKII; Spine*kon*camR_ca2_BD_CaMKII*ca; reaction_263 is "Ca binding to camR_ca2_BD_CaMKII site C";
  reaction_264: camR_ca2_CD_CaMKII + ca => camR_ca3_ACD_CaMKII; Spine*kon*camR_ca2_CD_CaMKII*ca; reaction_264 is "Ca binding to camR_ca2_CD_CaMKII site A";
  reaction_265: camR_ca2_CD_CaMKII + ca => camR_ca3_BCD_CaMKII; Spine*kon*camR_ca2_CD_CaMKII*ca; reaction_265 is "Ca binding to camR_ca2_CD_CaMKII site B";
  reaction_266: camR_ca3_ABC_CaMKII => camR_ca2_AB_CaMKII + ca; Spine*koffRC*camR_ca3_ABC_CaMKII; reaction_266 is "Ca dissociation from camR_ca3_ABC_CaMKII site C";
  reaction_267: camR_ca3_ABC_CaMKII => camR_ca2_AC_CaMKII + ca; Spine*koffRB*camR_ca3_ABC_CaMKII; reaction_267 is "Ca dissociation from camR_ca3_ABC_CaMKII site B";
  reaction_268: camR_ca3_ABC_CaMKII => camR_ca2_BC_CaMKII + ca; Spine*koffRA*camR_ca3_ABC_CaMKII; reaction_268 is "Ca dissociation from camR_ca3_ABC_CaMKII site A";
  reaction_269: camR_ca3_ABD_CaMKII => camR_ca2_AB_CaMKII + ca; Spine*koffRD*camR_ca3_ABD_CaMKII; reaction_269 is "Ca dissociation from camR_ca3_ABD_CaMKII site D";
  reaction_270: camR_ca3_ABD_CaMKII => camR_ca2_AD_CaMKII + ca; Spine*koffRB*camR_ca3_ABD_CaMKII; reaction_270 is "Ca dissociation from camR_ca3_ABD_CaMKII site B";
  reaction_271: camR_ca3_ABD_CaMKII => camR_ca2_BD_CaMKII + ca; Spine*koffRA*camR_ca3_ABD_CaMKII; reaction_271 is "Ca dissociation from camR_ca3_ABD_CaMKII site A";
  reaction_272: camR_ca3_ACD_CaMKII => camR_ca2_AC_CaMKII + ca; Spine*koffRD*camR_ca3_ACD_CaMKII; reaction_272 is "Ca dissociation from camR_ca3_ACD_CaMKII site D";
  reaction_273: camR_ca3_ACD_CaMKII => camR_ca2_AD_CaMKII + ca; Spine*koffRC*camR_ca3_ACD_CaMKII; reaction_273 is "Ca dissociation from camR_ca3_ACD_CaMKII site C";
  reaction_274: camR_ca3_ACD_CaMKII => camR_ca2_CD_CaMKII + ca; Spine*koffRA*camR_ca3_ACD_CaMKII; reaction_274 is "Ca dissociation from camR_ca3_ACD_CaMKII site A";
  reaction_275: camR_ca3_BCD_CaMKII => camR_ca2_BC_CaMKII + ca; Spine*koffRD*camR_ca3_BCD_CaMKII; reaction_275 is "Ca dissociation from camR_ca3_BCD_CaMKII site D";
  reaction_276: camR_ca3_BCD_CaMKII => camR_ca2_BD_CaMKII + ca; Spine*koffRC*camR_ca3_BCD_CaMKII; reaction_276 is "Ca dissociation from camR_ca3_BCD_CaMKII site C";
  reaction_277: camR_ca3_BCD_CaMKII => camR_ca2_CD_CaMKII + ca; Spine*koffRB*camR_ca3_BCD_CaMKII; reaction_277 is "Ca dissociation from camR_ca3_BCD_CaMKII site B";
  reaction_278: camR_ca3_BCD_CaMKII + ca => camR_ca4_ABCD_CaMKII; Spine*kon*camR_ca3_BCD_CaMKII*ca; reaction_278 is "Ca binding to camR_ca3_BCD_CaMKII site A";
  reaction_279: camR_ca3_ACD_CaMKII + ca => camR_ca4_ABCD_CaMKII; Spine*kon*camR_ca3_ACD_CaMKII*ca; reaction_279 is "Ca binding to camR_ca3_ACD_CaMKII site B";
  reaction_280: camR_ca3_ABD_CaMKII + ca => camR_ca4_ABCD_CaMKII; Spine*kon*camR_ca3_ABD_CaMKII*ca; reaction_280 is "Ca binding to camR_ca3_ABD_CaMKII site C";
  reaction_281: camR_ca3_ABC_CaMKII + ca => camR_ca4_ABCD_CaMKII; Spine*kon*camR_ca3_ABC_CaMKII*ca; reaction_281 is "Ca binding to camR_ca3_ABC_CaMKII site D";
  reaction_282: camR_ca4_ABCD_CaMKII => camR_ca3_BCD_CaMKII + ca; Spine*koffRA*camR_ca4_ABCD_CaMKII; reaction_282 is "Ca dissociation from camR_ca4_ABCD_CaMKII site A";
  reaction_283: camR_ca4_ABCD_CaMKII => camR_ca3_ACD_CaMKII + ca; Spine*koffRB*camR_ca4_ABCD_CaMKII; reaction_283 is "Ca dissociation from camR_ca4_ABCD_CaMKII site B";
  reaction_284: camR_ca4_ABCD_CaMKII => camR_ca3_ABD_CaMKII + ca; Spine*koffRC*camR_ca4_ABCD_CaMKII; reaction_284 is "Ca dissociation from camR_ca4_ABCD_CaMKII site C";
  reaction_285: camR_ca4_ABCD_CaMKII => camR_ca3_ABC_CaMKII + ca; Spine*koffRD*camR_ca4_ABCD_CaMKII; reaction_285 is "Ca dissociation from camR_ca4_ABCD_CaMKII site D";
  Ca_binding_to_camR_PP2B_site_A: camR_PP2B + ca => camR_ca1_A_PP2B; Spine*kon*camR_PP2B*ca;
  Ca_binding_to_camR_PP2B_site_B: camR_PP2B + ca => camR_ca1_B_PP2B; Spine*kon*camR_PP2B*ca;
  Ca_binding_to_camR_PP2B_site_C: camR_PP2B + ca => camR_ca1_C_PP2B; Spine*kon*camR_PP2B*ca;
  Ca_binding_to_camR_PP2B_site_D: camR_PP2B + ca => camR_ca1_D_PP2B; Spine*kon*camR_PP2B*ca;
  reaction_290: camR_ca1_A_PP2B => camR_PP2B + ca; Spine*koffRA*camR_ca1_A_PP2B; reaction_290 is "Ca dissociation from camR_ca1_A_PP2B site A";
  reaction_291: camR_ca1_B_PP2B => camR_PP2B + ca; Spine*koffRB*camR_ca1_B_PP2B; reaction_291 is "Ca dissociation from camR_ca1_B_PP2B site B";
  reaction_292: camR_ca1_C_PP2B => camR_PP2B + ca; Spine*koffRC*camR_ca1_C_PP2B; reaction_292 is "Ca dissociation from camR_ca1_C_PP2B site C";
  reaction_293: camR_ca1_D_PP2B => camR_PP2B + ca; Spine*koffRD*camR_ca1_D_PP2B; reaction_293 is "Ca dissociation from camR_ca1_D_PP2B site D";
  reaction_294: camR_ca1_A_PP2B + ca => camR_ca2_AB_PP2B; Spine*kon*camR_ca1_A_PP2B*ca; reaction_294 is "Ca binding to camR_ca1_A_PP2B site B";
  reaction_295: camR_ca1_A_PP2B + ca => camR_ca2_AC_PP2B; Spine*kon*camR_ca1_A_PP2B*ca; reaction_295 is "Ca binding to camR_ca1_A_PP2B site C";
  reaction_296: camR_ca1_A_PP2B + ca => camR_ca2_AD_PP2B; Spine*kon*camR_ca1_A_PP2B*ca; reaction_296 is "Ca binding to camR_ca1_A_PP2B site D";
  reaction_297: camR_ca1_B_PP2B + ca => camR_ca2_AB_PP2B; Spine*kon*camR_ca1_B_PP2B*ca; reaction_297 is "Ca binding to camR_ca1_B_PP2B site A";
  reaction_298: camR_ca1_B_PP2B + ca => camR_ca2_BC_PP2B; Spine*kon*camR_ca1_B_PP2B*ca; reaction_298 is "Ca binding to camR_ca1_B_PP2B site C";
  reaction_299: camR_ca1_B_PP2B + ca => camR_ca2_BD_PP2B; Spine*kon*camR_ca1_B_PP2B*ca; reaction_299 is "Ca binding to camR_ca1_B_PP2B site D";
  reaction_300: camR_ca1_C_PP2B + ca => camR_ca2_AC_PP2B; Spine*kon*camR_ca1_C_PP2B*ca; reaction_300 is "Ca binding to camR_ca1_C_PP2B site A";
  reaction_301: camR_ca1_C_PP2B + ca => camR_ca2_BC_PP2B; Spine*kon*camR_ca1_C_PP2B*ca; reaction_301 is "Ca binding to camR_ca1_C_PP2B site B";
  reaction_302: camR_ca1_C_PP2B + ca => camR_ca2_CD_PP2B; Spine*kon*camR_ca1_C_PP2B*ca; reaction_302 is "Ca binding to camR_ca1_C_PP2B site D";
  reaction_303: camR_ca1_D_PP2B + ca => camR_ca2_AD_PP2B; Spine*kon*camR_ca1_D_PP2B*ca; reaction_303 is "Ca binding to camR_ca1_D_PP2B site A";
  reaction_304: camR_ca1_D_PP2B + ca => camR_ca2_BD_PP2B; Spine*kon*camR_ca1_D_PP2B*ca; reaction_304 is "Ca binding to camR_ca1_D_PP2B site B";
  reaction_305: camR_ca1_D_PP2B + ca => camR_ca2_CD_PP2B; Spine*kon*camR_ca1_D_PP2B*ca; reaction_305 is "Ca binding to camR_ca1_D_PP2B site C";
  reaction_306: camR_ca2_AB_PP2B => camR_ca1_B_PP2B + ca; Spine*koffRA*camR_ca2_AB_PP2B; reaction_306 is "Ca dissociating from camR_ca2_AB_PP2B site A";
  reaction_307: camR_ca2_AB_PP2B => camR_ca1_A_PP2B + ca; Spine*koffRB*camR_ca2_AB_PP2B; reaction_307 is "Ca dissociating from camR_ca2_AB_PP2B site B";
  reaction_308: camR_ca2_AC_PP2B => camR_ca1_C_PP2B + ca; Spine*koffRA*camR_ca2_AC_PP2B; reaction_308 is "Ca dissociating from camR_ca2_AC_PP2B site A";
  reaction_309: camR_ca2_AC_PP2B => camR_ca1_A_PP2B + ca; Spine*koffRC*camR_ca2_AC_PP2B; reaction_309 is "Ca dissociating from camR_ca2_AC_PP2B site C";
  reaction_310: camR_ca2_AD_PP2B => camR_ca1_D_PP2B + ca; Spine*koffRA*camR_ca2_AD_PP2B; reaction_310 is "Ca dissociating from camR_ca2_AD_PP2B site A";
  reaction_311: camR_ca2_AD_PP2B => camR_ca1_A_PP2B + ca; Spine*koffRD*camR_ca2_AD_PP2B; reaction_311 is "Ca dissociating from camR_ca2_AD_PP2B site D";
  reaction_312: camR_ca2_BC_PP2B => camR_ca1_C_PP2B + ca; Spine*koffRB*camR_ca2_BC_PP2B; reaction_312 is "Ca dissociating from camR_ca2_BC_PP2B site B";
  reaction_313: camR_ca2_BC_PP2B => camR_ca1_B_PP2B + ca; Spine*koffRC*camR_ca2_BC_PP2B; reaction_313 is "Ca dissociating from camR_ca2_BC_PP2B site C";
  reaction_314: camR_ca2_BD_PP2B => camR_ca1_D_PP2B + ca; Spine*koffRB*camR_ca2_BD_PP2B; reaction_314 is "Ca dissociating from camR_ca2_BD_PP2B site B";
  reaction_315: camR_ca2_BD_PP2B => camR_ca1_B_PP2B + ca; Spine*koffRD*camR_ca2_BD_PP2B; reaction_315 is "Ca dissociating from camR_ca2_BD_PP2B site D";
  reaction_316: camR_ca2_CD_PP2B => camR_ca1_D_PP2B + ca; Spine*koffRC*camR_ca2_CD_PP2B; reaction_316 is "Ca dissociating from camR_ca2_CD_PP2B site C";
  reaction_317: camR_ca2_CD_PP2B => camR_ca1_C_PP2B + ca; Spine*koffRD*camR_ca2_CD_PP2B; reaction_317 is "Ca dissociating from camR_ca2_CD_PP2B site D";
  reaction_318: camR_ca2_AB_PP2B + ca => camR_ca3_ABC_PP2B; Spine*kon*camR_ca2_AB_PP2B*ca; reaction_318 is "Ca binding to camR_ca2_AB_PP2B site C";
  reaction_319: camR_ca2_AB_PP2B + ca => camR_ca3_ABD_PP2B; Spine*kon*camR_ca2_AB_PP2B*ca; reaction_319 is "Ca binding to camR_ca2_AB_PP2B site D";
  reaction_320: camR_ca2_AC_PP2B + ca => camR_ca3_ABC_PP2B; Spine*kon*camR_ca2_AC_PP2B*ca; reaction_320 is "Ca binding to camR_ca2_AC_PP2B site B";
  reaction_321: camR_ca2_AC_PP2B + ca => camR_ca3_ACD_PP2B; Spine*kon*camR_ca2_AC_PP2B*ca; reaction_321 is "Ca binding to camR_ca2_AC_PP2B site D";
  reaction_322: camR_ca2_AD_PP2B + ca => camR_ca3_ABD_PP2B; Spine*kon*camR_ca2_AD_PP2B*ca; reaction_322 is "Ca binding to camR_ca2_AD_PP2B site B";
  reaction_323: camR_ca2_AD_PP2B + ca => camR_ca3_ACD_PP2B; Spine*kon*camR_ca2_AD_PP2B*ca; reaction_323 is "Ca binding to camR_ca2_AD_PP2B site C";
  reaction_324: camR_ca2_BC_PP2B + ca => camR_ca3_ABC_PP2B; Spine*kon*camR_ca2_BC_PP2B*ca; reaction_324 is "Ca binding to camR_ca2_BC_PP2B site A";
  reaction_325: camR_ca2_BC_PP2B + ca => camR_ca3_BCD_PP2B; Spine*kon*camR_ca2_BC_PP2B*ca; reaction_325 is "Ca binding to camR_ca2_BC_PP2B site D";
  reaction_326: camR_ca2_BD_PP2B + ca => camR_ca3_ABD_PP2B; Spine*kon*camR_ca2_BD_PP2B*ca; reaction_326 is "Ca binding to camR_ca2_BD_PP2B site A";
  reaction_327: camR_ca2_BD_PP2B + ca => camR_ca3_BCD_PP2B; Spine*kon*camR_ca2_BD_PP2B*ca; reaction_327 is "Ca binding to camR_ca2_BD_PP2B site C";
  reaction_328: camR_ca2_CD_PP2B + ca => camR_ca3_ACD_PP2B; Spine*kon*camR_ca2_CD_PP2B*ca; reaction_328 is "Ca binding to camR_ca2_CD_PP2B site A";
  reaction_329: camR_ca2_CD_PP2B + ca => camR_ca3_BCD_PP2B; Spine*kon*camR_ca2_CD_PP2B*ca; reaction_329 is "Ca binding to camR_ca2_CD_PP2B site B";
  reaction_330: camR_ca3_ABC_PP2B => camR_ca2_BC_PP2B + ca; Spine*koffRA*camR_ca3_ABC_PP2B; reaction_330 is "Ca dissociation from camR_ca3_ABC_PP2B site A";
  reaction_331: camR_ca3_ABC_PP2B => camR_ca2_AC_PP2B + ca; Spine*koffRB*camR_ca3_ABC_PP2B; reaction_331 is "Ca dissociation from camR_ca3_ABC_PP2B site B";
  reaction_332: camR_ca3_ABC_PP2B => camR_ca2_AB_PP2B + ca; Spine*koffRC*camR_ca3_ABC_PP2B; reaction_332 is "Ca dissociation from camR_ca3_ABC_PP2B site C";
  reaction_333: camR_ca3_ABD_PP2B => camR_ca2_BD_PP2B + ca; Spine*koffRA*camR_ca3_ABD_PP2B; reaction_333 is "Ca dissociation from camR_ca3_ABD_PP2B site A";
  reaction_334: camR_ca3_ABD_PP2B => camR_ca2_AD_PP2B + ca; Spine*koffRB*camR_ca3_ABD_PP2B; reaction_334 is "Ca dissociation from camR_ca3_ABD_PP2B site B";
  reaction_335: camR_ca3_ABD_PP2B => camR_ca2_AB_PP2B + ca; Spine*koffRD*camR_ca3_ABD_PP2B; reaction_335 is "Ca dissociation from camR_ca3_ABD_PP2B site D";
  reaction_336: camR_ca3_ACD_PP2B => camR_ca2_CD_PP2B + ca; Spine*koffRA*camR_ca3_ACD_PP2B; reaction_336 is "Ca dissociation from camR_ca3_ACD_PP2B site A";
  reaction_337: camR_ca3_ACD_PP2B => camR_ca2_AD_PP2B + ca; Spine*koffRC*camR_ca3_ACD_PP2B; reaction_337 is "Ca dissociation from camR_ca3_ACD_PP2B site C";
  reaction_338: camR_ca3_ACD_PP2B => camR_ca2_AC_PP2B + ca; Spine*koffRD*camR_ca3_ACD_PP2B; reaction_338 is "Ca dissociation from camR_ca3_ACD_PP2B site D";
  reaction_339: camR_ca3_BCD_PP2B => camR_ca2_CD_PP2B + ca; Spine*koffRB*camR_ca3_BCD_PP2B; reaction_339 is "Ca dissociation from camR_ca3_BCD_PP2B site B";
  reaction_340: camR_ca3_BCD_PP2B => camR_ca2_BD_PP2B + ca; Spine*koffRC*camR_ca3_BCD_PP2B; reaction_340 is "Ca dissociation from camR_ca3_BCD_PP2B site C";
  reaction_341: camR_ca3_BCD_PP2B => camR_ca2_BC_PP2B + ca; Spine*koffRD*camR_ca3_BCD_PP2B; reaction_341 is "Ca dissociation from camR_ca3_BCD_PP2B site D";
  reaction_342: camR_ca3_ABC_PP2B + ca => camR_ca4_ABCD_PP2B; Spine*kon*camR_ca3_ABC_PP2B*ca; reaction_342 is "Ca binding to camR_ca3_ABC_PP2B site D";
  reaction_343: camR_ca3_ABD_PP2B + ca => camR_ca4_ABCD_PP2B; Spine*kon*camR_ca3_ABD_PP2B*ca; reaction_343 is "Ca binding to camR_ca3_ABD_PP2B site C";
  reaction_344: camR_ca3_ACD_PP2B + ca => camR_ca4_ABCD_PP2B; Spine*kon*camR_ca3_ACD_PP2B*ca; reaction_344 is "Ca binding to camR_ca3_ACD_PP2B site B";
  reaction_345: camR_ca3_BCD_PP2B + ca => camR_ca4_ABCD_PP2B; Spine*kon*camR_ca3_BCD_PP2B*ca; reaction_345 is "Ca binding to camR_ca3_BCD_PP2B site A";
  reaction_346: camR_ca4_ABCD_PP2B => camR_ca3_BCD_PP2B + ca; Spine*koffRA*camR_ca4_ABCD_PP2B; reaction_346 is "Ca dissociating from camR_ca4_ABCD_PP2B site A";
  reaction_347: camR_ca4_ABCD_PP2B => camR_ca3_ACD_PP2B + ca; Spine*koffRB*camR_ca4_ABCD_PP2B; reaction_347 is "Ca dissociating from camR_ca4_ABCD_PP2B site B";
  reaction_348: camR_ca4_ABCD_PP2B => camR_ca3_ABD_PP2B + ca; Spine*koffRC*camR_ca4_ABCD_PP2B; reaction_348 is "Ca dissociating from camR_ca4_ABCD_PP2B site C";
  reaction_349: camR_ca4_ABCD_PP2B => camR_ca3_ABC_PP2B + ca; Spine*koffRD*camR_ca4_ABCD_PP2B; reaction_349 is "Ca dissociating from camR_ca4_ABCD_PP2B site D";
  reaction_350: camR_ca1_B_CaMKII => camR_CaMKII + ca; Spine*koffRB*camR_ca1_B_CaMKII; reaction_350 is "Ca dissociation from camR_ca1_CaMKII site B";
  reaction_351: camT_ca3_ABC => camT_ca2_AB + ca; Spine*koffTC*camT_ca3_ABC; reaction_351 is "Ca dissociating from camT_ca3_ABC site C";

  // Unit definitions:
  unit volume = litre;
  unit substance = mole;
  unit area = metre^2;
end
