// SBML level 2 version 4

function CPT1(sf, V, Kms1, Kms2, Kmp1, Kmp2, Ki1, Keq, S1, S2, P1, P2, I1, n)
  sf*V*(S1*S2/(Kms1*Kms2) - P1*P2/(Kms1*Kms2*Keq))/((1 + S1/Kms1 + P1/Kmp1 + (I1/Ki1)^n)*(1 + S2/Kms2 + P2/Kmp2));
end

function CACT(Vf, Vr, Kms1, Kms2, Kmp1, Kmp2, Kis1, Kip2, Keq, S1, S2, P1, P2)
  Vf*(S1*S2 - P1*P2/Keq)/(S1*S2 + Kms2*S1 + Kms1*S2*(1 + P2/Kip2) + Vf/(Vr*Keq)*(Kmp2*P1*(1 + S1/Kis1) + P2*(Kmp1 + P1)));
end

function CPT2(sf, V, Kms1, Kms2, Kms3, Kms4, Kms5, Kms6, Kms7, Kms8, Kmp1, Kmp2, Kmp3, Kmp4, Kmp5, Kmp6, Kmp7, Kmp8, Keq, S1, S2, S3, S4, S5, S6, S7, S8, P1, P2, P3, P4, P5, P6, P7, P8)
  sf*V*(S1*S8/(Kms1*Kms8) - P1*P8/(Kms1*Kms8*Keq))/((1 + S1/Kms1 + P1/Kmp1 + S2/Kms2 + P2/Kmp2 + S3/Kms3 + P3/Kmp3 + S4/Kms4 + P4/Kmp4 + S5/Kms5 + P5/Kmp5 + S6/Kms6 + P6/Kmp6 + S7/Kms7 + P7/Kmp7)*(1 + S8/Kms8 + P8/Kmp8));
end

function VLCAD(sf, V, Kms1, Kms2, Kms3, Kms4, Kmp1, Kmp2, Kmp3, Kmp4, Keq, S1, S2, S3, S4, P1, P2, P3, P4)
  sf*V*(S1*(S4 - P4)/(Kms1*Kms4) - P1*P4/(Kms1*Kms4*Keq))/((1 + S1/Kms1 + P1/Kmp1 + S2/Kms2 + P2/Kmp2 + S3/Kms3 + P3/Kmp3)*(1 + (S4 - P4)/Kms4 + P4/Kmp4));
end

function LCAD(sf, V, Kms1, Kms2, Kms3, Kms4, Kms5, Kms6, Kmp1, Kmp2, Kmp3, Kmp4, Kmp5, Kmp6, Keq, S1, S2, S3, S4, S5, S6, P1, P2, P3, P4, P5, P6)
  sf*V*(S1*(S6 - P6)/(Kms1*Kms6) - P1*P6/(Kms1*Kms6*Keq))/((1 + S1/Kms1 + P1/Kmp1 + S2/Kms2 + P2/Kmp2 + S3/Kms3 + P3/Kmp3 + S4/Kms4 + P4/Kmp4 + S5/Kms5 + P5/Kmp5)*(1 + (S6 - P6)/Kms6 + P6/Kmp6));
end

function MCAD(sf, V, Kms1, Kms2, Kms3, Kms4, Kms5, Kms6, Kmp1, Kmp2, Kmp3, Kmp4, Kmp5, Kmp6, Keq, S1, S2, S3, S4, S5, S6, P1, P2, P3, P4, P5, P6)
  sf*V*(S1*(S6 - P6)/(Kms1*Kms6) - P1*P6/(Kms1*Kms6*Keq))/((1 + S1/Kms1 + P1/Kmp1 + S2/Kms2 + P2/Kmp2 + S3/Kms3 + P3/Kmp3 + S4/Kms4 + P4/Kmp4 + S5/Kms5 + P5/Kmp5)*(1 + (S6 - P6)/Kms6 + P6/Kmp6));
end

function SCAD(sf, V, Kms1, Kms2, Kms3, Kmp1, Kmp2, Kmp3, Keq, S1, S2, S3, P1, P2, P3)
  sf*V*(S1*(S3 - P3)/(Kms1*Kms3) - P1*P3/(Kms1*Kms3*Keq))/((1 + S1/Kms1 + P1/Kmp1 + S2/Kms2 + P2/Kmp2)*(1 + (S3 - P3)/Kms3 + P3/Kmp3));
end

function CROT(sf, V, Kms1, Kms2, Kms3, Kms4, Kms5, Kms6, Kms7, Kmp1, Kmp2, Kmp3, Kmp4, Kmp5, Kmp6, Kmp7, Ki1, Keq, S1, S2, S3, S4, S5, S6, S7, P1, P2, P3, P4, P5, P6, P7, I1)
  sf*V*(S1/Kms1 - P1/(Kms1*Keq))/(1 + S1/Kms1 + P1/Kmp1 + S2/Kms2 + P2/Kmp2 + S3/Kms3 + P3/Kmp3 + S4/Kms4 + P4/Kmp4 + S5/Kms5 + P5/Kmp5 + S6/Kms6 + P6/Kmp6 + S7/Kms7 + P7/Kmp7 + I1/Ki1);
end

function MSCHAD(sf, V, Kms1, Kms2, Kms3, Kms4, Kms5, Kms6, Kms7, Kms8, Kmp1, Kmp2, Kmp3, Kmp4, Kmp5, Kmp6, Kmp7, Kmp8, Keq, S1, S2, S3, S4, S5, S6, S7, S8, P1, P2, P3, P4, P5, P6, P7, P8)
  sf*V*(S1*(S8 - P8)/(Kms1*Kms8) - P1*P8/(Kms1*Kms8*Keq))/((1 + S1/Kms1 + P1/Kmp1 + S2/Kms2 + P2/Kmp2 + S3/Kms3 + P3/Kmp3 + S4/Kms4 + P4/Kmp4 + S5/Kms5 + P5/Kmp5 + S6/Kms6 + P6/Kmp6 + S7/Kms7 + P7/Kmp7)*(1 + (S8 - P8)/Kms8 + P8/Kmp8));
end

function MCKATA(sf, V, Kms1, Kms2, Kms3, Kms4, Kms5, Kms6, Kms7, Kms8, Kmp1, Kmp2, Kmp3, Kmp4, Kmp5, Kmp6, Kmp7, Kmp8, Keq, S1, S2, S3, S4, S5, S6, S7, S8, P1, P2, P3, P4, P5, P6, P7, P8)
  sf*V*(S1*S8/(Kms1*Kms8) - P1*P8/(Kms1*Kms8*Keq))/((1 + S1/Kms1 + P1/Kmp1 + S2/Kms2 + P2/Kmp2 + S3/Kms3 + P3/Kmp3 + S4/Kms4 + P4/Kmp4 + S5/Kms5 + P5/Kmp5 + S6/Kms6 + P6/Kmp6 + S7/Kms7 + P7/Kmp7 + P8/Kmp8)*(1 + S8/Kms8 + P8/Kmp8));
end

function MCKATB(sf, V, Kms1, Kms2, Kms3, Kms4, Kms5, Kms6, Kms7, Kms8, Kmp1, Kmp2, Kmp3, Kmp4, Kmp5, Kmp6, Kmp7, Kmp8, Keq, S1, S2, S3, S4, S5, S6, S7, S8, P1, P2, P3, P4, P5, P6, P7, P8)
  sf*V*(S1*S8/(Kms1*Kms8) - P8*P8/(Kms1*Kms8*Keq))/((1 + S1/Kms1 + P1/Kmp1 + S2/Kms2 + P2/Kmp2 + S3/Kms3 + P3/Kmp3 + S4/Kms4 + P4/Kmp4 + S5/Kms5 + P5/Kmp5 + S6/Kms6 + P6/Kmp6 + S7/Kms7 + P7/Kmp7 + P8/Kmp8)*(1 + S8/Kms8 + P8/Kmp8));
end

function MTP(sf, V, Kms1, Kms2, Kms3, Kms4, Kms5, Kms7, Kms8, Kmp1, Kmp2, Kmp3, Kmp4, Kmp5, Kmp6, Kmp7, Kmp8, Ki1, Keq, S1, S2, S3, S4, S5, S7, S8, P1, P2, P3, P4, P5, P6, P7, P8, I1)
  sf*V*(S1*(S7 - P7)*S8/(Kms1*Kms7*Kms8) - P1*P7*P8/(Kms1*Kms7*Kms8*Keq))/((1 + S1/Kms1 + P1/Kmp1 + S2/Kms2 + P2/Kmp2 + S3/Kms3 + P3/Kmp3 + S4/Kms4 + P4/Kmp4 + S5/Kms5 + P5/Kmp5 + P6/Kmp6 + I1/Ki1)*(1 + (S7 - P7)/Kms7 + P7/Kmp7)*(1 + S8/Kms8 + P8/Kmp8));
end

function RES(Ks, S, K1)
  Ks*(S - K1);
end

model MODEL1312040001()
  // vanEunen2013 - Network dynamics of fatty acid beta-oxidation (time-course model)
  // Lipid metabolism plays an important role in the development of metabolic syndrome, a major risk factor for cardiovascular disease and diabetes. This model gives insights into the response of lipid oxidation to dietart and medical interventions. The model predicts the rate of lipid oxidation and the time course of most acyl carnitines. There are two models described in the paper, (i) steady-state model [ BIOMD0000000505 ], (ii) time-course model [ BIOMD0000000506 ]. This model corresponds to the time-course model.
  // This model is described in the article:
  // Biochemical competition makes fatty-acid beta-oxidation vulnerable to substrate overload.
  // van Eunen K, Simons SM, Gerding A, Bleeker A, den Besten G, Touw CM, Houten SM, Groen BK, Krab K, Reijngoud DJ, Bakker BM.
  // PLoS Comput Biol. 2013;9(8):e1003186.
  // Abstract:
  // Fatty-acid metabolism plays a key role in acquired and inborn metabolic diseases. To obtain insight into the network dynamics of fatty-acid beta-oxidation, we constructed a detailed computational model of the pathway and subjected it to a fat overload condition. The model contains reversible and saturable enzyme-kinetic equations and experimentally determined parameters for rat-liver enzymes. It was validated by adding palmitoyl CoA or palmitoyl carnitine to isolated rat-liver mitochondria: without refitting of measured parameters, the model correctly predicted the beta-oxidation flux as well as the time profiles of most acyl-carnitine concentrations. Subsequently, we simulated the condition of obesity by increasing the palmitoyl-CoA concentration. At a high concentration of palmitoyl CoA the beta-oxidation became overloaded: the flux dropped and metabolites accumulated. This behavior originated from the competition between acyl CoAs of different chain lengths for a set of acyl-CoA dehydrogenases with overlapping substrate specificity. This effectively induced competitive feedforward inhibition and thereby led to accumulation of CoA-ester intermediates and depletion of free CoA (CoASH). The mitochondrial [NAD+]/[NADH] ratio modulated the sensitivity to substrate overload, revealing a tight interplay between regulation of beta-oxidation and mitochondrial respiration.
  // This model is hosted on BioModels Database and identified by: BIOMD0000000506 .
  // To cite BioModels Database, please use: BioModels Database: An enhanced, curated and annotated resource for published quantitative kinetic models .
  // To the extent possible under law, all copyright and related or neighbouring rights to this encoded model have been dedicated to the public domain worldwide. Please refer to CC0 Public Domain Dedication for more information.
  // biomodels.db:MODEL1312040001
  // biomodels.db:BIOMD0000000506
  // isDescribedBy pubmed:23966849
  // occursIn GO:0005739 BTO:0000759
  // hasTaxon taxonomy:10114
  // isVersionOf GO:0019395

  // Compartments:
  compartment VCYT = 0.01;  // isVersionOf GO:0005737
  compartment VMAT = 1.8e-6;  // isVersionOf GO:0005739

  // Species:
  species C16AcylCarCYT in VCYT = 0.171;  // isVersionOf CHEBI:17387
  species C16AcylCarMAT in VMAT = 0;  // isVersionOf CHEBI:17387
  species C16AcylCoAMAT in VMAT = 0;  // isVersionOf CHEBI:37554 CHEBI:15525
  species C16EnoylCoAMAT in VMAT = 0;  // isVersionOf CHEBI:27803
  species C16HydroxyacylCoAMAT in VMAT = 0;  // isVersionOf CHEBI:61902
  species C16KetoacylCoAMAT in VMAT = 0;  // isVersionOf CHEBI:37554
  species C14AcylCarCYT in VCYT = 0.023;  // isVersionOf CHEBI:17387
  species C14AcylCarMAT in VMAT = 0;  // isVersionOf CHEBI:17387
  species C14AcylCoAMAT in VMAT = 0;  // isVersionOf CHEBI:15532 CHEBI:37554
  species C14EnoylCoAMAT in VMAT = 0;  // isVersionOf CHEBI:27803
  species C14HydroxyacylCoAMAT in VMAT = 0;  // isVersionOf CHEBI:61902
  species C14KetoacylCoAMAT in VMAT = 0;  // isVersionOf CHEBI:37554
  species C12AcylCarCYT in VCYT = 0.11;  // isVersionOf CHEBI:17387
  species C12AcylCarMAT in VMAT = 0;  // isVersionOf CHEBI:17387
  species C12AcylCoAMAT in VMAT = 0;  // isVersionOf CHEBI:37554
  species C12EnoylCoAMAT in VMAT = 0;  // isVersionOf CHEBI:27803
  species C12HydroxyacylCoAMAT in VMAT = 0;  // isVersionOf CHEBI:61902
  species C12KetoacylCoAMAT in VMAT = 0;  // isVersionOf CHEBI:37554
  species C10AcylCarCYT in VCYT = 0.019;  // isVersionOf CHEBI:17387
  species C10AcylCarMAT in VMAT = 0;  // isVersionOf CHEBI:17387
  species C10AcylCoAMAT in VMAT = 0;  // isVersionOf CHEBI:37554
  species C10EnoylCoAMAT in VMAT = 0;  // isVersionOf CHEBI:27803
  species C10HydroxyacylCoAMAT in VMAT = 0;  // isVersionOf CHEBI:61902
  species C10KetoacylCoAMAT in VMAT = 0;  // isVersionOf CHEBI:37554
  species C8AcylCarCYT in VCYT = 0.052;  // isVersionOf CHEBI:17387
  species C8AcylCarMAT in VMAT = 0;  // isVersionOf CHEBI:17387
  species C8AcylCoAMAT in VMAT = 0;  // isVersionOf CHEBI:37554
  species C8EnoylCoAMAT in VMAT = 0;  // isVersionOf CHEBI:27803
  species C8HydroxyacylCoAMAT in VMAT = 0;  // isVersionOf CHEBI:61902
  species C8KetoacylCoAMAT in VMAT = 0;  // isVersionOf CHEBI:37554
  species C6AcylCarCYT in VCYT = 0.017;  // isVersionOf CHEBI:17387
  species C6AcylCarMAT in VMAT = 0;  // isVersionOf CHEBI:17387
  species C6AcylCoAMAT in VMAT = 0;  // isVersionOf CHEBI:37554
  species C6EnoylCoAMAT in VMAT = 0;  // isVersionOf CHEBI:27803
  species C6HydroxyacylCoAMAT in VMAT = 0;  // isVersionOf CHEBI:61902
  species C6KetoacylCoAMAT in VMAT = 0;  // isVersionOf CHEBI:37554
  species C4AcylCarCYT in VCYT = 0.008;  // isVersionOf CHEBI:17387
  species C4AcylCarMAT in VMAT = 0;  // isVersionOf CHEBI:17387
  species C4AcylCoAMAT in VMAT = 0;  // isVersionOf CHEBI:37554
  species C4EnoylCoAMAT in VMAT = 0;  // isVersionOf CHEBI:27803
  species C4HydroxyacylCoAMAT in VMAT = 0;  // isVersionOf CHEBI:61902
  species C4AcetoacylCoAMAT in VMAT = 0;  // isVersionOf CHEBI:37554
  species AcetylCoAMAT in VMAT = 30;  // isVersionOf CHEBI:15351
  species FADHMAT in VMAT = 0.46;  // isVersionOf CHEBI:30788
  species NADHMAT in VMAT = 16;  // isVersionOf CHEBI:16908
  species $CoAMAT in VMAT;  // isVersionOf CHEBI:15346
  species $C16AcylCoACYT in VCYT;  // isVersionOf CHEBI:15525 CHEBI:37554
  species $CarCYT in VCYT = 400;  // isVersionOf CHEBI:17126
  species $CoACYT in VCYT = 140;  // isVersionOf CHEBI:15346
  species $MalCoACYT in VCYT = 0;  // isVersionOf CHEBI:15531
  species $CarMAT in VMAT = 950;  // isVersionOf CHEBI:17126
  species $FADtMAT in VMAT = 0.77;  // isVersionOf CHEBI:16238
  species $NADtMAT in VMAT = 250;  // isVersionOf CHEBI:13389
  species $CoAMATt in VMAT = 5000;  // isVersionOf CHEBI:15346

  // Parameters:
  Vfcact = 0.42 uM_per_min_per_mgProtein;
  Vrcact = 0.42 uM_per_min_per_mgProtein;
  KmcactCarMAT = 130 uM;
  KmcactCarCYT = 130 uM;
  KicactCarCYT = 200 uM;
  Keqcact = 1 dimensionless;
  Vcpt2 = 0.391 uM_per_min_per_mgProtein;
  Kmcpt2C16AcylCarMAT = 51 uM;
  Kmcpt2C14AcylCarMAT = 51 uM;
  Kmcpt2C12AcylCarMAT = 51 uM;
  Kmcpt2C10AcylCarMAT = 51 uM;
  Kmcpt2C8AcylCarMAT = 51 uM;
  Kmcpt2C6AcylCarMAT = 51 uM;
  Kmcpt2C4AcylCarMAT = 51 uM;
  Kmcpt2CoAMAT = 30 uM;
  Kmcpt2C16AcylCoAMAT = 38 uM;
  Kmcpt2C14AcylCoAMAT = 38 uM;
  Kmcpt2C12AcylCoAMAT = 38 uM;
  Kmcpt2C10AcylCoAMAT = 38 uM;
  Kmcpt2C8AcylCoAMAT = 38 uM;
  Kmcpt2C6AcylCoAMAT = 1000 uM;
  Kmcpt2C4AcylCoAMAT = 1000000 uM;
  Kmcpt2CarMAT = 350 uM;
  Keqcpt2 = 2.22 dimensionless;
  Vvlcad = 0.008 uM_per_min_per_mgProtein;
  KmvlcadC16AcylCoAMAT = 6.5 uM;
  KmvlcadC14AcylCoAMAT = 4 uM;
  KmvlcadC12AcylCoAMAT = 2.7 uM;
  KmvlcadFAD = 0.12 uM;
  KmvlcadC16EnoylCoAMAT = 1.08 uM;
  KmvlcadC14EnoylCoAMAT = 1.08 uM;
  KmvlcadC12EnoylCoAMAT = 1.08 uM;
  KmvlcadFADH = 24.2 uM;
  Keqvlcad = 6 dimensionless;
  Vlcad = 0.01 uM_per_min_per_mgProtein;
  KmlcadC16AcylCoAMAT = 2.5 uM;
  KmlcadC14AcylCoAMAT = 7.4 uM;
  KmlcadC12AcylCoAMAT = 9 uM;
  KmlcadC10AcylCoAMAT = 24.3 uM;
  KmlcadC8AcylCoAMAT = 123 uM;
  KmlcadFAD = 0.12 uM;
  KmlcadC16EnoylCoAMAT = 1.08 uM;
  KmlcadC14EnoylCoAMAT = 1.08 uM;
  KmlcadC12EnoylCoAMAT = 1.08 uM;
  KmlcadC10EnoylCoAMAT = 1.08 uM;
  KmlcadC8EnoylCoAMAT = 1.08 uM;
  KmlcadFADH = 24.2 uM;
  Keqlcad = 6 dimensionless;
  Vmcad = 0.081 uM_per_min_per_mgProtein;
  KmmcadC12AcylCoAMAT = 5.7 uM;
  KmmcadC10AcylCoAMAT = 5.4 uM;
  KmmcadC8AcylCoAMAT = 4 uM;
  KmmcadC6AcylCoAMAT = 9.4 uM;
  KmmcadC4AcylCoAMAT = 135 uM;
  KmmcadFAD = 0.12 uM;
  KmmcadC12EnoylCoAMAT = 1.08 uM;
  KmmcadC10EnoylCoAMAT = 1.08 uM;
  KmmcadC8EnoylCoAMAT = 1.08 uM;
  KmmcadC6EnoylCoAMAT = 1.08 uM;
  KmmcadC4EnoylCoAMAT = 1.08 uM;
  KmmcadFADH = 24.2 uM;
  Keqmcad = 6 dimensionless;
  Vscad = 0.081 uM_per_min_per_mgProtein;
  KmscadC6AcylCoAMAT = 285 uM;
  KmscadC4AcylCoAMAT = 10.7 uM;
  KmscadFAD = 0.12 uM;
  KmscadC6EnoylCoAMAT = 1.08 uM;
  KmscadC4EnoylCoAMAT = 1.08 uM;
  KmscadFADH = 24.2 uM;
  Keqscad = 6 dimensionless;
  Vcrot = 3.6 uM_per_min_per_mgProtein;
  KmcrotC16EnoylCoAMAT = 150 uM;
  KmcrotC14EnoylCoAMAT = 100 uM;
  KmcrotC12EnoylCoAMAT = 25 uM;
  KmcrotC10EnoylCoAMAT = 25 uM;
  KmcrotC8EnoylCoAMAT = 25 uM;
  KmcrotC6EnoylCoAMAT = 25 uM;
  KmcrotC4EnoylCoAMAT = 40 uM;
  KmcrotC16HydroxyacylCoAMAT = 45 uM;
  KmcrotC14HydroxyacylCoAMAT = 45 uM;
  KmcrotC12HydroxyacylCoAMAT = 45 uM;
  KmcrotC10HydroxyacylCoAMAT = 45 uM;
  KmcrotC8HydroxyacylCoAMAT = 45 uM;
  KmcrotC6HydroxyacylCoAMAT = 45 uM;
  KmcrotC4HydroxyacylCoAMAT = 45 uM;
  KicrotC4AcetoacylCoA = 1.6 uM;
  Keqcrot = 3.13 dimensionless;
  Vmschad = 1 uM_per_min_per_mgProtein;
  KmmschadC16HydroxyacylCoAMAT = 1.5 uM;
  KmmschadC14HydroxyacylCoAMAT = 1.8 uM;
  KmmschadC12HydroxyacylCoAMAT = 3.7 uM;
  KmmschadC10HydroxyacylCoAMAT = 8.8 uM;
  KmmschadC8HydroxyacylCoAMAT = 16.3 uM;
  KmmschadC6HydroxyacylCoAMAT = 28.6 uM;
  KmmschadC4HydroxyacylCoAMAT = 69.9 uM;
  KmmschadNADMAT = 58.5 uM;
  KmmschadC16KetoacylCoAMAT = 1.4 uM;
  KmmschadC14KetoacylCoAMAT = 1.4 uM;
  KmmschadC12KetoacylCoAMAT = 1.6 uM;
  KmmschadC10KetoacylCoAMAT = 2.3 uM;
  KmmschadC8KetoacylCoAMAT = 4.1 uM;
  KmmschadC6KetoacylCoAMAT = 5.8 uM;
  KmmschadC4AcetoacylCoAMAT = 16.9 uM;
  KmmschadNADHMAT = 5.4 uM;
  Keqmschad = 0.000217 dimensionless;
  Vmckat = 0.377 uM_per_min_per_mgProtein;
  KmmckatC16KetoacylCoAMAT = 1.1 uM;
  KmmckatC14KetoacylCoAMAT = 1.2 uM;
  KmmckatC12KetoacylCoAMAT = 1.3 uM;
  KmmckatC10KetoacylCoAMAT = 2.1 uM;
  KmmckatC8KetoacylCoAMAT = 3.2 uM;
  KmmckatC6KetoacylCoAMAT = 6.7 uM;
  KmmckatC4AcetoacylCoAMAT = 12.4 uM;
  KmmckatCoAMAT = 26.6 uM;
  KmmckatC14AcylCoAMAT = 13.83 uM;
  KmmckatC16AcylCoAMAT = 13.83 uM;
  KmmckatC12AcylCoAMAT = 13.83 uM;
  KmmckatC10AcylCoAMAT = 13.83 uM;
  KmmckatC8AcylCoAMAT = 13.83 uM;
  KmmckatC6AcylCoAMAT = 13.83 uM;
  KmmckatC4AcylCoAMAT = 13.83 uM;
  KmmckatAcetylCoAMAT = 30 uM;
  Keqmckat = 1051 dimensionless;
  Vmtp = 2.84 uM_per_min_per_mgProtein;
  KmmtpC16EnoylCoAMAT = 25 uM;
  KmmtpC14EnoylCoAMAT = 25 uM;
  KmmtpC12EnoylCoAMAT = 25 uM;
  KmmtpC10EnoylCoAMAT = 25 uM;
  KmmtpC8EnoylCoAMAT = 25 uM;
  KmmtpNADMAT = 60 uM;
  KmmtpCoAMAT = 30 uM;
  KmmtpC14AcylCoAMAT = 13.83 uM;
  KmmtpC16AcylCoAMAT = 13.83 uM;
  KmmtpC12AcylCoAMAT = 13.83 uM;
  KmmtpC10AcylCoAMAT = 13.83 uM;
  KmmtpC8AcylCoAMAT = 13.83 uM;
  KmmtpC6AcylCoAMAT = 13.83 uM;
  KmmtpNADHMAT = 50 uM;
  KmmtpAcetylCoAMAT = 30 uM;
  Keqmtp = 0.71 dimensionless;

  // Assignment rules:
  CoAMAT := CoAMATt - (C16AcylCoAMAT + C16EnoylCoAMAT + C16HydroxyacylCoAMAT + C16KetoacylCoAMAT + C14AcylCoAMAT + C14EnoylCoAMAT + C14HydroxyacylCoAMAT + C14KetoacylCoAMAT + C12AcylCoAMAT + C12EnoylCoAMAT + C12HydroxyacylCoAMAT + C12KetoacylCoAMAT + C10AcylCoAMAT + C10EnoylCoAMAT + C10HydroxyacylCoAMAT + C10KetoacylCoAMAT + C8AcylCoAMAT + C8EnoylCoAMAT + C8HydroxyacylCoAMAT + C8KetoacylCoAMAT + C6AcylCoAMAT + C6EnoylCoAMAT + C6HydroxyacylCoAMAT + C6KetoacylCoAMAT + C4AcylCoAMAT + C4EnoylCoAMAT + C4HydroxyacylCoAMAT + C4AcetoacylCoAMAT + AcetylCoAMAT);
  C16AcylCoACYT := 26.8*2.718282^(-0.18*time);

  // Reactions:
  vcpt1C16: -> C16AcylCarCYT; CPT1(sfcpt1C16, Vcpt1, Kmcpt1C16AcylCoACYT, Kmcpt1CarCYT, Kmcpt1C16AcylCarCYT, Kmcpt1CoACYT, Kicpt1MalCoACYT, Keqcpt1, C16AcylCoACYT, CarCYT, C16AcylCarCYT, CoACYT, MalCoACYT, ncpt1);  // modifiers: C16AcylCoACYT, CarCYT, CoACYT, MalCoACYT
    Keqcpt1 = 0.45 dimensionless; Kicpt1MalCoACYT = 9.1 uM; Kmcpt1C16AcylCarCYT = 136 uM; Kmcpt1C16AcylCoACYT = 13.8 uM; Kmcpt1CarCYT = 125 uM; Kmcpt1CoACYT = 40.7 uM; Vcpt1 = 0.012 uM_per_min_per_mgProtein; ncpt1 = 2.4799 dimensionless; sfcpt1C16 = 1 dimensionless;
  vcactC16: C16AcylCarCYT -> C16AcylCarMAT; CACT(Vfcact, Vrcact, KmcactC16AcylCarCYT, KmcactCarMAT, KmcactC16AcylCarMAT, KmcactCarCYT, KicactC16AcylCarCYT, KicactCarCYT, Keqcact, C16AcylCarCYT, CarMAT, C16AcylCarMAT, CarCYT);  // modifiers: CarMAT, CarCYT
    KicactC16AcylCarCYT = 56 uM; KmcactC16AcylCarCYT = 15 uM; KmcactC16AcylCarMAT = 15 uM;
  vcactC14: C14AcylCarCYT -> C14AcylCarMAT; CACT(Vfcact, Vrcact, KmcactC14AcylCarCYT, KmcactCarMAT, KmcactC14AcylCarMAT, KmcactCarCYT, KicactC14AcylCarCYT, KicactCarCYT, Keqcact, C14AcylCarCYT, CarMAT, C14AcylCarMAT, CarCYT);  // modifiers: CarMAT, CarCYT
    KicactC14AcylCarCYT = 56 uM; KmcactC14AcylCarCYT = 15 uM; KmcactC14AcylCarMAT = 15 uM;
  vcactC12: C12AcylCarCYT -> C12AcylCarMAT; CACT(Vfcact, Vrcact, KmcactC12AcylCarCYT, KmcactCarMAT, KmcactC12AcylCarMAT, KmcactCarCYT, KicactC12AcylCarCYT, KicactCarCYT, Keqcact, C12AcylCarCYT, CarMAT, C12AcylCarMAT, CarCYT);  // modifiers: CarMAT, CarCYT
    KicactC12AcylCarCYT = 56 uM; KmcactC12AcylCarCYT = 15 uM; KmcactC12AcylCarMAT = 15 uM;
  vcactC10: C10AcylCarCYT -> C10AcylCarMAT; CACT(Vfcact, Vrcact, KmcactC10AcylCarCYT, KmcactCarMAT, KmcactC10AcylCarMAT, KmcactCarCYT, KicactC10AcylCarCYT, KicactCarCYT, Keqcact, C10AcylCarCYT, CarMAT, C10AcylCarMAT, CarCYT);  // modifiers: CarMAT, CarCYT
    KicactC10AcylCarCYT = 56 uM; KmcactC10AcylCarCYT = 15 uM; KmcactC10AcylCarMAT = 15 uM;
  vcactC8: C8AcylCarCYT -> C8AcylCarMAT; CACT(Vfcact, Vrcact, KmcactC8AcylCarCYT, KmcactCarMAT, KmcactC8AcylCarMAT, KmcactCarCYT, KicactC8AcylCarCYT, KicactCarCYT, Keqcact, C8AcylCarCYT, CarMAT, C8AcylCarMAT, CarCYT);  // modifiers: CarMAT, CarCYT
    KicactC8AcylCarCYT = 56 uM; KmcactC8AcylCarCYT = 15 uM; KmcactC8AcylCarMAT = 15 uM;
  vcactC6: C6AcylCarCYT -> C6AcylCarMAT; CACT(Vfcact, Vrcact, KmcactC6AcylCarCYT, KmcactCarMAT, KmcactC6AcylCarMAT, KmcactCarCYT, KicactC6AcylCarCYT, KicactCarCYT, Keqcact, C6AcylCarCYT, CarMAT, C6AcylCarMAT, CarCYT);  // modifiers: CarMAT, CarCYT
    KicactC6AcylCarCYT = 56 uM; KmcactC6AcylCarCYT = 15 uM; KmcactC6AcylCarMAT = 15 uM;
  vcactC4: C4AcylCarCYT -> C4AcylCarMAT; CACT(Vfcact, Vrcact, KmcactC4AcylCarCYT, KmcactCarMAT, KmcactC4AcylCarMAT, KmcactCarCYT, KicactC4AcylCarCYT, KicactCarCYT, Keqcact, C4AcylCarCYT, CarMAT, C4AcylCarMAT, CarCYT);  // modifiers: CarMAT, CarCYT
    KicactC4AcylCarCYT = 56 uM; KmcactC4AcylCarCYT = 15 uM; KmcactC4AcylCarMAT = 15 uM;
  vcpt2C16: C16AcylCarMAT -> C16AcylCoAMAT; CPT2(sfcpt2C16, Vcpt2, Kmcpt2C16AcylCarMAT, Kmcpt2C14AcylCarMAT, Kmcpt2C12AcylCarMAT, Kmcpt2C10AcylCarMAT, Kmcpt2C8AcylCarMAT, Kmcpt2C6AcylCarMAT, Kmcpt2C4AcylCarMAT, Kmcpt2CoAMAT, Kmcpt2C16AcylCoAMAT, Kmcpt2C14AcylCoAMAT, Kmcpt2C12AcylCoAMAT, Kmcpt2C10AcylCoAMAT, Kmcpt2C8AcylCoAMAT, Kmcpt2C6AcylCoAMAT, Kmcpt2C4AcylCoAMAT, Kmcpt2CarMAT, Keqcpt2, C16AcylCarMAT, C14AcylCarMAT, C12AcylCarMAT, C10AcylCarMAT, C8AcylCarMAT, C6AcylCarMAT, C4AcylCarMAT, CoAMAT, C16AcylCoAMAT, C14AcylCoAMAT, C12AcylCoAMAT, C10AcylCoAMAT, C8AcylCoAMAT, C6AcylCoAMAT, C4AcylCoAMAT, CarMAT);  // modifiers: C14AcylCarMAT, C12AcylCarMAT, C10AcylCarMAT, C8AcylCarMAT, C6AcylCarMAT, C4AcylCarMAT, CoAMAT, C14AcylCoAMAT, C12AcylCoAMAT, C10AcylCoAMAT, C8AcylCoAMAT, C6AcylCoAMAT, C4AcylCoAMAT, CarMAT
    sfcpt2C16 = 0.85 dimensionless;
  vcpt2C14: C14AcylCarMAT -> C14AcylCoAMAT; CPT2(sfcpt2C14, Vcpt2, Kmcpt2C14AcylCarMAT, Kmcpt2C16AcylCarMAT, Kmcpt2C12AcylCarMAT, Kmcpt2C10AcylCarMAT, Kmcpt2C8AcylCarMAT, Kmcpt2C6AcylCarMAT, Kmcpt2C4AcylCoAMAT, Kmcpt2CoAMAT, Kmcpt2C14AcylCoAMAT, Kmcpt2C16AcylCoAMAT, Kmcpt2C12AcylCoAMAT, Kmcpt2C10AcylCoAMAT, Kmcpt2C8AcylCoAMAT, Kmcpt2C6AcylCoAMAT, Kmcpt2C4AcylCoAMAT, Kmcpt2CarMAT, Keqcpt2, C14AcylCarMAT, C16AcylCarMAT, C12AcylCarMAT, C10AcylCarMAT, C8AcylCarMAT, C6AcylCarMAT, C4AcylCarMAT, CoAMAT, C14AcylCoAMAT, C16AcylCoAMAT, C12AcylCoAMAT, C10AcylCoAMAT, C8AcylCoAMAT, C6AcylCoAMAT, C4AcylCoAMAT, CarMAT);  // modifiers: C16AcylCarMAT, C12AcylCarMAT, C10AcylCarMAT, C8AcylCarMAT, C6AcylCarMAT, C4AcylCarMAT, CoAMAT, C16AcylCoAMAT, C12AcylCoAMAT, C10AcylCoAMAT, C8AcylCoAMAT, C6AcylCoAMAT, C4AcylCoAMAT, CarMAT
    sfcpt2C14 = 1 dimensionless;
  vcpt2C12: C12AcylCarMAT -> C12AcylCoAMAT; CPT2(sfcpt2C12, Vcpt2, Kmcpt2C12AcylCarMAT, Kmcpt2C16AcylCarMAT, Kmcpt2C14AcylCarMAT, Kmcpt2C10AcylCarMAT, Kmcpt2C8AcylCarMAT, Kmcpt2C6AcylCarMAT, Kmcpt2C4AcylCarMAT, Kmcpt2CoAMAT, Kmcpt2C12AcylCoAMAT, Kmcpt2C16AcylCoAMAT, Kmcpt2C14AcylCoAMAT, Kmcpt2C10AcylCoAMAT, Kmcpt2C8AcylCoAMAT, Kmcpt2C6AcylCoAMAT, Kmcpt2C4AcylCoAMAT, Kmcpt2CarMAT, Keqcpt2, C12AcylCarMAT, C16AcylCarMAT, C14AcylCarMAT, C10AcylCarMAT, C8AcylCarMAT, C6AcylCarMAT, C4AcylCarMAT, CoAMAT, C12AcylCoAMAT, C16AcylCoAMAT, C14AcylCoAMAT, C10AcylCoAMAT, C8AcylCoAMAT, C6AcylCoAMAT, C4AcylCoAMAT, CarMAT);  // modifiers: C16AcylCarMAT, C14AcylCarMAT, C10AcylCarMAT, C8AcylCarMAT, C6AcylCarMAT, C4AcylCarMAT, CoAMAT, C16AcylCoAMAT, C14AcylCoAMAT, C10AcylCoAMAT, C8AcylCoAMAT, C6AcylCoAMAT, C4AcylCoAMAT, CarMAT
    sfcpt2C12 = 0.95 dimensionless;
  vcpt2C10: C10AcylCarMAT -> C10AcylCoAMAT; CPT2(sfcpt2C10, Vcpt2, Kmcpt2C10AcylCarMAT, Kmcpt2C16AcylCarMAT, Kmcpt2C14AcylCarMAT, Kmcpt2C12AcylCarMAT, Kmcpt2C8AcylCarMAT, Kmcpt2C6AcylCarMAT, Kmcpt2C4AcylCarMAT, Kmcpt2CoAMAT, Kmcpt2C10AcylCoAMAT, Kmcpt2C16AcylCoAMAT, Kmcpt2C14AcylCoAMAT, Kmcpt2C12AcylCoAMAT, Kmcpt2C8AcylCoAMAT, Kmcpt2C6AcylCoAMAT, Kmcpt2C4AcylCoAMAT, Kmcpt2CarMAT, Keqcpt2, C10AcylCarMAT, C16AcylCarMAT, C14AcylCarMAT, C12AcylCarMAT, C8AcylCarMAT, C6AcylCarMAT, C4AcylCarMAT, CoAMAT, C10AcylCoAMAT, C16AcylCoAMAT, C14AcylCoAMAT, C12AcylCoAMAT, C8AcylCoAMAT, C6AcylCoAMAT, C4AcylCoAMAT, CarMAT);  // modifiers: C16AcylCarMAT, C14AcylCarMAT, C12AcylCarMAT, C8AcylCarMAT, C6AcylCarMAT, C4AcylCarMAT, CoAMAT, C16AcylCoAMAT, C14AcylCoAMAT, C12AcylCoAMAT, C8AcylCoAMAT, C6AcylCoAMAT, C4AcylCoAMAT, CarMAT
    sfcpt2C10 = 0.95 dimensionless;
  vcpt2C8: C8AcylCarMAT -> C8AcylCoAMAT; CPT2(sfcpt2C8, Vcpt2, Kmcpt2C8AcylCarMAT, Kmcpt2C16AcylCarMAT, Kmcpt2C14AcylCarMAT, Kmcpt2C12AcylCarMAT, Kmcpt2C10AcylCarMAT, Kmcpt2C6AcylCarMAT, Kmcpt2C4AcylCarMAT, Kmcpt2CoAMAT, Kmcpt2C8AcylCoAMAT, Kmcpt2C16AcylCoAMAT, Kmcpt2C14AcylCoAMAT, Kmcpt2C12AcylCoAMAT, Kmcpt2C10AcylCoAMAT, Kmcpt2C6AcylCoAMAT, Kmcpt2C4AcylCoAMAT, Kmcpt2CarMAT, Keqcpt2, C8AcylCarMAT, C16AcylCarMAT, C14AcylCarMAT, C12AcylCarMAT, C10AcylCarMAT, C6AcylCarMAT, C4AcylCarMAT, CoAMAT, C8AcylCoAMAT, C16AcylCoAMAT, C14AcylCoAMAT, C12AcylCoAMAT, C10AcylCoAMAT, C6AcylCoAMAT, C4AcylCoAMAT, CarMAT);  // modifiers: C16AcylCarMAT, C14AcylCarMAT, C12AcylCarMAT, C10AcylCarMAT, C6AcylCarMAT, C4AcylCarMAT, CoAMAT, C16AcylCoAMAT, C14AcylCoAMAT, C12AcylCoAMAT, C10AcylCoAMAT, C6AcylCoAMAT, C4AcylCoAMAT, CarMAT
    sfcpt2C8 = 0.35 dimensionless;
  vcpt2C6: C6AcylCarMAT -> C6AcylCoAMAT; CPT2(sfcpt2C6, Vcpt2, Kmcpt2C6AcylCarMAT, Kmcpt2C16AcylCarMAT, Kmcpt2C14AcylCarMAT, Kmcpt2C12AcylCarMAT, Kmcpt2C10AcylCarMAT, Kmcpt2C8AcylCarMAT, Kmcpt2C4AcylCarMAT, Kmcpt2CoAMAT, Kmcpt2C6AcylCoAMAT, Kmcpt2C16AcylCoAMAT, Kmcpt2C14AcylCoAMAT, Kmcpt2C12AcylCoAMAT, Kmcpt2C10AcylCoAMAT, Kmcpt2C8AcylCoAMAT, Kmcpt2C4AcylCoAMAT, Kmcpt2CarMAT, Keqcpt2, C6AcylCarMAT, C16AcylCarMAT, C14AcylCarMAT, C12AcylCarMAT, C10AcylCarMAT, C8AcylCarMAT, C4AcylCarMAT, CoAMAT, C6AcylCoAMAT, C16AcylCoAMAT, C14AcylCoAMAT, C12AcylCoAMAT, C10AcylCoAMAT, C8AcylCoAMAT, C4AcylCoAMAT, CarMAT);  // modifiers: C16AcylCarMAT, C14AcylCarMAT, C12AcylCarMAT, C10AcylCarMAT, C8AcylCarMAT, C4AcylCarMAT, CoAMAT, C16AcylCoAMAT, C14AcylCoAMAT, C12AcylCoAMAT, C10AcylCoAMAT, C8AcylCoAMAT, C4AcylCoAMAT, CarMAT
    sfcpt2C6 = 0.15 dimensionless;
  vcpt2C4: C4AcylCarMAT -> C4AcylCoAMAT; CPT2(sfcpt2C4, Vcpt2, Kmcpt2C4AcylCarMAT, Kmcpt2C16AcylCarMAT, Kmcpt2C14AcylCarMAT, Kmcpt2C12AcylCarMAT, Kmcpt2C10AcylCarMAT, Kmcpt2C8AcylCarMAT, Kmcpt2C6AcylCarMAT, Kmcpt2CoAMAT, Kmcpt2C4AcylCoAMAT, Kmcpt2C16AcylCoAMAT, Kmcpt2C14AcylCoAMAT, Kmcpt2C12AcylCoAMAT, Kmcpt2C10AcylCoAMAT, Kmcpt2C8AcylCoAMAT, Kmcpt2C6AcylCoAMAT, Kmcpt2CarMAT, Keqcpt2, C4AcylCarMAT, C16AcylCarMAT, C14AcylCarMAT, C12AcylCarMAT, C10AcylCarMAT, C8AcylCarMAT, C6AcylCarMAT, CoAMAT, C4AcylCoAMAT, C16AcylCoAMAT, C14AcylCoAMAT, C12AcylCoAMAT, C10AcylCoAMAT, C8AcylCoAMAT, C6AcylCoAMAT, CarMAT);  // modifiers: C16AcylCarMAT, C14AcylCarMAT, C12AcylCarMAT, C10AcylCarMAT, C8AcylCarMAT, C6AcylCarMAT, CoAMAT, C16AcylCoAMAT, C14AcylCoAMAT, C12AcylCoAMAT, C10AcylCoAMAT, C8AcylCoAMAT, C6AcylCoAMAT, CarMAT
    sfcpt2C4 = 0.01 dimensionless;
  vvlcadC16: C16AcylCoAMAT -> C16EnoylCoAMAT + FADHMAT; VLCAD(sfvlcadC16, Vvlcad, KmvlcadC16AcylCoAMAT, KmvlcadC14AcylCoAMAT, KmvlcadC12AcylCoAMAT, KmvlcadFAD, KmvlcadC16EnoylCoAMAT, KmvlcadC14EnoylCoAMAT, KmvlcadC12EnoylCoAMAT, KmvlcadFADH, Keqvlcad, C16AcylCoAMAT, C14AcylCoAMAT, C12AcylCoAMAT, FADtMAT, C16EnoylCoAMAT, C14EnoylCoAMAT, C12EnoylCoAMAT, FADHMAT);  // modifiers: C14AcylCoAMAT, C12AcylCoAMAT, FADtMAT, C14EnoylCoAMAT, C12EnoylCoAMAT
    sfvlcadC16 = 1 dimensionless;
  vvlcadC14: C14AcylCoAMAT -> C14EnoylCoAMAT + FADHMAT; VLCAD(sfvlcadC14, Vvlcad, KmvlcadC14AcylCoAMAT, KmvlcadC16AcylCoAMAT, KmvlcadC12AcylCoAMAT, KmvlcadFAD, KmvlcadC14EnoylCoAMAT, KmvlcadC16EnoylCoAMAT, KmvlcadC12EnoylCoAMAT, KmvlcadFADH, Keqvlcad, C14AcylCoAMAT, C16AcylCoAMAT, C12AcylCoAMAT, FADtMAT, C14EnoylCoAMAT, C16EnoylCoAMAT, C12EnoylCoAMAT, FADHMAT);  // modifiers: C16AcylCoAMAT, C12AcylCoAMAT, FADtMAT, C16EnoylCoAMAT, C12EnoylCoAMAT
    sfvlcadC14 = 0.42 dimensionless;
  vvlcadC12: C12AcylCoAMAT -> C12EnoylCoAMAT + FADHMAT; VLCAD(sfvlcadC12, Vvlcad, KmvlcadC12AcylCoAMAT, KmvlcadC16AcylCoAMAT, KmvlcadC14AcylCoAMAT, KmvlcadFAD, KmvlcadC12EnoylCoAMAT, KmvlcadC16EnoylCoAMAT, KmvlcadC14EnoylCoAMAT, KmvlcadFADH, Keqvlcad, C12AcylCoAMAT, C16AcylCoAMAT, C14AcylCoAMAT, FADtMAT, C12EnoylCoAMAT, C16EnoylCoAMAT, C14EnoylCoAMAT, FADHMAT);  // modifiers: C16AcylCoAMAT, C14AcylCoAMAT, FADtMAT, C16EnoylCoAMAT, C14EnoylCoAMAT
    sfvlcadC12 = 0.11 dimensionless;
  vlcadC16: C16AcylCoAMAT -> C16EnoylCoAMAT + FADHMAT; LCAD(sflcadC16, Vlcad, KmlcadC16AcylCoAMAT, KmlcadC14AcylCoAMAT, KmlcadC12AcylCoAMAT, KmlcadC10AcylCoAMAT, KmlcadC8AcylCoAMAT, KmlcadFAD, KmlcadC16EnoylCoAMAT, KmlcadC14EnoylCoAMAT, KmlcadC12EnoylCoAMAT, KmlcadC10EnoylCoAMAT, KmlcadC8EnoylCoAMAT, KmlcadFADH, Keqlcad, C16AcylCoAMAT, C14AcylCoAMAT, C12AcylCoAMAT, C10AcylCoAMAT, C8AcylCoAMAT, FADtMAT, C16EnoylCoAMAT, C14EnoylCoAMAT, C12EnoylCoAMAT, C10EnoylCoAMAT, C8EnoylCoAMAT, FADHMAT);  // modifiers: C14AcylCoAMAT, C12AcylCoAMAT, C10AcylCoAMAT, C8AcylCoAMAT, FADtMAT, C14EnoylCoAMAT, C12EnoylCoAMAT, C10EnoylCoAMAT, C8EnoylCoAMAT
    sflcadC16 = 0.9 dimensionless;
  vlcadC14: C14AcylCoAMAT -> C14EnoylCoAMAT + FADHMAT; LCAD(sflcadC14, Vlcad, KmlcadC14AcylCoAMAT, KmlcadC16AcylCoAMAT, KmlcadC12AcylCoAMAT, KmlcadC10AcylCoAMAT, KmlcadC8AcylCoAMAT, KmlcadFAD, KmlcadC14EnoylCoAMAT, KmlcadC16EnoylCoAMAT, KmlcadC12EnoylCoAMAT, KmlcadC10EnoylCoAMAT, KmlcadC8EnoylCoAMAT, KmlcadFADH, Keqlcad, C14AcylCoAMAT, C16AcylCoAMAT, C12AcylCoAMAT, C10AcylCoAMAT, C8AcylCoAMAT, FADtMAT, C14EnoylCoAMAT, C16EnoylCoAMAT, C12EnoylCoAMAT, C10EnoylCoAMAT, C8EnoylCoAMAT, FADHMAT);  // modifiers: C16AcylCoAMAT, C12AcylCoAMAT, C10AcylCoAMAT, C8AcylCoAMAT, FADtMAT, C16EnoylCoAMAT, C12EnoylCoAMAT, C10EnoylCoAMAT, C8EnoylCoAMAT
    sflcadC14 = 1 dimensionless;
  vlcadC12: C12AcylCoAMAT -> C12EnoylCoAMAT + FADHMAT; LCAD(sflcadC12, Vlcad, KmlcadC12AcylCoAMAT, KmlcadC16AcylCoAMAT, KmlcadC14AcylCoAMAT, KmlcadC10AcylCoAMAT, KmlcadC8AcylCoAMAT, KmlcadFAD, KmlcadC12EnoylCoAMAT, KmlcadC16EnoylCoAMAT, KmlcadC14EnoylCoAMAT, KmlcadC10EnoylCoAMAT, KmlcadC8EnoylCoAMAT, KmlcadFADH, Keqlcad, C12AcylCoAMAT, C16AcylCoAMAT, C14AcylCoAMAT, C10AcylCoAMAT, C8AcylCoAMAT, FADtMAT, C14EnoylCoAMAT, C16EnoylCoAMAT, C14EnoylCoAMAT, C10EnoylCoAMAT, C8EnoylCoAMAT, FADHMAT);  // modifiers: C16AcylCoAMAT, C14AcylCoAMAT, C10AcylCoAMAT, C8AcylCoAMAT, FADtMAT, C14EnoylCoAMAT, C16EnoylCoAMAT, C10EnoylCoAMAT, C8EnoylCoAMAT
    sflcadC12 = 0.9 dimensionless;
  vlcadC10: C10AcylCoAMAT -> C10EnoylCoAMAT + FADHMAT; LCAD(sflcadC10, Vlcad, KmlcadC10AcylCoAMAT, KmlcadC16AcylCoAMAT, KmlcadC14AcylCoAMAT, KmlcadC12AcylCoAMAT, KmlcadC8AcylCoAMAT, KmlcadFAD, KmlcadC10EnoylCoAMAT, KmlcadC16EnoylCoAMAT, KmlcadC14EnoylCoAMAT, KmlcadC12EnoylCoAMAT, KmlcadC8EnoylCoAMAT, KmlcadFADH, Keqlcad, C10AcylCoAMAT, C16AcylCoAMAT, C14AcylCoAMAT, C12AcylCoAMAT, C8AcylCoAMAT, FADtMAT, C10EnoylCoAMAT, C16EnoylCoAMAT, C14EnoylCoAMAT, C12EnoylCoAMAT, C8EnoylCoAMAT, FADHMAT);  // modifiers: C16AcylCoAMAT, C14AcylCoAMAT, C12AcylCoAMAT, C8AcylCoAMAT, FADtMAT, C16EnoylCoAMAT, C14EnoylCoAMAT, C12EnoylCoAMAT, C8EnoylCoAMAT
    sflcadC10 = 0.75 dimensionless;
  vlcadC8: C8AcylCoAMAT -> C8EnoylCoAMAT + FADHMAT; LCAD(sflcadC8, Vlcad, KmlcadC8AcylCoAMAT, KmlcadC16AcylCoAMAT, KmlcadC14AcylCoAMAT, KmlcadC12AcylCoAMAT, KmlcadC10AcylCoAMAT, KmlcadFAD, KmlcadC8EnoylCoAMAT, KmlcadC16EnoylCoAMAT, KmlcadC14EnoylCoAMAT, KmlcadC12EnoylCoAMAT, KmlcadC10EnoylCoAMAT, KmlcadFADH, Keqlcad, C8AcylCoAMAT, C16AcylCoAMAT, C14AcylCoAMAT, C12AcylCoAMAT, C10AcylCoAMAT, FADtMAT, C8EnoylCoAMAT, C16EnoylCoAMAT, C14EnoylCoAMAT, C12EnoylCoAMAT, C10EnoylCoAMAT, FADHMAT);  // modifiers: C16AcylCoAMAT, C14AcylCoAMAT, C12AcylCoAMAT, C10AcylCoAMAT, FADtMAT, C16EnoylCoAMAT, C14EnoylCoAMAT, C12EnoylCoAMAT, C10EnoylCoAMAT
    sflcadC8 = 0.4 dimensionless;
  vmcadC12: C12AcylCoAMAT -> C12EnoylCoAMAT + FADHMAT; MCAD(sfmcadC12, Vmcad, KmmcadC12AcylCoAMAT, KmmcadC10AcylCoAMAT, KmmcadC8AcylCoAMAT, KmmcadC6AcylCoAMAT, KmmcadC4AcylCoAMAT, KmmcadFAD, KmmcadC12EnoylCoAMAT, KmmcadC10EnoylCoAMAT, KmmcadC8EnoylCoAMAT, KmmcadC6EnoylCoAMAT, KmmcadC4EnoylCoAMAT, KmmcadFADH, Keqmcad, C12AcylCoAMAT, C10AcylCoAMAT, C8AcylCoAMAT, C6AcylCoAMAT, C4AcylCoAMAT, FADtMAT, C12EnoylCoAMAT, C10EnoylCoAMAT, C8EnoylCoAMAT, C6EnoylCoAMAT, C4EnoylCoAMAT, FADHMAT);  // modifiers: C10AcylCoAMAT, C8AcylCoAMAT, C6AcylCoAMAT, C4AcylCoAMAT, FADtMAT, C10EnoylCoAMAT, C8EnoylCoAMAT, C6EnoylCoAMAT, C4EnoylCoAMAT
    sfmcadC12 = 0.38 dimensionless;
  vmcadC10: C10AcylCoAMAT -> C10EnoylCoAMAT + FADHMAT; MCAD(sfmcadC10, Vmcad, KmmcadC10AcylCoAMAT, KmmcadC12AcylCoAMAT, KmmcadC8AcylCoAMAT, KmmcadC6AcylCoAMAT, KmmcadC4AcylCoAMAT, KmmcadFAD, KmmcadC10EnoylCoAMAT, KmmcadC12EnoylCoAMAT, KmmcadC8EnoylCoAMAT, KmmcadC6EnoylCoAMAT, KmmcadC4EnoylCoAMAT, KmmcadFADH, Keqmcad, C10AcylCoAMAT, C12AcylCoAMAT, C8AcylCoAMAT, C6AcylCoAMAT, C4AcylCoAMAT, FADtMAT, C10EnoylCoAMAT, C12EnoylCoAMAT, C8EnoylCoAMAT, C6EnoylCoAMAT, C4EnoylCoAMAT, FADHMAT);  // modifiers: C12AcylCoAMAT, C8AcylCoAMAT, C6AcylCoAMAT, C4AcylCoAMAT, FADtMAT, C12EnoylCoAMAT, C8EnoylCoAMAT, C6EnoylCoAMAT, C4EnoylCoAMAT
    sfmcadC10 = 0.8 dimensionless;
  vmcadC8: C8AcylCoAMAT -> C8EnoylCoAMAT + FADHMAT; MCAD(sfmcadC8, Vmcad, KmmcadC8AcylCoAMAT, KmmcadC12AcylCoAMAT, KmmcadC10AcylCoAMAT, KmmcadC6AcylCoAMAT, KmmcadC4AcylCoAMAT, KmmcadFAD, KmmcadC8EnoylCoAMAT, KmmcadC12EnoylCoAMAT, KmmcadC10EnoylCoAMAT, KmmcadC6EnoylCoAMAT, KmmcadC4EnoylCoAMAT, KmmcadFADH, Keqmcad, C8AcylCoAMAT, C12AcylCoAMAT, C10AcylCoAMAT, C6AcylCoAMAT, C4AcylCoAMAT, FADtMAT, C8EnoylCoAMAT, C12EnoylCoAMAT, C10EnoylCoAMAT, C6EnoylCoAMAT, C4EnoylCoAMAT, FADHMAT);  // modifiers: C12AcylCoAMAT, C10AcylCoAMAT, C6AcylCoAMAT, C4AcylCoAMAT, FADtMAT, C12EnoylCoAMAT, C10EnoylCoAMAT, C6EnoylCoAMAT, C4EnoylCoAMAT
    sfmcadC8 = 0.87 dimensionless;
  vmcadC6: C6AcylCoAMAT -> C6EnoylCoAMAT + FADHMAT; MCAD(sfmcadC6, Vmcad, KmmcadC6AcylCoAMAT, KmmcadC12AcylCoAMAT, KmmcadC10AcylCoAMAT, KmmcadC8AcylCoAMAT, KmmcadC4AcylCoAMAT, KmmcadFAD, KmmcadC6EnoylCoAMAT, KmmcadC12EnoylCoAMAT, KmmcadC10EnoylCoAMAT, KmmcadC8EnoylCoAMAT, KmmcadC4EnoylCoAMAT, KmmcadFADH, Keqmcad, C6AcylCoAMAT, C12AcylCoAMAT, C10AcylCoAMAT, C8AcylCoAMAT, C4AcylCoAMAT, FADtMAT, C6EnoylCoAMAT, C12EnoylCoAMAT, C10EnoylCoAMAT, C8EnoylCoAMAT, C4EnoylCoAMAT, FADHMAT);  // modifiers: C12AcylCoAMAT, C10AcylCoAMAT, C8AcylCoAMAT, C4AcylCoAMAT, FADtMAT, C12EnoylCoAMAT, C10EnoylCoAMAT, C8EnoylCoAMAT, C4EnoylCoAMAT
    sfmcadC6 = 1 dimensionless;
  vmcadC4: C4AcylCoAMAT -> C4EnoylCoAMAT + FADHMAT; MCAD(sfmcadC4, Vmcad, KmmcadC4AcylCoAMAT, KmmcadC12AcylCoAMAT, KmmcadC10AcylCoAMAT, KmmcadC8AcylCoAMAT, KmmcadC6AcylCoAMAT, KmmcadFAD, KmmcadC4EnoylCoAMAT, KmmcadC12EnoylCoAMAT, KmmcadC10EnoylCoAMAT, KmmcadC8EnoylCoAMAT, KmmcadC6EnoylCoAMAT, KmmcadFADH, Keqmcad, C4AcylCoAMAT, C12AcylCoAMAT, C10AcylCoAMAT, C8AcylCoAMAT, C6AcylCoAMAT, FADtMAT, C4EnoylCoAMAT, C12EnoylCoAMAT, C10EnoylCoAMAT, C8EnoylCoAMAT, C6EnoylCoAMAT, FADHMAT);  // modifiers: C12AcylCoAMAT, C10AcylCoAMAT, C8AcylCoAMAT, C6AcylCoAMAT, FADtMAT, C12EnoylCoAMAT, C10EnoylCoAMAT, C8EnoylCoAMAT, C6EnoylCoAMAT
    sfmcadC4 = 0.12 dimensionless;
  vscadC6: C6AcylCoAMAT -> C6EnoylCoAMAT + FADHMAT; SCAD(sfscadC6, Vscad, KmscadC6AcylCoAMAT, KmscadC4AcylCoAMAT, KmscadFAD, KmscadC6EnoylCoAMAT, KmscadC4EnoylCoAMAT, KmscadFADH, Keqscad, C6AcylCoAMAT, C4AcylCoAMAT, FADtMAT, C6EnoylCoAMAT, C4EnoylCoAMAT, FADHMAT);  // modifiers: C4AcylCoAMAT, FADtMAT, C4EnoylCoAMAT
    sfscadC6 = 0.3 dimensionless;
  vscadC4: C4AcylCoAMAT -> C4EnoylCoAMAT + FADHMAT; SCAD(sfscadC4, Vscad, KmscadC4AcylCoAMAT, KmscadC6AcylCoAMAT, KmscadFAD, KmscadC4EnoylCoAMAT, KmscadC6EnoylCoAMAT, KmscadFADH, Keqscad, C4AcylCoAMAT, C6AcylCoAMAT, FADtMAT, C4EnoylCoAMAT, C6EnoylCoAMAT, FADHMAT);  // modifiers: C6AcylCoAMAT, FADtMAT, C6EnoylCoAMAT
    sfscadC4 = 1 dimensionless;
  vcrotC16: C16EnoylCoAMAT -> C16HydroxyacylCoAMAT; CROT(sfcrotC16, Vcrot, KmcrotC16EnoylCoAMAT, KmcrotC14EnoylCoAMAT, KmcrotC12EnoylCoAMAT, KmcrotC10EnoylCoAMAT, KmcrotC8EnoylCoAMAT, KmcrotC6EnoylCoAMAT, KmcrotC4EnoylCoAMAT, KmcrotC16HydroxyacylCoAMAT, KmcrotC14HydroxyacylCoAMAT, KmcrotC12HydroxyacylCoAMAT, KmcrotC10HydroxyacylCoAMAT, KmcrotC8HydroxyacylCoAMAT, KmcrotC6HydroxyacylCoAMAT, KmcrotC4HydroxyacylCoAMAT, KicrotC4AcetoacylCoA, Keqcrot, C16EnoylCoAMAT, C14EnoylCoAMAT, C12EnoylCoAMAT, C10EnoylCoAMAT, C8EnoylCoAMAT, C6EnoylCoAMAT, C4EnoylCoAMAT, C16HydroxyacylCoAMAT, C14HydroxyacylCoAMAT, C12HydroxyacylCoAMAT, C10HydroxyacylCoAMAT, C8HydroxyacylCoAMAT, C6HydroxyacylCoAMAT, C4HydroxyacylCoAMAT, C4AcetoacylCoAMAT);  // modifiers: C14EnoylCoAMAT, C12EnoylCoAMAT, C10EnoylCoAMAT, C8EnoylCoAMAT, C6EnoylCoAMAT, C4EnoylCoAMAT, C14HydroxyacylCoAMAT, C12HydroxyacylCoAMAT, C10HydroxyacylCoAMAT, C8HydroxyacylCoAMAT, C6HydroxyacylCoAMAT, C4HydroxyacylCoAMAT, C4AcetoacylCoAMAT
    sfcrotC16 = 0.13 dimensionless;
  vcrotC14: C14EnoylCoAMAT -> C14HydroxyacylCoAMAT; CROT(sfcrotC14, Vcrot, KmcrotC14EnoylCoAMAT, KmcrotC16EnoylCoAMAT, KmcrotC12EnoylCoAMAT, KmcrotC10EnoylCoAMAT, KmcrotC8EnoylCoAMAT, KmcrotC6EnoylCoAMAT, KmcrotC4EnoylCoAMAT, KmcrotC14HydroxyacylCoAMAT, KmcrotC16HydroxyacylCoAMAT, KmcrotC12HydroxyacylCoAMAT, KmcrotC10HydroxyacylCoAMAT, KmcrotC8HydroxyacylCoAMAT, KmcrotC6HydroxyacylCoAMAT, KmcrotC4HydroxyacylCoAMAT, KicrotC4AcetoacylCoA, Keqcrot, C14EnoylCoAMAT, C16EnoylCoAMAT, C12EnoylCoAMAT, C10EnoylCoAMAT, C8EnoylCoAMAT, C6EnoylCoAMAT, C4EnoylCoAMAT, C14HydroxyacylCoAMAT, C16HydroxyacylCoAMAT, C12HydroxyacylCoAMAT, C10HydroxyacylCoAMAT, C8HydroxyacylCoAMAT, C6HydroxyacylCoAMAT, C4HydroxyacylCoAMAT, C4AcetoacylCoAMAT);  // modifiers: C16EnoylCoAMAT, C12EnoylCoAMAT, C10EnoylCoAMAT, C8EnoylCoAMAT, C6EnoylCoAMAT, C4EnoylCoAMAT, C16HydroxyacylCoAMAT, C12HydroxyacylCoAMAT, C10HydroxyacylCoAMAT, C8HydroxyacylCoAMAT, C6HydroxyacylCoAMAT, C4HydroxyacylCoAMAT, C4AcetoacylCoAMAT
    sfcrotC14 = 0.2 dimensionless;
  vcrotC12: C12EnoylCoAMAT -> C12HydroxyacylCoAMAT; CROT(sfcrotC12, Vcrot, KmcrotC12EnoylCoAMAT, KmcrotC16EnoylCoAMAT, KmcrotC14EnoylCoAMAT, KmcrotC10EnoylCoAMAT, KmcrotC8EnoylCoAMAT, KmcrotC6EnoylCoAMAT, KmcrotC4EnoylCoAMAT, KmcrotC12HydroxyacylCoAMAT, KmcrotC16HydroxyacylCoAMAT, KmcrotC14HydroxyacylCoAMAT, KmcrotC10HydroxyacylCoAMAT, KmcrotC8HydroxyacylCoAMAT, KmcrotC6HydroxyacylCoAMAT, KmcrotC4HydroxyacylCoAMAT, KicrotC4AcetoacylCoA, Keqcrot, C12EnoylCoAMAT, C16EnoylCoAMAT, C14EnoylCoAMAT, C10EnoylCoAMAT, C8EnoylCoAMAT, C6EnoylCoAMAT, C4EnoylCoAMAT, C12HydroxyacylCoAMAT, C16HydroxyacylCoAMAT, C14HydroxyacylCoAMAT, C10HydroxyacylCoAMAT, C8HydroxyacylCoAMAT, C6HydroxyacylCoAMAT, C4HydroxyacylCoAMAT, C4AcetoacylCoAMAT);  // modifiers: C16EnoylCoAMAT, C14EnoylCoAMAT, C10EnoylCoAMAT, C8EnoylCoAMAT, C6EnoylCoAMAT, C4EnoylCoAMAT, C16HydroxyacylCoAMAT, C14HydroxyacylCoAMAT, C10HydroxyacylCoAMAT, C8HydroxyacylCoAMAT, C6HydroxyacylCoAMAT, C4HydroxyacylCoAMAT, C4AcetoacylCoAMAT
    sfcrotC12 = 0.25 dimensionless;
  vcrotC10: C10EnoylCoAMAT -> C10HydroxyacylCoAMAT; CROT(sfcrotC10, Vcrot, KmcrotC10EnoylCoAMAT, KmcrotC16EnoylCoAMAT, KmcrotC14EnoylCoAMAT, KmcrotC12EnoylCoAMAT, KmcrotC8EnoylCoAMAT, KmcrotC6EnoylCoAMAT, KmcrotC4EnoylCoAMAT, KmcrotC10HydroxyacylCoAMAT, KmcrotC16HydroxyacylCoAMAT, KmcrotC14HydroxyacylCoAMAT, KmcrotC12HydroxyacylCoAMAT, KmcrotC8HydroxyacylCoAMAT, KmcrotC6HydroxyacylCoAMAT, KmcrotC4HydroxyacylCoAMAT, KicrotC4AcetoacylCoA, Keqcrot, C10EnoylCoAMAT, C16EnoylCoAMAT, C14EnoylCoAMAT, C12EnoylCoAMAT, C8EnoylCoAMAT, C6EnoylCoAMAT, C4EnoylCoAMAT, C10HydroxyacylCoAMAT, C16HydroxyacylCoAMAT, C14HydroxyacylCoAMAT, C12HydroxyacylCoAMAT, C8HydroxyacylCoAMAT, C6HydroxyacylCoAMAT, C4HydroxyacylCoAMAT, C4AcetoacylCoAMAT);  // modifiers: C16EnoylCoAMAT, C14EnoylCoAMAT, C12EnoylCoAMAT, C8EnoylCoAMAT, C6EnoylCoAMAT, C4EnoylCoAMAT, C16HydroxyacylCoAMAT, C14HydroxyacylCoAMAT, C12HydroxyacylCoAMAT, C8HydroxyacylCoAMAT, C6HydroxyacylCoAMAT, C4HydroxyacylCoAMAT, C4AcetoacylCoAMAT
    sfcrotC10 = 0.33 dimensionless;
  vcrotC8: C8EnoylCoAMAT -> C8HydroxyacylCoAMAT; CROT(sfcrotC8, Vcrot, KmcrotC8EnoylCoAMAT, KmcrotC16EnoylCoAMAT, KmcrotC14EnoylCoAMAT, KmcrotC12EnoylCoAMAT, KmcrotC10EnoylCoAMAT, KmcrotC6EnoylCoAMAT, KmcrotC4EnoylCoAMAT, KmcrotC8HydroxyacylCoAMAT, KmcrotC16HydroxyacylCoAMAT, KmcrotC14HydroxyacylCoAMAT, KmcrotC12HydroxyacylCoAMAT, KmcrotC10HydroxyacylCoAMAT, KmcrotC6HydroxyacylCoAMAT, KmcrotC4HydroxyacylCoAMAT, KicrotC4AcetoacylCoA, Keqcrot, C8EnoylCoAMAT, C16EnoylCoAMAT, C14EnoylCoAMAT, C12EnoylCoAMAT, C10EnoylCoAMAT, C6EnoylCoAMAT, C4EnoylCoAMAT, C8HydroxyacylCoAMAT, C16HydroxyacylCoAMAT, C14HydroxyacylCoAMAT, C12HydroxyacylCoAMAT, C10HydroxyacylCoAMAT, C6HydroxyacylCoAMAT, C4HydroxyacylCoAMAT, C4AcetoacylCoAMAT);  // modifiers: C16EnoylCoAMAT, C14EnoylCoAMAT, C12EnoylCoAMAT, C10EnoylCoAMAT, C6EnoylCoAMAT, C4EnoylCoAMAT, C16HydroxyacylCoAMAT, C14HydroxyacylCoAMAT, C12HydroxyacylCoAMAT, C10HydroxyacylCoAMAT, C6HydroxyacylCoAMAT, C4HydroxyacylCoAMAT, C4AcetoacylCoAMAT
    sfcrotC8 = 0.58 dimensionless;
  vcrotC6: C6EnoylCoAMAT -> C6HydroxyacylCoAMAT; CROT(sfcrotC6, Vcrot, KmcrotC6EnoylCoAMAT, KmcrotC16EnoylCoAMAT, KmcrotC14EnoylCoAMAT, KmcrotC12EnoylCoAMAT, KmcrotC10EnoylCoAMAT, KmcrotC8EnoylCoAMAT, KmcrotC4EnoylCoAMAT, KmcrotC6HydroxyacylCoAMAT, KmcrotC16HydroxyacylCoAMAT, KmcrotC14HydroxyacylCoAMAT, KmcrotC12HydroxyacylCoAMAT, KmcrotC10HydroxyacylCoAMAT, KmcrotC8HydroxyacylCoAMAT, KmcrotC4HydroxyacylCoAMAT, KicrotC4AcetoacylCoA, Keqcrot, C6EnoylCoAMAT, C16EnoylCoAMAT, C14EnoylCoAMAT, C12EnoylCoAMAT, C10EnoylCoAMAT, C8EnoylCoAMAT, C4EnoylCoAMAT, C6HydroxyacylCoAMAT, C16HydroxyacylCoAMAT, C14HydroxyacylCoAMAT, C12HydroxyacylCoAMAT, C10HydroxyacylCoAMAT, C8HydroxyacylCoAMAT, C4HydroxyacylCoAMAT, C4AcetoacylCoAMAT);  // modifiers: C16EnoylCoAMAT, C14EnoylCoAMAT, C12EnoylCoAMAT, C10EnoylCoAMAT, C8EnoylCoAMAT, C4EnoylCoAMAT, C16HydroxyacylCoAMAT, C14HydroxyacylCoAMAT, C12HydroxyacylCoAMAT, C10HydroxyacylCoAMAT, C8HydroxyacylCoAMAT, C4HydroxyacylCoAMAT, C4AcetoacylCoAMAT
    sfcrotC6 = 0.83 dimensionless;
  vcrotC4: C4EnoylCoAMAT -> C4HydroxyacylCoAMAT; CROT(sfcrotC4, Vcrot, KmcrotC4EnoylCoAMAT, KmcrotC16EnoylCoAMAT, KmcrotC14EnoylCoAMAT, KmcrotC12EnoylCoAMAT, KmcrotC10EnoylCoAMAT, KmcrotC8EnoylCoAMAT, KmcrotC6EnoylCoAMAT, KmcrotC4HydroxyacylCoAMAT, KmcrotC16HydroxyacylCoAMAT, KmcrotC14HydroxyacylCoAMAT, KmcrotC12HydroxyacylCoAMAT, KmcrotC10HydroxyacylCoAMAT, KmcrotC8HydroxyacylCoAMAT, KmcrotC6HydroxyacylCoAMAT, KicrotC4AcetoacylCoA, Keqcrot, C4EnoylCoAMAT, C16EnoylCoAMAT, C14EnoylCoAMAT, C12EnoylCoAMAT, C10EnoylCoAMAT, C8EnoylCoAMAT, C6EnoylCoAMAT, C4HydroxyacylCoAMAT, C16HydroxyacylCoAMAT, C14HydroxyacylCoAMAT, C12HydroxyacylCoAMAT, C10HydroxyacylCoAMAT, C8HydroxyacylCoAMAT, C6HydroxyacylCoAMAT, C4AcetoacylCoAMAT);  // modifiers: C16EnoylCoAMAT, C14EnoylCoAMAT, C12EnoylCoAMAT, C10EnoylCoAMAT, C8EnoylCoAMAT, C6EnoylCoAMAT, C16HydroxyacylCoAMAT, C14HydroxyacylCoAMAT, C12HydroxyacylCoAMAT, C10HydroxyacylCoAMAT, C8HydroxyacylCoAMAT, C6HydroxyacylCoAMAT, C4AcetoacylCoAMAT
    sfcrotC4 = 1 dimensionless;
  vmschadC16: C16HydroxyacylCoAMAT -> C16KetoacylCoAMAT + NADHMAT; MSCHAD(sfmschadC16, Vmschad, KmmschadC16HydroxyacylCoAMAT, KmmschadC14HydroxyacylCoAMAT, KmmschadC12HydroxyacylCoAMAT, KmmschadC10HydroxyacylCoAMAT, KmmschadC8HydroxyacylCoAMAT, KmmschadC6HydroxyacylCoAMAT, KmmschadC4HydroxyacylCoAMAT, KmmschadNADMAT, KmmschadC16KetoacylCoAMAT, KmmschadC14KetoacylCoAMAT, KmmschadC12KetoacylCoAMAT, KmmschadC10KetoacylCoAMAT, KmmschadC8KetoacylCoAMAT, KmmschadC6KetoacylCoAMAT, KmmschadC4AcetoacylCoAMAT, KmmschadNADHMAT, Keqmschad, C16HydroxyacylCoAMAT, C14HydroxyacylCoAMAT, C12HydroxyacylCoAMAT, C10HydroxyacylCoAMAT, C8HydroxyacylCoAMAT, C6HydroxyacylCoAMAT, C4HydroxyacylCoAMAT, NADtMAT, C16KetoacylCoAMAT, C14KetoacylCoAMAT, C12KetoacylCoAMAT, C10KetoacylCoAMAT, C8KetoacylCoAMAT, C6KetoacylCoAMAT, C4AcetoacylCoAMAT, NADHMAT);  // modifiers: C14HydroxyacylCoAMAT, C12HydroxyacylCoAMAT, C10HydroxyacylCoAMAT, C8HydroxyacylCoAMAT, C6HydroxyacylCoAMAT, C4HydroxyacylCoAMAT, NADtMAT, C14KetoacylCoAMAT, C12KetoacylCoAMAT, C10KetoacylCoAMAT, C8KetoacylCoAMAT, C6KetoacylCoAMAT, C4AcetoacylCoAMAT
    sfmschadC16 = 0.6 dimensionless;
  vmschadC14: C14HydroxyacylCoAMAT -> C14KetoacylCoAMAT + NADHMAT; MSCHAD(sfmschadC14, Vmschad, KmmschadC14HydroxyacylCoAMAT, KmmschadC16HydroxyacylCoAMAT, KmmschadC12HydroxyacylCoAMAT, KmmschadC10HydroxyacylCoAMAT, KmmschadC8HydroxyacylCoAMAT, KmmschadC6HydroxyacylCoAMAT, KmmschadC4HydroxyacylCoAMAT, KmmschadNADMAT, KmmschadC14KetoacylCoAMAT, KmmschadC16KetoacylCoAMAT, KmmschadC12KetoacylCoAMAT, KmmschadC10KetoacylCoAMAT, KmmschadC8KetoacylCoAMAT, KmmschadC6KetoacylCoAMAT, KmmschadC4AcetoacylCoAMAT, KmmschadNADHMAT, Keqmschad, C14HydroxyacylCoAMAT, C16HydroxyacylCoAMAT, C12HydroxyacylCoAMAT, C10HydroxyacylCoAMAT, C8HydroxyacylCoAMAT, C6HydroxyacylCoAMAT, C4HydroxyacylCoAMAT, NADtMAT, C14KetoacylCoAMAT, C16KetoacylCoAMAT, C12KetoacylCoAMAT, C10KetoacylCoAMAT, C8KetoacylCoAMAT, C6KetoacylCoAMAT, C4AcetoacylCoAMAT, NADHMAT);  // modifiers: C16HydroxyacylCoAMAT, C12HydroxyacylCoAMAT, C10HydroxyacylCoAMAT, C8HydroxyacylCoAMAT, C6HydroxyacylCoAMAT, C4HydroxyacylCoAMAT, NADtMAT, C16KetoacylCoAMAT, C12KetoacylCoAMAT, C10KetoacylCoAMAT, C8KetoacylCoAMAT, C6KetoacylCoAMAT, C4AcetoacylCoAMAT
    sfmschadC14 = 0.5 dimensionless;
  vmschadC12: C12HydroxyacylCoAMAT -> C12KetoacylCoAMAT + NADHMAT; MSCHAD(sfmschadC12, Vmschad, KmmschadC12HydroxyacylCoAMAT, KmmschadC16HydroxyacylCoAMAT, KmmschadC14HydroxyacylCoAMAT, KmmschadC10HydroxyacylCoAMAT, KmmschadC8HydroxyacylCoAMAT, KmmschadC6HydroxyacylCoAMAT, KmmschadC4HydroxyacylCoAMAT, KmmschadNADMAT, KmmschadC12KetoacylCoAMAT, KmmschadC16KetoacylCoAMAT, KmmschadC14KetoacylCoAMAT, KmmschadC10KetoacylCoAMAT, KmmschadC8KetoacylCoAMAT, KmmschadC6KetoacylCoAMAT, KmmschadC4AcetoacylCoAMAT, KmmschadNADHMAT, Keqmschad, C12HydroxyacylCoAMAT, C16HydroxyacylCoAMAT, C14HydroxyacylCoAMAT, C10HydroxyacylCoAMAT, C8HydroxyacylCoAMAT, C6HydroxyacylCoAMAT, C4HydroxyacylCoAMAT, NADtMAT, C12KetoacylCoAMAT, C16KetoacylCoAMAT, C14KetoacylCoAMAT, C10KetoacylCoAMAT, C8KetoacylCoAMAT, C6KetoacylCoAMAT, C4AcetoacylCoAMAT, NADHMAT);  // modifiers: C16HydroxyacylCoAMAT, C14HydroxyacylCoAMAT, C10HydroxyacylCoAMAT, C8HydroxyacylCoAMAT, C6HydroxyacylCoAMAT, C4HydroxyacylCoAMAT, NADtMAT, C16KetoacylCoAMAT, C14KetoacylCoAMAT, C10KetoacylCoAMAT, C8KetoacylCoAMAT, C6KetoacylCoAMAT, C4AcetoacylCoAMAT
    sfmschadC12 = 0.43 dimensionless;
  vmschadC10: C10HydroxyacylCoAMAT -> C10KetoacylCoAMAT + NADHMAT; MSCHAD(sfmschadC10, Vmschad, KmmschadC10HydroxyacylCoAMAT, KmmschadC16HydroxyacylCoAMAT, KmmschadC14HydroxyacylCoAMAT, KmmschadC12HydroxyacylCoAMAT, KmmschadC8HydroxyacylCoAMAT, KmmschadC6HydroxyacylCoAMAT, KmmschadC4HydroxyacylCoAMAT, KmmschadNADMAT, KmmschadC10KetoacylCoAMAT, KmmschadC16KetoacylCoAMAT, KmmschadC14KetoacylCoAMAT, KmmschadC12KetoacylCoAMAT, KmmschadC8KetoacylCoAMAT, KmmschadC6KetoacylCoAMAT, KmmschadC4AcetoacylCoAMAT, KmmschadNADHMAT, Keqmschad, C10HydroxyacylCoAMAT, C16HydroxyacylCoAMAT, C14HydroxyacylCoAMAT, C12HydroxyacylCoAMAT, C8HydroxyacylCoAMAT, C6HydroxyacylCoAMAT, C4HydroxyacylCoAMAT, NADtMAT, C10KetoacylCoAMAT, C16KetoacylCoAMAT, C14KetoacylCoAMAT, C12KetoacylCoAMAT, C8KetoacylCoAMAT, C6KetoacylCoAMAT, C4AcetoacylCoAMAT, NADHMAT);  // modifiers: C16HydroxyacylCoAMAT, C14HydroxyacylCoAMAT, C12HydroxyacylCoAMAT, C8HydroxyacylCoAMAT, C6HydroxyacylCoAMAT, C4HydroxyacylCoAMAT, NADtMAT, C16KetoacylCoAMAT, C14KetoacylCoAMAT, C12KetoacylCoAMAT, C8KetoacylCoAMAT, C6KetoacylCoAMAT, C4AcetoacylCoAMAT
    sfmschadC10 = 0.64 dimensionless;
  vmschadC8: C8HydroxyacylCoAMAT -> C8KetoacylCoAMAT + NADHMAT; MSCHAD(sfmschadC8, Vmschad, KmmschadC8HydroxyacylCoAMAT, KmmschadC16HydroxyacylCoAMAT, KmmschadC14HydroxyacylCoAMAT, KmmschadC12HydroxyacylCoAMAT, KmmschadC10HydroxyacylCoAMAT, KmmschadC6HydroxyacylCoAMAT, KmmschadC4HydroxyacylCoAMAT, KmmschadNADMAT, KmmschadC8KetoacylCoAMAT, KmmschadC16KetoacylCoAMAT, KmmschadC14KetoacylCoAMAT, KmmschadC12KetoacylCoAMAT, KmmschadC10KetoacylCoAMAT, KmmschadC6KetoacylCoAMAT, KmmschadC4AcetoacylCoAMAT, KmmschadNADHMAT, Keqmschad, C8HydroxyacylCoAMAT, C16HydroxyacylCoAMAT, C14HydroxyacylCoAMAT, C12HydroxyacylCoAMAT, C10HydroxyacylCoAMAT, C6HydroxyacylCoAMAT, C4HydroxyacylCoAMAT, NADtMAT, C8KetoacylCoAMAT, C16KetoacylCoAMAT, C14KetoacylCoAMAT, C12KetoacylCoAMAT, C10KetoacylCoAMAT, C6KetoacylCoAMAT, C4AcetoacylCoAMAT, NADHMAT);  // modifiers: C16HydroxyacylCoAMAT, C14HydroxyacylCoAMAT, C12HydroxyacylCoAMAT, C10HydroxyacylCoAMAT, C6HydroxyacylCoAMAT, C4HydroxyacylCoAMAT, NADtMAT, C16KetoacylCoAMAT, C14KetoacylCoAMAT, C12KetoacylCoAMAT, C10KetoacylCoAMAT, C6KetoacylCoAMAT, C4AcetoacylCoAMAT
    sfmschadC8 = 0.89 dimensionless;
  vmschadC6: C6HydroxyacylCoAMAT -> C6KetoacylCoAMAT + NADHMAT; MSCHAD(sfmschadC6, Vmschad, KmmschadC6HydroxyacylCoAMAT, KmmschadC16HydroxyacylCoAMAT, KmmschadC14HydroxyacylCoAMAT, KmmschadC12HydroxyacylCoAMAT, KmmschadC10HydroxyacylCoAMAT, KmmschadC8HydroxyacylCoAMAT, KmmschadC4HydroxyacylCoAMAT, KmmschadNADMAT, KmmschadC6KetoacylCoAMAT, KmmschadC16KetoacylCoAMAT, KmmschadC14KetoacylCoAMAT, KmmschadC12KetoacylCoAMAT, KmmschadC10KetoacylCoAMAT, KmmschadC8KetoacylCoAMAT, KmmschadC4AcetoacylCoAMAT, KmmschadNADHMAT, Keqmschad, C6HydroxyacylCoAMAT, C16HydroxyacylCoAMAT, C14HydroxyacylCoAMAT, C12HydroxyacylCoAMAT, C10HydroxyacylCoAMAT, C8HydroxyacylCoAMAT, C4HydroxyacylCoAMAT, NADtMAT, C6KetoacylCoAMAT, C16KetoacylCoAMAT, C14KetoacylCoAMAT, C12KetoacylCoAMAT, C10KetoacylCoAMAT, C8KetoacylCoAMAT, C4AcetoacylCoAMAT, NADHMAT);  // modifiers: C16HydroxyacylCoAMAT, C14HydroxyacylCoAMAT, C12HydroxyacylCoAMAT, C10HydroxyacylCoAMAT, C8HydroxyacylCoAMAT, C4HydroxyacylCoAMAT, NADtMAT, C16KetoacylCoAMAT, C14KetoacylCoAMAT, C12KetoacylCoAMAT, C10KetoacylCoAMAT, C8KetoacylCoAMAT, C4AcetoacylCoAMAT
    sfmschadC6 = 1 dimensionless;
  vmschadC4: C4HydroxyacylCoAMAT -> C4AcetoacylCoAMAT + NADHMAT; MSCHAD(sfmschadC4, Vmschad, KmmschadC4HydroxyacylCoAMAT, KmmschadC16HydroxyacylCoAMAT, KmmschadC14HydroxyacylCoAMAT, KmmschadC12HydroxyacylCoAMAT, KmmschadC10HydroxyacylCoAMAT, KmmschadC8HydroxyacylCoAMAT, KmmschadC6HydroxyacylCoAMAT, KmmschadNADMAT, KmmschadC4AcetoacylCoAMAT, KmmschadC16KetoacylCoAMAT, KmmschadC14KetoacylCoAMAT, KmmschadC12KetoacylCoAMAT, KmmschadC10KetoacylCoAMAT, KmmschadC8KetoacylCoAMAT, KmmschadC6KetoacylCoAMAT, KmmschadNADHMAT, Keqmschad, C4HydroxyacylCoAMAT, C16HydroxyacylCoAMAT, C14HydroxyacylCoAMAT, C12HydroxyacylCoAMAT, C10HydroxyacylCoAMAT, C8HydroxyacylCoAMAT, C6HydroxyacylCoAMAT, NADtMAT, C4AcetoacylCoAMAT, C16KetoacylCoAMAT, C14KetoacylCoAMAT, C12KetoacylCoAMAT, C10KetoacylCoAMAT, C8KetoacylCoAMAT, C6KetoacylCoAMAT, NADHMAT);  // modifiers: C16HydroxyacylCoAMAT, C14HydroxyacylCoAMAT, C12HydroxyacylCoAMAT, C10HydroxyacylCoAMAT, C8HydroxyacylCoAMAT, C6HydroxyacylCoAMAT, NADtMAT, C16KetoacylCoAMAT, C14KetoacylCoAMAT, C12KetoacylCoAMAT, C10KetoacylCoAMAT, C8KetoacylCoAMAT, C6KetoacylCoAMAT
    sfmschadC4 = 0.67 dimensionless;
  vmckatC16: C16KetoacylCoAMAT -> C14AcylCoAMAT + AcetylCoAMAT; MCKATA(sfmckatC16, Vmckat, KmmckatC16KetoacylCoAMAT, KmmckatC14KetoacylCoAMAT, KmmckatC12KetoacylCoAMAT, KmmckatC10KetoacylCoAMAT, KmmckatC8KetoacylCoAMAT, KmmckatC6KetoacylCoAMAT, KmmckatC4AcetoacylCoAMAT, KmmckatCoAMAT, KmmckatC14AcylCoAMAT, KmmckatC16AcylCoAMAT, KmmckatC12AcylCoAMAT, KmmckatC10AcylCoAMAT, KmmckatC8AcylCoAMAT, KmmckatC6AcylCoAMAT, KmmckatC4AcylCoAMAT, KmmckatAcetylCoAMAT, Keqmckat, C16KetoacylCoAMAT, C14KetoacylCoAMAT, C12KetoacylCoAMAT, C10KetoacylCoAMAT, C8KetoacylCoAMAT, C6KetoacylCoAMAT, C4AcetoacylCoAMAT, CoAMAT, C14AcylCoAMAT, C16AcylCoAMAT, C12AcylCoAMAT, C10AcylCoAMAT, C8AcylCoAMAT, C6AcylCoAMAT, C4AcylCoAMAT, AcetylCoAMAT);  // modifiers: C14KetoacylCoAMAT, C12KetoacylCoAMAT, C10KetoacylCoAMAT, C8KetoacylCoAMAT, C6KetoacylCoAMAT, C4AcetoacylCoAMAT, CoAMAT, C16AcylCoAMAT, C12AcylCoAMAT, C10AcylCoAMAT, C8AcylCoAMAT, C6AcylCoAMAT, C4AcylCoAMAT
    sfmckatC16 = 0 dimensionless;
  vmckatC14: C14KetoacylCoAMAT -> C12AcylCoAMAT + AcetylCoAMAT; MCKATA(sfmckatC14, Vmckat, KmmckatC14KetoacylCoAMAT, KmmckatC16KetoacylCoAMAT, KmmckatC12KetoacylCoAMAT, KmmckatC10KetoacylCoAMAT, KmmckatC8KetoacylCoAMAT, KmmckatC6KetoacylCoAMAT, KmmckatC4AcetoacylCoAMAT, KmmckatCoAMAT, KmmckatC12AcylCoAMAT, KmmckatC16AcylCoAMAT, KmmckatC14AcylCoAMAT, KmmckatC10AcylCoAMAT, KmmckatC8AcylCoAMAT, KmmckatC6AcylCoAMAT, KmmckatC4AcylCoAMAT, KmmckatAcetylCoAMAT, Keqmckat, C14KetoacylCoAMAT, C16KetoacylCoAMAT, C12KetoacylCoAMAT, C10KetoacylCoAMAT, C8KetoacylCoAMAT, C6KetoacylCoAMAT, C4AcetoacylCoAMAT, CoAMAT, C12AcylCoAMAT, C16AcylCoAMAT, C14AcylCoAMAT, C10AcylCoAMAT, C8AcylCoAMAT, C6AcylCoAMAT, C4AcylCoAMAT, AcetylCoAMAT);  // modifiers: C16KetoacylCoAMAT, C12KetoacylCoAMAT, C10KetoacylCoAMAT, C8KetoacylCoAMAT, C6KetoacylCoAMAT, C4AcetoacylCoAMAT, CoAMAT, C16AcylCoAMAT, C14AcylCoAMAT, C10AcylCoAMAT, C8AcylCoAMAT, C6AcylCoAMAT, C4AcylCoAMAT
    sfmckatC14 = 0.2 dimensionless;
  vmckatC12: C12KetoacylCoAMAT -> C10AcylCoAMAT + AcetylCoAMAT; MCKATA(sfmckatC12, Vmckat, KmmckatC12KetoacylCoAMAT, KmmckatC16KetoacylCoAMAT, KmmckatC14KetoacylCoAMAT, KmmckatC10KetoacylCoAMAT, KmmckatC8KetoacylCoAMAT, KmmckatC6KetoacylCoAMAT, KmmckatC4AcetoacylCoAMAT, KmmckatCoAMAT, KmmckatC10AcylCoAMAT, KmmckatC16AcylCoAMAT, KmmckatC14AcylCoAMAT, KmmckatC12AcylCoAMAT, KmmckatC8AcylCoAMAT, KmmckatC6AcylCoAMAT, KmmckatC4AcylCoAMAT, KmmckatAcetylCoAMAT, Keqmckat, C12KetoacylCoAMAT, C16KetoacylCoAMAT, C14KetoacylCoAMAT, C10KetoacylCoAMAT, C8KetoacylCoAMAT, C6KetoacylCoAMAT, C4AcetoacylCoAMAT, CoAMAT, C10AcylCoAMAT, C16AcylCoAMAT, C14AcylCoAMAT, C12AcylCoAMAT, C8AcylCoAMAT, C6AcylCoAMAT, C4AcylCoAMAT, AcetylCoAMAT);  // modifiers: C16KetoacylCoAMAT, C14KetoacylCoAMAT, C10KetoacylCoAMAT, C8KetoacylCoAMAT, C6KetoacylCoAMAT, C4AcetoacylCoAMAT, CoAMAT, C16AcylCoAMAT, C14AcylCoAMAT, C12AcylCoAMAT, C8AcylCoAMAT, C6AcylCoAMAT, C4AcylCoAMAT
    sfmckatC12 = 0.38 dimensionless;
  vmckatC10: C10KetoacylCoAMAT -> C8AcylCoAMAT + AcetylCoAMAT; MCKATA(sfmckatC10, Vmckat, KmmckatC10KetoacylCoAMAT, KmmckatC16KetoacylCoAMAT, KmmckatC14KetoacylCoAMAT, KmmckatC12KetoacylCoAMAT, KmmckatC8KetoacylCoAMAT, KmmckatC6KetoacylCoAMAT, KmmckatC4AcetoacylCoAMAT, KmmckatCoAMAT, KmmckatC8AcylCoAMAT, KmmckatC16AcylCoAMAT, KmmckatC14AcylCoAMAT, KmmckatC12AcylCoAMAT, KmmckatC10AcylCoAMAT, KmmckatC6AcylCoAMAT, KmmckatC4AcylCoAMAT, KmmckatAcetylCoAMAT, Keqmckat, C10KetoacylCoAMAT, C16KetoacylCoAMAT, C14KetoacylCoAMAT, C12KetoacylCoAMAT, C8KetoacylCoAMAT, C6KetoacylCoAMAT, C4AcetoacylCoAMAT, CoAMAT, C8AcylCoAMAT, C16AcylCoAMAT, C14AcylCoAMAT, C12AcylCoAMAT, C10AcylCoAMAT, C6AcylCoAMAT, C4AcylCoAMAT, AcetylCoAMAT);  // modifiers: C16KetoacylCoAMAT, C14KetoacylCoAMAT, C12KetoacylCoAMAT, C8KetoacylCoAMAT, C6KetoacylCoAMAT, C4AcetoacylCoAMAT, CoAMAT, C16AcylCoAMAT, C14AcylCoAMAT, C12AcylCoAMAT, C10AcylCoAMAT, C6AcylCoAMAT, C4AcylCoAMAT
    sfmckatC10 = 0.65 dimensionless;
  vmckatC8: C8KetoacylCoAMAT -> C6AcylCoAMAT + AcetylCoAMAT; MCKATA(sfmckatC8, Vmckat, KmmckatC8KetoacylCoAMAT, KmmckatC16KetoacylCoAMAT, KmmckatC14KetoacylCoAMAT, KmmckatC12KetoacylCoAMAT, KmmckatC10KetoacylCoAMAT, KmmckatC6KetoacylCoAMAT, KmmckatC4AcetoacylCoAMAT, KmmckatCoAMAT, KmmckatC6AcylCoAMAT, KmmckatC16AcylCoAMAT, KmmckatC14AcylCoAMAT, KmmckatC12AcylCoAMAT, KmmckatC10AcylCoAMAT, KmmckatC8AcylCoAMAT, KmmckatC4AcylCoAMAT, KmmckatAcetylCoAMAT, Keqmckat, C8KetoacylCoAMAT, C16KetoacylCoAMAT, C14KetoacylCoAMAT, C12KetoacylCoAMAT, C10KetoacylCoAMAT, C6KetoacylCoAMAT, C4AcetoacylCoAMAT, CoAMAT, C6AcylCoAMAT, C16AcylCoAMAT, C14AcylCoAMAT, C12AcylCoAMAT, C10AcylCoAMAT, C8AcylCoAMAT, C4AcylCoAMAT, AcetylCoAMAT);  // modifiers: C16KetoacylCoAMAT, C14KetoacylCoAMAT, C12KetoacylCoAMAT, C10KetoacylCoAMAT, C6KetoacylCoAMAT, C4AcetoacylCoAMAT, CoAMAT, C16AcylCoAMAT, C14AcylCoAMAT, C12AcylCoAMAT, C10AcylCoAMAT, C8AcylCoAMAT, C4AcylCoAMAT
    sfmckatC8 = 0.81 dimensionless;
  vmckatC6: C6KetoacylCoAMAT -> C4AcylCoAMAT + AcetylCoAMAT; MCKATA(sfmckatC6, Vmckat, KmmckatC6KetoacylCoAMAT, KmmckatC16KetoacylCoAMAT, KmmckatC14KetoacylCoAMAT, KmmckatC12KetoacylCoAMAT, KmmckatC10KetoacylCoAMAT, KmmckatC8KetoacylCoAMAT, KmmckatC4AcetoacylCoAMAT, KmmckatCoAMAT, KmmckatC4AcylCoAMAT, KmmckatC16AcylCoAMAT, KmmckatC14AcylCoAMAT, KmmckatC12AcylCoAMAT, KmmckatC10AcylCoAMAT, KmmckatC8AcylCoAMAT, KmmckatC6AcylCoAMAT, KmmckatAcetylCoAMAT, Keqmckat, C6KetoacylCoAMAT, C16KetoacylCoAMAT, C14KetoacylCoAMAT, C12KetoacylCoAMAT, C10KetoacylCoAMAT, C8KetoacylCoAMAT, C4AcetoacylCoAMAT, CoAMAT, C4AcylCoAMAT, C16AcylCoAMAT, C14AcylCoAMAT, C12AcylCoAMAT, C10AcylCoAMAT, C8AcylCoAMAT, C6AcylCoAMAT, AcetylCoAMAT);  // modifiers: C16KetoacylCoAMAT, C14KetoacylCoAMAT, C12KetoacylCoAMAT, C10KetoacylCoAMAT, C8KetoacylCoAMAT, C4AcetoacylCoAMAT, CoAMAT, C16AcylCoAMAT, C14AcylCoAMAT, C12AcylCoAMAT, C10AcylCoAMAT, C8AcylCoAMAT, C6AcylCoAMAT
    sfmckatC6 = 1 dimensionless;
  vmckatC4: C4AcetoacylCoAMAT -> 2 AcetylCoAMAT; MCKATB(sfmckatC4, Vmckat, KmmckatC4AcetoacylCoAMAT, KmmckatC16KetoacylCoAMAT, KmmckatC14KetoacylCoAMAT, KmmckatC12KetoacylCoAMAT, KmmckatC10KetoacylCoAMAT, KmmckatC8KetoacylCoAMAT, KmmckatC6KetoacylCoAMAT, KmmckatCoAMAT, KmmckatC4AcylCoAMAT, KmmckatC16AcylCoAMAT, KmmckatC14AcylCoAMAT, KmmckatC12AcylCoAMAT, KmmckatC10AcylCoAMAT, KmmckatC8AcylCoAMAT, KmmckatC6AcylCoAMAT, KmmckatAcetylCoAMAT, Keqmckat, C4AcetoacylCoAMAT, C16KetoacylCoAMAT, C14KetoacylCoAMAT, C12KetoacylCoAMAT, C10KetoacylCoAMAT, C8KetoacylCoAMAT, C6KetoacylCoAMAT, CoAMAT, C4AcylCoAMAT, C16AcylCoAMAT, C14AcylCoAMAT, C12AcylCoAMAT, C10AcylCoAMAT, C8AcylCoAMAT, C6AcylCoAMAT, AcetylCoAMAT);  // modifiers: C16KetoacylCoAMAT, C14KetoacylCoAMAT, C12KetoacylCoAMAT, C10KetoacylCoAMAT, C8KetoacylCoAMAT, C6KetoacylCoAMAT, CoAMAT, C4AcylCoAMAT, C16AcylCoAMAT, C14AcylCoAMAT, C12AcylCoAMAT, C10AcylCoAMAT, C8AcylCoAMAT, C6AcylCoAMAT
    sfmckatC4 = 0.49 dimensionless;
  vmtpC16: C16EnoylCoAMAT -> C14AcylCoAMAT + AcetylCoAMAT + NADHMAT; MTP(sfmtpC16, Vmtp, KmmtpC16EnoylCoAMAT, KmmtpC14EnoylCoAMAT, KmmtpC12EnoylCoAMAT, KmmtpC10EnoylCoAMAT, KmmtpC8EnoylCoAMAT, KmmtpNADMAT, KmmtpCoAMAT, KmmtpC14AcylCoAMAT, KmmtpC16AcylCoAMAT, KmmtpC12AcylCoAMAT, KmmtpC10AcylCoAMAT, KmmtpC8AcylCoAMAT, KmmtpC6AcylCoAMAT, KmmtpNADHMAT, KmmtpAcetylCoAMAT, KicrotC4AcetoacylCoA, Keqmtp, C16EnoylCoAMAT, C14EnoylCoAMAT, C12EnoylCoAMAT, C10EnoylCoAMAT, C8EnoylCoAMAT, NADtMAT, CoAMAT, C14AcylCoAMAT, C16AcylCoAMAT, C12AcylCoAMAT, C10AcylCoAMAT, C8AcylCoAMAT, C6AcylCoAMAT, NADHMAT, AcetylCoAMAT, C4AcetoacylCoAMAT);  // modifiers: C14EnoylCoAMAT, C12EnoylCoAMAT, C10EnoylCoAMAT, C8EnoylCoAMAT, NADtMAT, CoAMAT, C16AcylCoAMAT, C12AcylCoAMAT, C10AcylCoAMAT, C8AcylCoAMAT, C6AcylCoAMAT, C4AcetoacylCoAMAT
    sfmtpC16 = 1 dimensionless;
  vmtpC14: C14EnoylCoAMAT -> C12AcylCoAMAT + AcetylCoAMAT + NADHMAT; MTP(sfmtpC14, Vmtp, KmmtpC14EnoylCoAMAT, KmmtpC16EnoylCoAMAT, KmmtpC12EnoylCoAMAT, KmmtpC10EnoylCoAMAT, KmmtpC8EnoylCoAMAT, KmmtpNADMAT, KmmtpCoAMAT, KmmtpC12AcylCoAMAT, KmmtpC16AcylCoAMAT, KmmtpC14AcylCoAMAT, KmmtpC10AcylCoAMAT, KmmtpC8AcylCoAMAT, KmmtpC6AcylCoAMAT, KmmtpNADHMAT, KmmtpAcetylCoAMAT, KicrotC4AcetoacylCoA, Keqmtp, C14EnoylCoAMAT, C16EnoylCoAMAT, C12EnoylCoAMAT, C10EnoylCoAMAT, C8EnoylCoAMAT, NADtMAT, CoAMAT, C12AcylCoAMAT, C16AcylCoAMAT, C14AcylCoAMAT, C10AcylCoAMAT, C8AcylCoAMAT, C6AcylCoAMAT, NADHMAT, AcetylCoAMAT, C4AcetoacylCoAMAT);  // modifiers: C16EnoylCoAMAT, C12EnoylCoAMAT, C10EnoylCoAMAT, C8EnoylCoAMAT, NADtMAT, CoAMAT, C16AcylCoAMAT, C14AcylCoAMAT, C10AcylCoAMAT, C8AcylCoAMAT, C6AcylCoAMAT, C4AcetoacylCoAMAT
    sfmtpC14 = 0.9 dimensionless;
  vmtpC12: C12EnoylCoAMAT -> C10AcylCoAMAT + AcetylCoAMAT + NADHMAT; MTP(sfmtpC12, Vmtp, KmmtpC12EnoylCoAMAT, KmmtpC16EnoylCoAMAT, KmmtpC14EnoylCoAMAT, KmmtpC10EnoylCoAMAT, KmmtpC8EnoylCoAMAT, KmmtpNADMAT, KmmtpCoAMAT, KmmtpC10AcylCoAMAT, KmmtpC16AcylCoAMAT, KmmtpC14AcylCoAMAT, KmmtpC12AcylCoAMAT, KmmtpC8AcylCoAMAT, KmmtpC6AcylCoAMAT, KmmtpNADHMAT, KmmtpAcetylCoAMAT, KicrotC4AcetoacylCoA, Keqmtp, C12EnoylCoAMAT, C16EnoylCoAMAT, C14EnoylCoAMAT, C10EnoylCoAMAT, C8EnoylCoAMAT, NADtMAT, CoAMAT, C10AcylCoAMAT, C16AcylCoAMAT, C14AcylCoAMAT, C12AcylCoAMAT, C8AcylCoAMAT, C6AcylCoAMAT, NADHMAT, AcetylCoAMAT, C4AcetoacylCoAMAT);  // modifiers: C16EnoylCoAMAT, C14EnoylCoAMAT, C10EnoylCoAMAT, C8EnoylCoAMAT, NADtMAT, CoAMAT, C16AcylCoAMAT, C14AcylCoAMAT, C12AcylCoAMAT, C8AcylCoAMAT, C6AcylCoAMAT, C4AcetoacylCoAMAT
    sfmtpC12 = 0.81 dimensionless;
  vmtpC10: C10EnoylCoAMAT -> C8AcylCoAMAT + AcetylCoAMAT + NADHMAT; MTP(sfmtpC10, Vmtp, KmmtpC10EnoylCoAMAT, KmmtpC16EnoylCoAMAT, KmmtpC14EnoylCoAMAT, KmmtpC12EnoylCoAMAT, KmmtpC8EnoylCoAMAT, KmmtpNADMAT, KmmtpCoAMAT, KmmtpC8AcylCoAMAT, KmmtpC16AcylCoAMAT, KmmtpC14AcylCoAMAT, KmmtpC12AcylCoAMAT, KmmtpC10AcylCoAMAT, KmmtpC6AcylCoAMAT, KmmtpNADHMAT, KmmtpAcetylCoAMAT, KicrotC4AcetoacylCoA, Keqmtp, C10EnoylCoAMAT, C16EnoylCoAMAT, C14EnoylCoAMAT, C12EnoylCoAMAT, C8EnoylCoAMAT, NADtMAT, CoAMAT, C8AcylCoAMAT, C16AcylCoAMAT, C14AcylCoAMAT, C12AcylCoAMAT, C10AcylCoAMAT, C6AcylCoAMAT, NADHMAT, AcetylCoAMAT, C4AcetoacylCoAMAT);  // modifiers: C16EnoylCoAMAT, C14EnoylCoAMAT, C12EnoylCoAMAT, C8EnoylCoAMAT, NADtMAT, CoAMAT, C16AcylCoAMAT, C14AcylCoAMAT, C12AcylCoAMAT, C10AcylCoAMAT, C6AcylCoAMAT, C4AcetoacylCoAMAT
    sfmtpC10 = 0.73 dimensionless;
  vmtpC8: C8EnoylCoAMAT -> C6AcylCoAMAT + AcetylCoAMAT + NADHMAT; MTP(sfmtpC8, Vmtp, KmmtpC8EnoylCoAMAT, KmmtpC16EnoylCoAMAT, KmmtpC14EnoylCoAMAT, KmmtpC12EnoylCoAMAT, KmmtpC10EnoylCoAMAT, KmmtpNADMAT, KmmtpCoAMAT, KmmtpC6AcylCoAMAT, KmmtpC16AcylCoAMAT, KmmtpC14AcylCoAMAT, KmmtpC12AcylCoAMAT, KmmtpC10AcylCoAMAT, KmmtpC8AcylCoAMAT, KmmtpNADHMAT, KmmtpAcetylCoAMAT, KicrotC4AcetoacylCoA, Keqmtp, C8EnoylCoAMAT, C16EnoylCoAMAT, C14EnoylCoAMAT, C12EnoylCoAMAT, C10EnoylCoAMAT, NADtMAT, CoAMAT, C6AcylCoAMAT, C16AcylCoAMAT, C14AcylCoAMAT, C12AcylCoAMAT, C10AcylCoAMAT, C8AcylCoAMAT, NADHMAT, AcetylCoAMAT, C4AcetoacylCoAMAT);  // modifiers: C16EnoylCoAMAT, C14EnoylCoAMAT, C12EnoylCoAMAT, C10EnoylCoAMAT, NADtMAT, CoAMAT, C16AcylCoAMAT, C14AcylCoAMAT, C12AcylCoAMAT, C10AcylCoAMAT, C8AcylCoAMAT, C4AcetoacylCoAMAT
    sfmtpC8 = 0.34 dimensionless;
  vacesink: AcetylCoAMAT -> ; RES(Ksacesink, AcetylCoAMAT, K1acesink);
    K1acesink = 30 uM; Ksacesink = 6000000 l_per_min_per_mgProtein;
  vfadhsink: FADHMAT -> ; RES(Ksfadhsink, FADHMAT, K1fadhsink);
    K1fadhsink = 0.46 uM; Ksfadhsink = 6000000 l_per_min_per_mgProtein;
  vnadhsink: NADHMAT -> ; RES(Ksnadhsink, NADHMAT, K1nadhsink);
    K1nadhsink = 16 uM; Ksnadhsink = 6000000 l_per_min_per_mgProtein;

  // Unit definitions:
  unit substance = 1e-6 mole; substance is "umol";
  unit time = 60 second; time is "min";
  unit volume = litre; volume is "litre per mgProtein";
  unit uM = 1e-6 mole / litre;
  unit uM_per_min_per_mgProtein = 1e-6 mole / (litre * 60 second);
  unit l_per_min_per_mgProtein = litre / (60 second);
end
