// SBML level 2 version 4

model PFKL()

  // Compartments:
  compartment default = 1 volume;

  // Species:
  substanceOnly species $PFKL in default = 1.235571;
  substanceOnly species FBPase in default = 1;
  substanceOnly species F6P in default = 14.07743;
  substanceOnly species F1_6BP in default = 104.0724; F1_6BP is "F1,6BP";
  substanceOnly species PEP in default = 108.0945;
  substanceOnly species Isocitrate in default = 1.794872;
  substanceOnly species _2_oxoglutarate in default = 25.18854; _2_oxoglutarate is "2-oxoglutarate";
  substanceOnly species Malate in default = 68.87883;
  substanceOnly species F2_6BP in default = 1; F2_6BP is "F2,6BP";
  substanceOnly species Citrate in default = 17.74761;
  species sa4_degraded in default = 0;
  substanceOnly species ALDO in default = 1;
  species sa8_degraded in default = 0;
  species sa7_degraded in default = 0;
  species sa5_degraded in default = 0;
  species sa6_degraded in default = 0;
  species sa9_degraded in default = 0;
  species sa3_degraded in default = 0;
  species sa10_degraded in default = 0;
  substanceOnly species IR_complex in default = 37.81915;
  substanceOnly species $pro_IR_complex in default = 46.22225;
  substanceOnly species p1IR_complex in default = 2.507671;
  substanceOnly species p2IR_complex in default = 852.608418;
  substanceOnly species p1p2IRcomplex in default = 3.930696;
  substanceOnly species $AKT in default = 4.338122;
  substanceOnly species pAKT in default = 0.012942682;
  substanceOnly species $mTOR in default = 0.09591637;
  substanceOnly species pmTOR in default = 0.004015031;
  substanceOnly species $S6K in default = 2.776994;
  substanceOnly species pS6K in default = 0.000988831;
  substanceOnly species $X in default = 14.99133;
  substanceOnly species pX in default = 0.043352951;
  species sa28_degraded in default = 0;
  species sa27_degraded in default = 0;
  species sa26_degraded in default = 0;
  substanceOnly species pPFKL in default = 0.759332005;
  substanceOnly species $F6P_proxy in default;

  // Parameters:
  K_FBPase_cit = 0.0211646 dimensionless;
  K_FBPase_f16bp = 0.104089638 dimensionless;
  K_FBPase_f26bp = 17.51744 dimensionless;
  K_PFKL_PHOS_S775 = 6.283706 dimensionless;
  K_PFKL_akg = 24661.01 dimensionless;
  K_PFKL_cit = 41.30426 dimensionless;
  K_PFKL_f26bp = 1.282443 dimensionless;
  K_PFKL_f6p = 0.014114844 dimensionless;
  K_PFKL_icit = 1784.508 dimensionless;
  K_PFKL_mal = 9.544729 dimensionless;
  K_PFKL_pep = 0.633518366 dimensionless;
  Vf_FBPase = 9.932861 dimensionless;
  Vf_PFKL = 695063.7 dimensionless;
  k_ALDO = 0.008187906 dimensionless;
  k_mal = 4.022122 substance;
  k_akg = -4.223228 substance;
  k_pep = 43.23781 substance;
  k_icit = -0.1112368 substance;
  k_f26bp = -0.181345338 substance;
  k_cit = -0.6535948 substance;
  k_f6p = 0.5027652 dimensionless;
  insulin = 0.01 dimensionless;

  // Assignment rules:
  F6P_proxy := F6P;

  // Reactions:
  re1: $F6P_proxy => F1_6BP; F2_6BP/(K_PFKL_f26bp + F2_6BP)*(K_PFKL_akg/(K_PFKL_akg + _2_oxoglutarate))*(K_PFKL_pep/(K_PFKL_pep + PEP))*(K_PFKL_cit/(K_PFKL_cit + Citrate))*(K_PFKL_icit/(K_PFKL_icit + Isocitrate))*(K_PFKL_mal/(K_PFKL_mal + Malate))*(pPFKL/(K_PFKL_PHOS_S775 + pPFKL))*(Vf_PFKL*F6P_proxy/(K_PFKL_f6p + F6P_proxy));  // modifiers: PFKL, PEP, Isocitrate, _2_oxoglutarate, Malate, F2_6BP, Citrate, pPFKL
  re2: F1_6BP => $F6P_proxy; K_FBPase_f26bp/(K_FBPase_f26bp + F2_6BP)*(Citrate/(K_FBPase_cit + Citrate))*(Vf_FBPase*F1_6BP/(K_FBPase_f16bp + F1_6BP));  // modifiers: FBPase, F2_6BP, Citrate
  re3: F1_6BP => sa4_degraded; k_ALDO*F1_6BP;  // modifiers: ALDO
  re4: Malate => sa8_degraded; -k_mal;
  re5: _2_oxoglutarate => sa7_degraded; -k_akg;
  re6: PEP => sa5_degraded; -k_pep;
  re7: Isocitrate => sa6_degraded; -k_icit;
  re8: F2_6BP => sa9_degraded; -k_f26bp;
  re9: Citrate => sa10_degraded; -k_cit;
  re11: F6P => sa3_degraded; -k_f6p;
  re13: $pro_IR_complex => IR_complex; re13_k1*(pro_IR_complex - IR_complex);
    re13_k1 = 0.04779859 dimensionless;
  re14: IR_complex -> p1IR_complex; re14_k1*insulin*IR_complex - re14_k2*p1IR_complex;
    re14_k1 = 7.781608 dimensionless; re14_k2 = 1.611475 dimensionless;
  re15: IR_complex => p2IR_complex; re15_k1*IR_complex*pmTOR;  // modifiers: pmTOR
    re15_k1 = 9.933112 dimensionless;
  re16: p2IR_complex -> p1p2IRcomplex; re16_k1*insulin*p2IR_complex - re16_k2*p1p2IRcomplex;
    re16_k1 = 0.3630303 dimensionless; re16_k2 = 0.4081279 dimensionless;
  re17: p1IR_complex => p1p2IRcomplex; re17_k1*p1IR_complex*pmTOR;  // modifiers: pmTOR
    re17_k1 = 3.88249e-5 dimensionless;
  re18: p1p2IRcomplex => p1IR_complex; re18_k1*p1p2IRcomplex;
    re18_k1 = 0.284426 dimensionless;
  re19: p2IR_complex => IR_complex; re19_k1*p2IR_complex;
    re19_k1 = 1e-5 dimensionless;
  re20: p1p2IRcomplex => sa28_degraded; re20_k1*p1p2IRcomplex;
    re20_k1 = 0.09489603 dimensionless;
  re21: $AKT => pAKT; re21_k1*(AKT - pAKT)*p1IR_complex;  // modifiers: p1IR_complex
    re21_k1 = 0.009195789 dimensionless;
  re22: pAKT => $AKT; re22_k1*pAKT;
    re22_k1 = 7.706185 dimensionless;
  re23: p2IR_complex => sa27_degraded; re23_k1*p2IR_complex;
    re23_k1 = 1.002778e-5 dimensionless;
  re24: p1IR_complex => sa26_degraded; re24_k1*p1IR_complex;
    re24_k1 = 0.007927176 substance;
  re25: $mTOR => pmTOR; re25_k1*(mTOR - pmTOR)*pAKT;  // modifiers: pAKT
    re25_k1 = 0.4196824 dimensionless;
  re26: pmTOR => $mTOR; re26_k1*pmTOR;
    re26_k1 = 0.1243305 dimensionless;
  re27: $S6K => pS6K; re27_k1*(S6K - pS6K)*pmTOR;  // modifiers: pmTOR
    re27_k1 = 0.007524646 dimensionless;
  re28: pS6K => $S6K; re28_k1*pS6K*pX;  // modifiers: pX
    re28_k1 = 1.954976 dimensionless;
  re29: $X => pX; re29_k1*(X - pX)*pmTOR;  // modifiers: pmTOR
    re29_k1 = 0.001053424 dimensionless;
  re30: pX => $X; re30_k1*pX;
    re30_k1 = 0.001458116 substance;
  re31: $PFKL => pPFKL; re31_k1*(PFKL - pPFKL)*pS6K;  // modifiers: pS6K
    re31_k1 = 26.83167 dimensionless;
  re32: pPFKL => $PFKL; re32_k1*pPFKL;
    re32_k1 = 0.01665251 dimensionless;

  // Events:
  ev2min: at (time > 2): k_akg = -1.432881, k_cit = 0.1508296, k_f6p = 2.362996, k_icit = 0, k_f26bp = 0.010962773, k_mal = -6.033183, k_pep = 1.508296;
  ev5min: at (time > 5): k_akg = -0.2714932, k_cit = -0.2714932, k_f6p = 1.628959, k_icit = 0.01131222, k_f26bp = 0.034852204, k_mal = 0, k_pep = -4.524887;
  ev10min: at (time > 10): k_akg = 0, k_cit = 0.060331825, k_f6p = -1.900452, k_icit = -0.011312217, k_f26bp = -0.031487108, k_mal = 2.714932, k_pep = 0.904977376;
  ev15min: at (time > 15): k_akg = 0.090497738, k_cit = 0.2413273, k_f6p = 0.693815988, k_icit = -0.002262443, k_f26bp = 0.083691707, k_mal = 0, k_pep = -2.413273;
  ev20min: at (time > 20): k_akg = 0.113122172, k_cit = 0.090497738, k_f6p = -0.090497738, k_icit = -0.033936652, k_f26bp = -0.010719796, k_mal = 0.60331825, k_pep = -2.865762;
  ev30min: at (time > 30): k_akg = 0.263951735, k_cit = 0.135746606, k_f6p = -0.09552539, k_icit = 0.011689291, k_f26bp = -0.003477353, k_mal = 0.351935646, k_pep = -0.301659125;
  ev45min: at (time > 45): k_akg = 0.263951735, k_cit = 0.135746606, k_f6p = -0.09552539, k_icit = 0.011689291, k_f26bp = -0.003477353, k_mal = 0.351935646, k_pep = -0.301659125;

  // Unit definitions:
  unit substance = 1e-6 mole;
  unit volume = litre;
  unit area = metre^2;
  unit length = metre;
  unit time = 60 second;
end
