// SBML level 2 version 4
// dcterms:bibliographicCitation: urn:miriam:pubmed:16709736

model Holmes2006___Muscle_Contraction()
  // Holmes2006 - Hill's model of muscle contraction
  // This model is described in the article:
  // Teaching from classic papers: Hill's model of muscle contraction.
  // Holmes JW.
  // Adv Physiol Educ 2006 Jun; 30(2): 67-72
  // Abstract:
  // A. V. Hill's 1938 paper "The heat of shortening and the dynamic constants of muscle" is an enduring classic, presenting detailed methods, meticulous experiments, and the model of muscle contraction that now bears Hill's name. Pairing a simulation based on Hill's model with a reading of his paper allows students to follow his thought process to discover key principles of muscle physiology and gain insight into how to develop quantitative models of physiological processes. In this article, the experience of the author using this approach in a graduate biomedical engineering course is outlined, along with suggestions for adapting this approach to other audiences.
  // This model is hosted on BioModels Database and identified by: BIOMD0000000677.
  // To cite BioModels Database, please use: Chelliah V et al. BioModels: ten-year anniversary. Nucl. Acids Res. 2015, 43(Database issue):D542-8.
  // To the extent possible under law, all copyright and related or neighbouring rights to this encoded model have been dedicated to the public domain worldwide. Please refer to CC0 Public Domain Dedication for more information.
  // biomodels.db:MODEL1006230007
  // biomodels.db:BIOMD0000000677
  // isDescribedBy pubmed:16709736
  // biomodels.db:MODEL1006230007
  // isVersionOf GO:0006936
  // isDescribedBy pubmed:16709736

  // Compartments:
  compartment Compartment = 1;

  // Parameters:
  L_ce = 0.7;
  alpha = 1449.027;
  a = 37.24;
  b = 0.325;
  P_0 = 144.9;
  Initial_for_L_se = L_se;

  // Assignment rules:
  L := piecewise(1, time < 2, 0.95);
  L_se := L - L_ce;
  P := alpha*(L_se - Initial_for_L_se);
  v_ce := b*(P - P_0)/(P + a);

  // Rate rules:
  L_ce' = v_ce;

  // Unit definitions:
  unit volume = 1e-3 litre;
  unit substance = item;
end
