// SBML level 2 version 4
// dcterms:bibliographicCitation: urn:miriam:pubmed:28184200

function Function_for_R_7(AId, apopFBL, compartmentOne, k3, rhoTr, xFinal_9)
  (AId*k3*xFinal_9*(rhoTr/(1 - AId)) + apopFBL*xFinal_9)/compartmentOne;
end

function Function_for_R_6(compartmentOne, k2a, rhoTA, xFinal_8)
  k2a*rhoTA*xFinal_8/compartmentOne;
end

function Function_for_R_10(compartmentOne, k1ah, rhoSC, xFinal_7)
  k1ah*rhoSC*xFinal_7/compartmentOne;
end

function Function_for_R_3(compartmentOne, k3, rhoTr, xFinal_9)
  k3*rhoTr*xFinal_9/compartmentOne;
end

function Function_for_R_1(compartmentOne, k4, rhoTr, xFinal_10)
  k4*rhoTr*xFinal_10/compartmentOne;
end

function Function_for_R_2(alpha, apopFBL, compartmentOne, rhoDe, xFinal_12)
  (alpha*rhoDe*xFinal_12 + apopFBL*xFinal_12)/compartmentOne;
end

function Function_for_R_5(compartmentOne, k2s, rhoTA, xFinal_8)
  k2s*rhoTA*xFinal_8/compartmentOne;
end

function Function_for_R_4(AId, apopFBL, compartmentOne, k4, rhoTr, xFinal_10)
  (AId*k4*xFinal_10*(rhoTr/(1 - AId)) + apopFBL*xFinal_10)/compartmentOne;
end

function Function_for_R_12(AId, apopFBL, compartmentOne, k2s, rhoTA, xFinal_8)
  (AId*k2s*xFinal_8*(rhoTA/(1 - AId)) + apopFBL*xFinal_8)/compartmentOne;
end

function Function_for_R_14(aProl, bProl, compartmentOne, doseBL, gamma1h, rhoSC, xFinal_7)
  aProl*gamma1h*rhoSC*exp(bProl*doseBL)*xFinal_7/compartmentOne;
end

function Function_for_R_13(compartmentOne, km1, xFinal_8)
  km1*xFinal_8/compartmentOne;
end

function Function_for_R_19(compartmentOne, k4, xFinal_4)
  k4*xFinal_4/compartmentOne;
end

function Function_for_R_8(compartmentOne, km2, xFinal_9)
  km2*xFinal_9/compartmentOne;
end

function Function_for_R_9(compartmentOne, k1sh, rhoSC, xFinal_7)
  k1sh*rhoSC*xFinal_7/compartmentOne;
end

function Function_for_R_11(aProl, bProl, compartmentOne, doseBL, gamma2, rhoTA, xFinal_8)
  aProl*aProl*gamma2*rhoTA*exp(bProl*doseBL)*exp(bProl*doseBL)*xFinal_8/compartmentOne;
end

function Function_for_R_17(compartmentOne, k5, xFinal_5)
  k5*xFinal_5/compartmentOne;
end

function Function_for_R_22(AIh, apopFBL, compartmentOne, k4, xFinal_4)
  (k4*xFinal_4*(AIh/(1 - AIh)) + apopFBL*xFinal_4)/compartmentOne;
end

function Function_for_R_15(Pscmax, aProl, bProl, compartmentOne, doseBL, gamma1h, lambda, rhoSC, xFinal_6, xFinal_7)
  aProl*gamma1h*rhoSC*exp(bProl*doseBL)*xFinal_7*(xFinal_6/(lambda*Pscmax))/compartmentOne;
end

function Function_for_R_16(AId, Ka, Kp, Pscmax, aProl, apopFBL, bProl, compartmentOne, doseBL, gamma1h, k1sh, lambda, rhoSC, xFinal_7)
  (aProl*gamma1h*rhoSC*exp(bProl*doseBL)*xFinal_7*(xFinal_7/(lambda*Pscmax)) + AId*k1sh*xFinal_7*(rhoSC/(1 - AId)) + apopFBL*xFinal_7 + Kp*(1/(Ka^2 + xFinal_7^2))*xFinal_7^2)/compartmentOne;
end

function Function_for_R_18(alpha, apopFBL, compartmentOne, xFinal_6)
  (alpha*xFinal_6 + apopFBL*xFinal_6)/compartmentOne;
end

function Function_for_R_26(compartmentOne, km2, xFinal_3)
  km2*xFinal_3/compartmentOne;
end

function Function_for_R_27(Ptah, compartmentOne, k1sh, n, omega, xFinal_1, xFinal_2, xFinal_8)
  omega*xFinal_1*(k1sh/(1 + (omega - 1)*((xFinal_2 + xFinal_8)/Ptah)^n))/compartmentOne;
end

function Function_for_R_20(AIh, apopFBL, compartmentOne, k5, xFinal_5)
  (k5*xFinal_5*(AIh/(1 - AIh)) + apopFBL*xFinal_5)/compartmentOne;
end

function Function_for_R_21(compartmentOne, k3, xFinal_3)
  k3*xFinal_3/compartmentOne;
end

function Function_for_R_23(compartmentOne, k2s, xFinal_2)
  k2s*xFinal_2/compartmentOne;
end

function Function_for_R_24(compartmentOne, k2a, xFinal_2)
  k2a*xFinal_2/compartmentOne;
end

function Function_for_R_25(AIh, apopFBL, compartmentOne, k3, xFinal_3)
  (k3*xFinal_3*(AIh/(1 - AIh)) + apopFBL*xFinal_3)/compartmentOne;
end

function Function_for_R_32(Ptah, aProl, bProl, compartmentOne, doseBL, gamma1h, n, omega, xFinal_1, xFinal_2, xFinal_8)
  aProl*gamma1h*exp(bProl*doseBL)*xFinal_1*(omega/(1 + (omega - 1)*((xFinal_2 + xFinal_8)/Ptah)^n))/compartmentOne;
end

function Function_for_R_35(AIh, apopFBL, compartmentOne, k1sh, xFinal_1)
  (k1sh*xFinal_1*(AIh/(1 - AIh)) + apopFBL*xFinal_1)/compartmentOne;
end

function Function_for_R_28(Ptah, compartmentOne, k1ah, n, omega, xFinal_1, xFinal_2, xFinal_8)
  omega*xFinal_1*(k1ah/(1 + (omega - 1)*((xFinal_2 + xFinal_8)/Ptah)^n))/compartmentOne;
end

function Function_for_R_29(aProl, bProl, compartmentOne, doseBL, gamma2, xFinal_2)
  aProl*gamma2*exp(bProl*doseBL)*xFinal_2/compartmentOne;
end

function Function_for_R_30(AIh, apopFBL, compartmentOne, k2s, xFinal_2)
  (k2s*xFinal_2*(AIh/(1 - AIh)) + apopFBL*xFinal_2)/compartmentOne;
end

function Function_for_R_31(compartmentOne, km1, xFinal_2)
  km1*xFinal_2/compartmentOne;
end

function Function_for_R_33(Pscmax, Ptah, aProl, bProl, compartmentOne, doseBL, gamma1h, k1sh, n, omega, xFinal_1, xFinal_2, xFinal_8)
  (gamma1h*(aProl*exp(bProl*doseBL)*xFinal_1*omega*xFinal_1/(1 + (omega - 1)*((xFinal_2 + xFinal_8)/Ptah)^n)/Pscmax) + k1sh*xFinal_1*(omega/(1 + (omega - 1)*((xFinal_2 + xFinal_8)/Ptah)^n)))/compartmentOne;
end

function Function_for_R_34(Pscmax, Ptah, aProl, bProl, compartmentOne, doseBL, gamma1h, lambda, n, omega, xFinal_1, xFinal_2, xFinal_7, xFinal_8)
  gamma1h*(aProl*exp(bProl*doseBL)*xFinal_1*omega*xFinal_7/(1 + (omega - 1)*((xFinal_2 + xFinal_8)/Ptah)^n)/lambda/Pscmax)/compartmentOne;
end

model FelixGarza2017___Blue_Light_Treatment_of_Psoriasis__simplified()
  // FelixGarza2017 - Blue Light Treatment of Psoriasis (simplified)
  // This model is described in the article:
  // A Dynamic Model for Prediction of Psoriasis Management by Blue Light Irradiation.
  // Félix Garza ZC, Liebmann J, Born M, Hilbers PA, van Riel NA.
  // Front Physiol 2017; 8: 28
  // Abstract:
  // Clinical investigations prove that blue light irradiation reduces the severity of psoriasis vulgaris. Nevertheless, the mechanisms involved in the management of this condition remain poorly defined. Despite the encouraging results of the clinical studies, no clear guidelines are specified in the literature for the irradiation scheme regime of blue light-based therapy for psoriasis. We investigated the underlying mechanism of blue light irradiation of psoriatic skin, and tested the hypothesis that regulation of proliferation is a key process. We implemented a mechanistic model of cellular epidermal dynamics to analyze whether a temporary decrease of keratinocytes hyper-proliferation can explain the outcome of phototherapy with blue light. Our results suggest that the main effect of blue light on keratinocytes impacts the proliferative cells. They show that the decrease in the keratinocytes proliferative capacity is sufficient to induce a transient decrease in the severity of psoriasis. To study the impact of the therapeutic regime on the efficacy of psoriasis treatment, we performed simulations for different combinations of the treatment parameters, i.e., length of treatment, fluence (also referred to as dose), and intensity. These simulations indicate that high efficacy is achieved by regimes with long duration and high fluence levels, regardless of the chosen intensity. Our modeling approach constitutes a framework for testing diverse hypotheses on the underlying mechanism of blue light-based phototherapy, and for designing effective strategies for the treatment of psoriasis.
  // This model is hosted on BioModels Database and identified by: BIOMD0000000695.
  // To cite BioModels Database, please use: Chelliah V et al. BioModels: ten-year anniversary. Nucl. Acids Res. 2015, 43(Database issue):D542-8.
  // To the extent possible under law, all copyright and related or neighbouring rights to this encoded model have been dedicated to the public domain worldwide. Please refer to CC0 Public Domain Dedication for more information.
  // biomodels.db:MODEL1701090001
  // isDescribedBy doi:10.3389%2Ffphys.2017.00028
  // biomodels.db:BIOMD0000000695
  // hasPart efo:0000676
  // hasPart GO:0009637
  // hasPart BTO:0000667

  // Compartments:
  compartment compartmentOne = 1; compartmentOne is "Healthy";
  compartment Psoriatic = 1;

  // Species:
  species xFinal_1 in compartmentOne = 362; xFinal_1 is "Stem Cells";  // isVersionOf BTO:0000667; hasProperty CL:0000034
  species xFinal_2 in compartmentOne = 77; xFinal_2 is "Transit Amplifying Cells";  // isVersionOf BTO:0000667
  species xFinal_3 in compartmentOne = 61; xFinal_3 is "Growth Arrested Cells";  // isVersionOf BTO:0000667; hasProperty GO:0007050
  species xFinal_4 in compartmentOne = 238; xFinal_4 is "Spinous cells";  // isVersionOf BTO:0000667
  species xFinal_5 in compartmentOne = 119; xFinal_5 is "Granular Cells";  // isVersionOf BTO:0000667; hasProperty CL:0002189
  species xFinal_6 in compartmentOne = 185; xFinal_6 is "Corneocytes";  // isVersionOf BTO:0000667; hasProperty BTO:0001943
  species xFinal_7 in Psoriatic = 6459; xFinal_7 is "Stem Cells";  // isVersionOf BTO:0000667; hasProperty CL:0000034
  species xFinal_8 in Psoriatic = 32098; xFinal_8 is "Transit Amplifying Cells";  // isVersionOf BTO:0000667
  species xFinal_9 in Psoriatic = 20536; xFinal_9 is "Growth Arrested Cells";  // isVersionOf BTO:0000667; hasProperty GO:0007050
  species xFinal_10 in Psoriatic = 79788; xFinal_10 is "Spinous cells";  // isVersionOf BTO:0000667
  species xFinal_11 in Psoriatic = 0; xFinal_11 is "Granular Cells";  // isVersionOf BTO:0000667; hasProperty CL:0002189
  species xFinal_12 in Psoriatic = 77633; xFinal_12 is "Corneocytes";  // isVersionOf BTO:0000667; hasProperty BTO:0001943

  // Parameters:
  AId = 0.00035;  // ncit:C129675
  AIh = 0.0012;  // ncit:C129675
  alpha = 0.0714;  // encodes GO:0003336
  alphaps = rhoDe*alpha;
  apopFBL = 0;
  aProl = 1;  // encodes GO:0009637; encodes GO:0043616
  beta1h = AIh*k1sh/(1 - AIh);  // encodes ncit:C17557
  beta2 = AIh*k2s/(1 - AIh);  // encodes ncit:C17557
  beta3 = AIh*k3/(1 - AIh);  // encodes ncit:C17557
  beta4 = AIh*k4/(1 - AIh);  // encodes ncit:C17557
  beta5 = AIh*k5/(1 - AIh);  // encodes ncit:C17557
  betaps1 = AId*k1sh*rhoSC/(1 - AId);  // encodes ncit:C17557
  betaps2 = AId*kps2s/(1 - AId);  // encodes ncit:C17557
  betaps3 = AId*kps3/(1 - AId);  // encodes ncit:C17557
  betaps4 = AId*kps4/(1 - AId);  // encodes ncit:C17557
  bProl = -0.003404;  // encodes GO:0009637; encodes GO:0043616
  doseBL = 90*skinType;
  gamma1h = 0.0033;  // encodes GO:0072089
  gamma1ps = rhoSC*gamma1h;  // encodes GO:0072089
  gamma2 = 0.014;  // encodes GO:0072089
  gamma2ps = rhoTA*gamma2*thetaBLprol;  // encodes GO:0072089
  k1ah = 0.0131;  // encodes GO:0098722
  k1sh = 0.00164;  // encodes GO:0098724
  k2a = 0.138;  // encodes GO:0008356
  k2s = 0.0173;  // encodes GO:0098725
  k3 = 0.216;  // encodes GO:0007050
  k4 = 0.0556;  // encodes GO:0030154
  k5 = 0.111;  // encodes GO:0030154
  // k_1h
  km1 = 1e-6;
  // k_2h
  km2 = 1e-6;
  // k_1h
  kmps1 = km1;
  // k_2h
  kmps2 = km2;
  Kp = 6;  // encodes GO:0006955
  kps1a = rhoSC*k1ah;
  kps1s = rhoSC*k1sh;
  kps2a = rhoTA*k2a;
  kps2s = rhoTA*k2s;
  kps3 = rhoTr*k3;
  kps4 = rhoTr*k4;
  lambda = 3.5;  // encodes ncit:C25443
  LPSI0 = 5.34;
  n = 3;  // encodes ncit:C48923
  omega = 100;  // encodes GO:0072089
  Psch = Pscmax*(1 - 1/gamma1h*(k1sh + beta1h - km1*(k1ah + k1sh*2)/(km1 + k2s + beta2 - gamma2 - km2*(k2a + 2*k2s)/(km2 + k3 + beta3))));  // encodes GO:0072089
  Pscmax = 4500;  // encodes ncit:C25443
  Ptah = (k1ah + 2*k1sh)/(km1 + k2s + beta2 - gamma2 - km2*(k2a + 2*k2s)/(km2 + k3 + beta3))*Psch;  // encodes GO:0008283
  rhoDe = 4;  // encodes GO:0003336
  rhoSC = 4;  // encodes GO:0003336
  rhoTA = 4;  // encodes GO:0003336
  rhoTr = 5;  // encodes ncit:C51039
  skinType = 0.579;  // encodes ncit:C45995
  therI = 84;
  thetaBLprol = aProl*exp(bProl*doseBL);  // encodes GO:0009637
  Treatment_Duration = 1;

  // Assignment rules:
  Ka := 3^(1/2)*Psch/10;

  // Reactions:
  R_001: xFinal_10 => xFinal_12; Psoriatic*Function_for_R_1(compartmentOne, k4, rhoTr, xFinal_10);
  R_002: xFinal_12 => ; Psoriatic*Function_for_R_2(alpha, apopFBL, compartmentOne, rhoDe, xFinal_12);
  R_003: xFinal_9 => xFinal_10; Psoriatic*Function_for_R_3(compartmentOne, k3, rhoTr, xFinal_9);
  R_004: xFinal_10 => ; Psoriatic*Function_for_R_4(AId, apopFBL, compartmentOne, k4, rhoTr, xFinal_10);
  R_005: xFinal_8 => 2 xFinal_9; Psoriatic*Function_for_R_5(compartmentOne, k2s, rhoTA, xFinal_8);
  R_006: xFinal_8 => xFinal_8 + xFinal_9; Psoriatic*Function_for_R_6(compartmentOne, k2a, rhoTA, xFinal_8);
  R_007: xFinal_9 => ; Psoriatic*Function_for_R_7(AId, apopFBL, compartmentOne, k3, rhoTr, xFinal_9);
  R_008: xFinal_9 => xFinal_8; Psoriatic*Function_for_R_8(compartmentOne, km2, xFinal_9);
  R_009: xFinal_7 => 2 xFinal_8; Psoriatic*Function_for_R_9(compartmentOne, k1sh, rhoSC, xFinal_7);
  R_010: xFinal_7 => xFinal_7 + xFinal_8; Psoriatic*Function_for_R_10(compartmentOne, k1ah, rhoSC, xFinal_7);
  R_011: xFinal_8 => 2 xFinal_8; Psoriatic*Function_for_R_11(aProl, bProl, compartmentOne, doseBL, gamma2, rhoTA, xFinal_8);
  R_012: xFinal_8 => ; Psoriatic*Function_for_R_12(AId, apopFBL, compartmentOne, k2s, rhoTA, xFinal_8);
  R_013: xFinal_8 => xFinal_7; Psoriatic*Function_for_R_13(compartmentOne, km1, xFinal_8);
  R_014: xFinal_7 => 2 xFinal_7; Psoriatic*Function_for_R_14(aProl, bProl, compartmentOne, doseBL, gamma1h, rhoSC, xFinal_7);
  R_015: xFinal_6 + xFinal_7 => xFinal_6; Function_for_R_15(Pscmax, aProl, bProl, compartmentOne, doseBL, gamma1h, lambda, rhoSC, xFinal_6, xFinal_7);
  R_016: xFinal_7 => ; Psoriatic*Function_for_R_16(AId, Ka, Kp, Pscmax, aProl, apopFBL, bProl, compartmentOne, doseBL, gamma1h, k1sh, lambda, rhoSC, xFinal_7);
  R_017: xFinal_5 => xFinal_6; compartmentOne*Function_for_R_17(compartmentOne, k5, xFinal_5);
  R_018: xFinal_6 => ; compartmentOne*Function_for_R_18(alpha, apopFBL, compartmentOne, xFinal_6);
  R_019: xFinal_4 => xFinal_5; compartmentOne*Function_for_R_19(compartmentOne, k4, xFinal_4);
  R_020: xFinal_5 => ; compartmentOne*Function_for_R_20(AIh, apopFBL, compartmentOne, k5, xFinal_5);
  R_021: xFinal_3 => xFinal_4; compartmentOne*Function_for_R_21(compartmentOne, k3, xFinal_3);
  R_022: xFinal_4 => ; compartmentOne*Function_for_R_22(AIh, apopFBL, compartmentOne, k4, xFinal_4);
  R_023: xFinal_2 => 2 xFinal_3; compartmentOne*Function_for_R_23(compartmentOne, k2s, xFinal_2);
  R_024: xFinal_2 => xFinal_2 + xFinal_3; compartmentOne*Function_for_R_24(compartmentOne, k2a, xFinal_2);
  R_025: xFinal_3 => ; compartmentOne*Function_for_R_25(AIh, apopFBL, compartmentOne, k3, xFinal_3);
  R_026: xFinal_3 => xFinal_2; compartmentOne*Function_for_R_26(compartmentOne, km2, xFinal_3);
  R_027: xFinal_1 + xFinal_2 + xFinal_8 => xFinal_1 + 3 xFinal_2 + xFinal_8; Function_for_R_27(Ptah, compartmentOne, k1sh, n, omega, xFinal_1, xFinal_2, xFinal_8);
  R_028: xFinal_1 + xFinal_2 + xFinal_8 => xFinal_1 + 2 xFinal_2 + xFinal_8; Function_for_R_28(Ptah, compartmentOne, k1ah, n, omega, xFinal_1, xFinal_2, xFinal_8);
  R_029: xFinal_2 => 2 xFinal_2; compartmentOne*Function_for_R_29(aProl, bProl, compartmentOne, doseBL, gamma2, xFinal_2);
  R_030: xFinal_2 => ; compartmentOne*Function_for_R_30(AIh, apopFBL, compartmentOne, k2s, xFinal_2);
  R_031: xFinal_2 => xFinal_1; compartmentOne*Function_for_R_31(compartmentOne, km1, xFinal_2);
  R_032: xFinal_1 + xFinal_2 + xFinal_8 => 2 xFinal_1 + xFinal_2 + xFinal_8; Function_for_R_32(Ptah, aProl, bProl, compartmentOne, doseBL, gamma1h, n, omega, xFinal_1, xFinal_2, xFinal_8);
  R_033: xFinal_1 + xFinal_2 + xFinal_8 => xFinal_2 + xFinal_8; Function_for_R_33(Pscmax, Ptah, aProl, bProl, compartmentOne, doseBL, gamma1h, k1sh, n, omega, xFinal_1, xFinal_2, xFinal_8);
  R_034: xFinal_1 + xFinal_2 + xFinal_7 + xFinal_8 => xFinal_2 + xFinal_7 + xFinal_8; Function_for_R_34(Pscmax, Ptah, aProl, bProl, compartmentOne, doseBL, gamma1h, lambda, n, omega, xFinal_1, xFinal_2, xFinal_7, xFinal_8);
  R_035: xFinal_1 => ; compartmentOne*Function_for_R_35(AIh, apopFBL, compartmentOne, k1sh, xFinal_1);

  // Events:
  Treatment_Break_after_28_days: at (((time > 28) && (time < 84)) && (time - floor(time/(7/3))*(7/3) > Treatment_Duration)): doseBL = 0*90*skinType;
  Treatment_Start_after_28_days: at (((time > 28) && (time < 84)) && (time - floor(time/(7/3))*(7/3) < Treatment_Duration)): doseBL = 90*skinType;
  Treatment_Stopped_on_Day_84: at (time > 84): doseBL = 0;

  // Unit definitions:
  unit time = 86400 second;
  unit substance = 1e-3 mole;
end
