// SBML level 2 version 4

function Canonical_pathway_activation(k, canon, Kd)
  k*canon/(Kd + canon);
end

model New_Model()
  // NIK-dependent p100 processing into p52 with RelB binding and IkBd degradation, mass action, SBML 2v4
  // This model represents NIK-dependent p100 processing into p52 followed by binding to RelB and NIK-dependent IkBd degradation. This model assesses the impact of substrate complex competition on RelB-p52.

  // Compartments:
  compartment compartment = 1;

  // Species:
  species p100 in compartment = 0;  // uniprot:Q00653
  species p52 in compartment = 0;  // uniprot:Q00653
  species NIK in compartment = 10;  // uniprot:Q99558
  species IkBd in compartment = 0;  // hasPart uniprot:Q00653
  species IkBd_NIK in compartment = 0; IkBd_NIK is "IkBd:NIK";  // hasPart uniprot:Q00653; hasPart uniprot:Q99558
  species p100_NIK in compartment = 0; p100_NIK is "p100:NIK";  // hasPart uniprot:Q99558; hasPart uniprot:Q00653
  species RelB in compartment = 0;  // uniprot:Q01201
  species RelB_p52 in compartment = 0; RelB_p52 is "RelB:p52";  // hasPart uniprot:Q00653; hasPart uniprot:Q01201

  // Parameters:
  canon = 1;

  // Reactions:
  p100_mRNA_Expressions: => p100; compartment*Canonical_pathway_activation(p100_mRNA_Expressions_k, canon, p100_mRNA_Expressions_Kd);
    p100_mRNA_Expressions_k = 1000; p100_mRNA_Expressions_Kd = 50;
  p100_processing: p100_NIK => p52 + NIK; compartment*p100_processing_k1*p100_NIK;
    p100_processing_k1 = 0.05;
  p52_degradation: p52 => ; compartment*p52_degradation_k1*p52;
    p52_degradation_k1 = 0.0228;
  p100_degradation: p100 => ; compartment*p100_degradation_k1*p100;
    p100_degradation_k1 = 0.00038;
  p100_dimerization: 2 p100 -> IkBd; compartment*(p100_dimerization_k1*p100^2 - p100_dimerization_k2*IkBd);
    p100_dimerization_k1 = 1.6e-5; p100_dimerization_k2 = 0.00024;
  IkBd_degradation: IkBd => ; compartment*IkBd_degradation_k1*IkBd;
    IkBd_degradation_k1 = 0.00038;
  IkBd_degradation_by_NIK: IkBd_NIK => NIK; compartment*IkBd_degradation_by_NIK_k1*IkBd_NIK;
    IkBd_degradation_by_NIK_k1 = 0.05;
  p100_NIK_binding: p100 + NIK -> p100_NIK; compartment*(p100_NIK_binding_k1*p100*NIK - p100_NIK_binding_k2*p100_NIK);
    p100_NIK_binding_k1 = 0.005; p100_NIK_binding_k2 = 0.00024;
  IkBd_NIK_binding: IkBd + NIK -> IkBd_NIK; compartment*(IkBd_NIK_binding_k1*IkBd*NIK - IkBd_NIK_binding_k2*IkBd_NIK);
    IkBd_NIK_binding_k1 = 0.005; IkBd_NIK_binding_k2 = 0.00024;
  RelB_Expression: => RelB; compartment*Canonical_pathway_activation(RelB_Expression_k, canon, RelB_Expression_Kd);
    RelB_Expression_k = 42; RelB_Expression_Kd = 50;
  RelB_p52_Binding: RelB + p52 -> RelB_p52; compartment*(RelB_p52_Binding_k1*RelB*p52 - RelB_p52_Binding_k2*RelB_p52);
    RelB_p52_Binding_k1 = 0.00096; RelB_p52_Binding_k2 = 0.00144;
  RelB_p52_degradation: RelB_p52 => ; compartment*RelB_p52_degradation_k1*RelB_p52; RelB_p52_degradation is "RelB:p52 degradation";
    RelB_p52_degradation_k1 = 0.00038;
  RelB_degradation: RelB => ; compartment*RelB_degradation_k1*RelB;
    RelB_degradation_k1 = 0.0228;

  // Unit definitions:
  unit volume = 1e-3 litre;
  unit substance = 1e-9 mole;
end
