// SBML level 3 version 2
// dcterms:bibliographicCitation: urn:miriam:pubmed:21300073

function Rate_Law_for_reaction_for__EU_decay(omega, P, Eu)
  omega*P*Eu;
end
Rate_Law_for_reaction_for__EU_decay is "Rate Law for reaction for EU decay";

function Rate_Law_for_reaction_for_Ea_decay(d_E, Ea)
  d_E*Ea;
end

function Rate_Law_for_reaction_for_P_Decay(gamma_M_A, f_P_M_A, kd, D, M_Astar, P, gamma_N, N)
  gamma_M_A*f_P_M_A/(1 + kd*D*M_Astar)*M_Astar*P + gamma_N*N*P;
end

function Rate_Law_for_reaction_for__P_production(r, P, Kp)
  r*P*(1 - P/Kp);
end
Rate_Law_for_reaction_for__P_production is "Rate Law for reaction for P production";

function Rate_Law_for_reaction_for_C_decay(dc, C)
  dc*C;
end

function Rate_Law_for_reaction_for_C_production(alpha, Ea, kn, N, v, theta_M, M_Astar, d, k, P)
  alpha*(Ea/(1 + kn*N)) + v*(theta_M*P*M_Astar/(d + k + theta_M*P*(1 + kn*N)));
end

function Rate_Law_for_reaction_for_D_production(rho1, d_NP, N, P, rho2, d_N, rho3, d_E, Ea)
  rho1*d_NP*N*P + rho2*d_N*N + rho3*d_E*Ea;
end

function Rate_Law_for_reaction_for_Ea_production(omega, P, Eu)
  omega*P*Eu;
end

function Rate_Law_for_reaction_for_N_decay(d_NP, N, P, d_N)
  d_NP*N*P + d_N*N;
end

function Rate_Law_for_reaction_for_D_decay(d_D, D, M_Astar)
  d_D*D*M_Astar;
end

function Rate_Law_for_reaction_for_N_production(eta, C, N, N_max)
  eta*C*(1 - N/N_max);
end

model Smith2011___Three_Stage_Innate_Immune_Response_to_a_Pneumococcal_Lung_Infection()
  // Smith2011 - Three Stage Innate Immune Response to a Pneumococcal Lung Infection
  // Pneumococcal pneumonia is a leading cause of death and a major source of human morbidity. The initial immune response plays a central role in determining the course and outcome of pneumococcal disease. We combine bacterial titer measurements from mice infected with Streptococcus pneumoniae with mathematical modeling to investigate the coordination of immune responses and the effects of initial inoculum on outcome. To evaluate the contributions of individual components, we systematically build a mathematical model from three subsystems that describe the succession of defensive cells in the lung: resident alveolar macrophages, neutrophils and monocyte-derived macrophages. The alveolar macrophage response, which can be modeled by a single differential equation, can by itself rapidly clear small initial numbers of pneumococci. Extending the model to include the neutrophil response required additional equations for recruitment cytokines and host cell status and damage. With these dynamics, two outcomes can be predicted: bacterial clearance or sustained bacterial growth. Finally, a model including monocyte-derived macrophage recruitment by neutrophils suggests that sustained bacterial growth is possible even in their presence. Our model quantifies the contributions of cytotoxicity and immune-mediated damage in pneumococcal pathogenesis.
  // biomodels.db:MODEL1808280007
  // occursIn BTO:0000763
  // hasTaxon taxonomy:9606
  // isDescribedBy pubmed:21300073
  // hasProperty ncit:C157959 ncit:C3137 GO:0006955 mamo:MAMO_0000046
  // biomodels.db:MODEL1808280007 biomodels.db:BIOMD0000000924
  // model units - substance: substance, time: time, volume: volume, area: area, length: metre, extent: substance

  // Compartments:
  compartment compartment = 1 volume;

  // Species:
  species Pneumococci___P in compartment = 100000; Pneumococci___P is "Pneumococci (P)";  // hasProperty ncit:C76384
  species Susceptible_epithelial_cells__EU in compartment = 100000000; Susceptible_epithelial_cells__EU is "Susceptible epithelial cells (EU)";  // hasProperty omit:0006083
  species Epithelial_cells_with_bacteria_attached__Ea in compartment = 0; Epithelial_cells_with_bacteria_attached__Ea is "Epithelial cells with bacteria attached (Ea)";  // hasProperty BTO:0000152
  species proinflammatory_cytokine__C in compartment = 0; proinflammatory_cytokine__C is "proinflammatory cytokine (C)";  // hasProperty ncit:C20464
  species Neutrophils__N in compartment = 0; Neutrophils__N is "Neutrophils (N)";  // hasProperty omit:0010527
  species Debris__D in compartment = 0; Debris__D is "Debris (D)";  // hasProperty ncit:C120869

  // Parameters:
  r = 1.13;
  K_P = 3.417652e8;
  gamma_M_A = 5.6e-6;
  n = 5;
  x = 2;
  d = 0.001;
  M_Astar = 1000000;
  gamma_N = 1e-5;
  theta_M = 4.2e-8;
  kappa = 0.042;
  v = 0.029;
  omega = 2.1e-8;
  d_E = 0.167;
  alpha = 0.021;
  k_n = 1.4e-5;
  d_C = 0.83;
  N_max = 180000;
  eta = 1.33;
  d_N = 0.063;
  d_NP = 1.76e-7;
  rho1 = 0.15;
  rho2 = 0.001;
  rho3 = 1e-5;
  d_D = 1.4e-7;
  k_d = 5e-9;
  s = 1000;
  var log_Pneumococcal__P; log_Pneumococcal__P is "log Pneumococcal (P)";

  // Assignment rules:
  f_P_M_A := n^x*M_Astar/(Pneumococci___P^x + n^x*M_Astar);
  log_Pneumococcal__P := log10(max(1e-15, Pneumococci___P));

  // Reactions:
  reaction_for__P_production: => Pneumococci___P; compartment*Rate_Law_for_reaction_for__P_production(r, Pneumococci___P, K_P); reaction_for__P_production is "reaction for P production";
  reaction_for_P_Decay: Pneumococci___P => ; compartment*Rate_Law_for_reaction_for_P_Decay(gamma_M_A, f_P_M_A, k_d, Debris__D, M_Astar, Pneumococci___P, gamma_N, Neutrophils__N);  // modifiers: Debris__D, Neutrophils__N
  reaction_for__EU_decay: Susceptible_epithelial_cells__EU => ; compartment*Rate_Law_for_reaction_for__EU_decay(omega, Pneumococci___P, Susceptible_epithelial_cells__EU); reaction_for__EU_decay is "reaction for EU decay";  // modifiers: Pneumococci___P
  reaction_for_Ea_production: => Epithelial_cells_with_bacteria_attached__Ea; compartment*Rate_Law_for_reaction_for_Ea_production(omega, Pneumococci___P, Susceptible_epithelial_cells__EU);  // modifiers: Pneumococci___P, Susceptible_epithelial_cells__EU
  reaction_for_Ea_decay: Epithelial_cells_with_bacteria_attached__Ea => ; compartment*Rate_Law_for_reaction_for_Ea_decay(d_E, Epithelial_cells_with_bacteria_attached__Ea);
  reaction_for_C_production: => proinflammatory_cytokine__C; compartment*Rate_Law_for_reaction_for_C_production(alpha, Epithelial_cells_with_bacteria_attached__Ea, k_n, Neutrophils__N, v, theta_M, M_Astar, d, kappa, Pneumococci___P);  // modifiers: Epithelial_cells_with_bacteria_attached__Ea, Neutrophils__N, Pneumococci___P
  reaction_for_C_decay: proinflammatory_cytokine__C => ; compartment*Rate_Law_for_reaction_for_C_decay(d_C, proinflammatory_cytokine__C);
  reaction_for_N_production: => Neutrophils__N; compartment*Rate_Law_for_reaction_for_N_production(eta, proinflammatory_cytokine__C, Neutrophils__N, N_max);  // modifiers: proinflammatory_cytokine__C
  reaction_for_N_decay: Neutrophils__N => ; compartment*Rate_Law_for_reaction_for_N_decay(d_NP, Neutrophils__N, Pneumococci___P, d_N);  // modifiers: Pneumococci___P
  reaction_for_D_production: => Debris__D; compartment*Rate_Law_for_reaction_for_D_production(rho1, d_NP, Neutrophils__N, Pneumococci___P, rho2, d_N, rho3, d_E, Epithelial_cells_with_bacteria_attached__Ea);  // modifiers: Neutrophils__N, Pneumococci___P, Epithelial_cells_with_bacteria_attached__Ea
  reaction_for_D_decay: Debris__D => ; compartment*Rate_Law_for_reaction_for_D_decay(d_D, Debris__D, M_Astar);

  // Unit definitions:
  unit volume = 1e-3 litre;
  unit time = 3600 second;
  unit substance = 1e-3 mole;
  unit area = metre^2;
end
