// SBML level 2 version 4
// dcterms:bibliographicCitation: urn:miriam:doi:10.1093/imamat/hxw007

model Dunster2016___Nondimensional_Coagulation_Model()
  // Dunster2016 - Nondimensional Coagulation Model
  // Nondimensional mathematical model of blood coagulation based on Willems et al. 1991 model.
  // isVersionOf GO:0007596
  // isDescribedBy doi:10.1093/imamat/hxw007

  // Compartments:
  compartment compartment = 1;

  // Species:
  species $Fibrinogen in compartment = 5;
  species $Fibrin in compartment = 0;
  species $PC in compartment = 92;
  species $APC in compartment = 0;
  species $APC_inactive in compartment = 0;
  species $Xa in compartment = 0;
  species $Va in compartment = 0;
  species $Va_Xa in compartment = 0; Va_Xa is "Va:Xa";
  species $IIa in compartment = 0;
  species $V in compartment = 3;
  species $II in compartment = 17;
  species $Xa_L in compartment; Xa_L is "Xa:L";
  species $Va_Xa_L in compartment; Va_Xa_L is "Va:Xa:L";
  species $Xa_ATIII in compartment = 0; Xa_ATIII is "Xa:ATIII";
  species $Va_inactive in compartment = 0;
  species $IIa_ATIII in compartment = 0; IIa_ATIII is "IIa:ATIII";

  // Parameters:
  k_tilde_1a = 150;
  k_tilde_1b = 0.19;
  k_tilde_2a = 2;
  k_tilde_2am = 7.2;
  k_tilde_2b = 0.013;
  k_tilde_3a = 150;
  q_tilde_3a = 1;
  k_tilde_3b = 0.038;
  k_tilde_3c = 1;
  k_tilde_4a = 0.12;
  q_tilde_4a = 0.004;
  k_tilde_4b = 530;
  k_tilde_4bm = 3.6;
  k_tilde_5a = 0.0011;
  k_tilde_5b = 0.27;
  k_tilde_6 = 1500;
  k_tilde_x = 385;
  k_tilde_b = 0.0005;
  l_tilde_x = 7.69;
  l_tilde_b = 0.05;
  gamma_tilde_1a = 0.77;

  // Assignment rules:
  Xa_L := 0.5*(k_tilde_x + l_tilde_x + Xa - sqrt((k_tilde_x + l_tilde_x + Xa)^2 - 4*l_tilde_x*Xa));
  Va_Xa_L := 0.5*(k_tilde_b + l_tilde_b + Va_Xa - sqrt((k_tilde_b + l_tilde_b + Va_Xa)^2 - 4*l_tilde_b*Va_Xa));
  log_time := log10(time);

  // Rate rules:
  Fibrinogen' = -k_tilde_6*Fibrinogen;
  Fibrin' = k_tilde_6*Fibrinogen;
  PC' = -k_tilde_5a*PC;
  APC' = k_tilde_5a*PC - k_tilde_5b*APC;
  APC_inactive' = k_tilde_5b*APC;
  Xa' = k_tilde_1a*gamma_tilde_1a*exp(-gamma_tilde_1a*time) + k_tilde_3c*k_tilde_3a*APC*Va_Xa/(Va_Xa + 1) - k_tilde_1b*Xa - k_tilde_3a*Xa*Va;
  Va' = IIa*V/(V + k_tilde_2am*(1 + Fibrinogen)) + k_tilde_2b*Xa*V/(V + 1 + II) + k_tilde_3b/q_tilde_3a*Va_Xa - APC*Va/(Va + 1) - Xa*Va;
  Va_Xa' = q_tilde_3a*Xa*Va - k_tilde_3b*Va_Xa - k_tilde_3c*q_tilde_3a*APC*Va_Xa/(Va_Xa + 1);
  IIa' = k_tilde_4a*Xa_L*II/(V + 1 + II) + k_tilde_4a*k_tilde_4b*Va_Xa_L*II/(q_tilde_4a*(II + k_tilde_4bm)) - IIa;
  V' = -k_tilde_2a*IIa*V/(V + k_tilde_2am*(1 + Fibrinogen)) - k_tilde_2a*k_tilde_2b*Xa*V/(V + 1 + II);
  II' = -q_tilde_4a*Xa_L*II/(V + 1 + II) - k_tilde_4b*Va_Xa_L*II/(II + k_tilde_4bm);
  Xa_ATIII' = k_tilde_1b*Xa + k_tilde_3a*k_tilde_3b/q_tilde_3a*Va_Xa;
  Va_inactive' = APC*Va/(Va + 1) + k_tilde_3c*APC*Va_Xa/(Va_Xa + 1);
  IIa_ATIII' = IIa;

  // Unit definitions:
  unit volume = 1e-3 litre;
  unit substance = 1e-3 mole;
end
