// SBML level 3 version 2
// dcterms:bibliographicCitation: urn:miriam:pubmed:32616574

function Rate_Law_for_Susceptible_to_Infected(Ro, I, S, gamma)
  gamma*Ro*I*S;
end

model Bertozzi2020___SIR_model_of_scenarios_of_COVID_19_spread_in_CA()
  // Bertozzi2020 - SIR model of scenarios of COVID-19 spread in CA and NY
  // The coronavirus disease 2019 (COVID-19) pandemic has placed epidemic modeling at the forefront of worldwide public policy making. Nonetheless, modeling and forecasting the spread of COVID-19 remains a challenge. Here, we detail three regional scale models for forecasting and assessing the course of the pandemic. This work demonstrates the utility of parsimonious models for early-time data and provides an accessible framework for generating policy-relevant insights into its course. We show how these models can be connected to each other and to time series data for a particular region. Capable of measuring and forecasting the impacts of social distancing, these models highlight the dangers of relaxing nonpharmaceutical public health interventions in the absence of a vaccine or antiviral therapies.
  // isDescribedBy pubmed:32616574
  // hasTaxon taxonomy:2697049 taxonomy:9606
  // hasProperty DOID:0080600 ido:0000503 mamo:MAMO_0000028
  // biomodels.db:MODEL2008070001 biomodels.db:BIOMD0000000956
  // model units - substance: substance, time: time, volume: volume, area: area, length: length, extent: substance

  // Compartments:
  compartment USA___CA__NY = 1 volume; USA___CA__NY is "USA - CA, NY";  // isVersionOf ncit:C43509; isVersionOf ncit:C43468

  // Species:
  species Infected in USA___CA__NY = Io/Pop;  // isVersionOf ncit:C171133; isVersionOf ido:0000511
  species Recovered in USA___CA__NY = 0;  // isVersionOf ncit:C171133; hasProperty ido:0000621
  species Susceptible in USA___CA__NY = (Pop - Infected)/Pop;  // isVersionOf ido:0000514; isVersionOf ncit:C171133

  // Parameters:
  Pop_CA = 39560000;
  Ro_CA = 2.7;
  gamma_CA = 0.14;
  Io_CA = 5;
  Trigger_CA = 1;
  Trigger_NY = 0;
  Pop_NY = 19540000;
  Ro_NY = 4.1;
  gamma_NY = 0.1;
  Io_NY = 29;
  Trigger_Lockdown = 0;
  Lockdown_CA_start = 27;
  Lockdown_CA_end = 66;
  Lockdown_NY_start = 30;
  Lockdown_NY_end = 67;
  Peak_Time = 0;
  Initial_for_Io_CA = Io_CA;
  Initial_for_Io_NY = Io_NY;
  Initial_for_Lockdown_CA_end = Lockdown_CA_end;
  Initial_for_Lockdown_CA_start = Lockdown_CA_start;
  Initial_for_Lockdown_NY_end = Lockdown_NY_end;
  Initial_for_Lockdown_NY_start = Lockdown_NY_start;
  Initial_for_Pop_CA = Pop_CA;
  Initial_for_Pop_NY = Pop_NY;
  Initial_for_Ro_CA = Ro_CA;
  Initial_for_Ro_NY = Ro_NY;
  Initial_for_Trigger_CA = Trigger_CA;
  Initial_for_Trigger_Lockdown = Trigger_Lockdown;
  Initial_for_Trigger_NY = Trigger_NY;
  Initial_for_gamma_CA = gamma_CA;
  Initial_for_gamma_NY = gamma_NY;

  // Assignment rules:
  Time := Initial_for_gamma_CA*time;
  Pop := Initial_for_Trigger_CA*Initial_for_Pop_CA + Initial_for_Trigger_NY*Initial_for_Pop_NY;
  Ro := Initial_for_Trigger_CA*Ro_CA + Initial_for_Trigger_NY*Ro_NY;
  gamma := Initial_for_Trigger_CA*Initial_for_gamma_CA + Initial_for_Trigger_NY*Initial_for_gamma_NY;
  Io := Initial_for_Trigger_CA*Initial_for_Io_CA + Initial_for_Trigger_NY*Initial_for_Io_NY;

  // Reactions:
  Susceptible_to_Infected: Susceptible => Infected; USA___CA__NY*Rate_Law_for_Susceptible_to_Infected(Ro, Infected, Susceptible, gamma);  // isVersionOf ncit:C128320; isVersionOf ncit:C171133
  Infected_to_Recovered: Infected => Recovered; USA___CA__NY*gamma*Infected;  // isVersionOf ncit:C25746; isVersionOf ncit:C171133

  // Events:
  Lockdown_start: at ((Initial_for_Trigger_Lockdown == 1) && (time > Initial_for_Trigger_CA*Initial_for_Lockdown_CA_start + Initial_for_Trigger_NY*Initial_for_Lockdown_NY_start)): Ro_CA = Ro_CA/2, Ro_NY = Ro_NY/2;
  Lockdown_end: at ((Initial_for_Trigger_Lockdown == 1) && (time > Initial_for_Trigger_CA*Initial_for_Lockdown_CA_end + Initial_for_Trigger_NY*Initial_for_Lockdown_NY_end)): Ro_CA = Initial_for_Ro_CA, Ro_NY = Initial_for_Ro_NY;
  Peak_time_record_start: at (rateOf(Infected) < 1e-12): Peak_Time = time;

  // Unit definitions:
  unit length = metre;
  unit area = metre^2;
  unit volume = litre;
  unit time = 86400 second;
  unit substance = item;
end
