// SBML level 2 version 4

model model()
  // Adlung2021 - Cell-to-cell variability in JAK2/STAT5 pathway
  // A mathematical model for cell-to-cell variability in JAK2/STAT5 pathway components and cytoplasmic volumes defines survival threshold in erythroid progenitor cells
  // hasProperty mamo:MAMO_0000046

  // Compartments:
  compartment cyt = 0.4 pl;
  compartment nuc = 0.275 pl;

  // Species:
  species EpoRJAK2 in cyt = init_EpoRJAK2;  // substance in nM
  species EpoRpJAK2 in cyt = 0;  // substance in nM
  species p1EpoRpJAK2 in cyt = 0;  // substance in nM
  species p2EpoRpJAK2 in cyt = 0;  // substance in nM
  species p12EpoRpJAK2 in cyt = 0;  // substance in nM
  species SHP1 in cyt = init_SHP1;  // substance in nM
  species SHP1Act in cyt = 0;  // substance in nM
  species STAT5 in cyt = init_STAT5;  // substance in nM
  species pSTAT5 in cyt = 0;  // substance in nM
  species npSTAT5 in nuc = 0;  // substance in nM
  species CISnRNA1 in nuc = 0;  // substance in au
  species CISnRNA2 in nuc = 0;  // substance in au
  species CISRNA in cyt = 0;  // substance in au
  species CIS in cyt = 0;  // substance in nM
  species SOCS3 in cyt = 0;  // substance in nM

  // Parameters:
  ActD = 0;
  CISEqc = 0.7675388;
  CISInh = 4.383404e8;
  CISRNADelay = 0.1198453;
  CISRNAEqc = 1;
  CISRNATurn = 0.1198094;
  CISTurn = 0.01782329;
  DeaEpoRJAKActSHP1 = 0.0008859103;
  EpoRActJAK2 = 0.3262379;
  JAK2ActEpo = 0.05207698;
  SHP1ActEpoR = 1;
  SHP1Dea = 0.005573928;
  SOCS3Eqc = 0.1624938;
  SOCS3EqcOE = 828.0616;
  SOCS3Inh = 0.01034135;
  SOCS3Turn = 0.08060054;
  SOCS3oe = 0;
  STAT5ActEpoR = 0.2991367;
  STAT5ActJAK2 = 0.05132538;
  STAT5Exp = 0.01121571;
  STAT5Imp = 0.04047635;
  epo_level = 5;
  init_EpoRJAK2 = 3.975048;
  init_SHP1 = 26.72362;
  init_STAT5 = 79.72421;

  // Assignment rules:
  Epo := epo_level;

  // Reactions:
  v1_v_0: EpoRJAK2 => EpoRpJAK2; cyt*(Epo*EpoRJAK2*JAK2ActEpo/(SOCS3*SOCS3Inh/SOCS3Eqc + 1));  // modifiers: SOCS3
  v2_v_1: EpoRpJAK2 => EpoRJAK2; cyt*(DeaEpoRJAKActSHP1*EpoRpJAK2*SHP1Act/SHP1ActEpoR);  // modifiers: SHP1Act
  v3_v_2: EpoRpJAK2 => p1EpoRpJAK2; cyt*(EpoRpJAK2*EpoRActJAK2/(SOCS3*SOCS3Inh/SOCS3Eqc + 1));  // modifiers: SOCS3
  v4_v_3: EpoRpJAK2 => p2EpoRpJAK2; cyt*(3*EpoRpJAK2*EpoRActJAK2/(SOCS3*SOCS3Inh/SOCS3Eqc + 1));  // modifiers: SOCS3
  v5_v_4: p1EpoRpJAK2 => p12EpoRpJAK2; cyt*(3*EpoRActJAK2*p1EpoRpJAK2/(SOCS3*SOCS3Inh/SOCS3Eqc + 1));  // modifiers: SOCS3
  v6_v_5: p2EpoRpJAK2 => p12EpoRpJAK2; cyt*(EpoRActJAK2*p2EpoRpJAK2/(SOCS3*SOCS3Inh/SOCS3Eqc + 1));  // modifiers: SOCS3
  v7_v_6: p1EpoRpJAK2 => EpoRJAK2; cyt*(DeaEpoRJAKActSHP1*SHP1Act*p1EpoRpJAK2/SHP1ActEpoR);  // modifiers: SHP1Act
  v8_v_7: p2EpoRpJAK2 => EpoRJAK2; cyt*(DeaEpoRJAKActSHP1*SHP1Act*p2EpoRpJAK2/SHP1ActEpoR);  // modifiers: SHP1Act
  v9_v_8: p12EpoRpJAK2 => EpoRJAK2; cyt*(DeaEpoRJAKActSHP1*SHP1Act*p12EpoRpJAK2/SHP1ActEpoR);  // modifiers: SHP1Act
  v12_v_11: => SHP1Act; cyt*SHP1*SHP1ActEpoR*(EpoRpJAK2 + p12EpoRpJAK2 + p1EpoRpJAK2 + p2EpoRpJAK2);  // modifiers: EpoRpJAK2, SHP1, p12EpoRpJAK2, p1EpoRpJAK2, p2EpoRpJAK2
  v13_v_12: SHP1Act => ; cyt*SHP1Dea*SHP1Act;
  v14_v_13: STAT5 => pSTAT5; cyt*(STAT5*STAT5ActJAK2*(EpoRpJAK2 + p12EpoRpJAK2 + p1EpoRpJAK2 + p2EpoRpJAK2)/(SOCS3*SOCS3Inh/SOCS3Eqc + 1));  // modifiers: EpoRpJAK2, SOCS3, p12EpoRpJAK2, p1EpoRpJAK2, p2EpoRpJAK2
  v15_v_14: STAT5 => pSTAT5; cyt*(STAT5*STAT5ActEpoR*(p12EpoRpJAK2 + p1EpoRpJAK2)^2/((SOCS3*SOCS3Inh/SOCS3Eqc + 1)*(CIS*CISInh/CISEqc + 1)));  // modifiers: CIS, SOCS3, p12EpoRpJAK2, p1EpoRpJAK2
  v16_v_15: pSTAT5 => npSTAT5; cyt*STAT5Imp*pSTAT5;
  v17_v_16: npSTAT5 => STAT5; nuc*STAT5Exp*npSTAT5;
  v18_v_17: => CISnRNA1; nuc*(-CISRNAEqc)*CISRNATurn*npSTAT5*(ActD - 1);  // modifiers: npSTAT5
  v19_v_18: CISnRNA1 => CISnRNA2; nuc*CISnRNA1*CISRNADelay;
  v20_v_19: CISnRNA2 => CISRNA; nuc*CISnRNA2*CISRNADelay;
  v21_v_20: CISRNA => ; cyt*CISRNA*CISRNATurn;
  v22_v_21: => CIS; cyt*CISRNA*CISEqc*CISTurn;  // modifiers: CISRNA
  v23_v_22: CIS => ; cyt*CIS*CISTurn;
  v24_v_23: => SOCS3; cyt*(-SOCS3Eqc)*SOCS3Turn*npSTAT5*(ActD - 1);  // modifiers: npSTAT5
  v25_v_24: SOCS3 => ; cyt*SOCS3*SOCS3Turn;
  v26_v_25: => SOCS3; cyt*SOCS3oe*SOCS3Eqc*SOCS3Turn*SOCS3EqcOE;

  // Unit definitions:
  unit time = 60 second;
  unit nM = 1e-9 mole;
  unit au = dimensionless; au is "arbitraryunits";
  unit pl = 1e-12 litre;
end
