// SBML level 2 version 4
// dcterms:bibliographicCitation: urn:miriam:pubmed:34379640

function Xi(x, alpha, r)
  1 + alpha*x*(x - 1)*(x - r);
end

function Function_for__J0(default_compartment, ks)
  ks/default_compartment;
end

function Function_for__J1(APC, CycCdk, bdeg, default_compartment)
  bdeg*CycCdk*APC/default_compartment;
end

model DeBoeck2021___Modular_approach_to_modeling_the_cell_cycle__simple_cell_cycle_model()
  // DeBoeck2021 - Modular approach to modeling the cell cycle, simple cell cycle model
  // Models the production and degradation of cyclin B that drives the early embryonic cell cycle. Cyclin B is degraded by APC/C. The activity of APC/C is modeled not through biochemical interactions, but through a 'functional response curve'. This can be ultrasensitive (with the parameter alpha=0). in this case the system does not oscillate. Importantly the response can be made bistable and the form of the bistability can be easily prescribed. With a bistable response, the system oscillates. The uploaded file corresponds to the model used for Figs.3H, I in the publication.
  // hasProperty mamo:MAMO_0000045
  // isDescribedBy doi:10.1371/journal.pcbi.1009008
  // occursIn ncit:C12508
  // isDescribedBy pubmed:34379640
  // hasProperty GO:0007049 GO:0051301 ncit:C19987 mamo:MAMO_0000045
  // biomodels.db:MODEL2212060001 biomodels.db:BIOMD0000001079

  // Compartments:
  compartment default_compartment = 1;  // SBO:0000410

  // Species:
  species CycCdk in default_compartment = 17.45;  // isVersionOf GO:0097125

  // Parameters:
  ks = 1.1;
  bdeg = 0.1;
  APC = 0.04;  // isVersionOf GO:0005680
  epsilon = 0.1;
  n = 15;
  K = 20;
  alpha = 4.16;
  r = 0.5;

  // Rate rules:
  APC' = 1/epsilon*(CycCdk^n/((K*Xi(APC, alpha, r))^n + CycCdk^n) - APC);

  // Reactions:
  _J0: -> CycCdk; default_compartment*Function_for__J0(default_compartment, ks); _J0 is "CycCdk synthesis";  // isVersionOf ncit:C61408
  _J1: CycCdk -> ; default_compartment*Function_for__J1(APC, CycCdk, bdeg, default_compartment); _J1 is "CycCdk degradation";  // isVersionOf SBO:0000179

  // Unit definitions:
  unit length = metre;
  unit area = metre^2;
  unit volume = litre;
  unit time = 0.06 second;
  unit substance = mole;
end
