// SBML level 3 version 1

function xi(x, alpha, r)
  1 + alpha*x*(x - 1)*(x - r);
end

model cellcycle_switches()
  // DeBoeck2021 - Modular approach to modeling the cell cycle, 5 ODE model with 3 bistable switches
  // Model of the mammalian cell cycle as a chain of bistable switches. There are three bistable responses: response of E2F to Cyclin D, of Cdk1 to Cyclin B and of APC/C to Cdk1 activity. The model for the given parameters admits a complex limit cycle characterized by transitions through the bistable switches. The bistable responses are modeled directly using a functional motif, not through biochemical interactions. This modular approach allows us to easily modify the properties of the bistable response curves. This version of the model corresponds to Fig. 7 in the publication. We illustrated how, using this model, the system can be coupled to the circadian clock, by periodically modifying thresholds of one of the switches. We also illustrated how to implement the restriction point checkpoint using this model (those applications are not coded in the associated sbml file and can be seen in Fig. 8 of the publication). A related, simpler model that illustrates the bistable motif is MODEL2212060001.
  // isDescribedBy doi:10.1371/journal.pcbi.1009008
  // hasProperty mamo:MAMO_0000045
  // biomodels.db:MODEL2212060002

  // Compartments:
  compartment default_compartment = 1;

  // Species:
  species CycD in default_compartment = 1e-12/default_compartment;
  species CycB in default_compartment = 1e-12/default_compartment;

  // Parameters:
  d_syn = 0.15;
  d_deg = 0.009;
  APC = 1e-12;
  delta_d = 0.05;
  b_syn = 0.03;
  E2F = 1e-12;
  b_deg = 0.003;
  delta_b = 0.05;
  epsilon_e2f = 0.01;
  n = 15;
  K_cyc_e2f = 120;
  alpha_e2f = 5;
  r = 0.5;
  Cdk = 1e-12;
  epsilon_cdk = 0.01;
  K_cyc_cdk = 40;
  alpha_cdk = 5;
  epsilon_apc = 0.01;
  K_cdk_apc = 20;
  alpha_apc = 5;

  // Rate rules:
  APC' = 1/epsilon_apc*(Cdk^n/((K_cdk_apc*xi(APC, alpha_apc, r))^n + Cdk^n) - APC);
  E2F' = 1/epsilon_e2f*(CycD^n/((K_cyc_e2f*xi(E2F, alpha_e2f, r))^n + CycD^n) - E2F);
  Cdk' = 1/epsilon_cdk*(CycB^n/((K_cyc_cdk*xi(Cdk/CycB, alpha_cdk, r))^n + CycB^n)*CycB - Cdk);

  // Reactions:
  _J0: -> CycD; d_syn;
  _J1: CycD -> ; d_deg*CycD*(APC + delta_d);
  _J2: -> CycB; b_syn*E2F;
  _J3: CycB -> ; b_deg*CycB*(APC + delta_b);
end
