// SBML level 2 version 3

model MODEL6655578762()
  // Ibrahim2008 - Mitotic Spindle Assembly Checkpoint - Convey variant
  // The Mitotic Spindle Assembly Checkpoint ((M)SAC) is an evolutionary conserved mechanism. This model incorporates the perspectives of three central control pathways, namely Mad1/Mad2 induced Cdc20 sequestering based on the Template Model, MCC formation, and APC inhibition. MCC:APC dissociation is described by two alternatives models, namely the "Dissociation" and the "Convey" model variants. Both these model are available in BioModels Database. This model corresponds to the "Convey" variant.
  // This model is described in the article:
  // In-silico modeling of the mitotic spindle assembly checkpoint.
  // Ibrahim B, Diekmann S, Schmitt E, Dittrich P
  // PLoS One. 2008 Feb 6;3(2):e1555.
  // Abstract:
  // BACKGROUND: The Mitotic Spindle Assembly Checkpoint ((M)SAC) is an evolutionary conserved mechanism that ensures the correct segregation of chromosomes by restraining cell cycle progression from entering anaphase until all chromosomes have made proper bipolar attachments to the mitotic spindle. Its malfunction can lead to cancer.
  // PRINCIPLE FINDINGS: We have constructed and validated for the human (M)SAC mechanism an in silico dynamical model, integrating 11 proteins and complexes. The model incorporates the perspectives of three central control pathways, namely Mad1/Mad2 induced Cdc20 sequestering based on the Template Model, MCC formation, and APC inhibition. Originating from the biochemical reactions for the underlying molecular processes, non-linear ordinary differential equations for the concentrations of 11 proteins and complexes of the (M)SAC are derived. Most of the kinetic constants are taken from literature, the remaining four unknown parameters are derived by an evolutionary optimization procedure for an objective function describing the dynamics of the APC:Cdc20 complex. MCC:APC dissociation is described by two alternatives, namely the "Dissociation" and the "Convey" model variants. The attachment of the kinetochore to microtubuli is simulated by a switching parameter silencing those reactions which are stopped by the attachment. For both, the Dissociation and the Convey variants, we compare two different scenarios concerning the microtubule attachment dependent control of the dissociation reaction. Our model is validated by simulation of ten perturbation experiments.
  // CONCLUSION: Only in the controlled case, our models show (M)SAC behaviour at meta- to anaphase transition in agreement with experimental observations. Our simulations revealed that for (M)SAC activation, Cdc20 is not fully sequestered; instead APC is inhibited by MCC binding.
  // This model describes the controlled dissociation variant of the mitotic spindle assembly checkpoint. If the tool you use has problems with events, you can uncomment the assignment rules for u and u_prime and comment out the list of events.
  // In accordance with the authors due to typos in the original publication some initial conditions and parameters were slightly changed in the model:
  // article model
  // [O-Mad2] 1.5e-7 M 1.3e-7 M
  // [BubR1:Bub3] 1.30e-7 M 1.27e-7 M
  // k -4 0.01 M -1 s -1 0.02 M -1 s -1
  // k -5 0.1 M -1 s -1 0.2 M -1 s -1
  // This model is hosted on BioModels Database and identified by: MODEL6655578762 .
  // To cite BioModels Database, please use: BioModels Database: An enhanced, curated and annotated resource for published quantitative kinetic models .
  // To the extent possible under law, all copyright and related or neighbouring rights to this encoded model have been dedicated to the public domain worldwide. Please refer to CC0 Public Domain Dedication for more information.
  // biomodels.db:MODEL6655578762
  // biomodels.db:BIOMD0000000187
  // isDescribedBy pubmed:18253502
  // isDerivedFrom pubmed:15694304
  // isVersionOf reactome:REACT_2137.2 GO:0007094
  // isPartOf kegg.pathway:hsa04110

  // Compartments:
  compartment Cytoplasm = 1;  // GO:0005737

  // Species:
  species Mad1_CMad2 in Cytoplasm = 5e-8; Mad1_CMad2 is "Mad1:C-Mad2";  // substance in mole; hasPart uniprot:Q13257 uniprot:Q9Y6D9; isVersionOf GO:0043234
  // Open conformation of Mad2
  species OMad2 in Cytoplasm = 1.3e-7; OMad2 is "O-Mad2";  // substance in mole; uniprot:Q13257
  species Mad1_CMad2_OMad2 in Cytoplasm = 0; Mad1_CMad2_OMad2 is "Mad1:C-Mad2:O-Mad2*";  // substance in mole; isVersionOf GO:0043234; hasPart uniprot:Q13257 uniprot:Q9Y6D9
  species Cdc20 in Cytoplasm = 2.2e-7;  // substance in mole; uniprot:Q12834
  species Cdc20_CMad2 in Cytoplasm = 0; Cdc20_CMad2 is "Cdc20:C-Mad2";  // substance in mole; hasPart uniprot:Q13257 uniprot:Q12834
  species Bub3_BubR1 in Cytoplasm = 1.27e-7; Bub3_BubR1 is "Bub3:BubR1";  // substance in mole; hasPart uniprot:Q60566 uniprot:O43684
  species MCC in Cytoplasm = 0;  // substance in mole; hasPart uniprot:Q12834 uniprot:Q13257 uniprot:Q60566 uniprot:O43684; GO:0033597
  species Bub3_BubR1_Cdc20 in Cytoplasm = 0; Bub3_BubR1_Cdc20 is "Bub3:BubR1:Cdc20";  // substance in mole; hasPart uniprot:Q12834 uniprot:Q60566 uniprot:O43684
  species APC in Cytoplasm = 9e-8;  // substance in mole; isVersionOf GO:0005680; hasPart uniprot:Q8NHZ8 uniprot:Q9BS18 uniprot:Q9NYG5 uniprot:Q9UM13
  species MCC_APC in Cytoplasm = 0; MCC_APC is "MCC:APC";  // substance in mole; hasPart uniprot:Q12834 uniprot:Q13257 uniprot:Q60566 uniprot:O43684; hasPart GO:0005680 GO:0033597
  species APC_Cdc20 in Cytoplasm = 0; APC_Cdc20 is "APC:Cdc20";  // substance in mole; hasPart uniprot:Q12834 uniprot:Q8NHZ8 uniprot:Q9BS18 uniprot:Q9NYG5

  // Parameters:
  k3f = 0.01 ps;
  kf6 = 1000 pMps;
  k5f = 10000 pMps;
  k5r = 0.2 ps;
  k2f = 100000000 pMps;
  k1f = 200000 pMps;
  k1r = 0.2 ps;
  k4f = 10000000 pMps;
  k4r = 0.02 ps;
  k7f = 100000000 pMps;
  k7bf = 0.08 ps;
  k8f = 5000000 pMps;
  k8r = 0.08 ps;
  // u = 1 : kinetochore unattached
  // u = 0 : kinetochore attached
  u = 1 dimensionless;
  // u = 0 : kinetochore unattached
  // u = 1 : kinetochore attached
  u_prime = 0 dimensionless;
  const_val_0 = 0 dimensionless;
  const_val_1 = 1 dimensionless;

  // Reactions:
  R1: Mad1_CMad2 + OMad2 -> Mad1_CMad2_OMad2; Cytoplasm*(u*k1f*Mad1_CMad2*OMad2 - k1r*Mad1_CMad2_OMad2);  // isVersionOf GO:0032092 GO:0043241 GO:0006461
  R2: Mad1_CMad2_OMad2 + Cdc20 => Mad1_CMad2 + Cdc20_CMad2; u*k2f*Mad1_CMad2_OMad2*Cdc20*Cytoplasm;  // isVersionOf GO:0032092 GO:0006461
  R3: Cdc20_CMad2 => Cdc20 + OMad2; k3f*Cdc20_CMad2*Cytoplasm;  // isVersionOf GO:0043241
  R4: Cdc20_CMad2 + Bub3_BubR1 -> MCC; Cytoplasm*(u*k4f*Cdc20_CMad2*Bub3_BubR1 - k4r*MCC);  // isVersionOf reactome:REACT_36.2 GO:0043241 GO:0006461
  R5: Bub3_BubR1 + Cdc20 -> Bub3_BubR1_Cdc20; Cytoplasm*(u*k5f*Bub3_BubR1*Cdc20 - k5r*Bub3_BubR1_Cdc20);  // isVersionOf GO:0043241 GO:0006461
  R6: OMad2 + Cdc20 => Cdc20_CMad2; kf6*OMad2*Cdc20*Cytoplasm;  // isVersionOf GO:0006461
  R7: MCC + APC => MCC_APC; u*k7f*MCC*APC*Cytoplasm;  // isVersionOf GO:0043623 GO:0051436
  R7b: MCC_APC => OMad2 + Bub3_BubR1 + APC_Cdc20; u_prime*k7bf*MCC_APC*Cytoplasm;  // isVersionOf GO:0043624 GO:0007092
  R8: APC + Cdc20 -> APC_Cdc20; Cytoplasm*(k8f*APC*Cdc20 - k8r*APC_Cdc20);  // isVersionOf GO:0043623 GO:0007092

  // Events:
  mt_attachment: at (time > 2000): u = const_val_0, u_prime = const_val_1; mt_attachment is "Microtubule attachment";

  // Unit definitions:
  unit ps = 1 / second; ps is "per second";
  unit pMps = litre / (mole * second); pMps is "liter per mole per second";
end
