// SBML level 2 version 4

model Koschorreck2008_InsulinClearance()
  // This model is from the article:
  // Mathematical modeling and analysis of insulin clearance in vivo.
  // Koschorreck M, Gilles ED. BMC Syst Biol. 2008 May 13;2:43. 18477391,
  // Abstract:
  // BACKGROUND: Analyzing the dynamics of insulin concentration in the blood is necessary for a comprehensive understanding of the effects of insulin in vivo. Insulin removal from the blood has been addressed in many studies. The results are highly variable with respect to insulin clearance and the relative contributions of hepatic and renal insulin degradation. RESULTS: We present a dynamic mathematical model of insulin concentration in the blood and of insulin receptor activation in hepatocytes. The model describes renal and hepatic insulin degradation, pancreatic insulin secretion and nonspecific insulin binding in the liver. Hepatic insulin receptor activation by insulin binding, receptor internalization and autophosphorylation is explicitly included in the model. We present a detailed mathematical analysis of insulin degradation and insulin clearance. Stationary model analysis shows that degradation rates, relative contributions of the different tissues to total insulin degradation and insulin clearance highly depend on the insulin concentration. CONCLUSION: This study provides a detailed dynamic model of insulin concentration in the blood and of insulin receptor activation in hepatocytes. Experimental data sets from literature are used for the model validation. We show that essential dynamic and stationary characteristics of insulin degradation are nonlinear and depend on the actual insulin concentration.
  // This model originates from BioModels Database: A Database of Annotated Published Models (http://www.ebi.ac.uk/biomodels/). It is copyright (c) 2005-2011 The BioModels.net Team.
  // For more information see the terms of use.
  // To cite BioModels Database, please use: Li C, Donizelli M, Rodriguez N, Dharuri H, Endler L, Chelliah V, Li L, He E, Henry A, Stefan MI, Snoep JL, Hucka M, Le Novère N, Laibe C (2010) BioModels Database: An enhanced, curated and annotated resource for published quantitative kinetic models. BMC Syst Biol., 4:92.
  // biomodels.db:MODEL1108040000
  // biomodels.db:BIOMD0000000345
  // isDescribedBy pubmed:18477391
  // occursIn BTO:0000089 BTO:0000575
  // isVersionOf GO:0038016 GO:1900076 GO:0005009
  // hasTaxon taxonomy:9606

  // Compartments:
  compartment compartment1 = 1;

  // Species:
  species $R in compartment1 = 35.3837;  // uniprot:P06213 GO:0005899
  species $ins in compartment1 = 100;  // uniprot:P01308 GO:0016088
  species $IR in compartment1 = 0;  // isVersionOf reactome:REACT_3518.1
  species $I2R in compartment1 = 0;  // hasVersion reactome:REACT_3518.1
  species $Rp in compartment1 = 0;  // isVersionOf reactome:REACT_4536.1
  species $IRp in compartment1 = 0;  // isVersionOf reactome:REACT_3057.1
  species $I2Rp in compartment1 = 0;  // hasVersion reactome:REACT_3057.1
  species $Ren in compartment1 = 4.6163;  // isVersionOf reactome:REACT_3854.1
  species $IRen in compartment1 = 0;  // occursIn reactome:REACT_599.1
  species $I2Ren in compartment1 = 0;
  species $RPen in compartment1 = 0;  // isVersionOf reactome:REACT_3809.1
  species $IRPen in compartment1 = 0;  // isVersionOf reactome:REACT_4836.1
  species $I2RPen in compartment1;  // hasVersion reactome:REACT_4836.1

  // Parameters:
  kins = 0.001;  // isVersionOf GO:0043559
  kins1d = 0.0004;
  kins2d = 0.04;
  kins1den = 0.001925;
  kins2den = 0.00385;
  kyd = 0.00385;
  kyden = 0.00722;
  kyp = 0.0231;
  intk1 = 0.00055;  // isVersionOf GO:0038016
  intk2 = 0.0002;  // isVersionOf GO:0038016
  reck1 = 0.001533;  // isVersionOf GO:0038020
  Rtotal = 40;
  k1ub = 0.35;  // isVersionOf GO:0043559
  k2ub = 0.2;
  pansec = 0.0016976;  // isVersionOf GO:0030073
  Kpan = 0.5;
  rholiver = 1051;
  bw = 200;
  var rliv;
  var rkid;
  var Ratetotal;
  var Fracliver;
  var Frackidney;
  var Cliver;
  var Ckidney;
  var Ctotal;
  var ReceptorIns;
  var ReceptorIns2;
  var ReceptorInsPM;
  var ReceptorIns2PM;
  var ReceptorInsEN;
  var ReceptorIns2EN;

  // Assignment rules:
  mkidney := 2*0.85*bw/230;
  mliver := 0.05*bw;
  vp := 0.03375*10^(-3)*bw;
  vhep := mliver/rholiver*0.78;
  vd := 0.272*10^(-3)*vhep*rholiver;
  I2RPen := Rtotal - R - IR - I2R - Rp - IRp - I2Rp - Ren - IRen - I2Ren - RPen - IRPen;
  Kkidney := 0.0225*10^(-3)*mkidney;
  r1 := kins*R*ins - kins1d*IR;
  r2 := kins*Rp*ins - kins1d*IRp;
  r3 := kins*IR*ins - kins2d*I2R;
  r4 := kins*IRp*ins - kins2d*I2Rp;
  r5 := kyd*Rp;
  r6 := kyp*IR - kyd*IRp;
  r7 := kyp*I2R - kyd*I2Rp;
  i1 := kins1den*IRen;
  i2 := kins1den*IRPen;
  i3 := kins2den*I2Ren;
  i4 := kins2den*I2RPen;
  i5 := kyden*RPen;
  i6 := kyp*IRen - kyden*IRPen;
  i7 := kyp*I2Ren - kyden*I2RPen;
  f1 := intk2*R - reck1*Ren;
  f2 := intk2*IR;
  f3 := intk2*I2R;
  f4 := intk1*Rp - reck1*RPen;
  f5 := intk1*IRp;
  f6 := intk1*I2Rp;
  rliv := -(-r1 - r2 - r3 - r4)*vhep/vp;
  rkid := Kkidney*ins/vp;
  Ratetotal := rkid + rliv;
  Fracliver := rliv/(rliv + rkid)*100;
  Frackidney := rkid/(rkid + rliv)*100;
  Cliver := rliv*vp*6000/ins;
  Ckidney := rkid*vp*6000/ins;
  Ctotal := Ckidney + Cliver;
  ReceptorIns := (Rtotal - R - Rp - Ren - RPen)/Rtotal;
  ReceptorInsPM := (IR + I2R + IRp + I2Rp)/Rtotal;
  ReceptorIns2 := (I2R + I2Ren + I2Rp + I2RPen)/Rtotal;
  ReceptorIns2PM := (I2R + I2Rp)/Rtotal;
  ReceptorInsEN := ReceptorIns - ReceptorInsPM;
  ReceptorIns2EN := ReceptorIns2 - ReceptorIns2PM;

  // Rate rules:
  R' = -r1 + r5 - f1;
  IR' = r1 - r3 - r6 - f2;
  I2R' = r3 - r7 - f3;
  Rp' = -r2 - r5 - f4;
  IRp' = r2 - r4 + r6 - f5;
  I2Rp' = r4 + r7 - f6;
  Ren' = i1 + i5 + f1;
  IRen' = -i1 + i3 - i6 + f2;
  I2Ren' = -i3 - i7 + f3;
  RPen' = i2 - i5 + f4;
  IRPen' = -i2 + i4 + i6 + f5;
end
