// SBML level 2 version 4
// dcterms:bibliographicCitation: Protein-Peptide Turnover Profiling reveals the order of PTM addition and removal during protein maturation urn:miriam:pubmed:36460637
// dcterms:bibliographicCitation: Protein-Peptide Turnover Profiling reveals the order of PTM addition and removal during protein maturation urn:miriam:doi:10.1038/s41467-022-35054-2

model Hammaren_Geissen2022_PPToP_Model12()
  // Hammaren-Geissen2022_PPToP_Model12
  // hasProperty mamo:MAMO_0000045
  // isDescribedBy pubmed:36460637
  // hasTaxon taxonomy:9606
  // isDescribedBy doi:10.1038/s41467-022-35054-2
  // isDescribedBy pubmed:36460637
  // hasProperty GO:0036211 mamo:MAMO_0000045

  // Compartments:
  compartment compartment = 1;

  // Species:
  species Pu in compartment = Pu_total; Pu is "Pu_old";  // CHEBI:36080
  species Pp in compartment = Pp_total; Pp is "Pp_old";  // CHEBI:36080
  species $Pu_new in compartment;  // CHEBI:36080
  species $Pp_new in compartment;  // CHEBI:36080

  // Parameters:
  kdegu = 0.0625;
  kdegp = 0.0625;
  ke = 0.0625;
  kw = 0.0625;
  var Pu_total; Pu_total is "Pu_old+new";
  var Pp_total; Pp_total is "Pp_old+new";
  ksyn = 0.0625;
  var Pu_observable; Pu_observable is "Ou_Pu_old_observable";
  var Pp_observable; Pp_observable is "Op_Pp_old_observable";
  var EntProt_observable; EntProt_observable is "O_P_observable";
  var Pu_old_clearance; Pu_old_clearance is "Pu_old_clearanceProfile";
  var Pp_old_clearance; Pp_old_clearance is "Pp_old_clearanceProfile";
  var P_old_clearance; P_old_clearance is "P_old_clearanceProfile";
  Initial_for_Pp_old_new = Pp_total; Initial_for_Pp_old_new is "Initial for Pp_old+new";
  Initial_for_Pu_old_new = Pu_total; Initial_for_Pu_old_new is "Initial for Pu_old+new";
  Initial_for_kdegp = kdegp;
  Initial_for_kdegu = kdegu;
  Initial_for_ke = ke;
  Initial_for_ksyn = ksyn;
  Initial_for_kw = kw;

  // Assignment rules:
  Pu_total := Initial_for_ksyn*(Initial_for_kdegp + Initial_for_ke)/(Initial_for_kdegp*Initial_for_kdegu + Initial_for_kdegu*Initial_for_ke + Initial_for_kdegp*Initial_for_kw);
  Pu_new := Initial_for_Pu_old_new - Pu;
  Pp_total := Initial_for_ksyn*Initial_for_kw/(Initial_for_kdegp*Initial_for_kdegu + Initial_for_kdegu*Initial_for_ke + Initial_for_kdegp*Initial_for_kw);
  Pp_new := Initial_for_Pp_old_new - Pp;
  Pu_observable := Pu/Initial_for_Pu_old_new;
  Pp_observable := Pp/Initial_for_Pp_old_new;
  EntProt_observable := (Pp + Pu)/(Initial_for_Pp_old_new + Initial_for_Pu_old_new);
  Pu_old_clearance := ln(Pu_observable);
  Pp_old_clearance := ln(Pp_observable);
  P_old_clearance := ln(EntProt_observable);

  // Reactions:
  Pu_degradation: Pu => ; compartment*kdegu*Pu;  // isVersionOf SBO:0000179
  PTM_writing: Pu => Pp; compartment*kw*Pu;  // isVersionOf ncit:C17019
  PTM_erasing: Pp => Pu; compartment*ke*Pp;  // isVersionOf GO:1903321
  Pp_degradation: Pp => ; compartment*kdegp*Pp;  // isVersionOf SBO:0000179

  // Unit definitions:
  unit length = metre;
  unit area = metre^2;
  unit volume = litre;
  unit time = second;
  unit substance = mole;
end
