// SBML level 2 version 4
// dcterms:bibliographicCitation: Protein-Peptide Turnover Profiling reveals the order of PTM addition and removal during protein maturation urn:miriam:pubmed:36460637
// dcterms:bibliographicCitation: Protein-Peptide Turnover Profiling reveals the order of PTM addition and removal during protein maturation urn:miriam:doi:10.1038/s41467-022-35054-2

model PPToP_Model12()
  // Hammaren_Geissen_2022_Model12
  // The model encodes the general biological process of protein synthesis and post-translational modification (PTM, such as protein phosphorylation), viewed through the eyes of a specific, widely-used experimental method. Specifically, we model measurements of pulsed stable isotope labelling of amino acids in cell culture (pSILAC), which is a method often used to quantify protein turnover (i.e. the degradation of old and replacement with new) of proteins in a cell.
  // isDescribedBy doi:10.1038/s41467-022-35054-2
  // isDescribedBy pubmed:36460637
  // hasProperty mamo:MAMO_0000045

  // Compartments:
  compartment compartment = 1;

  // Species:
  species Pu in compartment = Pu_total; Pu is "Pu_old";
  species Pp in compartment = Pp_total; Pp is "Pp_old";
  species $Pu_new in compartment;
  species $Pp_new in compartment;

  // Parameters:
  kdegu = 0.5;
  kdegp = 0.1;
  ke = 0.8;
  kw = 0.1;
  var Pu_total; Pu_total is "Pu_old+new";
  var Pp_total; Pp_total is "Pp_old+new";
  ksyn = 0.1;
  var Pu_observable; Pu_observable is "Ou_Pu_old_observable";
  var Pp_observable; Pp_observable is "Op_Pp_old_observable";
  var EntProt_observable; EntProt_observable is "O_P_observable";
  ModelValue_4_0 = Pp_total; ModelValue_4_0 is "Initial for Pp_old+new";
  ModelValue_5_0 = Pu_total; ModelValue_5_0 is "Initial for Pu_old+new";
  ModelValue_9_0 = kdegp; ModelValue_9_0 is "Initial for kdegp";
  ModelValue_7_0 = kdegu; ModelValue_7_0 is "Initial for kdegu";
  ModelValue_8_0 = ke; ModelValue_8_0 is "Initial for ke";
  ModelValue_3_0 = ksyn; ModelValue_3_0 is "Initial for ksyn";
  ModelValue_6_0 = kw; ModelValue_6_0 is "Initial for kw";

  // Assignment rules:
  Pu_total := ModelValue_3_0*(ModelValue_9_0 + ModelValue_8_0)/(ModelValue_9_0*ModelValue_7_0 + ModelValue_7_0*ModelValue_8_0 + ModelValue_9_0*ModelValue_6_0);
  Pu_observable := Pu/ModelValue_5_0;
  Pu_old_clearance := ln(Pu_observable);
  Pp_total := ModelValue_3_0*ModelValue_6_0/(ModelValue_9_0*ModelValue_7_0 + ModelValue_7_0*ModelValue_8_0 + ModelValue_9_0*ModelValue_6_0);
  Pp_new := ModelValue_4_0 - Pp;
  Pp_observable := Pp/ModelValue_4_0;
  Pp_old_clearance := ln(Pp_observable);
  EntProt_observable := (Pp + Pu)/(ModelValue_4_0 + ModelValue_5_0);
  P_old_clearance := ln(EntProt_observable);
  Pu_new := ModelValue_5_0 - Pu;

  // Reactions:
  Pu_degradation: Pu => ; compartment*kdegu*Pu;
  PTM_writing: Pu => Pp; compartment*kw*Pu;
  PTM_erasing: Pp => Pu; compartment*ke*Pp;
  Pp_degradation: Pp => ; compartment*kdegp*Pp;

  // Unit definitions:
  unit substance = mole;
  unit length = metre;
  unit area = metre^2;
  unit volume = litre;
  unit time = second;
end
